// SBML level 2 version 4

model mod()
  // Edelstein1996_EPSP_AChSpecies
  // Model of a nicotinic EPSP in a Torpedo electric organ by Edelstein et al (1996)
  // This model originates from BioModels Database: A Database of Annotated Published Models (http://www.ebi.ac.uk/biomodels/). It is copyright (c) 2005-2010 The BioModels.net Team.
  // To the extent possible under law, all copyright and related or neighbouring rights to this encoded model have been dedicated to the public domain worldwide. Please refer to CC0 Public Domain Dedication for more information.
  // In summary, you are entitled to use this encoded model in absolutely any manner you deem suitable, verbatim, or with modification, alone or embedded it in a larger context, redistribute it, commercially or not, in a restricted way or not..
  // To cite BioModels Database, please use: Li C, Donizelli M, Rodriguez N, Dharuri H, Endler L, Chelliah V, Li L, He E, Henry A, Stefan MI, Snoep JL, Hucka M, Le Novère N, Laibe C (2010) BioModels Database: An enhanced, curated and annotated resource for published quantitative kinetic models. BMC Syst Biol., 4:92.
  // biomodels.db:BIOMD0000000002
  // biomodels.db:MODEL6614086398
  // isDescribedBy pubmed:8983160
  // isVersionOf GO:0007274 GO:0007166
  // occursIn taxonomy:7787

  // Compartments:
  compartment comp1 = 1e-16; comp1 is "compartment1";  // GO:0031594

  // Species:
  // biliganded basal state
  species BLL in comp1 = 0; BLL is "BasalACh2";  // isVersionOf interpro:IPR002394 GO:0005892
  // monoliganded intermediate
  species IL in comp1 = 0; IL is "IntermediateACh";  // isVersionOf interpro:IPR002394 GO:0005892
  // monoliganded active state
  species AL in comp1 = 0; AL is "ActiveACh";  // isVersionOf interpro:IPR002394 GO:0005892
  // unkiganded active state
  species A in comp1 = 0; A is "Active";  // isVersionOf GO:0005892
  // monoliganded basal state
  species BL in comp1 = 0; BL is "BasalACh";  // isVersionOf interpro:IPR002394 GO:0005892
  // unliganded basal state
  species B in comp1 = 1e-22/comp1; B is "Basal";  // isVersionOf interpro:IPR002394 GO:0005892
  // biliganded desensitised state
  species DLL in comp1 = 0; DLL is "DesensitisedACh2";  // isVersionOf GO:0005892
  // fully desensitised state
  species D in comp1 = 0; D is "Desensitised";  // isVersionOf interpro:IPR002394 GO:0005892
  // biliganded intermediate
  species ILL in comp1 = 0; ILL is "IntermediateACh2";  // isVersionOf interpro:IPR002394 GO:0005892
  // monoliganded desensitised state
  species DL in comp1 = 0; DL is "DesensitisedACh";  // isVersionOf interpro:IPR002394 GO:0005892
  // unliganted intermediate
  species I in comp1 = 0; I is "Intermediate";  // isVersionOf interpro:IPR002394 GO:0005892
  // biliganted active state
  species ALL in comp1 = 0; ALL is "ActiveACh2";  // isVersionOf interpro:IPR002394 GO:0005892
  // ligand
  species L in comp1 = 1e-21/comp1; L is "ACh";  // CHEBI:15355 kegg.compound:C01996

  // Parameters:
  kf_0 = 300000000;
  kr_0 = 8000;
  kf_1 = 150000000;
  kr_1 = 16000;
  kf_2 = 30000;
  kr_2 = 700;
  kf_3 = 300000000;
  kr_3 = 8.64;
  kf_4 = 150000000;
  kr_4 = 17.28;
  kf_5 = 0.54;
  kr_5 = 10800;
  kf_6 = 130;
  kr_6 = 2740;
  kf_7 = 300000000;
  kr_7 = 4;
  kf_8 = 150000000;
  kr_8 = 8;
  kf_9 = 19.7;
  kr_9 = 3.74;
  kf_10 = 19.85;
  kr_10 = 1.74;
  kf_11 = 20;
  kr_11 = 0.81;
  kf_12 = 300000000;
  kr_12 = 4;
  kf_13 = 150000000;
  kr_13 = 8;
  kf_14 = 0.05;
  kr_14 = 0.0012;
  kf_15 = 0.05;
  kr_15 = 0.0012;
  kf_16 = 0.05;
  kr_16 = 0.0012;

  // Reactions:
  // kf_0 * B * L - kr_0 * BL
  // first ligand on basal
  React0: B + L -> BL; comp1*(kf_0*B*L - kr_0*BL);  // GO:0042166
  // kf_1 * BL * L - kr_1 * BLL
  // second ligand on basal
  React1: BL + L -> BLL; comp1*(kf_1*BL*L - kr_1*BLL);  // GO:0042166
  // kf_2 * BLL - kr_2 * ALL
  // opening of biliganded
  React2: BLL -> ALL; comp1*(kf_2*BLL - kr_2*ALL);  // GO:0004889
  // kf_3 * A * L - kr_3 * AL
  // first ligand on active
  React3: A + L -> AL; comp1*(kf_3*A*L - kr_3*AL);  // GO:0042166
  // kf_4 * AL * L - kr_4 * ALL
  // second ligand on active
  React4: AL + L -> ALL; comp1*(kf_4*AL*L - kr_4*ALL);  // GO:0042166
  // kf_5 * B - kr_5 * A
  // opening of unliganded
  React5: B -> A; comp1*(kf_5*B - kr_5*A);  // GO:0004889
  // kf_6 * BL - kr_6 * AL
  // opening of monoliganded
  React6: BL -> AL; comp1*(kf_6*BL - kr_6*AL);  // GO:0004889
  // kf_7 * I * L - kr_7 * IL
  // first ligand on intermediate
  React7: I + L -> IL; comp1*(kf_7*I*L - kr_7*IL);  // GO:0042166
  // kf_8 * IL * L - kr_8 * ILL
  // second ligand on intermediate
  React8: IL + L -> ILL; comp1*(kf_8*IL*L - kr_8*ILL);  // GO:0042166
  // kf_9 * A - kr_9 * I
  // unlig act <=> unlig interm
  React9: A -> I; comp1*(kf_9*A - kr_9*I);  // GO:0004889
  // kf_10 * AL - kr_10 * IL
  // monolig act <=> monolig interm
  React10: AL -> IL; comp1*(kf_10*AL - kr_10*IL);  // GO:0004889
  // kf_11 * ALL - kr_11 * ILL
  // bilig act <=> bilig interm
  React11: ALL -> ILL; comp1*(kf_11*ALL - kr_11*ILL);  // GO:0004889
  // kf_12 * D * L - kr_12 * DL
  // first ligand on desensitised
  React12: D + L -> DL; comp1*(kf_12*D*L - kr_12*DL);  // GO:0042166
  // kf_13 * DL * L - kr_13 * DLL
  // second ligand on desensitised
  React13: DL + L -> DLL; comp1*(kf_13*DL*L - kr_13*DLL);  // GO:0042166
  // kf_14 * I - kr_14 * D
  // unlig interm <=> unlig desen
  React14: I -> D; comp1*(kf_14*I - kr_14*D);
  // kf_15 * IL - kr_15 * DL
  // monolig interm <=> monolig desen
  React15: IL -> DL; comp1*(kf_15*IL - kr_15*DL);
  // kf_16 * ILL - kr_16 * DLL
  // bilig interm <=> bilig desen
  React16: ILL -> DLL; comp1*(kf_16*ILL - kr_16*DLL);
end
