// SBML level 2 version 1

model untitled()
  // Poolman2004_CalvinCycle
  // This a model from the article:
  // Applications of metabolic modelling to plant metabolism.
  // Poolman MG ,Assmus HE, Fell DA J. Exp. Bot.[2004 May; Volume: 55 (Issue: 400 )]: 1177-86 15073223,
  // Abstract:
  // In this paper some of the general concepts underpinning the computer modelling of metabolic systems are introduced. The difference between kinetic and structural modelling is emphasized, and the more important techniques from both, along with the physiological implications, are described. These approaches are then illustrated by descriptions of other work, in which they have been applied to models of the Calvin cycle, sucrose metabolism in sugar cane, and starch metabolism in potatoes.
  // This model describes the non oxidative Calvin cycle as depicted in Poolman et al; J Exp Bot (2004) 55:1177-1186, fig 2. Reaction E20: E4P + F6P ↔ S7P + GAP, is depicted in the figure, but not included in the model. The light reaction: ADP + P i → ATP, is included in the model, but only mentioned in the figure caption. The parameters and initial concentrations are the same as in Poolman, 1999, Computer Modelling Applied to the Calvin Cycle, PhD Thesis, Oxford Brookes University, Appendix A (available at at http://mudshark.brookes.ac.uk/index.php/Publications/Theses/Mark)
  // © Mark Poolman (mgpoolman@brookes.ac.uk) 1995-2002
  // Based on a description by Pettersson 1988, Eur. J. Biochem. 175, 661-672
  // Differences are:
  // 1 - Reactions assumed by Pettersson to be in equilibrium have fast mass action kinetics.
  // 2 - Introduction of the parameter PGAxpMult to modulate PGA export through TPT.
  // 3 - Introduction of Starch phosphorylase reaction.
  // This file may be freely copied or translated into other formats provided:
  // 1 - This notice is reproduced in its entirety
  // 2 - Published material making use of (information gained from) this model cites at least:
  // (a) Poolman, 1999, Computer Modelling Applied to the Calvin Cycle, PhD Thesis, Oxford Brookes University
  // (b) Poolman, Fell, and Thomas. 2000, Modelling Photosynthesis and its control, J. Exp. Bot. 51, 319-328
  // or
  // (c) Poolman et al. 2001, Computer modelling and experimental evidence for two steady states in the photosynthetic Calvin cycle. Eur. J. Biochem. 268, 2810-2816
  // Further related information may be found at http://mudshark.brookes.ac.uk.
  // This model originates from BioModels Database: A Database of Annotated Published Models (http://www.ebi.ac.uk/biomodels/).
  // To the extent possible under law, all copyright and related or neighbouring rights to this encoded model have been dedicated to the public domain worldwide. Please refer to CC0 Public Domain Dedication for more information.
  // In summary, you are entitled to use this encoded model in absolutely any manner you deem suitable, verbatim, or with modification, alone or embedded it in a larger context, redistribute it, commercially or not, in a restricted way or not..
  // To cite BioModels Database, please use: Li C, Donizelli M, Rodriguez N, Dharuri H, Endler L, Chelliah V, Li L, He E, Henry A, Stefan MI, Snoep JL, Hucka M, Le Novère N, Laibe C (2010) BioModels Database: An enhanced, curated and annotated resource for published quantitative kinetic models. BMC Syst Biol., 4:92.
  // biomodels.db:BIOMD0000000013
  // biomodels.db:MODEL6615594069
  // isDescribedBy pubmed:15073223
  // occursIn taxonomy:4097
  // isVersionOf GO:0019253 GO:0015979

  // Compartments:
  compartment chloroplast = 1;  // GO:0009570
  compartment cytosol = 1;  // GO:0005829

  // Species:
  species $x_CO2 in chloroplast = 1;  // CHEBI:16526 kegg.compound:C00011
  species RuBP_ch in chloroplast = 0.33644;  // kegg.compound:C01182
  species PGA_ch in chloroplast = 3.35479;  // kegg.compound:C00197
  species ATP_ch in chloroplast = 0.49806;  // CHEBI:15422 kegg.compound:C00002
  species BPGA_ch in chloroplast = 0.14825;  // kegg.compound:C00236
  species $x_NADPH_ch in chloroplast = 0.21;  // CHEBI:16474 kegg.compound:C00005
  species GAP_ch in chloroplast = 0.01334;  // CHEBI:17138 kegg.compound:C00118
  species Pi_ch in chloroplast = 1.5662;  // CHEBI:18367 kegg.compound:C00009
  species DHAP_ch in chloroplast = 0.29345;  // CHEBI:16108 kegg.compound:C00111
  species FBP_ch in chloroplast = 0.02776;  // CHEBI:28013 kegg.compound:C05378
  species F6P_ch in chloroplast = 1.36481;  // isVersionOf CHEBI:57634
  species E4P_ch in chloroplast = 0.41021;  // CHEBI:48153 kegg.compound:C00279
  species X5P_ch in chloroplast = 0.00363;  // CHEBI:16332 kegg.compound:C00231
  species SBP_ch in chloroplast = 1.56486;  // CHEBI:17969 kegg.compound:C00447
  species S7P_ch in chloroplast = 0.00541;  // CHEBI:15721 kegg.compound:C05382
  species R5P_ch in chloroplast = 0.00599;  // CHEBI:17797 kegg.compound:C00117
  species Ru5P_ch in chloroplast = 0.00235;  // CHEBI:17363 kegg.compound:C00199
  species $x_Pi_cyt in cytosol = 0.5;  // CHEBI:18367 kegg.compound:C00009
  species $x_GAP_cyt in cytosol = 1;  // CHEBI:17138 kegg.compound:C00661
  species G6P_ch in chloroplast = 3.1396;  // CHEBI:14314 kegg.compound:C00668
  species $x_NADP_ch in chloroplast = 0.29;  // CHEBI:18009 kegg.compound:C00006
  species $x_PGA_cyt in cytosol = 1;  // kegg.compound:C00197
  species ADP_ch in chloroplast = 0.00149;  // CHEBI:16761 kegg.compound:C00008
  species $x_DHAP_cyt in cytosol = 1;  // CHEBI:16108 kegg.compound:C00111
  species $x_Proton_ch in chloroplast = 2.512e-5;  // CHEBI:24636
  species G1P_ch in chloroplast = 0.18206;  // CHEBI:58601 kegg.compound:C00103
  species $x_Starch_ch in chloroplast = 1;  // kegg.compound:C00369

  // Parameters:
  Light_on = 1;

  // Reactions:
  E1: RuBP_ch + $x_CO2 => 2 PGA_ch; Light_on*Rbco_vm*RuBP_ch*chloroplast/(RuBP_ch + Rbco_km*(1 + PGA_ch/Rbco_KiPGA + FBP_ch/Rbco_KiFBP + SBP_ch/Rbco_KiSBP + Pi_ch/Rbco_KiPi + x_NADPH_ch/Rbco_KiNADPH));  // modifiers: FBP_ch, SBP_ch, Pi_ch, x_NADPH_ch; isVersionOf ec-code:4.1.1.39; kegg.reaction:R00024
    Rbco_vm = 340; Rbco_km = 0.02; Rbco_KiPGA = 0.84; Rbco_KiFBP = 0.04; Rbco_KiSBP = 0.075; Rbco_KiPi = 0.9; Rbco_KiNADPH = 0.07;
  E2: PGA_ch + ATP_ch => BPGA_ch + ADP_ch; Light_on*PGK_v*chloroplast*(PGA_ch*ATP_ch - BPGA_ch*ADP_ch/q2);  // isVersionOf ec-code:2.7.2.3; kegg.reaction:R01512 reactome:REACT_1186
    PGK_v = 500000000; q2 = 0.00031;
  E3: $x_NADPH_ch + BPGA_ch + $x_Proton_ch => $x_NADP_ch + GAP_ch + Pi_ch; Light_on*G3Pdh_v*chloroplast*(BPGA_ch*x_NADPH_ch*x_Proton_ch - x_NADP_ch*GAP_ch*Pi_ch/q3);  // isVersionOf ec-code:1.2.1.13; kegg.reaction:R01063
    G3Pdh_v = 500000000; q3 = 16000000;
  E4: GAP_ch -> DHAP_ch; chloroplast*TPI_v*(GAP_ch - DHAP_ch/q4);  // isVersionOf ec-code:5.3.1.1; kegg.reaction:R01015 reactome:REACT_775
    TPI_v = 500000000; q4 = 22;
  E5: GAP_ch + DHAP_ch -> FBP_ch; F_Aldo_v*chloroplast*(DHAP_ch*GAP_ch - FBP_ch/q5);  // isVersionOf ec-code:4.1.2.13; kegg.reaction:R01070 reactome:REACT_1602
    F_Aldo_v = 500000000; q5 = 7.1;
  E6: FBP_ch => F6P_ch + Pi_ch; Light_on*FBPase_ch_vm*FBP_ch*chloroplast/(FBP_ch + FBPase_ch_km*(1 + F6P_ch/FBPase_ch_KiF6P + Pi_ch/FBPase_ch_KiPi));  // isVersionOf ec-code:3.1.3.11; kegg.reaction:R04780
    FBPase_ch_vm = 200; FBPase_ch_km = 0.03; FBPase_ch_KiF6P = 0.7; FBPase_ch_KiPi = 12;
  E7: GAP_ch + F6P_ch -> X5P_ch + E4P_ch; chloroplast*F_TKL_v*(F6P_ch*GAP_ch - E4P_ch*X5P_ch/q7);  // isVersionOf ec-code:2.2.1.1; kegg.reaction:R01830 reactome:REACT_1811
    F_TKL_v = 500000000; q7 = 0.084;
  E8: DHAP_ch + E4P_ch -> SBP_ch; chloroplast*E_Aldo_v*(E4P_ch*DHAP_ch - SBP_ch/q8);  // isVersionOf ec-code:4.1.2.13; kegg.reaction:R01829
    E_Aldo_v = 500000000; q8 = 13;
  E9: SBP_ch => Pi_ch + S7P_ch; Light_on*SBPase_ch_vm*SBP_ch*chloroplast/(SBP_ch + SBPase_ch_km*(1 + Pi_ch/SBPase_ch_KiPi));  // isVersionOf ec-code:3.1.3.37; kegg.reaction:R01845
    SBPase_ch_vm = 40; SBPase_ch_km = 0.013; SBPase_ch_KiPi = 12;
  E10: S7P_ch + GAP_ch -> R5P_ch + X5P_ch; chloroplast*G_TKL_v*(GAP_ch*S7P_ch - X5P_ch*R5P_ch/q10);  // isVersionOf ec-code:2.2.1.1; kegg.reaction:R01641 reactome:REACT_1629
    G_TKL_v = 500000000; q10 = 0.85;
  E11: R5P_ch -> Ru5P_ch; R5Piso_v*chloroplast*(R5P_ch - Ru5P_ch/q11);  // isVersionOf ec-code:5.3.1.6; kegg.reaction:R01056 reactome:REACT_2033
    R5Piso_v = 500000000; q11 = 0.4;
  E12: X5P_ch -> Ru5P_ch; chloroplast*X5Pepi_v*(X5P_ch - Ru5P_ch/q12);  // isVersionOf ec-code:5.1.3.1; kegg.reaction:R01429 reactome:REACT_1522
    X5Pepi_v = 500000000; q12 = 0.67;
  E13: Ru5P_ch + ATP_ch => RuBP_ch + ADP_ch; Light_on*Ru5Pk_ch_vm*Ru5P_ch*chloroplast*ATP_ch/((Ru5P_ch + Ru5Pk_ch_km1*(1 + PGA_ch/Ru5Pk_ch_KiPGA + RuBP_ch/Ru5Pk_ch_KiRuBP + Pi_ch/Ru5Pk_ch_KiPi))*(ATP_ch*(1 + ADP_ch/Ru5Pk_ch_KiADP1) + Ru5Pk_ch_km2*(1 + ADP_ch/Ru5Pk_ch_KiADP2)));  // modifiers: PGA_ch, Pi_ch; isVersionOf ec-code:2.7.1.19; kegg.reaction:R01423
    Ru5Pk_ch_vm = 10000; Ru5Pk_ch_km1 = 0.05; Ru5Pk_ch_KiPGA = 2; Ru5Pk_ch_KiRuBP = 0.7; Ru5Pk_ch_KiPi = 4; Ru5Pk_ch_KiADP1 = 2.5; Ru5Pk_ch_km2 = 0.05; Ru5Pk_ch_KiADP2 = 0.4;
  E14: F6P_ch -> G6P_ch; PGI_v*chloroplast*(F6P_ch - G6P_ch/q14);  // isVersionOf ec-code:5.3.1.9; kegg.reaction:R00771 reactome:REACT_1164
    PGI_v = 500000000; q14 = 2.3;
  E15: G6P_ch -> G1P_ch; PGM_v*chloroplast*(G6P_ch - G1P_ch/q15);  // kegg.reaction:R00959; isVersionOf ec-code:5.4.2.2
    PGM_v = 500000000; q15 = 0.058;
  light_reaction: Pi_ch + ADP_ch => ATP_ch; Light_on*LR_vm*ADP_ch*Pi_ch*chloroplast/((ADP_ch + LR_kmADP)*(Pi_ch + LR_kmPi));  // isVersionOf GO:0006176
    LR_vm = 3500; LR_kmADP = 0.014; LR_kmPi = 0.3;
  E16: ATP_ch + G1P_ch => $x_Starch_ch + ADP_ch + 2 Pi_ch; StSyn_vm*G1P_ch*ATP_ch*chloroplast/((G1P_ch + stsyn_ch_km1)*(1 + ADP_ch/stsyn_ch_Ki)*(ATP_ch + stsyn_ch_km2) + stsyn_ch_km2*Pi_ch/(stsyn_ch_ka1*PGA_ch) + stsyn_ch_ka2*F6P_ch + stsyn_ch_ka3*FBP_ch);  // modifiers: PGA_ch, F6P_ch, FBP_ch; kegg.reaction:R02111; isVersionOf ec-code:2.4.1.1
    StSyn_vm = 40; stsyn_ch_km1 = 0.08; stsyn_ch_Ki = 10; stsyn_ch_km2 = 0.08; stsyn_ch_ka1 = 0.1; stsyn_ch_ka2 = 0.02; stsyn_ch_ka3 = 0.02;
  E17: $x_Starch_ch + Pi_ch => G1P_ch; StPase_Vm*Pi_ch*chloroplast/(Pi_ch + StPase_km*(1 + G1P_ch/StPase_kiG1P));  // kegg.reaction:R02111; isVersionOf ec-code:2.4.1.1
    StPase_Vm = 40; StPase_km = 0.1; StPase_kiG1P = 0.05;
  E18_DHAP: $x_Pi_cyt + DHAP_ch => $x_DHAP_cyt + Pi_ch; E18_DHAP_TP_Piap_vm*DHAP_ch*chloroplast/(E18_DHAP_TP_Piap_kDHAP_ch*(1 + (1 + E18_DHAP_TP_Piap_kPi_cyt/x_Pi_cyt)*(Pi_ch/E18_DHAP_TP_Piap_kPi_ch + PGA_ch/E18_DHAP_TP_Piap_kPGA_ch + DHAP_ch/E18_DHAP_TP_Piap_kDHAP_ch + GAP_ch/E18_DHAP_TP_Piap_kGAP_ch)));  // modifiers: PGA_ch, GAP_ch; isVersionOf GO:0051407
    E18_DHAP_TP_Piap_vm = 250; E18_DHAP_TP_Piap_kDHAP_ch = 0.077; E18_DHAP_TP_Piap_kPi_cyt = 0.74; E18_DHAP_TP_Piap_kPi_ch = 0.63; E18_DHAP_TP_Piap_kPGA_ch = 0.25; E18_DHAP_TP_Piap_kGAP_ch = 0.075;
  E18_PGA: $x_Pi_cyt + PGA_ch => $x_PGA_cyt + Pi_ch; PGA_xpMult*E18_PGA_TP_Piap_vm*PGA_ch*chloroplast/(E18_PGA_TP_Piap_kPGA_ch*(1 + (1 + E18_PGA_TP_Piap_kPi_cyt/x_Pi_cyt)*(Pi_ch/E18_PGA_TP_Piap_kPi_ch + PGA_ch/E18_PGA_TP_Piap_kPGA_ch + DHAP_ch/E18_PGA_TP_Piap_kDHAP_ch + GAP_ch/E18_PGA_TP_Piap_kGAP_ch)));  // modifiers: DHAP_ch, GAP_ch; isVersionOf GO:0051408
    PGA_xpMult = 0.75; E18_PGA_TP_Piap_vm = 250; E18_PGA_TP_Piap_kPGA_ch = 0.25; E18_PGA_TP_Piap_kPi_cyt = 0.74; E18_PGA_TP_Piap_kPi_ch = 0.63; E18_PGA_TP_Piap_kDHAP_ch = 0.077; E18_PGA_TP_Piap_kGAP_ch = 0.075;
  E18_GAP: $x_Pi_cyt + GAP_ch => $x_GAP_cyt + Pi_ch; E18_GAP_TP_Piap_vm*GAP_ch*chloroplast/(E18_GAP_TP_Piap_kGAP_ch*(1 + (1 + E18_GAP_TP_Piap_kPi_cyt/x_Pi_cyt)*(Pi_ch/E18_GAP_TP_Piap_kPi_ch + PGA_ch/E18_GAP_TP_Piap_kPGA_ch + DHAP_ch/E18_GAP_TP_Piap_kDHAP_ch + GAP_ch/E18_GAP_TP_Piap_kGAP_ch)));  // modifiers: PGA_ch, DHAP_ch; isVersionOf GO:0051408
    E18_GAP_TP_Piap_vm = 250; E18_GAP_TP_Piap_kGAP_ch = 0.075; E18_GAP_TP_Piap_kPi_cyt = 0.74; E18_GAP_TP_Piap_kPi_ch = 0.63; E18_GAP_TP_Piap_kPGA_ch = 0.25; E18_GAP_TP_Piap_kDHAP_ch = 0.077;

  // Unit definitions:
  unit substance = 1e-3 mole; substance is "mM";
end
