// SBML level 2 version 1

model MAPK_in_Scaffold()
  // Levchenko2000_MAPK_Scaffold
  // MAPK cascade on a scaffold
  // Citation
  // Levchenko, A., Bruck, J., Sternberg, P.W. (2000) .Scaffold proteins may biphasically affect the levels of mitogen-activated protein kinase signaling and reduce its threshold properties. Proc. Natl. Acad. Sci. USA 97(11):5818-5823. http://www.pnas.org/cgi/content/abstract/97/11/5818
  // Description
  // This model describes a basic 3-stage Mitogen Activated Protein Kinase (MAPK). Kinases in solution are written as K[3,J], K[2,J], K[1,J] for MAPKKK, MAPKK, and MAPK, respectively, J indicates the phosphorylation level, J=0,1 for K3 and J=0,1,2 for K2 and K1. Scaffolds have three slots, for MAPK, MAPKK, and MAPKKK, respectively. Bound and free scaffold are denoted as S[i,j,k], where i, j, and k indicate the binding of K[1,i], K[2,j] and K[3,k] in their respective slots. Here i,j=-1,0,1,or,2 and k=-1,0,or,1. A value of -1 means the slot is empty, 0 means the unphorphorylated kinase is bound, 1 means the singly phosphorylated kinase is bound, and 2 means the doubly phosphorylated kinase is bound. Thus S[1,-1,2] is a scaffold with K[3,1] bound in the first slot and K[1,2] in the third slot, while the second slot is empty.Note: Indices X[I,J,K] are translated into the unindexed variable X_I_J_K and so forth in the SBML. Negative indices are translated as mI, etc, thus S[1,-1,2] becomes S_1_m1_2.
  // Rate constant Reaction
  // a10 = 5. MAPKP + K[1, 2] -> K_MAPKP[1, 2]
  // a1 = 1. RAFK + K[3, 0] -> K_RAFK[3, 0]
  // a2 = 0.5 RAFP + K[3, 1] -> K_RAFP[3, 1]
  // a3 = 3.3 K[2, 0] + K[3, 1] -> K_K[2, 0, 3, 1]
  // a4 = 10. MEKP + K[2, 1] -> K_MEKP[2, 1]
  // a5 = 3.3 K[2, 1] + K[3, 1] -> K_K[2, 1, 3, 1]
  // a6 = 10. MEKP + K[2, 2] -> K_MEKP[2, 2]
  // a7 = 20. K[1, 0] + K[2, 2] -> K_K[1, 0, 2, 2]
  // a8 = 5. MAPKP + K[1, 1] -> K_MAPKP[1, 1]
  // a9 = 20. K[1, 1] + K[2, 2] -> K_K[1, 1, 2, 2]
  // d10 = 0.4 K_MAPKP[1, 2] -> MAPKP + K[1, 2]
  // d1 = 0.4 K_RAFK[3, 0] -> RAFK + K[3, 0]
  // d1a = 0 S_RAFK[0, 0, 0] -> RAFK + S[0, 0, 0]
  // d1a = 0 S_RAFK[0, -1, 0] -> RAFK + S[0, -1, 0]
  // d1a = 0 S_RAFK[0, 1, 0] -> RAFK + S[0, 1, 0]
  // d1a = 0 S_RAFK[0, 2, 0] -> RAFK + S[0, 2, 0]
  // d1a = 0 S_RAFK[-1, 0, 0] -> RAFK + S[-1, 0, 0]
  // d1a = 0 S_RAFK[1, 0, 0] -> RAFK + S[1, 0, 0]
  // d1a = 0 S_RAFK[-1, -1, 0] -> RAFK + S[-1, -1, 0]
  // d1a = 0 S_RAFK[-1, 1, 0] -> RAFK + S[-1, 1, 0]
  // d1a = 0 S_RAFK[1, -1, 0] -> RAFK + S[1, -1, 0]
  // d1a = 0 S_RAFK[1, 1, 0] -> RAFK + S[1, 1, 0]
  // d1a = 0 S_RAFK[-1, 2, 0] -> RAFK + S[-1, 2, 0]
  // d1a = 0 S_RAFK[1, 2, 0] -> RAFK + S[1, 2, 0]
  // d1a = 0 S_RAFK[2, 0, 0] -> RAFK + S[2, 0, 0]
  // d1a = 0 S_RAFK[2, -1, 0] -> RAFK + S[2, -1, 0]
  // d1a = 0 S_RAFK[2, 1, 0] -> RAFK + S[2, 1, 0]
  // d1a = 0 S_RAFK[2, 2, 0] -> RAFK + S[2, 2, 0]
  // d2 = 0.5 K_RAFP[3, 1] -> RAFP + K[3, 1]
  // d3 = 0.42 K_K[2, 0, 3, 1] -> K[2, 0] + K[3, 1]
  // d4 = 0.8 K_MEKP[2, 1] -> MEKP + K[2, 1]
  // d5 = 0.4 K_K[2, 1, 3, 1] -> K[2, 1] + K[3, 1]
  // d6 = 0.8 K_MEKP[2, 2] -> MEKP + K[2, 2]
  // d7 = 0.6 K_K[1, 0, 2, 2] -> K[1, 0] + K[2, 2]
  // d8 = 0.4 K_MAPKP[1, 1] -> MAPKP + K[1, 1]
  // d9 = 0.6 K_K[1, 1, 2, 2] -> K[1, 1] + K[2, 2]
  // k10 = 0.1 K_MAPKP[1, 2] -> MAPKP + K[1, 1]
  // k1 = 0.1 K_RAFK[3, 0] -> RAFK + K[3, 1]
  // k1 = 0.1 S_RAFK[0, 0, 0] -> RAFK + S[0, 0, 1]
  // k1 = 0.1 S_RAFK[0, -1, 0] -> RAFK + S[0, -1, 1]
  // k1 = 0.1 S_RAFK[0, 1, 0] -> RAFK + S[0, 1, 1]
  // k1 = 0.1 S_RAFK[0, 2, 0] -> RAFK + S[0, 2, 1]
  // k1 = 0.1 S_RAFK[-1, 0, 0] -> RAFK + S[-1, 0, 1]
  // k1 = 0.1 S_RAFK[1, 0, 0] -> RAFK + S[1, 0, 1]
  // k1 = 0.1 S_RAFK[-1, -1, 0] -> RAFK + S[-1, -1, 1]
  // k1 = 0.1 S_RAFK[-1, 1, 0] -> RAFK + S[-1, 1, 1]
  // k1 = 0.1 S_RAFK[1, -1, 0] -> RAFK + S[1, -1, 1]
  // k1 = 0.1 S_RAFK[1, 1, 0] -> RAFK + S[1, 1, 1]
  // k1 = 0.1 S_RAFK[-1, 2, 0] -> RAFK + S[-1, 2, 1]
  // k1 = 0.1 S_RAFK[1, 2, 0] -> RAFK + S[1, 2, 1]
  // k1 = 0.1 S_RAFK[2, 0, 0] -> RAFK + S[2, 0, 1]
  // k1 = 0.1 S_RAFK[2, -1, 0] -> RAFK + S[2, -1, 1]
  // k1 = 0.1 S_RAFK[2, 1, 0] -> RAFK + S[2, 1, 1]
  // k1 = 0.1 S_RAFK[2, 2, 0] -> RAFK + S[2, 2, 1]
  // k1a = 100 RAFK + S[0, 0, 0] -> S_RAFK[0, 0, 0]
  // k1a = 100 RAFK + S[0, -1, 0] -> S_RAFK[0, -1, 0]
  // k1a = 100 RAFK + S[0, 1, 0] -> S_RAFK[0, 1, 0]
  // k1a = 100 RAFK + S[0, 2, 0] -> S_RAFK[0, 2, 0]
  // k1a = 100 RAFK + S[-1, 0, 0] -> S_RAFK[-1, 0, 0]
  // k1a = 100 RAFK + S[1, 0, 0] -> S_RAFK[1, 0, 0]
  // k1a = 100 RAFK + S[-1, -1, 0] -> S_RAFK[-1, -1, 0]
  // k1a = 100 RAFK + S[-1, 1, 0] -> S_RAFK[-1, 1, 0]
  // k1a = 100 RAFK + S[1, -1, 0] -> S_RAFK[1, -1, 0]
  // k1a = 100 RAFK + S[1, 1, 0] -> S_RAFK[1, 1, 0]
  // k1a = 100 RAFK + S[-1, 2, 0] -> S_RAFK[-1, 2, 0]
  // k1a = 100 RAFK + S[1, 2, 0] -> S_RAFK[1, 2, 0]
  // k1a = 100 RAFK + S[2, 0, 0] -> S_RAFK[2, 0, 0]
  // k1a = 100 RAFK + S[2, -1, 0] -> S_RAFK[2, -1, 0]
  // k1a = 100 RAFK + S[2, 1, 0] -> S_RAFK[2, 1, 0]
  // k1a = 100 RAFK + S[2, 2, 0] -> S_RAFK[2, 2, 0]
  // k2 = 0.1 K_RAFP[3, 1] -> RAFP + K[3, 0]
  // k3 = 0.1 K_K[2, 0, 3, 1] -> K[2, 1] + K[3, 1]
  // k3 = 0.1 S[0, 0, 1] -> S[0, 1, 1]
  // k3 = 0.1 S[-1, 0, 1] -> S[-1, 1, 1]
  // k3 = 0.1 S[1, 0, 1] -> S[1, 1, 1]
  // k3 = 0.1 S[2, 0, 1] -> S[2, 1, 1]
  // k4 = 0.1 K_MEKP[2, 1] -> MEKP + K[2, 0]
  // k5 = 0.1 K_K[2, 1, 3, 1] -> K[2, 2] + K[3, 1]
  // k5a = 0.1 S[0, 1, 1] -> S[0, 2, 1]
  // k5a = 0.1 S[-1, 1, 1] -> S[-1, 2, 1]
  // k5a = 0.1 S[1, 1, 1] -> S[1, 2, 1]
  // k5a = 0.1 S[2, 1, 1] -> S[2, 2, 1]
  // k6 = 0.1 K_MEKP[2, 2] -> MEKP + K[2, 1]
  // k7 = 0.1 K_K[1, 0, 2, 2] -> K[1, 1] + K[2, 2]
  // k7 = 0.1 S[0, 2, 0] -> S[1, 2, 0]
  // k7 = 0.1 S[0, 2, -1] -> S[1, 2, -1]
  // k7 = 0.1 S[0, 2, 1] -> S[1, 2, 1]
  // k8 = 0.1 K_MAPKP[1, 1] -> MAPKP + K[1, 0]
  // k9 = 0.1 K_K[1, 1, 2, 2] -> K[1, 2] + K[2, 2]
  // k9a = 0.1 S[1, 2, 0] -> S[2, 2, 0]
  // k9a = 0.1 S[1, 2, -1] -> S[2, 2, -1]
  // k9a = 0.1 S[1, 2, 1] -> S[2, 2, 1]
  // koff = 0.5 S[0, 0, 0] -> K[1, 0] + S[-1, 0, 0]
  // koff = 0.5 S[0, 0, 0] -> K[2, 0] + S[0, -1, 0]
  // koff = 0.5 S[0, 0, 0] -> K[3, 0] + S[0, 0, -1]
  // koff = 0.5 S[0, 0, -1] -> K[1, 0] + S[-1, 0, -1]
  // koff = 0.5 S[0, 0, 1] -> K[1, 0] + S[-1, 0, 1]
  // koff = 0.5 S[0, 0, -1] -> K[2, 0] + S[0, -1, -1]
  // koff = 0.5 S[0, 0, 1] -> K[2, 0] + S[0, -1, 1]
  // koff = 0.5 S[0, -1, 0] -> K[1, 0] + S[-1, -1, 0]
  // koff = 0.5 S[0, 1, 0] -> K[1, 0] + S[-1, 1, 0]
  // koff = 0.5 S[0, -1, 0] -> K[3, 0] + S[0, -1, -1]
  // koff = 0.5 S[0, 1, 0] -> K[3, 0] + S[0, 1, -1]
  // koff = 0.5 S[0, -1, -1] -> K[1, 0] + S[-1, -1, -1]
  // koff = 0.5 S[0, -1, 1] -> K[1, 0] + S[-1, -1, 1]
  // koff = 0.5 S[0, 1, -1] -> K[1, 0] + S[-1, 1, -1]
  // koff = 0.5 S[0, 1, 1] -> K[1, 0] + S[-1, 1, 1]
  // koff = 0.5 S[0, 2, 0] -> K[1, 0] + S[-1, 2, 0]
  // koff = 0.5 S[0, 2, 0] -> K[3, 0] + S[0, 2, -1]
  // koff = 0.5 S[0, 2, -1] -> K[1, 0] + S[-1, 2, -1]
  // koff = 0.5 S[0, 2, 1] -> K[1, 0] + S[-1, 2, 1]
  // koff = 0.5 S[-1, 0, 0] -> K[2, 0] + S[-1, -1, 0]
  // koff = 0.5 S[1, 0, 0] -> K[2, 0] + S[1, -1, 0]
  // koff = 0.5 S[-1, 0, 0] -> K[3, 0] + S[-1, 0, -1]
  // koff = 0.5 S[1, 0, 0] -> K[3, 0] + S[1, 0, -1]
  // koff = 0.5 S[-1, 0, -1] -> K[2, 0] + S[-1, -1, -1]
  // koff = 0.5 S[-1, 0, 1] -> K[2, 0] + S[-1, -1, 1]
  // koff = 0.5 S[1, 0, -1] -> K[2, 0] + S[1, -1, -1]
  // koff = 0.5 S[1, 0, 1] -> K[2, 0] + S[1, -1, 1]
  // koff = 0.5 S[-1, -1, 0] -> K[3, 0] + S[-1, -1, -1]
  // koff = 0.5 S[-1, 1, 0] -> K[3, 0] + S[-1, 1, -1]
  // koff = 0.5 S[1, -1, 0] -> K[3, 0] + S[1, -1, -1]
  // koff = 0.5 S[1, 1, 0] -> K[3, 0] + S[1, 1, -1]
  // koff = 0.5 S[-1, 2, 0] -> K[3, 0] + S[-1, 2, -1]
  // koff = 0.5 S[1, 2, 0] -> K[3, 0] + S[1, 2, -1]
  // koff = 0.5 S[2, 0, 0] -> K[2, 0] + S[2, -1, 0]
  // koff = 0.5 S[2, 0, 0] -> K[3, 0] + S[2, 0, -1]
  // koff = 0.5 S[2, 0, -1] -> K[2, 0] + S[2, -1, -1]
  // koff = 0.5 S[2, 0, 1] -> K[2, 0] + S[2, -1, 1]
  // koff = 0.5 S[2, -1, 0] -> K[3, 0] + S[2, -1, -1]
  // koff = 0.5 S[2, 1, 0] -> K[3, 0] + S[2, 1, -1]
  // koff = 0.5 S[2, 2, 0] -> K[3, 0] + S[2, 2, -1]
  // kon = 10 K[1, 0] + S[-1, 0, 0] -> S[0, 0, 0]
  // kon = 10 K[1, 0] + S[-1, 0, -1] -> S[0, 0, -1]
  // kon = 10 K[1, 0] + S[-1, 0, 1] -> S[0, 0, 1]
  // kon = 10 K[1, 0] + S[-1, -1, 0] -> S[0, -1, 0]
  // kon = 10 K[1, 0] + S[-1, 1, 0] -> S[0, 1, 0]
  // kon = 10 K[1, 0] + S[-1, -1, -1] -> S[0, -1, -1]
  // kon = 10 K[1, 0] + S[-1, -1, 1] -> S[0, -1, 1]
  // kon = 10 K[1, 0] + S[-1, 1, -1] -> S[0, 1, -1]
  // kon = 10 K[1, 0] + S[-1, 1, 1] -> S[0, 1, 1]
  // kon = 10 K[1, 0] + S[-1, 2, 0] -> S[0, 2, 0]
  // kon = 10 K[1, 0] + S[-1, 2, -1] -> S[0, 2, -1]
  // kon = 10 K[1, 0] + S[-1, 2, 1] -> S[0, 2, 1]
  // kon = 10 K[2, 0] + S[0, -1, 0] -> S[0, 0, 0]
  // kon = 10 K[2, 0] + S[0, -1, -1] -> S[0, 0, -1]
  // kon = 10 K[2, 0] + S[0, -1, 1] -> S[0, 0, 1]
  // kon = 10 K[2, 0] + S[-1, -1, 0] -> S[-1, 0, 0]
  // kon = 10 K[2, 0] + S[1, -1, 0] -> S[1, 0, 0]
  // kon = 10 K[2, 0] + S[-1, -1, -1] -> S[-1, 0, -1]
  // kon = 10 K[2, 0] + S[-1, -1, 1] -> S[-1, 0, 1]
  // kon = 10 K[2, 0] + S[1, -1, -1] -> S[1, 0, -1]
  // kon = 10 K[2, 0] + S[1, -1, 1] -> S[1, 0, 1]
  // kon = 10 K[2, 0] + S[2, -1, 0] -> S[2, 0, 0]
  // kon = 10 K[2, 0] + S[2, -1, -1] -> S[2, 0, -1]
  // kon = 10 K[2, 0] + S[2, -1, 1] -> S[2, 0, 1]
  // kon = 10 K[3, 0] + S[0, 0, -1] -> S[0, 0, 0]
  // kon = 10 K[3, 0] + S[0, -1, -1] -> S[0, -1, 0]
  // kon = 10 K[3, 0] + S[0, 1, -1] -> S[0, 1, 0]
  // kon = 10 K[3, 0] + S[0, 2, -1] -> S[0, 2, 0]
  // kon = 10 K[3, 0] + S[-1, 0, -1] -> S[-1, 0, 0]
  // kon = 10 K[3, 0] + S[1, 0, -1] -> S[1, 0, 0]
  // kon = 10 K[3, 0] + S[-1, -1, -1] -> S[-1, -1, 0]
  // kon = 10 K[3, 0] + S[-1, 1, -1] -> S[-1, 1, 0]
  // kon = 10 K[3, 0] + S[1, -1, -1] -> S[1, -1, 0]
  // kon = 10 K[3, 0] + S[1, 1, -1] -> S[1, 1, 0]
  // kon = 10 K[3, 0] + S[-1, 2, -1] -> S[-1, 2, 0]
  // kon = 10 K[3, 0] + S[1, 2, -1] -> S[1, 2, 0]
  // kon = 10 K[3, 0] + S[2, 0, -1] -> S[2, 0, 0]
  // kon = 10 K[3, 0] + S[2, -1, -1] -> S[2, -1, 0]
  // kon = 10 K[3, 0] + S[2, 1, -1] -> S[2, 1, 0]
  // kon = 10 K[3, 0] + S[2, 2, -1] -> S[2, 2, 0]
  // kpoff = 0.05 S[0, 0, 1] -> K[3, 1] + S[0, 0, -1]
  // kpoff = 0.05 S[0, 1, 0] -> K[2, 1] + S[0, -1, 0]
  // kpoff = 0.05 S[0, 1, -1] -> K[2, 1] + S[0, -1, -1]
  // kpoff = 0.05 S[0, 1, 1] -> K[2, 1] + S[0, -1, 1]
  // kpoff = 0.05 S[0, -1, 1] -> K[3, 1] + S[0, -1, -1]
  // kpoff = 0.05 S[0, 1, 1] -> K[3, 1] + S[0, 1, -1]
  // kpoff = 0.05 S[0, 2, 0] -> K[2, 2] + S[0, -1, 0]
  // kpoff = 0.05 S[0, 2, -1] -> K[2, 2] + S[0, -1, -1]
  // kpoff = 0.05 S[0, 2, 1] -> K[2, 2] + S[0, -1, 1]
  // kpoff = 0.05 S[0, 2, 1] -> K[3, 1] + S[0, 2, -1]
  // kpoff = 0.05 S[1, 0, 0] -> K[1, 1] + S[-1, 0, 0]
  // kpoff = 0.05 S[1, 0, -1] -> K[1, 1] + S[-1, 0, -1]
  // kpoff = 0.05 S[1, 0, 1] -> K[1, 1] + S[-1, 0, 1]
  // kpoff = 0.05 S[-1, 0, 1] -> K[3, 1] + S[-1, 0, -1]
  // kpoff = 0.05 S[1, 0, 1] -> K[3, 1] + S[1, 0, -1]
  // kpoff = 0.05 S[1, -1, 0] -> K[1, 1] + S[-1, -1, 0]
  // kpoff = 0.05 S[1, 1, 0] -> K[1, 1] + S[-1, 1, 0]
  // kpoff = 0.05 S[-1, 1, 0] -> K[2, 1] + S[-1, -1, 0]
  // kpoff = 0.05 S[1, 1, 0] -> K[2, 1] + S[1, -1, 0]
  // kpoff = 0.05 S[1, -1, -1] -> K[1, 1] + S[-1, -1, -1]
  // kpoff = 0.05 S[1, -1, 1] -> K[1, 1] + S[-1, -1, 1]
  // kpoff = 0.05 S[1, 1, -1] -> K[1, 1] + S[-1, 1, -1]
  // kpoff = 0.05 S[1, 1, 1] -> K[1, 1] + S[-1, 1, 1]
  // kpoff = 0.05 S[-1, 1, -1] -> K[2, 1] + S[-1, -1, -1]
  // kpoff = 0.05 S[-1, 1, 1] -> K[2, 1] + S[-1, -1, 1]
  // kpoff = 0.05 S[1, 1, -1] -> K[2, 1] + S[1, -1, -1]
  // kpoff = 0.05 S[1, 1, 1] -> K[2, 1] + S[1, -1, 1]
  // kpoff = 0.05 S[-1, -1, 1] -> K[3, 1] + S[-1, -1, -1]
  // kpoff = 0.05 S[-1, 1, 1] -> K[3, 1] + S[-1, 1, -1]
  // kpoff = 0.05 S[1, -1, 1] -> K[3, 1] + S[1, -1, -1]
  // kpoff = 0.05 S[1, 1, 1] -> K[3, 1] + S[1, 1, -1]
  // kpoff = 0.05 S[1, 2, 0] -> K[1, 1] + S[-1, 2, 0]
  // kpoff = 0.05 S[-1, 2, 0] -> K[2, 2] + S[-1, -1, 0]
  // kpoff = 0.05 S[1, 2, 0] -> K[2, 2] + S[1, -1, 0]
  // kpoff = 0.05 S[1, 2, -1] -> K[1, 1] + S[-1, 2, -1]
  // kpoff = 0.05 S[1, 2, 1] -> K[1, 1] + S[-1, 2, 1]
  // kpoff = 0.05 S[-1, 2, -1] -> K[2, 2] + S[-1, -1, -1]
  // kpoff = 0.05 S[-1, 2, 1] -> K[2, 2] + S[-1, -1, 1]
  // kpoff = 0.05 S[1, 2, -1] -> K[2, 2] + S[1, -1, -1]
  // kpoff = 0.05 S[1, 2, 1] -> K[2, 2] + S[1, -1, 1]
  // kpoff = 0.05 S[-1, 2, 1] -> K[3, 1] + S[-1, 2, -1]
  // kpoff = 0.05 S[1, 2, 1] -> K[3, 1] + S[1, 2, -1]
  // kpoff = 0.05 S[2, 0, 0] -> K[1, 2] + S[-1, 0, 0]
  // kpoff = 0.05 S[2, 0, -1] -> K[1, 2] + S[-1, 0, -1]
  // kpoff = 0.05 S[2, 0, 1] -> K[1, 2] + S[-1, 0, 1]
  // kpoff = 0.05 S[2, 0, 1] -> K[3, 1] + S[2, 0, -1]
  // kpoff = 0.05 S[2, -1, 0] -> K[1, 2] + S[-1, -1, 0]
  // kpoff = 0.05 S[2, 1, 0] -> K[1, 2] + S[-1, 1, 0]
  // kpoff = 0.05 S[2, 1, 0] -> K[2, 1] + S[2, -1, 0]
  // kpoff = 0.05 S[2, -1, -1] -> K[1, 2] + S[-1, -1, -1]
  // kpoff = 0.05 S[2, -1, 1] -> K[1, 2] + S[-1, -1, 1]
  // kpoff = 0.05 S[2, 1, -1] -> K[1, 2] + S[-1, 1, -1]
  // kpoff = 0.05 S[2, 1, 1] -> K[1, 2] + S[-1, 1, 1]
  // kpoff = 0.05 S[2, 1, -1] -> K[2, 1] + S[2, -1, -1]
  // kpoff = 0.05 S[2, 1, 1] -> K[2, 1] + S[2, -1, 1]
  // kpoff = 0.05 S[2, -1, 1] -> K[3, 1] + S[2, -1, -1]
  // kpoff = 0.05 S[2, 1, 1] -> K[3, 1] + S[2, 1, -1]
  // kpoff = 0.05 S[2, 2, 0] -> K[1, 2] + S[-1, 2, 0]
  // kpoff = 0.05 S[2, 2, 0] -> K[2, 2] + S[2, -1, 0]
  // kpoff = 0.05 S[2, 2, -1] -> K[1, 2] + S[-1, 2, -1]
  // kpoff = 0.05 S[2, 2, 1] -> K[1, 2] + S[-1, 2, 1]
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  // To the extent possible under law, all copyright and related or neighbouring rights to this encoded model have been dedicated to the public domain worldwide. Please refer to CC0 Public Domain Dedication for more information.
  // In summary, you are entitled to use this encoded model in absolutely any manner you deem suitable, verbatim, or with modification, alone or embedded it in a larger context, redistribute it, commercially or not, in a restricted way or not.
  // To cite BioModels Database, please use: Li C, Donizelli M, Rodriguez N, Dharuri H, Endler L, Chelliah V, Li L, He E, Henry A, Stefan MI, Snoep JL, Hucka M, Le Novère N, Laibe C (2010) BioModels Database: An enhanced, curated and annotated resource for published quantitative kinetic models. BMC Syst Biol., 4:92.
  // biomodels.db:BIOMD0000000014
  // biomodels.db:MODEL6616691524
  // isDescribedBy pubmed:10823939
  // isVersionOf GO:0005078 GO:0000165
  // isHomologTo reactome:REACT_634
  // occursIn taxonomy:8355

  // Compartments:
  compartment Cytoplasm = 1;  // isVersionOf GO:0005737

  // Species:
  substanceOnly species MAPKP in Cytoplasm = 0.3; MAPKP is "MAPK phosphatase";  // uniprot:Q90W58
  substanceOnly species MEKP in Cytoplasm = 0.2; MEKP is "MEK phosphatase";
  substanceOnly species RAFK in Cytoplasm = 0.1; RAFK is "RAF kinase";  // isVersionOf interpro:IPR003577
  substanceOnly species RAFP in Cytoplasm = 0.3; RAFP is "RAF phosphatase";
  substanceOnly species K_1_0 in Cytoplasm = 0.4; K_1_0 is "MAPK";  // isVersionOf uniprot:P26696
  substanceOnly species K_1_1 in Cytoplasm = 0; K_1_1 is "MAPK-P";  // isVersionOf uniprot:P26696
  substanceOnly species K_1_2 in Cytoplasm = 0; K_1_2 is "MAPK-PP";  // isVersionOf uniprot:P26696
  substanceOnly species K_2_0 in Cytoplasm = 0.2; K_2_0 is "MEK";  // isVersionOf uniprot:Q05116
  substanceOnly species K_2_1 in Cytoplasm = 0; K_2_1 is "MEK-P";  // isVersionOf uniprot:Q05116
  substanceOnly species K_2_2 in Cytoplasm = 0; K_2_2 is "MEK-PP";  // uniprot:Q05116
  substanceOnly species K_3_0 in Cytoplasm = 0.3; K_3_0 is "RAF";  // isVersionOf uniprot:P09560
  substanceOnly species K_3_1 in Cytoplasm = 0; K_3_1 is "RAF-P";  // isVersionOf uniprot:P09560
  substanceOnly species K_K_1_0_2_2 in Cytoplasm = 0; K_K_1_0_2_2 is "MAPK_MEK-PP";  // hasPart uniprot:Q05116 uniprot:P26696
  substanceOnly species K_K_1_1_2_2 in Cytoplasm = 0; K_K_1_1_2_2 is "MAPK-P_MEK-PP";  // hasPart uniprot:Q05116 uniprot:P26696
  substanceOnly species K_K_2_0_3_1 in Cytoplasm = 0; K_K_2_0_3_1 is "MEK_RAF-P";  // hasPart uniprot:P09560 uniprot:Q05116
  substanceOnly species K_K_2_1_3_1 in Cytoplasm = 0; K_K_2_1_3_1 is "MEK-P_RAF-P";  // hasPart uniprot:P09560 uniprot:Q05116
  substanceOnly species K_MAPKP_1_1 in Cytoplasm = 0; K_MAPKP_1_1 is "MAPK-P_MAPKPase";  // hasPart uniprot:P26696 uniprot:Q90W58
  substanceOnly species K_MAPKP_1_2 in Cytoplasm = 0; K_MAPKP_1_2 is "MAPK-PP_MAPKPase";  // hasPart uniprot:P26696 uniprot:Q90W58
  substanceOnly species K_MEKP_2_1 in Cytoplasm = 0; K_MEKP_2_1 is "MEK-P_MEKPase";  // hasPart uniprot:Q05116
  substanceOnly species K_MEKP_2_2 in Cytoplasm = 0; K_MEKP_2_2 is "MEK-PP_MEKPase";  // hasPart uniprot:Q05116
  substanceOnly species K_RAFK_3_0 in Cytoplasm = 0; K_RAFK_3_0 is "RAF_RAFK";  // hasPart uniprot:P09560
  substanceOnly species K_RAFP_3_1 in Cytoplasm = 0; K_RAFP_3_1 is "RAF-P_RAFPase";  // hasPart uniprot:P09560
  substanceOnly species S_m1_m1_m1 in Cytoplasm = 0.1; S_m1_m1_m1 is "Scaffold";
  substanceOnly species S_m1_m1_0 in Cytoplasm = 0; S_m1_m1_0 is "Scaffold_RAF";  // hasPart uniprot:P09560
  substanceOnly species S_m1_m1_1 in Cytoplasm = 0; S_m1_m1_1 is "Scaffold_RAF-P";  // hasPart uniprot:P09560
  substanceOnly species S_m1_0_m1 in Cytoplasm = 0; S_m1_0_m1 is "Scaffold_MEK";  // hasPart uniprot:Q05116
  substanceOnly species S_m1_0_0 in Cytoplasm = 0; S_m1_0_0 is "Scaffold_MEK_RAF";  // hasPart uniprot:P09560 uniprot:Q05116
  substanceOnly species S_m1_0_1 in Cytoplasm = 0; S_m1_0_1 is "Scaffold_MEK_RAF-P";  // hasPart uniprot:P09560 uniprot:Q05116
  substanceOnly species S_m1_1_m1 in Cytoplasm = 0; S_m1_1_m1 is "Scaffold_MEK-P";  // hasPart uniprot:Q05116
  substanceOnly species S_m1_1_0 in Cytoplasm = 0; S_m1_1_0 is "Scaffold_MEK-P_RAF";  // hasPart uniprot:P09560 uniprot:Q05116
  substanceOnly species S_m1_1_1 in Cytoplasm = 0; S_m1_1_1 is "Scaffold_MEK-P_RAF-P";  // hasPart uniprot:P09560 uniprot:Q05116
  substanceOnly species S_m1_2_m1 in Cytoplasm = 0; S_m1_2_m1 is "Scaffold_MEK-PP";  // hasPart uniprot:Q05116
  substanceOnly species S_m1_2_0 in Cytoplasm = 0; S_m1_2_0 is "Scaffold_MEK-PP_RAF";  // hasPart uniprot:P09560 uniprot:Q05116
  substanceOnly species S_m1_2_1 in Cytoplasm = 0; S_m1_2_1 is "Scaffold_MEK-PP_RAF-P";  // hasPart uniprot:P09560 uniprot:Q05116
  substanceOnly species S_0_m1_m1 in Cytoplasm = 0; S_0_m1_m1 is "Scaffold_MAPK";  // hasPart uniprot:P26696
  substanceOnly species S_0_m1_0 in Cytoplasm = 0; S_0_m1_0 is "Scaffold_MAPK_RAF";  // hasPart uniprot:P09560 uniprot:P26696
  substanceOnly species S_0_m1_1 in Cytoplasm = 0; S_0_m1_1 is "Scaffold_MAPK_RAF-P";  // hasPart uniprot:P09560 uniprot:P26696
  substanceOnly species S_0_0_m1 in Cytoplasm = 0; S_0_0_m1 is "Scaffold_MAPK_MEK";  // hasPart uniprot:Q05116 uniprot:P26696
  substanceOnly species S_0_0_0 in Cytoplasm = 0; S_0_0_0 is "Scaffold_MAPK_MEK_RAF";  // hasPart uniprot:P09560 uniprot:Q05116 uniprot:P26696
  substanceOnly species S_0_0_1 in Cytoplasm = 0; S_0_0_1 is "Scaffold_MAPK_MEK_RAF-P";  // hasPart uniprot:P09560 uniprot:Q05116 uniprot:P26696
  substanceOnly species S_0_1_m1 in Cytoplasm = 0; S_0_1_m1 is "Scaffold_MAPK_MEK-P";  // hasPart uniprot:Q05116 uniprot:P26696
  substanceOnly species S_0_1_0 in Cytoplasm = 0; S_0_1_0 is "Scaffold_MAPK_MEK-P_RAF";  // hasPart uniprot:P09560 uniprot:Q05116 uniprot:P26696
  substanceOnly species S_0_1_1 in Cytoplasm = 0; S_0_1_1 is "Scaffold_MAPK_MEK-P_RAF-P";  // hasPart uniprot:P09560 uniprot:Q05116 uniprot:P26696
  substanceOnly species S_0_2_m1 in Cytoplasm = 0; S_0_2_m1 is "Scaffold_MAPK_MEK-PP";  // hasPart uniprot:Q05116 uniprot:P26696
  substanceOnly species S_0_2_0 in Cytoplasm = 0; S_0_2_0 is "Scaffold_MAPK_MEK-PP_RAF";  // hasPart uniprot:P09560 uniprot:Q05116 uniprot:P26696
  substanceOnly species S_0_2_1 in Cytoplasm = 0; S_0_2_1 is "Scaffold_MAPK_MEK-PP_RAF-P";  // hasPart uniprot:P09560 uniprot:Q05116 uniprot:P26696
  substanceOnly species S_1_m1_m1 in Cytoplasm = 0; S_1_m1_m1 is "Scaffold_MAPK-P";  // hasPart uniprot:P26696
  substanceOnly species S_1_m1_0 in Cytoplasm = 0; S_1_m1_0 is "Scaffold_MAPK-P_RAF";  // hasPart uniprot:P09560 uniprot:P26696
  substanceOnly species S_1_m1_1 in Cytoplasm = 0; S_1_m1_1 is "Scaffold_MAPK-P_RAF-P";  // hasPart uniprot:P09560 uniprot:P26696
  substanceOnly species S_1_0_m1 in Cytoplasm = 0; S_1_0_m1 is "Scaffold_MAPK-P_MEK";  // hasPart uniprot:Q05116 uniprot:P26696
  substanceOnly species S_1_0_0 in Cytoplasm = 0; S_1_0_0 is "Scaffold_MAPK-P_MEK_RAF";  // hasPart uniprot:P09560 uniprot:Q05116 uniprot:P26696
  substanceOnly species S_1_0_1 in Cytoplasm = 0; S_1_0_1 is "Scaffold_MAPK-P_MEK_RAF-P";  // hasPart uniprot:P09560 uniprot:Q05116 uniprot:P26696
  substanceOnly species S_1_1_m1 in Cytoplasm = 0; S_1_1_m1 is "Scaffold_MAPK-P_MEK-P";  // hasPart uniprot:Q05116 uniprot:P26696
  substanceOnly species S_1_1_0 in Cytoplasm = 0; S_1_1_0 is "Scaffold_MAPK-P_MEK-P_RAF";  // hasPart uniprot:P09560 uniprot:Q05116 uniprot:P26696
  substanceOnly species S_1_1_1 in Cytoplasm = 0; S_1_1_1 is "Scaffold_MAPK-P_MEK-P_RAF-P";  // hasPart uniprot:P09560 uniprot:Q05116 uniprot:P26696
  substanceOnly species S_1_2_m1 in Cytoplasm = 0; S_1_2_m1 is "Scaffold_MAPK-P_MEK-PP";  // hasPart uniprot:Q05116 uniprot:P26696
  substanceOnly species S_1_2_0 in Cytoplasm = 0; S_1_2_0 is "Scaffold_MAPK-P_MEK-PP_RAF";  // hasPart uniprot:P09560 uniprot:Q05116 uniprot:P26696
  substanceOnly species S_1_2_1 in Cytoplasm = 0; S_1_2_1 is "Scaffold_MAPK-P_MEK-PP_RAF-P";  // hasPart uniprot:P09560 uniprot:Q05116 uniprot:P26696
  substanceOnly species S_2_m1_m1 in Cytoplasm = 0; S_2_m1_m1 is "Scaffold_MAPK-PP";  // hasPart uniprot:P26696
  substanceOnly species S_2_m1_0 in Cytoplasm = 0; S_2_m1_0 is "Scaffold_MAPK-PP_RAF";  // hasPart uniprot:P09560 uniprot:P26696
  substanceOnly species S_2_m1_1 in Cytoplasm = 0; S_2_m1_1 is "Scaffold_MAPK-PP_RAF-P";  // hasPart uniprot:P09560 uniprot:P26696
  substanceOnly species S_2_0_m1 in Cytoplasm = 0; S_2_0_m1 is "Scaffold_MAPK-PP_MEK";  // hasPart uniprot:Q05116 uniprot:P26696
  substanceOnly species S_2_0_0 in Cytoplasm = 0; S_2_0_0 is "Scaffold_MAPK-PP_MEK_RAF";  // hasPart uniprot:P09560 uniprot:Q05116 uniprot:P26696
  substanceOnly species S_2_0_1 in Cytoplasm = 0; S_2_0_1 is "Scaffold_MAPK-PP_MEK_RAF-P";  // hasPart uniprot:P09560 uniprot:Q05116 uniprot:P26696
  substanceOnly species S_2_1_m1 in Cytoplasm = 0; S_2_1_m1 is "Scaffold_MAPK-PP_MEK-P";  // hasPart uniprot:Q05116 uniprot:P26696
  substanceOnly species S_2_1_0 in Cytoplasm = 0; S_2_1_0 is "Scaffold_MAPK-PP_MEK-P_RAF";  // hasPart uniprot:P09560 uniprot:Q05116 uniprot:P26696
  substanceOnly species S_2_1_1 in Cytoplasm = 0; S_2_1_1 is "Scaffold_MAPK-PP_MEK-P_RAF-P";  // hasPart uniprot:P09560 uniprot:Q05116 uniprot:P26696
  substanceOnly species S_2_2_m1 in Cytoplasm = 0; S_2_2_m1 is "Scaffold_MAPK-PP_MEK-PP";  // hasPart uniprot:Q05116 uniprot:P26696
  substanceOnly species S_2_2_0 in Cytoplasm = 0; S_2_2_0 is "Scaffold_MAPK-PP_MEK-PP_RAF";  // hasPart uniprot:P09560 uniprot:Q05116 uniprot:P26696
  substanceOnly species S_2_2_1 in Cytoplasm = 0; S_2_2_1 is "Scaffold_MAPK-PP_MEK-PP_RAF-P";  // hasPart uniprot:P09560 uniprot:Q05116 uniprot:P26696
  substanceOnly species S_RAFK_m1_m1_0 in Cytoplasm = 0; S_RAFK_m1_m1_0 is "Scaffold_RAF";  // hasPart uniprot:P09560
  substanceOnly species S_RAFK_m1_0_0 in Cytoplasm = 0; S_RAFK_m1_0_0 is "Scaffold_MEK_RAF";  // hasPart uniprot:P09560 uniprot:Q05116
  substanceOnly species S_RAFK_m1_1_0 in Cytoplasm = 0; S_RAFK_m1_1_0 is "Scaffold_MEK-P_RAF";  // hasPart uniprot:P09560 uniprot:Q05116
  substanceOnly species S_RAFK_m1_2_0 in Cytoplasm = 0; S_RAFK_m1_2_0 is "Scaffold_MEK-PP_RAF";  // hasPart uniprot:P09560 uniprot:Q05116
  substanceOnly species S_RAFK_0_m1_0 in Cytoplasm = 0; S_RAFK_0_m1_0 is "Scaffold_MAPK_RAF";  // hasPart uniprot:P09560 uniprot:P26696
  substanceOnly species S_RAFK_0_0_0 in Cytoplasm = 0; S_RAFK_0_0_0 is "Scaffold_MAPK_MEK_RAF";  // hasPart uniprot:P09560 uniprot:Q05116 uniprot:P26696
  substanceOnly species S_RAFK_0_1_0 in Cytoplasm = 0; S_RAFK_0_1_0 is "Scaffold_MAPK_MEK-P_RAF";  // hasPart uniprot:P09560 uniprot:Q05116 uniprot:P26696
  substanceOnly species S_RAFK_0_2_0 in Cytoplasm = 0; S_RAFK_0_2_0 is "Scaffold_MAPK_MEK-PP_RAF";  // hasPart uniprot:P09560 uniprot:Q05116 uniprot:P26696
  substanceOnly species S_RAFK_1_m1_0 in Cytoplasm = 0; S_RAFK_1_m1_0 is "Scaffold_MAPK-P_RAF";  // hasPart uniprot:P09560 uniprot:P26696
  substanceOnly species S_RAFK_1_0_0 in Cytoplasm = 0; S_RAFK_1_0_0 is "Scaffold_MAPK-P_MEK_RAF";  // hasPart uniprot:P09560 uniprot:Q05116 uniprot:P26696
  substanceOnly species S_RAFK_1_1_0 in Cytoplasm = 0; S_RAFK_1_1_0 is "Scaffold_MAPK-P_MEK-P_RAF";  // hasPart uniprot:P09560 uniprot:Q05116 uniprot:P26696
  substanceOnly species S_RAFK_1_2_0 in Cytoplasm = 0; S_RAFK_1_2_0 is "Scaffold_MAPK-P_MEK-PP_RAF";  // hasPart uniprot:P09560 uniprot:Q05116 uniprot:P26696
  substanceOnly species S_RAFK_2_m1_0 in Cytoplasm = 0; S_RAFK_2_m1_0 is "Scaffold_MAPK-PP_RAF";  // hasPart uniprot:P09560 uniprot:P26696
  substanceOnly species S_RAFK_2_0_0 in Cytoplasm = 0; S_RAFK_2_0_0 is "Scaffold_MAPK-PP_MEK_RAF";  // hasPart uniprot:P09560 uniprot:Q05116 uniprot:P26696
  substanceOnly species S_RAFK_2_1_0 in Cytoplasm = 0; S_RAFK_2_1_0 is "Scaffold_MAPK-PP_MEK-P_RAF";  // hasPart uniprot:P09560 uniprot:Q05116 uniprot:P26696
  substanceOnly species S_RAFK_2_2_0 in Cytoplasm = 0; S_RAFK_2_2_0 is "Scaffold_MAPK-PP_MEK-PP_RAF";  // hasPart uniprot:P09560 uniprot:Q05116 uniprot:P26696

  // Reactions:
  Reaction1: RAFK + K_3_0 => K_RAFK_3_0; a1*RAFK*K_3_0; Reaction1 is "binding of RAF and RAFK";  // isHomologTo reactome:REACT_996; isVersionOf GO:0031435 GO:0006461
    a1 = 1;
  Reaction2: K_RAFK_3_0 => RAFK + K_3_0; d1*K_RAFK_3_0; Reaction2 is "dissociation of RAF_RAFK";  // isVersionOf GO:0043241
    d1 = 0.4;
  phosphorylation_of_RAF: K_RAFK_3_0 => RAFK + K_3_1; phosphorylation_of_RAF_k1*K_RAFK_3_0;  // isVersionOf ec-code:2.7.11.1 GO:0008349 GO:0000185
    phosphorylation_of_RAF_k1 = 0.1;
  Reaction4: RAFP + K_3_1 => K_RAFP_3_1; a2*RAFP*K_3_1; Reaction4 is "binding of RAF-P and RAF phosphatase";  // isVersionOf GO:0031435
    a2 = 0.5;
  dissociation_of_RAF_P_RAFPase: K_RAFP_3_1 => RAFP + K_3_1; d2*K_RAFP_3_1; dissociation_of_RAF_P_RAFPase is "dissociation of RAF-P_RAFPase";  // isVersionOf GO:0043241
    d2 = 0.5;
  dephosphorylation_of_RAF_P: K_RAFP_3_1 => RAFP + K_3_0; k2*K_RAFP_3_1; dephosphorylation_of_RAF_P is "dephosphorylation of RAF-P";  // isVersionOf ec-code:3.1.3.16 GO:0006470
    k2 = 0.1;
  binding_of_MEK_and_RAF_P: K_2_0 + K_3_1 => K_K_2_0_3_1; a3*K_2_0*K_3_1; binding_of_MEK_and_RAF_P is "binding of MEK and RAF-P";  // isVersionOf GO:0031434 GO:0031435; isHomologTo reactome:REACT_143
    a3 = 3.3;
  dissociation_of_MEK_RAF_P: K_K_2_0_3_1 => K_2_0 + K_3_1; d3*K_K_2_0_3_1; dissociation_of_MEK_RAF_P is "dissociation of MEK_RAF-P";  // isVersionOf GO:0043241
    d3 = 0.42;
  phosphorylation_of_MEK: K_K_2_0_3_1 => K_2_1 + K_3_1; phosphorylation_of_MEK_k3*K_K_2_0_3_1;  // isVersionOf ec-code:2.7.11.25 GO:0004709 GO:0006468
    phosphorylation_of_MEK_k3 = 0.1;
  Reaction10: MEKP + K_2_1 => K_MEKP_2_1; a4*MEKP*K_2_1; Reaction10 is "binding of MEK-P and MEK phosphatase";  // isVersionOf GO:0031435
    a4 = 10;
  dissociation_of_MEK_P_MEKPase: K_MEKP_2_1 => MEKP + K_2_1; d4*K_MEKP_2_1; dissociation_of_MEK_P_MEKPase is "dissociation of MEK-P_MEKPase";  // isVersionOf GO:0043241
    d4 = 0.8;
  dephosphorylation_of_MEK_P: K_MEKP_2_1 => MEKP + K_2_0; k4*K_MEKP_2_1; dephosphorylation_of_MEK_P is "dephosphorylation of MEK-P";  // isVersionOf ec-code:3.1.3.16 GO:0006470
    k4 = 0.1;
  binding_of_MEK_P_and_RAF_P: K_2_1 + K_3_1 => K_K_2_1_3_1; a5*K_2_1*K_3_1; binding_of_MEK_P_and_RAF_P is "binding of MEK-P and RAF-P";  // isVersionOf GO:0031434 GO:0031435; isHomologTo reactome:REACT_143
    a5 = 3.3;
  dissociation_of_MEK_P_RAF_P: K_K_2_1_3_1 => K_2_1 + K_3_1; d5*K_K_2_1_3_1; dissociation_of_MEK_P_RAF_P is "dissociation of MEK-P_RAF-P";  // isVersionOf GO:0043241
    d5 = 0.4;
  phosphorylation_of_MEK_P: K_K_2_1_3_1 => K_2_2 + K_3_1; k5*K_K_2_1_3_1; phosphorylation_of_MEK_P is "phosphorylation of MEK-P";  // isVersionOf ec-code:2.7.1.37 GO:0000186 GO:0004709 GO:0006468; isHomologTo reactome:REACT_614
    k5 = 0.1;
  Reaction16: MEKP + K_2_2 => K_MEKP_2_2; a6*MEKP*K_2_2; Reaction16 is "binding of MEK-PP and MEK phosphatase";  // isVersionOf GO:0031434
    a6 = 10;
  dissociation_of_MEK_PP_MEKPase: K_MEKP_2_2 => MEKP + K_2_2; d6*K_MEKP_2_2; dissociation_of_MEK_PP_MEKPase is "dissociation of MEK-PP_MEKPase";  // isVersionOf GO:0043241
    d6 = 0.8;
  dephosphorylation_of_MEK_PP: K_MEKP_2_2 => MEKP + K_2_1; k6*K_MEKP_2_2; dephosphorylation_of_MEK_PP is "dephosphorylation of MEK-PP";  // isVersionOf ec-code:3.1.3.16 GO:0006470
    k6 = 0.1;
  binding_of_MAPK_and_MEK_PP: K_1_0 + K_2_2 => K_K_1_0_2_2; a7*K_1_0*K_2_2; binding_of_MAPK_and_MEK_PP is "binding of MAPK and MEK-PP";  // isVersionOf GO:0051019 GO:0031434; isHomologTo reactome:REACT_1780 reactome:REACT_495
    a7 = 20;
  dissociation_of_MAPK_MEK_PP: K_K_1_0_2_2 => K_1_0 + K_2_2; d7*K_K_1_0_2_2; dissociation_of_MAPK_MEK_PP is "dissociation of MAPK_MEK-PP";  // isVersionOf GO:0043241
    d7 = 0.6;
  phosphorylation_of_MAPK: K_K_1_0_2_2 => K_1_1 + K_2_2; phosphorylation_of_MAPK_k7*K_K_1_0_2_2;  // isVersionOf ec-code:2.7.12.2 GO:0004708 GO:0006468; isHomologTo reactome:REACT_136 reactome:REACT_2247
    phosphorylation_of_MAPK_k7 = 0.1;
  Reaction22: MAPKP + K_1_1 => K_MAPKP_1_1; a8*MAPKP*K_1_1; Reaction22 is "binding of MAPK-P and MAPK phosphatase";  // isVersionOf GO:0051019
    a8 = 5;
  dissociation_of_MAPK_P_MAPKPase: K_MAPKP_1_1 => MAPKP + K_1_1; d8*K_MAPKP_1_1; dissociation_of_MAPK_P_MAPKPase is "dissociation of MAPK-P_MAPKPase";  // isVersionOf GO:0043241
    d8 = 0.4;
  dephosphorylation_of_MAPK_P: K_MAPKP_1_1 => MAPKP + K_1_0; k8*K_MAPKP_1_1; dephosphorylation_of_MAPK_P is "dephosphorylation of MAPK-P";  // isVersionOf ec-code:3.1.3.16
    k8 = 0.1;
  binding_of_MAPK_P_and_MEK_PP: K_1_1 + K_2_2 => K_K_1_1_2_2; a9*K_1_1*K_2_2; binding_of_MAPK_P_and_MEK_PP is "binding of MAPK-P and MEK-PP";  // isVersionOf GO:0051019
    a9 = 20;
  dissociation_of_MAPK_P_MEK_PP: K_K_1_1_2_2 => K_1_1 + K_2_2; d9*K_K_1_1_2_2; dissociation_of_MAPK_P_MEK_PP is "dissociation of MAPK-P_MEK-PP";  // isVersionOf GO:0043241
    d9 = 0.6;
  phosphorylation_of_MAPK_P: K_K_1_1_2_2 => K_1_2 + K_2_2; k9*K_K_1_1_2_2; phosphorylation_of_MAPK_P is "phosphorylation of MAPK-P";  // isVersionOf ec-code:2.7.1.37 GO:0000187 GO:0004708
    k9 = 0.1;
  Reaction28: MAPKP + K_1_2 => K_MAPKP_1_2; a10*MAPKP*K_1_2; Reaction28 is "binding of MAPK-PP and MAPK phosphatase";  // isVersionOf GO:0051019
    a10 = 5;
  dissociation_of_MAPK_PP_MAPKPase: K_MAPKP_1_2 => MAPKP + K_1_2; d10*K_MAPKP_1_2; dissociation_of_MAPK_PP_MAPKPase is "dissociation of MAPK-PP_MAPKPase";  // isVersionOf GO:0043241
    d10 = 0.4;
  dephosphorylation_of_MAPK_PP: K_MAPKP_1_2 => MAPKP + K_1_1; k10*K_MAPKP_1_2; dephosphorylation_of_MAPK_PP is "dephosphorylation of MAPK-PP";  // isVersionOf ec-code:3.1.3.16 GO:0000188
    k10 = 0.1;
  Reaction31: K_1_0 + S_m1_m1_m1 => S_0_m1_m1; Reaction31_kon*K_1_0*S_m1_m1_m1; Reaction31 is "binding of MAPK on scaffold";  // isVersionOf GO:0051019
    Reaction31_kon = 10;
  Reaction32: S_0_m1_m1 => K_1_0 + S_m1_m1_m1; Reaction32_koff*S_0_m1_m1; Reaction32 is "dissociation of MAPK from scaffold";  // isVersionOf GO:0043241
    Reaction32_koff = 0.5;
  Reaction33: K_1_0 + S_m1_m1_0 => S_0_m1_0; Reaction33_kon*K_1_0*S_m1_m1_0; Reaction33 is "binding of MAPK on scaffold";  // isVersionOf GO:0051019
    Reaction33_kon = 10;
  Reaction34: S_0_m1_0 => K_1_0 + S_m1_m1_0; Reaction34_koff*S_0_m1_0; Reaction34 is "dissociation of MAPK from scaffold";  // isVersionOf GO:0043241
    Reaction34_koff = 0.5;
  Reaction35: K_1_0 + S_m1_m1_1 => S_0_m1_1; Reaction35_kon*K_1_0*S_m1_m1_1; Reaction35 is "binding of MAPK on scaffold";  // isVersionOf GO:0051019
    Reaction35_kon = 10;
  Reaction36: S_0_m1_1 => K_1_0 + S_m1_m1_1; Reaction36_koff*S_0_m1_1; Reaction36 is "dissociation of MAPK from scaffold";  // isVersionOf GO:0043241
    Reaction36_koff = 0.5;
  Reaction37: K_1_0 + S_m1_0_m1 => S_0_0_m1; Reaction37_kon*K_1_0*S_m1_0_m1; Reaction37 is "binding of MAPK on scaffold";  // isVersionOf GO:0051019
    Reaction37_kon = 10;
  Reaction38: S_0_0_m1 => K_1_0 + S_m1_0_m1; Reaction38_koff*S_0_0_m1; Reaction38 is "dissociation of MAPK from scaffold";  // isVersionOf GO:0043241
    Reaction38_koff = 0.5;
  Reaction39: K_1_0 + S_m1_0_0 => S_0_0_0; Reaction39_kon*K_1_0*S_m1_0_0; Reaction39 is "binding of MAPK on scaffold";  // isVersionOf GO:0051019
    Reaction39_kon = 10;
  Reaction40: S_0_0_0 => K_1_0 + S_m1_0_0; Reaction40_koff*S_0_0_0; Reaction40 is "dissociation of MAPK from scaffold";  // isVersionOf GO:0043241
    Reaction40_koff = 0.5;
  Reaction41: K_1_0 + S_m1_0_1 => S_0_0_1; Reaction41_kon*K_1_0*S_m1_0_1; Reaction41 is "binding of MAPK on scaffold";  // isVersionOf GO:0051019
    Reaction41_kon = 10;
  Reaction42: S_0_0_1 => K_1_0 + S_m1_0_1; Reaction42_koff*S_0_0_1; Reaction42 is "dissociation of MAPK from scaffold";  // isVersionOf GO:0043241
    Reaction42_koff = 0.5;
  Reaction43: K_1_0 + S_m1_1_m1 => S_0_1_m1; Reaction43_kon*K_1_0*S_m1_1_m1; Reaction43 is "binding of MAPK on scaffold";  // isVersionOf GO:0051019
    Reaction43_kon = 10;
  Reaction44: S_0_1_m1 => K_1_0 + S_m1_1_m1; Reaction44_koff*S_0_1_m1; Reaction44 is "dissociation of MAPK from scaffold";  // isVersionOf GO:0043241
    Reaction44_koff = 0.5;
  Reaction45: K_1_0 + S_m1_1_0 => S_0_1_0; Reaction45_kon*K_1_0*S_m1_1_0; Reaction45 is "binding of MAPK on scaffold";  // isVersionOf GO:0051019
    Reaction45_kon = 10;
  Reaction46: S_0_1_0 => K_1_0 + S_m1_1_0; Reaction46_koff*S_0_1_0; Reaction46 is "dissociation of MAPK from scaffold";  // isVersionOf GO:0043241
    Reaction46_koff = 0.5;
  Reaction47: K_1_0 + S_m1_1_1 => S_0_1_1; Reaction47_kon*K_1_0*S_m1_1_1; Reaction47 is "binding of MAPK on scaffold";  // isVersionOf GO:0051019
    Reaction47_kon = 10;
  Reaction48: S_0_1_1 => K_1_0 + S_m1_1_1; Reaction48_koff*S_0_1_1; Reaction48 is "dissociation of MAPK from scaffold";  // isVersionOf GO:0043241
    Reaction48_koff = 0.5;
  Reaction49: K_1_0 + S_m1_2_m1 => S_0_2_m1; Reaction49_kon*K_1_0*S_m1_2_m1; Reaction49 is "binding of MAPK on scaffold";  // isVersionOf GO:0051019
    Reaction49_kon = 10;
  Reaction50: S_0_2_m1 => K_1_0 + S_m1_2_m1; Reaction50_koff*S_0_2_m1; Reaction50 is "dissociation of MAPK from scaffold";  // isVersionOf GO:0043241
    Reaction50_koff = 0.5;
  Reaction51: K_1_0 + S_m1_2_0 => S_0_2_0; Reaction51_kon*K_1_0*S_m1_2_0; Reaction51 is "binding of MAPK on scaffold";  // isVersionOf GO:0051019
    Reaction51_kon = 10;
  Reaction52: S_0_2_0 => K_1_0 + S_m1_2_0; Reaction52_koff*S_0_2_0; Reaction52 is "dissociation of MAPK from scaffold";  // isVersionOf GO:0043241
    Reaction52_koff = 0.5;
  Reaction53: K_1_0 + S_m1_2_1 => S_0_2_1; Reaction53_kon*K_1_0*S_m1_2_1; Reaction53 is "binding of MAPK on scaffold";  // isVersionOf GO:0051019
    Reaction53_kon = 10;
  Reaction54: S_0_2_1 => K_1_0 + S_m1_2_1; Reaction54_koff*S_0_2_1; Reaction54 is "dissociation of MAPK from scaffold";  // isVersionOf GO:0043241
    Reaction54_koff = 0.5;
  Reaction55: K_1_1 + S_m1_m1_m1 => S_1_m1_m1; Reaction55_kpon*K_1_1*S_m1_m1_m1; Reaction55 is "binding of MAPK-P on scaffold";  // isVersionOf GO:0051019
    Reaction55_kpon = 0;
  Reaction56: S_1_m1_m1 => K_1_1 + S_m1_m1_m1; Reaction56_kpoff*S_1_m1_m1; Reaction56 is "dissociation of MAPK-P from scaffold";  // isVersionOf GO:0043241
    Reaction56_kpoff = 0.05;
  Reaction57: K_1_1 + S_m1_m1_0 => S_1_m1_0; Reaction57_kpon*K_1_1*S_m1_m1_0; Reaction57 is "binding of MAPK-P on scaffold";  // isVersionOf GO:0051019
    Reaction57_kpon = 0;
  Reaction58: S_1_m1_0 => K_1_1 + S_m1_m1_0; Reaction58_kpoff*S_1_m1_0; Reaction58 is "dissociation of MAPK-P from scaffold";  // isVersionOf GO:0043241
    Reaction58_kpoff = 0.05;
  Reaction59: K_1_1 + S_m1_m1_1 => S_1_m1_1; Reaction59_kpon*K_1_1*S_m1_m1_1; Reaction59 is "binding of MAPK-P on scaffold";  // isVersionOf GO:0051019
    Reaction59_kpon = 0;
  Reaction60: S_1_m1_1 => K_1_1 + S_m1_m1_1; Reaction60_kpoff*S_1_m1_1; Reaction60 is "dissociation of MAPK-P from scaffold";  // isVersionOf GO:0043241
    Reaction60_kpoff = 0.05;
  Reaction61: K_1_1 + S_m1_0_m1 => S_1_0_m1; Reaction61_kpon*K_1_1*S_m1_0_m1; Reaction61 is "binding of MAPK-P on scaffold";  // isVersionOf GO:0051019
    Reaction61_kpon = 0;
  Reaction62: S_1_0_m1 => K_1_1 + S_m1_0_m1; Reaction62_kpoff*S_1_0_m1; Reaction62 is "dissociation of MAPK-P from scaffold";  // isVersionOf GO:0043241
    Reaction62_kpoff = 0.05;
  Reaction63: K_1_1 + S_m1_0_0 => S_1_0_0; Reaction63_kpon*K_1_1*S_m1_0_0; Reaction63 is "binding of MAPK-P on scaffold";  // isVersionOf GO:0051019
    Reaction63_kpon = 0;
  Reaction64: S_1_0_0 => K_1_1 + S_m1_0_0; Reaction64_kpoff*S_1_0_0; Reaction64 is "dissociation of MAPK-P from scaffold";  // isVersionOf GO:0043241
    Reaction64_kpoff = 0.05;
  Reaction65: K_1_1 + S_m1_0_1 => S_1_0_1; Reaction65_kpon*K_1_1*S_m1_0_1; Reaction65 is "binding of MAPK-P on scaffold";  // isVersionOf GO:0051019
    Reaction65_kpon = 0;
  Reaction66: S_1_0_1 => K_1_1 + S_m1_0_1; Reaction66_kpoff*S_1_0_1; Reaction66 is "dissociation of MAPK-P from scaffold";  // isVersionOf GO:0043241
    Reaction66_kpoff = 0.05;
  Reaction67: K_1_1 + S_m1_1_m1 => S_1_1_m1; Reaction67_kpon*K_1_1*S_m1_1_m1; Reaction67 is "binding of MAPK-P on scaffold";  // isVersionOf GO:0051019
    Reaction67_kpon = 0;
  Reaction68: S_1_1_m1 => K_1_1 + S_m1_1_m1; Reaction68_kpoff*S_1_1_m1; Reaction68 is "dissociation of MAPK-P from scaffold";  // isVersionOf GO:0043241
    Reaction68_kpoff = 0.05;
  Reaction69: K_1_1 + S_m1_1_0 => S_1_1_0; Reaction69_kpon*K_1_1*S_m1_1_0; Reaction69 is "binding of MAPK-P on scaffold";  // isVersionOf GO:0051019
    Reaction69_kpon = 0;
  Reaction70: S_1_1_0 => K_1_1 + S_m1_1_0; Reaction70_kpoff*S_1_1_0; Reaction70 is "dissociation of MAPK-P from scaffold";  // isVersionOf GO:0043241
    Reaction70_kpoff = 0.05;
  Reaction71: K_1_1 + S_m1_1_1 => S_1_1_1; Reaction71_kpon*K_1_1*S_m1_1_1; Reaction71 is "binding of MAPK-P on scaffold";  // isVersionOf GO:0051019
    Reaction71_kpon = 0;
  Reaction72: S_1_1_1 => K_1_1 + S_m1_1_1; Reaction72_kpoff*S_1_1_1; Reaction72 is "dissociation of MAPK-P from scaffold";  // isVersionOf GO:0043241
    Reaction72_kpoff = 0.05;
  Reaction73: K_1_1 + S_m1_2_m1 => S_1_2_m1; Reaction73_kpon*K_1_1*S_m1_2_m1; Reaction73 is "binding of MAPK-P on scaffold";  // isVersionOf GO:0051019
    Reaction73_kpon = 0;
  Reaction74: S_1_2_m1 => K_1_1 + S_m1_2_m1; Reaction74_kpoff*S_1_2_m1; Reaction74 is "dissociation of MAPK-P from scaffold";  // isVersionOf GO:0043241
    Reaction74_kpoff = 0.05;
  Reaction75: K_1_1 + S_m1_2_0 => S_1_2_0; Reaction75_kpon*K_1_1*S_m1_2_0; Reaction75 is "binding of MAPK-P on scaffold";  // isVersionOf GO:0051019
    Reaction75_kpon = 0;
  Reaction76: S_1_2_0 => K_1_1 + S_m1_2_0; Reaction76_kpoff*S_1_2_0; Reaction76 is "dissociation of MAPK-P from scaffold";  // isVersionOf GO:0043241
    Reaction76_kpoff = 0.05;
  Reaction77: K_1_1 + S_m1_2_1 => S_1_2_1; Reaction77_kpon*K_1_1*S_m1_2_1; Reaction77 is "binding of MAPK-P on scaffold";  // isVersionOf GO:0051019
    Reaction77_kpon = 0;
  Reaction78: S_1_2_1 => K_1_1 + S_m1_2_1; Reaction78_kpoff*S_1_2_1; Reaction78 is "dissociation of MAPK-P from scaffold";  // isVersionOf GO:0043241
    Reaction78_kpoff = 0.05;
  Reaction79: K_1_2 + S_m1_m1_m1 => S_2_m1_m1; Reaction79_kpon*K_1_2*S_m1_m1_m1; Reaction79 is "binding of MAPK-PP on scaffold";  // isVersionOf GO:0051019
    Reaction79_kpon = 0;
  Reaction80: S_2_m1_m1 => K_1_2 + S_m1_m1_m1; Reaction80_kpoff*S_2_m1_m1; Reaction80 is "dissociation of MAPK-PP from scaffold";  // isVersionOf GO:0043241
    Reaction80_kpoff = 0.05;
  Reaction81: K_1_2 + S_m1_m1_0 => S_2_m1_0; Reaction81_kpon*K_1_2*S_m1_m1_0; Reaction81 is "binding of MAPK-PP on scaffold";  // isVersionOf GO:0051019
    Reaction81_kpon = 0;
  Reaction82: S_2_m1_0 => K_1_2 + S_m1_m1_0; Reaction82_kpoff*S_2_m1_0; Reaction82 is "dissociation of MAPK-PP from scaffold";  // isVersionOf GO:0043241
    Reaction82_kpoff = 0.05;
  Reaction83: K_1_2 + S_m1_m1_1 => S_2_m1_1; Reaction83_kpon*K_1_2*S_m1_m1_1; Reaction83 is "binding of MAPK-PP on scaffold";  // isVersionOf GO:0051019
    Reaction83_kpon = 0;
  Reaction84: S_2_m1_1 => K_1_2 + S_m1_m1_1; Reaction84_kpoff*S_2_m1_1; Reaction84 is "dissociation of MAPK-PP from scaffold";  // isVersionOf GO:0043241
    Reaction84_kpoff = 0.05;
  Reaction85: K_1_2 + S_m1_0_m1 => S_2_0_m1; Reaction85_kpon*K_1_2*S_m1_0_m1; Reaction85 is "binding of MAPK-PP on scaffold";  // isVersionOf GO:0051019
    Reaction85_kpon = 0;
  Reaction86: S_2_0_m1 => K_1_2 + S_m1_0_m1; Reaction86_kpoff*S_2_0_m1; Reaction86 is "dissociation of MAPK-PP from scaffold";  // isVersionOf GO:0043241
    Reaction86_kpoff = 0.05;
  Reaction87: K_1_2 + S_m1_0_0 => S_2_0_0; Reaction87_kpon*K_1_2*S_m1_0_0; Reaction87 is "binding of MAPK-PP on scaffold";  // isVersionOf GO:0051019
    Reaction87_kpon = 0;
  Reaction88: S_2_0_0 => K_1_2 + S_m1_0_0; Reaction88_kpoff*S_2_0_0; Reaction88 is "dissociation of MAPK-PP from scaffold";  // isVersionOf GO:0043241
    Reaction88_kpoff = 0.05;
  Reaction89: K_1_2 + S_m1_0_1 => S_2_0_1; Reaction89_kpon*K_1_2*S_m1_0_1; Reaction89 is "binding of MAPK-PP on scaffold";  // isVersionOf GO:0051019
    Reaction89_kpon = 0;
  Reaction90: S_2_0_1 => K_1_2 + S_m1_0_1; Reaction90_kpoff*S_2_0_1; Reaction90 is "dissociation of MAPK-PP from scaffold";  // isVersionOf GO:0043241
    Reaction90_kpoff = 0.05;
  Reaction91: K_1_2 + S_m1_1_m1 => S_2_1_m1; Reaction91_kpon*K_1_2*S_m1_1_m1; Reaction91 is "binding of MAPK-PP on scaffold";  // isVersionOf GO:0051019
    Reaction91_kpon = 0;
  Reaction92: S_2_1_m1 => K_1_2 + S_m1_1_m1; Reaction92_kpoff*S_2_1_m1; Reaction92 is "dissociation of MAPK-PP from scaffold";  // isVersionOf GO:0043241
    Reaction92_kpoff = 0.05;
  Reaction93: K_1_2 + S_m1_1_0 => S_2_1_0; Reaction93_kpon*K_1_2*S_m1_1_0; Reaction93 is "binding of MAPK-PP on scaffold";  // isVersionOf GO:0051019
    Reaction93_kpon = 0;
  Reaction94: S_2_1_0 => K_1_2 + S_m1_1_0; Reaction94_kpoff*S_2_1_0; Reaction94 is "dissociation of MAPK-PP from scaffold";  // isVersionOf GO:0043241
    Reaction94_kpoff = 0.05;
  Reaction95: K_1_2 + S_m1_1_1 => S_2_1_1; Reaction95_kpon*K_1_2*S_m1_1_1; Reaction95 is "binding of MAPK-PP on scaffold";  // isVersionOf GO:0051019
    Reaction95_kpon = 0;
  Reaction96: S_2_1_1 => K_1_2 + S_m1_1_1; Reaction96_kpoff*S_2_1_1; Reaction96 is "dissociation of MAPK-PP from scaffold";  // isVersionOf GO:0043241
    Reaction96_kpoff = 0.05;
  Reaction97: K_1_2 + S_m1_2_m1 => S_2_2_m1; Reaction97_kpon*K_1_2*S_m1_2_m1; Reaction97 is "binding of MAPK-PP on scaffold";  // isVersionOf GO:0051019
    Reaction97_kpon = 0;
  Reaction98: S_2_2_m1 => K_1_2 + S_m1_2_m1; Reaction98_kpoff*S_2_2_m1; Reaction98 is "dissociation of MAPK-PP from scaffold";  // isVersionOf GO:0043241
    Reaction98_kpoff = 0.05;
  Reaction99: K_1_2 + S_m1_2_0 => S_2_2_0; Reaction99_kpon*K_1_2*S_m1_2_0; Reaction99 is "binding of MAPK-PP on scaffold";  // isVersionOf GO:0051019
    Reaction99_kpon = 0;
  Reaction100: S_2_2_0 => K_1_2 + S_m1_2_0; Reaction100_kpoff*S_2_2_0; Reaction100 is "dissociation of MAPK-PP from scaffold";
    Reaction100_kpoff = 0.05;
  Reaction101: K_1_2 + S_m1_2_1 => S_2_2_1; Reaction101_kpon*K_1_2*S_m1_2_1; Reaction101 is "binding of MAPK-PP on scaffold";  // isVersionOf GO:0051019
    Reaction101_kpon = 0;
  Reaction102: S_2_2_1 => K_1_2 + S_m1_2_1; Reaction102_kpoff*S_2_2_1; Reaction102 is "dissociation of MAPK-PP from scaffold";  // isVersionOf GO:0043241
    Reaction102_kpoff = 0.05;
  Reaction103: K_2_0 + S_m1_m1_m1 => S_m1_0_m1; Reaction103_kon*K_2_0*S_m1_m1_m1; Reaction103 is "binding of MEK on scaffold";
    Reaction103_kon = 10;
  Reaction104: S_m1_0_m1 => K_2_0 + S_m1_m1_m1; Reaction104_koff*S_m1_0_m1; Reaction104 is "dissociation of MEK from scaffold";  // isVersionOf GO:0043241
    Reaction104_koff = 0.5;
  Reaction105: K_2_0 + S_m1_m1_0 => S_m1_0_0; Reaction105_kon*K_2_0*S_m1_m1_0; Reaction105 is "binding of MEK on scaffold";
    Reaction105_kon = 10;
  Reaction106: S_m1_0_0 => K_2_0 + S_m1_m1_0; Reaction106_koff*S_m1_0_0; Reaction106 is "dissociation of MEK from scaffold";  // isVersionOf GO:0043241
    Reaction106_koff = 0.5;
  Reaction107: K_2_0 + S_m1_m1_1 => S_m1_0_1; Reaction107_kon*K_2_0*S_m1_m1_1; Reaction107 is "binding of MEK on scaffold";
    Reaction107_kon = 10;
  Reaction108: S_m1_0_1 => K_2_0 + S_m1_m1_1; Reaction108_koff*S_m1_0_1; Reaction108 is "dissociation of MEK from scaffold";  // isVersionOf GO:0043241
    Reaction108_koff = 0.5;
  Reaction109: K_2_1 + S_m1_m1_m1 => S_m1_1_m1; Reaction109_kpon*K_2_1*S_m1_m1_m1; Reaction109 is "binding of MEK-P on scaffold";
    Reaction109_kpon = 0;
  Reaction110: S_m1_1_m1 => K_2_1 + S_m1_m1_m1; Reaction110_kpoff*S_m1_1_m1; Reaction110 is "dissociation of MEK-P from scaffold";  // isVersionOf GO:0043241
    Reaction110_kpoff = 0.05;
  Reaction111: K_2_1 + S_m1_m1_0 => S_m1_1_0; Reaction111_kpon*K_2_1*S_m1_m1_0; Reaction111 is "binding of MEK-P on scaffold";
    Reaction111_kpon = 0;
  Reaction112: S_m1_1_0 => K_2_1 + S_m1_m1_0; Reaction112_kpoff*S_m1_1_0; Reaction112 is "dissociation of MEK-P from scaffold";  // isVersionOf GO:0043241
    Reaction112_kpoff = 0.05;
  Reaction113: K_2_1 + S_m1_m1_1 => S_m1_1_1; Reaction113_kpon*K_2_1*S_m1_m1_1; Reaction113 is "binding of MEK-P on scaffold";
    Reaction113_kpon = 0;
  Reaction114: S_m1_1_1 => K_2_1 + S_m1_m1_1; Reaction114_kpoff*S_m1_1_1; Reaction114 is "dissociation of MEK-P from scaffold";  // isVersionOf GO:0043241
    Reaction114_kpoff = 0.05;
  Reaction115: K_2_2 + S_m1_m1_m1 => S_m1_2_m1; Reaction115_kpon*K_2_2*S_m1_m1_m1; Reaction115 is "binding of MEK-PP on scaffold";
    Reaction115_kpon = 0;
  Reaction116: S_m1_2_m1 => K_2_2 + S_m1_m1_m1; Reaction116_kpoff*S_m1_2_m1; Reaction116 is "dissociation of MEK-PP from scaffold";  // isVersionOf GO:0043241
    Reaction116_kpoff = 0.05;
  Reaction117: K_2_2 + S_m1_m1_0 => S_m1_2_0; Reaction117_kpon*K_2_2*S_m1_m1_0; Reaction117 is "binding of MEK-PP on scaffold";
    Reaction117_kpon = 0;
  Reaction118: S_m1_2_0 => K_2_2 + S_m1_m1_0; Reaction118_kpoff*S_m1_2_0; Reaction118 is "dissociation of MEK-PP from scaffold";  // isVersionOf GO:0043241
    Reaction118_kpoff = 0.05;
  Reaction119: K_2_2 + S_m1_m1_1 => S_m1_2_1; Reaction119_kpon*K_2_2*S_m1_m1_1; Reaction119 is "binding of MEK-PP on scaffold";
    Reaction119_kpon = 0;
  Reaction120: S_m1_2_1 => K_2_2 + S_m1_m1_1; Reaction120_kpoff*S_m1_2_1; Reaction120 is "dissociation of MEK-PP from scaffold";  // isVersionOf GO:0043241
    Reaction120_kpoff = 0.05;
  Reaction121: K_2_0 + S_0_m1_m1 => S_0_0_m1; Reaction121_kon*K_2_0*S_0_m1_m1; Reaction121 is "binding of MEK on scaffold";
    Reaction121_kon = 10;
  Reaction122: S_0_0_m1 => K_2_0 + S_0_m1_m1; Reaction122_koff*S_0_0_m1; Reaction122 is "dissociation of MEK from scaffold";  // isVersionOf GO:0043241
    Reaction122_koff = 0.5;
  Reaction123: K_2_0 + S_0_m1_0 => S_0_0_0; Reaction123_kon*K_2_0*S_0_m1_0; Reaction123 is "binding of MEK on scaffold";
    Reaction123_kon = 10;
  Reaction124: S_0_0_0 => K_2_0 + S_0_m1_0; Reaction124_koff*S_0_0_0; Reaction124 is "dissociation of MEK from scaffold";  // isVersionOf GO:0043241
    Reaction124_koff = 0.5;
  Reaction125: K_2_0 + S_0_m1_1 => S_0_0_1; Reaction125_kon*K_2_0*S_0_m1_1; Reaction125 is "binding of MEK on scaffold";
    Reaction125_kon = 10;
  Reaction126: S_0_0_1 => K_2_0 + S_0_m1_1; Reaction126_koff*S_0_0_1; Reaction126 is "dissociation of MEK from scaffold";  // isVersionOf GO:0043241
    Reaction126_koff = 0.5;
  Reaction127: K_2_1 + S_0_m1_m1 => S_0_1_m1; Reaction127_kpon*K_2_1*S_0_m1_m1; Reaction127 is "binding of MEK-P on scaffold";
    Reaction127_kpon = 0;
  Reaction128: S_0_1_m1 => K_2_1 + S_0_m1_m1; Reaction128_kpoff*S_0_1_m1; Reaction128 is "dissociation of MEK-P from scaffold";  // isVersionOf GO:0043241
    Reaction128_kpoff = 0.05;
  Reaction129: K_2_1 + S_0_m1_0 => S_0_1_0; Reaction129_kpon*K_2_1*S_0_m1_0; Reaction129 is "binding of MEK-P on scaffold";
    Reaction129_kpon = 0;
  Reaction130: S_0_1_0 => K_2_1 + S_0_m1_0; Reaction130_kpoff*S_0_1_0; Reaction130 is "dissociation of MEK-P from scaffold";  // isVersionOf GO:0043241
    Reaction130_kpoff = 0.05;
  Reaction131: K_2_1 + S_0_m1_1 => S_0_1_1; Reaction131_kpon*K_2_1*S_0_m1_1; Reaction131 is "binding of MEK-P on scaffold";
    Reaction131_kpon = 0;
  Reaction132: S_0_1_1 => K_2_1 + S_0_m1_1; Reaction132_kpoff*S_0_1_1; Reaction132 is "dissociation of MEK-P from scaffold";  // isVersionOf GO:0043241
    Reaction132_kpoff = 0.05;
  Reaction133: K_2_2 + S_0_m1_m1 => S_0_2_m1; Reaction133_kpon*K_2_2*S_0_m1_m1; Reaction133 is "binding of MEK-PP on scaffold";
    Reaction133_kpon = 0;
  Reaction134: S_0_2_m1 => K_2_2 + S_0_m1_m1; Reaction134_kpoff*S_0_2_m1; Reaction134 is "dissociation of MEK-PP from scaffold";  // isVersionOf GO:0043241
    Reaction134_kpoff = 0.05;
  Reaction135: K_2_2 + S_0_m1_0 => S_0_2_0; Reaction135_kpon*K_2_2*S_0_m1_0; Reaction135 is "binding of MEK-PP on scaffold";
    Reaction135_kpon = 0;
  Reaction136: S_0_2_0 => K_2_2 + S_0_m1_0; Reaction136_kpoff*S_0_2_0; Reaction136 is "dissociation of MEK-PP from scaffold";  // isVersionOf GO:0043241
    Reaction136_kpoff = 0.05;
  Reaction137: K_2_2 + S_0_m1_1 => S_0_2_1; Reaction137_kpon*K_2_2*S_0_m1_1; Reaction137 is "binding of MEK-PP on scaffold";
    Reaction137_kpon = 0;
  Reaction138: S_0_2_1 => K_2_2 + S_0_m1_1; Reaction138_kpoff*S_0_2_1; Reaction138 is "dissociation of MEK-PP from scaffold";  // isVersionOf GO:0043241
    Reaction138_kpoff = 0.05;
  Reaction139: K_2_0 + S_1_m1_m1 => S_1_0_m1; Reaction139_kon*K_2_0*S_1_m1_m1; Reaction139 is "binding of MEK on scaffold";
    Reaction139_kon = 10;
  Reaction140: S_1_0_m1 => K_2_0 + S_1_m1_m1; Reaction140_koff*S_1_0_m1; Reaction140 is "dissociation of MEK from scaffold";  // isVersionOf GO:0043241
    Reaction140_koff = 0.5;
  Reaction141: K_2_0 + S_1_m1_0 => S_1_0_0; Reaction141_kon*K_2_0*S_1_m1_0; Reaction141 is "binding of MEK on scaffold";
    Reaction141_kon = 10;
  Reaction142: S_1_0_0 => K_2_0 + S_1_m1_0; Reaction142_koff*S_1_0_0; Reaction142 is "dissociation of MEK from scaffold";  // isVersionOf GO:0043241
    Reaction142_koff = 0.5;
  Reaction143: K_2_0 + S_1_m1_1 => S_1_0_1; Reaction143_kon*K_2_0*S_1_m1_1; Reaction143 is "binding of MEK on scaffold";
    Reaction143_kon = 10;
  Reaction144: S_1_0_1 => K_2_0 + S_1_m1_1; Reaction144_koff*S_1_0_1; Reaction144 is "dissociation of MEK from scaffold";  // isVersionOf GO:0043241
    Reaction144_koff = 0.5;
  Reaction145: K_2_1 + S_1_m1_m1 => S_1_1_m1; Reaction145_kpon*K_2_1*S_1_m1_m1; Reaction145 is "binding of MEK-P on scaffold";
    Reaction145_kpon = 0;
  Reaction146: S_1_1_m1 => K_2_1 + S_1_m1_m1; Reaction146_kpoff*S_1_1_m1; Reaction146 is "dissociation of MEK-P from scaffold";  // isVersionOf GO:0043241
    Reaction146_kpoff = 0.05;
  Reaction147: K_2_1 + S_1_m1_0 => S_1_1_0; Reaction147_kpon*K_2_1*S_1_m1_0; Reaction147 is "binding of MEK-P on scaffold";
    Reaction147_kpon = 0;
  Reaction148: S_1_1_0 => K_2_1 + S_1_m1_0; Reaction148_kpoff*S_1_1_0; Reaction148 is "dissociation of MEK-P from scaffold";  // isVersionOf GO:0043241
    Reaction148_kpoff = 0.05;
  Reaction149: K_2_1 + S_1_m1_1 => S_1_1_1; Reaction149_kpon*K_2_1*S_1_m1_1; Reaction149 is "binding of MEK-P on scaffold";
    Reaction149_kpon = 0;
  Reaction150: S_1_1_1 => K_2_1 + S_1_m1_1; Reaction150_kpoff*S_1_1_1; Reaction150 is "dissociation of MEK-P from scaffold";  // isVersionOf GO:0043241
    Reaction150_kpoff = 0.05;
  Reaction151: K_2_2 + S_1_m1_m1 => S_1_2_m1; Reaction151_kpon*K_2_2*S_1_m1_m1; Reaction151 is "binding of MEK-PP on scaffold";
    Reaction151_kpon = 0;
  Reaction152: S_1_2_m1 => K_2_2 + S_1_m1_m1; Reaction152_kpoff*S_1_2_m1; Reaction152 is "dissociation of MEK-PP from scaffold";  // isVersionOf GO:0043241
    Reaction152_kpoff = 0.05;
  Reaction153: K_2_2 + S_1_m1_0 => S_1_2_0; Reaction153_kpon*K_2_2*S_1_m1_0; Reaction153 is "binding of MEK-PP on scaffold";
    Reaction153_kpon = 0;
  Reaction154: S_1_2_0 => K_2_2 + S_1_m1_0; Reaction154_kpoff*S_1_2_0; Reaction154 is "dissociation of MEK-PP from scaffold";  // isVersionOf GO:0043241
    Reaction154_kpoff = 0.05;
  Reaction155: K_2_2 + S_1_m1_1 => S_1_2_1; Reaction155_kpon*K_2_2*S_1_m1_1; Reaction155 is "binding of MEK-PP on scaffold";
    Reaction155_kpon = 0;
  Reaction156: S_1_2_1 => K_2_2 + S_1_m1_1; Reaction156_kpoff*S_1_2_1; Reaction156 is "dissociation of MEK-PP from scaffold";  // isVersionOf GO:0043241
    Reaction156_kpoff = 0.05;
  Reaction157: K_2_0 + S_2_m1_m1 => S_2_0_m1; Reaction157_kon*K_2_0*S_2_m1_m1; Reaction157 is "binding of MEK on scaffold";
    Reaction157_kon = 10;
  Reaction158: S_2_0_m1 => K_2_0 + S_2_m1_m1; Reaction158_koff*S_2_0_m1; Reaction158 is "dissociation of MEK from scaffold";  // isVersionOf GO:0043241
    Reaction158_koff = 0.5;
  Reaction159: K_2_0 + S_2_m1_0 => S_2_0_0; Reaction159_kon*K_2_0*S_2_m1_0; Reaction159 is "binding of MEK on scaffold";
    Reaction159_kon = 10;
  Reaction160: S_2_0_0 => K_2_0 + S_2_m1_0; Reaction160_koff*S_2_0_0; Reaction160 is "dissociation of MEK from scaffold";  // isVersionOf GO:0043241
    Reaction160_koff = 0.5;
  Reaction161: K_2_0 + S_2_m1_1 => S_2_0_1; Reaction161_kon*K_2_0*S_2_m1_1; Reaction161 is "binding of MEK on scaffold";
    Reaction161_kon = 10;
  Reaction162: S_2_0_1 => K_2_0 + S_2_m1_1; Reaction162_koff*S_2_0_1; Reaction162 is "dissociation of MEK from scaffold";  // isVersionOf GO:0043241
    Reaction162_koff = 0.5;
  Reaction163: K_2_1 + S_2_m1_m1 => S_2_1_m1; Reaction163_kpon*K_2_1*S_2_m1_m1; Reaction163 is "binding of MEK-P on scaffold";
    Reaction163_kpon = 0;
  Reaction164: S_2_1_m1 => K_2_1 + S_2_m1_m1; Reaction164_kpoff*S_2_1_m1; Reaction164 is "dissociation of MEK-P from scaffold";  // isVersionOf GO:0043241
    Reaction164_kpoff = 0.05;
  Reaction165: K_2_1 + S_2_m1_0 => S_2_1_0; Reaction165_kpon*K_2_1*S_2_m1_0; Reaction165 is "binding of MEK-P on scaffold";
    Reaction165_kpon = 0;
  Reaction166: S_2_1_0 => K_2_1 + S_2_m1_0; Reaction166_kpoff*S_2_1_0; Reaction166 is "dissociation of MEK-P from scaffold";  // isVersionOf GO:0043241
    Reaction166_kpoff = 0.05;
  Reaction167: K_2_1 + S_2_m1_1 => S_2_1_1; Reaction167_kpon*K_2_1*S_2_m1_1; Reaction167 is "binding of MEK-P on scaffold";
    Reaction167_kpon = 0;
  Reaction168: S_2_1_1 => K_2_1 + S_2_m1_1; Reaction168_kpoff*S_2_1_1; Reaction168 is "dissociation of MEK-P from scaffold";  // isVersionOf GO:0043241
    Reaction168_kpoff = 0.05;
  Reaction169: K_2_2 + S_2_m1_m1 => S_2_2_m1; Reaction169_kpon*K_2_2*S_2_m1_m1; Reaction169 is "binding of MEK-PP on scaffold";
    Reaction169_kpon = 0;
  Reaction170: S_2_2_m1 => K_2_2 + S_2_m1_m1; Reaction170_kpoff*S_2_2_m1; Reaction170 is "dissociation of MEK-PP from scaffold";  // isVersionOf GO:0043241
    Reaction170_kpoff = 0.05;
  Reaction171: K_2_2 + S_2_m1_0 => S_2_2_0; Reaction171_kpon*K_2_2*S_2_m1_0; Reaction171 is "binding of MEK-PP on scaffold";
    Reaction171_kpon = 0;
  Reaction172: S_2_2_0 => K_2_2 + S_2_m1_0; Reaction172_kpoff*S_2_2_0; Reaction172 is "dissociation of MEK-PP from scaffold";  // isVersionOf GO:0043241
    Reaction172_kpoff = 0.05;
  Reaction173: K_2_2 + S_2_m1_1 => S_2_2_1; Reaction173_kpon*K_2_2*S_2_m1_1; Reaction173 is "binding of MEK-PP on scaffold";
    Reaction173_kpon = 0;
  Reaction174: S_2_2_1 => K_2_2 + S_2_m1_1; Reaction174_kpoff*S_2_2_1; Reaction174 is "dissociation of MEK-PP from scaffold";  // isVersionOf GO:0043241
    Reaction174_kpoff = 0.05;
  Reaction175: K_3_0 + S_m1_m1_m1 => S_m1_m1_0; Reaction175_kon*K_3_0*S_m1_m1_m1; Reaction175 is "binding of RAF on scaffold";
    Reaction175_kon = 10;
  Reaction176: S_m1_m1_0 => K_3_0 + S_m1_m1_m1; Reaction176_koff*S_m1_m1_0; Reaction176 is "dissociation of RAF from scaffold";  // isVersionOf GO:0043241
    Reaction176_koff = 0.5;
  Reaction177: K_3_1 + S_m1_m1_m1 => S_m1_m1_1; Reaction177_kpon*K_3_1*S_m1_m1_m1; Reaction177 is "binding of RAF-P on scaffold";
    Reaction177_kpon = 0;
  Reaction178: S_m1_m1_1 => K_3_1 + S_m1_m1_m1; Reaction178_kpoff*S_m1_m1_1; Reaction178 is "dissociation of RAF-P from scaffold";  // isVersionOf GO:0043241
    Reaction178_kpoff = 0.05;
  Reaction179: K_3_0 + S_m1_0_m1 => S_m1_0_0; Reaction179_kon*K_3_0*S_m1_0_m1; Reaction179 is "binding of RAF on scaffold";
    Reaction179_kon = 10;
  Reaction180: S_m1_0_0 => K_3_0 + S_m1_0_m1; Reaction180_koff*S_m1_0_0; Reaction180 is "dissociation of RAF from scaffold";  // isVersionOf GO:0043241
    Reaction180_koff = 0.5;
  Reaction181: K_3_1 + S_m1_0_m1 => S_m1_0_1; Reaction181_kpon*K_3_1*S_m1_0_m1; Reaction181 is "binding of RAF-P on scaffold";
    Reaction181_kpon = 0;
  Reaction182: S_m1_0_1 => K_3_1 + S_m1_0_m1; Reaction182_kpoff*S_m1_0_1; Reaction182 is "dissociation of RAF-P from scaffold";  // isVersionOf GO:0043241
    Reaction182_kpoff = 0.05;
  Reaction183: K_3_0 + S_m1_1_m1 => S_m1_1_0; Reaction183_kon*K_3_0*S_m1_1_m1; Reaction183 is "binding of RAF on scaffold";
    Reaction183_kon = 10;
  Reaction184: S_m1_1_0 => K_3_0 + S_m1_1_m1; Reaction184_koff*S_m1_1_0; Reaction184 is "dissociation of RAF from scaffold";  // isVersionOf GO:0043241
    Reaction184_koff = 0.5;
  Reaction185: K_3_1 + S_m1_1_m1 => S_m1_1_1; Reaction185_kpon*K_3_1*S_m1_1_m1; Reaction185 is "binding of RAF-P on scaffold";
    Reaction185_kpon = 0;
  Reaction186: S_m1_1_1 => K_3_1 + S_m1_1_m1; Reaction186_kpoff*S_m1_1_1; Reaction186 is "dissociation of RAF-P from scaffold";  // isVersionOf GO:0043241
    Reaction186_kpoff = 0.05;
  Reaction187: K_3_0 + S_m1_2_m1 => S_m1_2_0; Reaction187_kon*K_3_0*S_m1_2_m1; Reaction187 is "binding of RAF on scaffold";
    Reaction187_kon = 10;
  Reaction188: S_m1_2_0 => K_3_0 + S_m1_2_m1; Reaction188_koff*S_m1_2_0; Reaction188 is "dissociation of RAF from scaffold";  // isVersionOf GO:0043241
    Reaction188_koff = 0.5;
  Reaction189: K_3_1 + S_m1_2_m1 => S_m1_2_1; Reaction189_kpon*K_3_1*S_m1_2_m1; Reaction189 is "binding of RAF-P on scaffold";
    Reaction189_kpon = 0;
  Reaction190: S_m1_2_1 => K_3_1 + S_m1_2_m1; Reaction190_kpoff*S_m1_2_1; Reaction190 is "dissociation of RAF-P from scaffold";  // isVersionOf GO:0043241
    Reaction190_kpoff = 0.05;
  Reaction191: K_3_0 + S_0_m1_m1 => S_0_m1_0; Reaction191_kon*K_3_0*S_0_m1_m1; Reaction191 is "binding of RAF on scaffold";
    Reaction191_kon = 10;
  Reaction192: S_0_m1_0 => K_3_0 + S_0_m1_m1; Reaction192_koff*S_0_m1_0; Reaction192 is "dissociation of RAF from scaffold";  // isVersionOf GO:0043241
    Reaction192_koff = 0.5;
  Reaction193: K_3_1 + S_0_m1_m1 => S_0_m1_1; Reaction193_kpon*K_3_1*S_0_m1_m1; Reaction193 is "binding of RAF-P on scaffold";
    Reaction193_kpon = 0;
  Reaction194: S_0_m1_1 => K_3_1 + S_0_m1_m1; Reaction194_kpoff*S_0_m1_1; Reaction194 is "dissociation of RAF-P from scaffold";  // isVersionOf GO:0043241
    Reaction194_kpoff = 0.05;
  Reaction195: K_3_0 + S_0_0_m1 => S_0_0_0; Reaction195_kon*K_3_0*S_0_0_m1; Reaction195 is "binding of RAF on scaffold";
    Reaction195_kon = 10;
  Reaction196: S_0_0_0 => K_3_0 + S_0_0_m1; Reaction196_koff*S_0_0_0; Reaction196 is "dissociation of RAF from scaffold";  // isVersionOf GO:0043241
    Reaction196_koff = 0.5;
  Reaction197: K_3_1 + S_0_0_m1 => S_0_0_1; Reaction197_kpon*K_3_1*S_0_0_m1; Reaction197 is "binding of RAF-P on scaffold";
    Reaction197_kpon = 0;
  Reaction198: S_0_0_1 => K_3_1 + S_0_0_m1; Reaction198_kpoff*S_0_0_1; Reaction198 is "dissociation of RAF from scaffold";  // isVersionOf GO:0043241
    Reaction198_kpoff = 0.05;
  Reaction199: K_3_0 + S_0_1_m1 => S_0_1_0; Reaction199_kon*K_3_0*S_0_1_m1; Reaction199 is "binding of RAF on scaffold";
    Reaction199_kon = 10;
  Reaction200: S_0_1_0 => K_3_0 + S_0_1_m1; Reaction200_koff*S_0_1_0; Reaction200 is "dissociation of RAF from scaffold";  // isVersionOf GO:0043241
    Reaction200_koff = 0.5;
  Reaction201: K_3_1 + S_0_1_m1 => S_0_1_1; Reaction201_kpon*K_3_1*S_0_1_m1; Reaction201 is "binding of RAF-P on scaffold";
    Reaction201_kpon = 0;
  Reaction202: S_0_1_1 => K_3_1 + S_0_1_m1; Reaction202_kpoff*S_0_1_1; Reaction202 is "dissociation of RAF-P from scaffold";  // isVersionOf GO:0043241
    Reaction202_kpoff = 0.05;
  Reaction203: K_3_0 + S_0_2_m1 => S_0_2_0; Reaction203_kon*K_3_0*S_0_2_m1; Reaction203 is "binding of RAF on scaffold";
    Reaction203_kon = 10;
  Reaction204: S_0_2_0 => K_3_0 + S_0_2_m1; Reaction204_koff*S_0_2_0; Reaction204 is "dissociation of RAF from scaffold";  // isVersionOf GO:0043241
    Reaction204_koff = 0.5;
  Reaction205: K_3_1 + S_0_2_m1 => S_0_2_1; Reaction205_kpon*K_3_1*S_0_2_m1; Reaction205 is "binding of RAF-P on scaffold";
    Reaction205_kpon = 0;
  Reaction206: S_0_2_1 => K_3_1 + S_0_2_m1; Reaction206_kpoff*S_0_2_1; Reaction206 is "dissociation of RAF-P from scaffold";  // isVersionOf GO:0043241
    Reaction206_kpoff = 0.05;
  Reaction207: K_3_0 + S_1_m1_m1 => S_1_m1_0; Reaction207_kon*K_3_0*S_1_m1_m1; Reaction207 is "binding of RAF on scaffold";
    Reaction207_kon = 10;
  Reaction208: S_1_m1_0 => K_3_0 + S_1_m1_m1; Reaction208_koff*S_1_m1_0; Reaction208 is "dissociation of RAF from scaffold";  // isVersionOf GO:0043241
    Reaction208_koff = 0.5;
  Reaction209: K_3_1 + S_1_m1_m1 => S_1_m1_1; Reaction209_kpon*K_3_1*S_1_m1_m1; Reaction209 is "binding of RAF-P on scaffold";
    Reaction209_kpon = 0;
  Reaction210: S_1_m1_1 => K_3_1 + S_1_m1_m1; Reaction210_kpoff*S_1_m1_1; Reaction210 is "dissociation of RAF-P from scaffold";  // isVersionOf GO:0043241
    Reaction210_kpoff = 0.05;
  Reaction211: K_3_0 + S_1_0_m1 => S_1_0_0; Reaction211_kon*K_3_0*S_1_0_m1; Reaction211 is "binding of RAF on scaffold";
    Reaction211_kon = 10;
  Reaction212: S_1_0_0 => K_3_0 + S_1_0_m1; Reaction212_koff*S_1_0_0; Reaction212 is "dissociation of RAF from scaffold";  // isVersionOf GO:0043241
    Reaction212_koff = 0.5;
  Reaction213: K_3_1 + S_1_0_m1 => S_1_0_1; Reaction213_kpon*K_3_1*S_1_0_m1; Reaction213 is "binding of RAF-P on scaffold";
    Reaction213_kpon = 0;
  Reaction214: S_1_0_1 => K_3_1 + S_1_0_m1; Reaction214_kpoff*S_1_0_1; Reaction214 is "dissociation of RAF-P from scaffold";  // isVersionOf GO:0043241
    Reaction214_kpoff = 0.05;
  Reaction215: K_3_0 + S_1_1_m1 => S_1_1_0; Reaction215_kon*K_3_0*S_1_1_m1; Reaction215 is "binding of RAF on scaffold";
    Reaction215_kon = 10;
  Reaction216: S_1_1_0 => K_3_0 + S_1_1_m1; Reaction216_koff*S_1_1_0; Reaction216 is "dissociation of RAF from scaffold";  // isVersionOf GO:0043241
    Reaction216_koff = 0.5;
  Reaction217: K_3_1 + S_1_1_m1 => S_1_1_1; Reaction217_kpon*K_3_1*S_1_1_m1; Reaction217 is "binding of RAF-P on scaffold";
    Reaction217_kpon = 0;
  Reaction218: S_1_1_1 => K_3_1 + S_1_1_m1; Reaction218_kpoff*S_1_1_1; Reaction218 is "dissociation of RAF-P from scaffold";  // isVersionOf GO:0043241
    Reaction218_kpoff = 0.05;
  Reaction219: K_3_0 + S_1_2_m1 => S_1_2_0; Reaction219_kon*K_3_0*S_1_2_m1; Reaction219 is "binding of RAF on scaffold";
    Reaction219_kon = 10;
  Reaction220: S_1_2_0 => K_3_0 + S_1_2_m1; Reaction220_koff*S_1_2_0; Reaction220 is "dissociation of RAF from scaffold";  // isVersionOf GO:0043241
    Reaction220_koff = 0.5;
  Reaction221: K_3_1 + S_1_2_m1 => S_1_2_1; Reaction221_kpon*K_3_1*S_1_2_m1; Reaction221 is "binding of RAF-P on scaffold";
    Reaction221_kpon = 0;
  Reaction222: S_1_2_1 => K_3_1 + S_1_2_m1; Reaction222_kpoff*S_1_2_1; Reaction222 is "dissociation of RAF-P from scaffold";  // isVersionOf GO:0043241
    Reaction222_kpoff = 0.05;
  Reaction223: K_3_0 + S_2_m1_m1 => S_2_m1_0; Reaction223_kon*K_3_0*S_2_m1_m1; Reaction223 is "binding of RAF on scaffold";
    Reaction223_kon = 10;
  Reaction224: S_2_m1_0 => K_3_0 + S_2_m1_m1; Reaction224_koff*S_2_m1_0; Reaction224 is "dissociation of RAF from scaffold";  // isVersionOf GO:0043241
    Reaction224_koff = 0.5;
  Reaction225: K_3_1 + S_2_m1_m1 => S_2_m1_1; Reaction225_kpon*K_3_1*S_2_m1_m1; Reaction225 is "binding of RAF-P on scaffold";
    Reaction225_kpon = 0;
  Reaction226: S_2_m1_1 => K_3_1 + S_2_m1_m1; Reaction226_kpoff*S_2_m1_1; Reaction226 is "dissociation of RAF-P from scaffold";  // isVersionOf GO:0043241
    Reaction226_kpoff = 0.05;
  Reaction227: K_3_0 + S_2_0_m1 => S_2_0_0; Reaction227_kon*K_3_0*S_2_0_m1; Reaction227 is "binding of RAF on scaffold";
    Reaction227_kon = 10;
  Reaction228: S_2_0_0 => K_3_0 + S_2_0_m1; Reaction228_koff*S_2_0_0; Reaction228 is "dissociation of RAF from scaffold";  // isVersionOf GO:0043241
    Reaction228_koff = 0.5;
  Reaction229: K_3_1 + S_2_0_m1 => S_2_0_1; Reaction229_kpon*K_3_1*S_2_0_m1; Reaction229 is "binding of RAF-P on scaffold";
    Reaction229_kpon = 0;
  Reaction230: S_2_0_1 => K_3_1 + S_2_0_m1; Reaction230_kpoff*S_2_0_1; Reaction230 is "dissociation of RAF-P from scaffold";  // isVersionOf GO:0043241
    Reaction230_kpoff = 0.05;
  Reaction231: K_3_0 + S_2_1_m1 => S_2_1_0; Reaction231_kon*K_3_0*S_2_1_m1; Reaction231 is "binding of RAF on scaffold";
    Reaction231_kon = 10;
  Reaction232: S_2_1_0 => K_3_0 + S_2_1_m1; Reaction232_koff*S_2_1_0; Reaction232 is "dissociation of RAF from scaffold";  // isVersionOf GO:0043241
    Reaction232_koff = 0.5;
  Reaction233: K_3_1 + S_2_1_m1 => S_2_1_1; Reaction233_kpon*K_3_1*S_2_1_m1; Reaction233 is "binding of RAF-P on scaffold";
    Reaction233_kpon = 0;
  Reaction234: S_2_1_1 => K_3_1 + S_2_1_m1; Reaction234_kpoff*S_2_1_1; Reaction234 is "dissociation of RAF-P from scaffold";  // isVersionOf GO:0043241
    Reaction234_kpoff = 0.05;
  Reaction235: K_3_0 + S_2_2_m1 => S_2_2_0; Reaction235_kon*K_3_0*S_2_2_m1; Reaction235 is "binding of RAF on scaffold";
    Reaction235_kon = 10;
  Reaction236: S_2_2_0 => K_3_0 + S_2_2_m1; Reaction236_koff*S_2_2_0; Reaction236 is "dissociation of RAF from scaffold";  // isVersionOf GO:0043241
    Reaction236_koff = 0.5;
  Reaction237: K_3_1 + S_2_2_m1 => S_2_2_1; Reaction237_kpon*K_3_1*S_2_2_m1; Reaction237 is "binding of RAF-P on scaffold";
    Reaction237_kpon = 0;
  Reaction238: S_2_2_1 => K_3_1 + S_2_2_m1; Reaction238_kpoff*S_2_2_1; Reaction238 is "dissociation of RAF-P from scaffold";  // isVersionOf GO:0043241
    Reaction238_kpoff = 0.05;
  Reaction239: S_0_2_m1 => S_1_2_m1; Reaction239_k7*S_0_2_m1; Reaction239 is "phosphorylation of MAPK on scaffold";  // ec-code:2.7.1.37 GO:0004708
    Reaction239_k7 = 0.1;
  Reaction240: S_0_2_0 => S_1_2_0; Reaction240_k7*S_0_2_0; Reaction240 is "phosphorylation of MAPK on scaffold";  // ec-code:2.7.1.37 GO:0004708
    Reaction240_k7 = 0.1;
  Reaction241: S_0_2_1 => S_1_2_1; Reaction241_k7*S_0_2_1; Reaction241 is "phosphorylation of MAPK on scaffold";  // ec-code:2.7.1.37 GO:0004708
    Reaction241_k7 = 0.1;
  Reaction242: S_1_2_m1 => S_2_2_m1; Reaction242_k9a*S_1_2_m1; Reaction242 is "phosphorylation of MAPK-P on scaffold";  // ec-code:2.7.1.37 GO:0000187 GO:0004708
    Reaction242_k9a = 0.1;
  Reaction243: S_1_2_0 => S_2_2_0; Reaction243_k9a*S_1_2_0; Reaction243 is "phosphorylation of MAPK-P on scaffold";  // ec-code:2.7.1.37 GO:0000187 GO:0004708
    Reaction243_k9a = 0.1;
  Reaction244: S_1_2_1 => S_2_2_1; Reaction244_k9a*S_1_2_1; Reaction244 is "phosphorylation of MAPK-P on scaffold";  // ec-code:2.7.1.37 GO:0000187 GO:0004708
    Reaction244_k9a = 0.1;
  Reaction245: S_m1_0_1 => S_m1_1_1; Reaction245_k3*S_m1_0_1; Reaction245 is "phosphorylation of MEK on scaffold";  // ec-code:2.7.1.37 GO:0004709
    Reaction245_k3 = 0.1;
  Reaction246: S_m1_1_1 => S_m1_2_1; Reaction246_k5a*S_m1_1_1; Reaction246 is "phosphorylation of MEK-P on scaffold";  // ec-code:2.7.1.37 GO:0000186 GO:0004709
    Reaction246_k5a = 0.1;
  Reaction247: S_0_0_1 => S_0_1_1; Reaction247_k3*S_0_0_1; Reaction247 is "phosphorylation of MEK on scaffold";  // ec-code:2.7.1.37 GO:0004709
    Reaction247_k3 = 0.1;
  Reaction248: S_0_1_1 => S_0_2_1; Reaction248_k5a*S_0_1_1; Reaction248 is "phosphorylation of MEK-P on scaffold";  // ec-code:2.7.1.37 GO:0000186 GO:0004709
    Reaction248_k5a = 0.1;
  Reaction249: S_1_0_1 => S_1_1_1; Reaction249_k3*S_1_0_1; Reaction249 is "phosphorylation of MEK on scaffold";  // ec-code:2.7.1.37 GO:0004709
    Reaction249_k3 = 0.1;
  Reaction250: S_1_1_1 => S_1_2_1; Reaction250_k5a*S_1_1_1; Reaction250 is "phosphorylation of MEK-P on scaffold";  // ec-code:2.7.1.37 GO:0000186 GO:0004709
    Reaction250_k5a = 0.1;
  Reaction251: S_2_0_1 => S_2_1_1; Reaction251_k3*S_2_0_1; Reaction251 is "phosphorylation of MEK on scaffold";  // ec-code:2.7.1.37 GO:0004709
    Reaction251_k3 = 0.1;
  Reaction252: S_2_1_1 => S_2_2_1; Reaction252_k5a*S_2_1_1; Reaction252 is "phosphorylation of MEK-P on scaffold";  // ec-code:2.7.1.37 GO:0000186 GO:0004709
    Reaction252_k5a = 0.1;
  Reaction253: RAFK + S_m1_m1_0 => S_RAFK_m1_m1_0; Reaction253_k1a*RAFK*S_m1_m1_0; Reaction253 is "binding of RAF and RAFK";  // isVersionOf reactome:REACT_996 GO:0031435
    Reaction253_k1a = 100;
  Reaction254: S_RAFK_m1_m1_0 => RAFK + S_m1_m1_0; Reaction254_d1a*S_RAFK_m1_m1_0; Reaction254 is "dissociation of RAF_RAFK";  // isVersionOf GO:0043241
    Reaction254_d1a = 0;
  Reaction255: S_RAFK_m1_m1_0 => RAFK + S_m1_m1_1; Reaction255_k1*S_RAFK_m1_m1_0; Reaction255 is "phosphorylation of RAF on scaffold";  // isVersionOf ec-code:2.7.11.1 GO:0008349 GO:0000185
    Reaction255_k1 = 0.1;
  Reaction256: RAFK + S_m1_0_0 => S_RAFK_m1_0_0; Reaction256_k1a*RAFK*S_m1_0_0; Reaction256 is "binding of RAF and RAFK";  // isVersionOf reactome:REACT_996 GO:0031435
    Reaction256_k1a = 100;
  Reaction257: S_RAFK_m1_0_0 => RAFK + S_m1_0_0; Reaction257_d1a*S_RAFK_m1_0_0; Reaction257 is "dissociation of RAF_RAFK";  // isVersionOf GO:0043241
    Reaction257_d1a = 0;
  Reaction258: S_RAFK_m1_0_0 => RAFK + S_m1_0_1; Reaction258_k1*S_RAFK_m1_0_0; Reaction258 is "phosphorylation of RAF on scaffold";  // isVersionOf ec-code:2.7.11.1 GO:0000185 GO:0008349
    Reaction258_k1 = 0.1;
  Reaction259: RAFK + S_m1_1_0 => S_RAFK_m1_1_0; Reaction259_k1a*RAFK*S_m1_1_0; Reaction259 is "binding of RAF and RAFK";  // isVersionOf reactome:REACT_996 GO:0031435
    Reaction259_k1a = 100;
  Reaction260: S_RAFK_m1_1_0 => RAFK + S_m1_1_0; Reaction260_d1a*S_RAFK_m1_1_0; Reaction260 is "dissociation of RAF_RAFK";  // isVersionOf GO:0043241
    Reaction260_d1a = 0;
  Reaction261: S_RAFK_m1_1_0 => RAFK + S_m1_1_1; Reaction261_k1*S_RAFK_m1_1_0; Reaction261 is "phosphorylation of RAF on scaffold";  // isVersionOf ec-code:2.7.11.1 GO:0008349 GO:0000185
    Reaction261_k1 = 0.1;
  Reaction262: RAFK + S_m1_2_0 => S_RAFK_m1_2_0; Reaction262_k1a*RAFK*S_m1_2_0; Reaction262 is "binding of RAF and RAFK";  // isVersionOf reactome:REACT_996 GO:0031435
    Reaction262_k1a = 100;
  Reaction263: S_RAFK_m1_2_0 => RAFK + S_m1_2_0; Reaction263_d1a*S_RAFK_m1_2_0; Reaction263 is "dissociation of RAF_RAFK";  // isVersionOf GO:0043241
    Reaction263_d1a = 0;
  Reaction264: S_RAFK_m1_2_0 => RAFK + S_m1_2_1; Reaction264_k1*S_RAFK_m1_2_0; Reaction264 is "phosphorylation of RAF on scaffold";  // isVersionOf ec-code:2.7.11.1 GO:0000185 GO:0008349
    Reaction264_k1 = 0.1;
  Reaction265: RAFK + S_0_m1_0 => S_RAFK_0_m1_0; Reaction265_k1a*RAFK*S_0_m1_0; Reaction265 is "binding of RAF and RAFK";  // isVersionOf reactome:REACT_996 GO:0031435
    Reaction265_k1a = 100;
  Reaction266: S_RAFK_0_m1_0 => RAFK + S_0_m1_0; Reaction266_d1a*S_RAFK_0_m1_0; Reaction266 is "dissociation of RAF_RAFK";  // isVersionOf GO:0043241
    Reaction266_d1a = 0;
  Reaction267: S_RAFK_0_m1_0 => RAFK + S_0_m1_1; Reaction267_k1*S_RAFK_0_m1_0; Reaction267 is "phosphorylation of RAF on scaffold";  // isVersionOf ec-code:2.7.11.1 GO:0008349 GO:0000185
    Reaction267_k1 = 0.1;
  Reaction268: RAFK + S_0_0_0 => S_RAFK_0_0_0; Reaction268_k1a*RAFK*S_0_0_0; Reaction268 is "binding of RAF and RAFK";  // isVersionOf reactome:REACT_996 GO:0031435
    Reaction268_k1a = 100;
  Reaction269: S_RAFK_0_0_0 => RAFK + S_0_0_0; Reaction269_d1a*S_RAFK_0_0_0; Reaction269 is "dissociation of RAF_RAFK";  // isVersionOf GO:0043241
    Reaction269_d1a = 0;
  Reaction270: S_RAFK_0_0_0 => RAFK + S_0_0_1; Reaction270_k1*S_RAFK_0_0_0; Reaction270 is "phosphorylation of RAF on scaffold";  // isVersionOf ec-code:2.7.11.1 GO:0000185
    Reaction270_k1 = 0.1;
  Reaction271: RAFK + S_0_1_0 => S_RAFK_0_1_0; Reaction271_k1a*RAFK*S_0_1_0; Reaction271 is "binding of RAF and RAFK";  // isVersionOf reactome:REACT_996 GO:0031435
    Reaction271_k1a = 100;
  Reaction272: S_RAFK_0_1_0 => RAFK + S_0_1_0; Reaction272_d1a*S_RAFK_0_1_0; Reaction272 is "dissociation of RAF_RAFK";  // isVersionOf GO:0043241
    Reaction272_d1a = 0;
  Reaction273: S_RAFK_0_1_0 => RAFK + S_0_1_1; Reaction273_k1*S_RAFK_0_1_0; Reaction273 is "phosphorylation of RAF on scaffold";  // isVersionOf ec-code:2.7.11.1 GO:0008349 GO:0000185
    Reaction273_k1 = 0.1;
  Reaction274: RAFK + S_0_2_0 => S_RAFK_0_2_0; Reaction274_k1a*RAFK*S_0_2_0; Reaction274 is "binding of RAF and RAFK";  // isVersionOf reactome:REACT_996 GO:0031435
    Reaction274_k1a = 100;
  Reaction275: S_RAFK_0_2_0 => RAFK + S_0_2_0; Reaction275_d1a*S_RAFK_0_2_0; Reaction275 is "dissociation of RAF_RAFK";  // isVersionOf GO:0043241
    Reaction275_d1a = 0;
  Reaction276: S_RAFK_0_2_0 => RAFK + S_0_2_1; Reaction276_k1*S_RAFK_0_2_0; Reaction276 is "phosphorylation of RAF on scaffold";  // isVersionOf ec-code:2.7.11.1 GO:0000185 GO:0008349
    Reaction276_k1 = 0.1;
  Reaction277: RAFK + S_1_m1_0 => S_RAFK_1_m1_0; Reaction277_k1a*RAFK*S_1_m1_0; Reaction277 is "binding of RAF and RAFK";  // isVersionOf reactome:REACT_996 GO:0031435
    Reaction277_k1a = 100;
  Reaction278: S_RAFK_1_m1_0 => RAFK + S_1_m1_0; Reaction278_d1a*S_RAFK_1_m1_0; Reaction278 is "dissociation of RAF_RAFK";  // isVersionOf GO:0043241
    Reaction278_d1a = 0;
  Reaction279: S_RAFK_1_m1_0 => RAFK + S_1_m1_1; Reaction279_k1*S_RAFK_1_m1_0; Reaction279 is "phosphorylation of RAF on scaffold";  // isVersionOf ec-code:2.7.11.1 GO:0008349 GO:0000185
    Reaction279_k1 = 0.1;
  Reaction280: RAFK + S_1_0_0 => S_RAFK_1_0_0; Reaction280_k1a*RAFK*S_1_0_0; Reaction280 is "binding of RAF and RAFK";  // isVersionOf reactome:REACT_996 GO:0031435
    Reaction280_k1a = 100;
  Reaction281: S_RAFK_1_0_0 => RAFK + S_1_0_0; Reaction281_d1a*S_RAFK_1_0_0; Reaction281 is "dissociation of RAF_RAFK";  // isVersionOf GO:0043241
    Reaction281_d1a = 0;
  Reaction282: S_RAFK_1_0_0 => RAFK + S_1_0_1; Reaction282_k1*S_RAFK_1_0_0; Reaction282 is "phosphorylation of RAF on scaffold";  // isVersionOf ec-code:2.7.11.1 GO:0000185 GO:0008349
    Reaction282_k1 = 0.1;
  Reaction283: RAFK + S_1_1_0 => S_RAFK_1_1_0; Reaction283_k1a*RAFK*S_1_1_0; Reaction283 is "binding of RAF and RAFK";  // isVersionOf reactome:REACT_996 GO:0031435
    Reaction283_k1a = 100;
  Reaction284: S_RAFK_1_1_0 => RAFK + S_1_1_0; Reaction284_d1a*S_RAFK_1_1_0; Reaction284 is "dissociation of RAF_RAFK";  // isVersionOf GO:0043241
    Reaction284_d1a = 0;
  Reaction285: S_RAFK_1_1_0 => RAFK + S_1_1_1; Reaction285_k1*S_RAFK_1_1_0; Reaction285 is "phosphorylation of RAF on scaffold";  // isVersionOf ec-code:2.7.11.1 GO:0008349 GO:0000185
    Reaction285_k1 = 0.1;
  Reaction286: RAFK + S_1_2_0 => S_RAFK_1_2_0; Reaction286_k1a*RAFK*S_1_2_0; Reaction286 is "binding of RAF and RAFK";  // isVersionOf reactome:REACT_996 GO:0031435
    Reaction286_k1a = 100;
  Reaction287: S_RAFK_1_2_0 => RAFK + S_1_2_0; Reaction287_d1a*S_RAFK_1_2_0; Reaction287 is "dissociation of RAF_RAFK";  // isVersionOf GO:0043241
    Reaction287_d1a = 0;
  Reaction288: S_RAFK_1_2_0 => RAFK + S_1_2_1; Reaction288_k1*S_RAFK_1_2_0; Reaction288 is "phosphorylation of RAF on scaffold";  // isVersionOf ec-code:2.7.11.1 GO:0000185 GO:0008349
    Reaction288_k1 = 0.1;
  Reaction289: RAFK + S_2_m1_0 => S_RAFK_2_m1_0; Reaction289_k1a*RAFK*S_2_m1_0; Reaction289 is "binding of RAF and RAFK";  // isVersionOf reactome:REACT_996 GO:0031435
    Reaction289_k1a = 100;
  Reaction290: S_RAFK_2_m1_0 => RAFK + S_2_m1_0; Reaction290_d1a*S_RAFK_2_m1_0; Reaction290 is "dissociation of RAF_RAFK";  // isVersionOf GO:0043241
    Reaction290_d1a = 0;
  Reaction291: S_RAFK_2_m1_0 => RAFK + S_2_m1_1; Reaction291_k1*S_RAFK_2_m1_0; Reaction291 is "phosphorylation of RAF on scaffold";  // isVersionOf ec-code:2.7.11.1 GO:0008349 GO:0000185
    Reaction291_k1 = 0.1;
  Reaction292: RAFK + S_2_0_0 => S_RAFK_2_0_0; Reaction292_k1a*RAFK*S_2_0_0; Reaction292 is "binding of RAF and RAFK";  // isVersionOf reactome:REACT_996 GO:0031435
    Reaction292_k1a = 100;
  Reaction293: S_RAFK_2_0_0 => RAFK + S_2_0_0; Reaction293_d1a*S_RAFK_2_0_0; Reaction293 is "dissociation of RAF_RAFK";  // isVersionOf GO:0043241
    Reaction293_d1a = 0;
  Reaction294: S_RAFK_2_0_0 => RAFK + S_2_0_1; Reaction294_k1*S_RAFK_2_0_0; Reaction294 is "phosphorylation of RAF on scaffold";  // isVersionOf ec-code:2.7.11.1 GO:0008349 GO:0000185
    Reaction294_k1 = 0.1;
  Reaction295: RAFK + S_2_1_0 => S_RAFK_2_1_0; Reaction295_k1a*RAFK*S_2_1_0; Reaction295 is "binding of RAF and RAFK";  // isVersionOf reactome:REACT_996 GO:0031435
    Reaction295_k1a = 100;
  Reaction296: S_RAFK_2_1_0 => RAFK + S_2_1_0; Reaction296_d1a*S_RAFK_2_1_0; Reaction296 is "dissociation of RAF_RAFK";  // isVersionOf GO:0043241
    Reaction296_d1a = 0;
  Reaction297: S_RAFK_2_1_0 => RAFK + S_2_1_1; Reaction297_k1*S_RAFK_2_1_0; Reaction297 is "phosphorylation of RAF on scaffold";  // isVersionOf ec-code:2.7.11.1 GO:0008349 GO:0000185
    Reaction297_k1 = 0.1;
  Reaction298: RAFK + S_2_2_0 => S_RAFK_2_2_0; Reaction298_k1a*RAFK*S_2_2_0; Reaction298 is "binding of RAF and RAFK";  // isVersionOf reactome:REACT_996 GO:0031435
    Reaction298_k1a = 100;
  Reaction299: S_RAFK_2_2_0 => RAFK + S_2_2_0; Reaction299_d1a*S_RAFK_2_2_0; Reaction299 is "dissociation of RAF_RAFK";  // isVersionOf GO:0043241
    Reaction299_d1a = 0;
  Reaction300: S_RAFK_2_2_0 => RAFK + S_2_2_1; Reaction300_k1*S_RAFK_2_2_0; Reaction300 is "phosphorylation of RAF on scaffold";  // isVersionOf ec-code:2.7.11.1 GO:0008349 GO:0000185
    Reaction300_k1 = 0.1;
end
