// SBML level 2 version 1

model Curto()
  // Curto1998_purineMetabol
  // This is a purine metabolism model that is geared toward studies of gout.
  // The model is fully described in Curto et al., MBSC 151 (1998) pp 1-49
  // The model uses Generalized Mass Action (GMA;i.e. power law) descriptions of reaction rate laws.
  // Such descriptions are local approximations that assume independent substrate binding.
  // To the extent possible under law, all copyright and related or neighbouring rights to this encoded model have been dedicated to the public domain worldwide. Please refer to CC0 Public Domain Dedication for more information.
  // In summary, you are entitled to use this encoded model in absolutely any manner you deem suitable, verbatim, or with modification, alone or embedded it in a larger context, redistribute it, commercially or not, in a restricted way or not.
  // To cite BioModels Database, please use: Li C, Donizelli M, Rodriguez N, Dharuri H, Endler L, Chelliah V, Li L, He E, Henry A, Stefan MI, Snoep JL, Hucka M, Le Novère N, Laibe C (2010) BioModels Database: An enhanced, curated and annotated resource for published quantitative kinetic models. BMC Syst Biol., 4:92.
  // biomodels.db:BIOMD0000000015
  // biomodels.db:MODEL6617035399
  // isDescribedBy pubmed:9664759
  // isVersionOf GO:0006144
  // kegg.pathway:hsa00230 reactome:REACT_522
  // occursIn taxonomy:9606

  // Compartments:
  compartment cell = 1;  // isVersionOf GO:0005623

  // Species:
  substanceOnly species PRPP in cell = 5.01742; PRPP is "phosphoribosylpyrophosphate";  // CHEBI:17111 kegg.compound:C00119
  substanceOnly species IMP in cell = 98.2634; IMP is "inosine monophosphate";  // CHEBI:17202 kegg.compound:C00130
  substanceOnly species SAMP in cell = 0.198189; SAMP is "adenylosuccinate";  // CHEBI:15919 kegg.compound:C03794
  substanceOnly species ATP in cell = 2475.35; ATP is "ATP_ADP_AMP_Ado";  // hasVersion kegg.compound:C00002 kegg.compound:C00020 kegg.compound:C00212 kegg.compound:C00008; hasVersion CHEBI:16761 CHEBI:16027 CHEBI:16335 CHEBI:15422
  substanceOnly species SAM in cell = 3.99187; SAM is "s-adenosyl-L-methionine";  // CHEBI:15414 kegg.compound:C00019
  substanceOnly species Ade in cell = 0.98473; Ade is "adenine";  // CHEBI:16708 kegg.compound:C00147
  substanceOnly species XMP in cell = 24.793; XMP is "xanthosine monophosphate";  // CHEBI:15652 kegg.compound:C00655
  substanceOnly species GTP in cell = 410.223; GTP is "GTP_GDP_GMP";  // hasVersion CHEBI:15996 CHEBI:17552 CHEBI:17345; hasVersion kegg.compound:C00044 kegg.compound:C00144 kegg.compound:C00035
  substanceOnly species dATP in cell = 6.01413; dATP is "dATP_dADP_dAMP_dAdo";  // hasVersion CHEBI:17713 CHEBI:17256 CHEBI:16174 CHEBI:16284; hasVersion kegg.compound:C00559 kegg.compound:C00360 kegg.compound:C00206 kegg.compound:C00131
  substanceOnly species dGTP in cell = 3.02581; dGTP is "dGTP_dGDP_dGMP";  // hasVersion CHEBI:16497 CHEBI:16192 CHEBI:28862; hasVersion kegg.compound:C00361 kegg.compound:C00362 kegg.compound:C00286
  substanceOnly species RNA in cell = 28680.5;  // kegg.compound:C00046
  substanceOnly species DNA in cell = 5179.34;  // kegg.compound:C00039
  substanceOnly species HX in cell = 9.51785; HX is "dIno_Ino_HX";  // hasVersion CHEBI:28997 CHEBI:17368 CHEBI:17596; hasVersion kegg.compound:C00294 kegg.compound:C05512 kegg.compound:C00262
  substanceOnly species Xa in cell = 5.05941; Xa is "xanthine";  // CHEBI:17712 kegg.compound:C00385
  substanceOnly species Gua in cell = 5.50638; Gua is "guanine";  // hasVersion CHEBI:17172 CHEBI:16235 CHEBI:16450; hasVersion kegg.compound:C00387 kegg.compound:C00330 kegg.compound:C00242
  substanceOnly species UA in cell = 100.293; UA is "uric acid";  // CHEBI:17775 kegg.compound:C00366
  substanceOnly species $R5P in cell = 18; R5P is "ribose-5-phosphate";  // CHEBI:17797 kegg.compound:C00117
  substanceOnly species $Pi in cell = 1400; Pi is "phosphate";  // CHEBI:18367 kegg.compound:C00009

  // Reactions:
  ada: ATP => HX; aada*ATP^fada4;  // hasVersion kegg.reaction:R01560 reactome:REACT_1687; isVersionOf ec-code:3.5.4.4
    aada = 0.001062; fada4 = 0.97;
  ade: Ade => ; aade*Ade^fade6;  // isVersionOf GO:0006146
    aade = 0.01; fade6 = 0.55;
  adna: dATP => DNA; aadna*dATP^adna_fdnap9*dGTP^adna_fdnap10;  // modifiers: dGTP; kegg.reaction:R00375; isVersionOf ec-code:2.7.7.7
    aadna = 3.2789; adna_fdnap9 = 0.42; adna_fdnap10 = 0.33;
  adrnr: ATP => dATP; aadrnr*ATP^fadrnr4*dATP^fadrnr9*dGTP^fadrnr10;  // modifiers: dGTP; hasVersion ec-code:1.17.4.1 ec-code:1.17.4.2 kegg.reaction:R02014 kegg.reaction:R02017
    aadrnr = 0.0602; fadrnr4 = 0.1; fadrnr9 = -0.3; fadrnr10 = 0.87;
  ampd: ATP => IMP; aampd*ATP^fampd4*GTP^fampd8*Pi^fampd18;  // modifiers: GTP, Pi; isVersionOf ec-code:3.5.4.6; kegg.reaction:R00181
    aampd = 0.02688; fampd4 = 0.8; fampd8 = -0.03; fampd18 = -0.1;
  aprt: PRPP + Ade => ATP; aaprt*PRPP^faprt1*ATP^faprt4*Ade^faprt6;  // kegg.reaction:R00190; isVersionOf ec-code:2.4.2.7
    aaprt = 233.8; faprt1 = 0.5; faprt4 = -0.8; faprt6 = 0.75;
  arna: ATP => RNA; aarna*ATP^arna_frnap4*GTP^arna_frnap8;  // modifiers: GTP; kegg.reaction:R00435; isVersionOf ec-code:2.7.7.6
    aarna = 614.5; arna_frnap4 = 0.05; arna_frnap8 = 0.13;
  asuc: IMP => SAMP; aasuc*IMP^fasuc2*ATP^fasuc4*GTP^fasuc8*Pi^fasuc18;  // modifiers: ATP, GTP, Pi; kegg.reaction:R01135 reactome:REACT_42; isVersionOf ec-code:6.3.4.4
    aasuc = 3.5932; fasuc2 = 0.4; fasuc4 = -0.24; fasuc8 = 0.2; fasuc18 = -0.05;
  asli: SAMP => ATP; aasli*SAMP^fasli3*ATP^fasli4;  // kegg.reaction:R01083 reactome:REACT_1042; isVersionOf ec-code:4.3.2.2
    aasli = 66544; fasli3 = 0.99; fasli4 = -0.95;
  dada: dATP => HX; adada*dATP^fdada9;  // kegg.reaction:R02556 reactome:REACT_2135; isVersionOf ec-code:3.5.4.4
    adada = 0.03333; fdada9 = 1;
  den: PRPP => IMP; aden*PRPP^fden1*IMP^fden2*ATP^fden4*GTP^fden8*Pi^fden18;  // modifiers: dGTP, ATP, GTP, Pi; hasPart kegg.reaction:R01072 kegg.reaction:R01127 kegg.reaction:R04591 kegg.reaction:R04560; hasPart ec-code:3.5.4.10 ec-code:2.1.2.3 ec-code:4.3.2.2 ec-code:6.3.2.6; hasPart reactome:REACT_263 reactome:REACT_1427 reactome:REACT_285 reactome:REACT_740
    aden = 5.2728; fden1 = 2; fden2 = -0.06; fden4 = -0.25; fden8 = -0.2; fden18 = -0.08;
  dgnuc: dGTP => Gua; adgnuc*dGTP^fdgnuc10;  // kegg.reaction:R01968 reactome:REACT_1209; isVersionOf ec-code:3.1.3.5
    adgnuc = 0.03333; fdgnuc10 = 1;
  dnaa: DNA => dATP; adnaa*DNA^dnaa_fdnan12;  // isVersionOf GO:0006308
    adnaa = 0.001938; dnaa_fdnan12 = 1;
  dnag: DNA => dGTP; adnag*DNA^dnag_fdnan12;  // isVersionOf GO:0006308
    adnag = 0.001318; dnag_fdnan12 = 1;
  gdna: dGTP => DNA; agdna*dATP^gdna_fdnap9*dGTP^gdna_fdnap10;  // modifiers: dATP; isVersionOf ec-code:2.7.7.7; kegg.reaction:R00376
    agdna = 2.2296; gdna_fdnap9 = 0.42; gdna_fdnap10 = 0.33;
  gdrnr: GTP => dGTP; agdrnr*GTP^fgdrnr8*dATP^fgdrnr9*dGTP^fgdrnr10;  // modifiers: dATP; hasVersion ec-code:1.17.4.1 ec-code:1.17.4.2 kegg.reaction:R02020 kegg.reaction:R02019
    agdrnr = 0.1199; fgdrnr8 = 0.4; fgdrnr9 = -1.2; fgdrnr10 = -0.39;
  gmpr: GTP => IMP; agmpr*IMP^fgmpr2*ATP^fgmpr4*XMP^fgmpr7*GTP^fgmpr8;  // modifiers: XMP, ATP; kegg.reaction:R01134; isVersionOf ec-code:1.7.1.7
    agmpr = 0.3005; fgmpr2 = -0.15; fgmpr4 = -0.07; fgmpr7 = -0.76; fgmpr8 = 0.7;
  gmps: XMP => GTP; agmps*ATP^fgmps4*XMP^fgmps7;  // modifiers: ATP; kegg.reaction:R01231 reactome:REACT_628; isVersionOf ec-code:6.3.5.2
    agmps = 0.3738; fgmps4 = 0.12; fgmps7 = 0.16;
  gnuc: GTP => Gua; agnuc*GTP^fgnuc8*Pi^fgnuc18;  // modifiers: Pi; kegg.reaction:R01227 reactome:REACT_1774; isVersionOf ec-code:3.1.3.5
    agnuc = 0.2511; fgnuc8 = 0.9; fgnuc18 = -0.34;
  gprt: Gua + PRPP => GTP; agprt*PRPP^fgprt1*GTP^fgprt8*Gua^fgprt15;  // kegg.reaction:R01229; isVersionOf ec-code:2.4.2.7
    agprt = 361.69; fgprt1 = 1.2; fgprt8 = -1.2; fgprt15 = 0.42;
  grna: GTP => RNA; agrna*ATP^grna_frnap4*GTP^grna_frnap8;  // modifiers: ATP; kegg.reaction:R00441; isVersionOf ec-code:2.7.7.6
    agrna = 409.6; grna_frnap4 = 0.05; grna_frnap8 = 0.13;
  gua: Gua => Xa; agua*Gua^fgua15;  // kegg.reaction:R01676 reactome:REACT_1442; isVersionOf ec-code:3.5.4.3
    agua = 0.4919; fgua15 = 0.5;
  hprt: HX + PRPP => IMP; ahprt*PRPP^fhprt1*IMP^fhprt2*HX^fhprt13;  // kegg.reaction:R01132; isVersionOf ec-code:2.4.2.8
    ahprt = 12.569; fhprt1 = 1.1; fhprt2 = -0.89; fhprt13 = 0.48;
  hx: HX => ; ahx*HX^fhx13;  // isVersionOf GO:0009114
    ahx = 0.003793; fhx13 = 1.12;
  hxd: HX => Xa; ahxd*HX^fhxd13;  // kegg.reaction:R01769 reactome:REACT_401; isVersionOf ec-code:1.17.3.2
    ahxd = 0.2754; fhxd13 = 0.65;
  impd: IMP => XMP; aimpd*IMP^fimpd2*XMP^fimpd7*GTP^fimpd8;  // modifiers: GTP; kegg.reaction:R01130 reactome:REACT_1488; isVersionOf ec-code:1.1.1.205
    aimpd = 1.2823; fimpd2 = 0.15; fimpd7 = -0.09; fimpd8 = -0.03;
  inuc: IMP => HX; ainuc*IMP^finuc2*Pi^finuc18;  // modifiers: Pi; kegg.reaction:R01126 reactome:REACT_430; isVersionOf ec-code:3.1.3.5
    ainuc = 0.9135; finuc2 = 0.8; finuc18 = -0.36;
  mat: ATP => SAM; amat*ATP^fmat4*SAM^fmat5;  // kegg.reaction:R00177; isVersionOf ec-code:2.5.1.6
    amat = 7.2067; fmat4 = 0.2; fmat5 = -0.6;
  polyam: SAM => Ade; apolyam*SAM^fpolyam5;  // hasPart kegg.reaction:R02869 kegg.reaction:R00178 kegg.reaction:R01401; hasPart ec-code:3.2.2.16 ec-code:2.5.1.22 ec-code:4.1.1.50; isPartOf kegg.pathway:map00330
    apolyam = 0.29; fpolyam5 = 0.9;
  prpps: $R5P => PRPP; aprpps*PRPP^fprpps1*ATP^fprpps4*GTP^fprpps8*R5P^fprpps17*Pi^fprpps18;  // modifiers: ATP, GTP, Pi; kegg.reaction:R01049; isVersionOf ec-code:2.7.6.1
    aprpps = 0.9; fprpps1 = -0.03; fprpps4 = -0.45; fprpps8 = -0.04; fprpps17 = 0.65; fprpps18 = 0.7;
  pyr: PRPP => ; apyr*PRPP^fpyr1;  // kegg.reaction:R01870 reactome:REACT_33; isPartOf kegg.pathway:map00240; isVersionOf ec-code:2.4.2.10
    apyr = 1.2951; fpyr1 = 1.27;
  rnaa: RNA => ATP; arnaa*RNA^rnaa_frnan11;  // isVersionOf GO:0006401
    arnaa = 0.06923; rnaa_frnan11 = 1;
  rnag: RNA => GTP; arnag*RNA^rnag_frnan11;  // isVersionOf GO:0006401
    arnag = 0.04615; rnag_frnan11 = 1;
  trans: SAM => ATP; atrans*SAM^ftrans5;  // GO:0008757
    atrans = 8.8539; ftrans5 = 0.33;
  ua: UA => ; aua*UA^fua16;  // isVersionOf GO:0007588
    aua = 8.744e-5; fua16 = 2.21;
  x: Xa => ; ax*Xa^fx14;  // isVersionOf GO:0009115
    ax = 0.0012; fx14 = 2;
  xd: Xa => UA; axd*Xa^fxd14;  // kegg.reaction:R02107 reactome:REACT_624; isVersionOf ec-code:1.17.3.2
    axd = 0.949; fxd14 = 0.55;

  // Unit definitions:
  // Default unit of substance redefined to micromole by comparison with the article. Nicolas Le Novere
  unit substance = 1e-6 mole; substance is "micromole (default)";
  // Default unit of time redefined to minute by comparison with the article. Nicolas Le Novere
  unit time = 60 second; time is "minute (default)";
end
