// SBML level 2 version 4

model Hoefnagel2002_PyruvateBranches()
  // This a model from the article:
  // Metabolic engineering of lactic acid bacteria, the combined approach: kinetic modelling, metabolic control and experimental analysis.
  // Hoefnagel MH, Starrenburg MJ, Martens DE, Hugenholtz J, Kleerebezem M, Van Swam II, Bongers R, Westerhoff HV, Snoep JL Microbiology2002 Apr; 148(4):1003-13 11932446,
  // Abstract:
  // Everyone who has ever tried to radically change metabolic fluxes knows that it is often harder to determine which enzymes have to be modified than it is to actually implement these changes. In the more traditional genetic engineering approaches ’bottle-necks’ are pinpointed using qualitative, intuitive approaches, but the alleviation of suspected ’rate-limiting’ steps has not often been successful. Here the authors demonstrate that a model of pyruvate distribution in Lactococcus lactis based on enzyme kinetics in combination with metabolic control analysis clearly indicates the key control points in the flux to acetoin and diacetyl, important flavour compounds. The model presented here (available at http://jjj.biochem.sun.ac.za/wcfs.html) showed that the enzymes with the greatest effect on this flux resided outside the acetolactate synthase branch itself. Experiments confirmed the predictions of the model, i.e. knocking out lactate dehydrogenase and overexpressing NADH oxidase increased the flux through the acetolactate synthase branch from 0 to 75% of measured product formation rates.
  // The paper does not have any figure to be put as a curation figure in the BioModels database. The model does reproduce the fluxes and control-coefficients given in Figure 2 and Table 4. To reproduce the results, the model was changed from the description in the article according to the model on JWS: the parameter Kmpyr was changed to 2.5 from 25. The equillibrium constant for PTA reaction (R4) was changed from 0.0281 to 0.0065. The Km for oxygen in the NOX reaction (R13) was changed from 0.01 to 0.2. Slight deviations between the values in the article and the model results may stem from different algorithms used for finding the steady state.
  // This model originates from BioModels Database: A Database of Annotated Published Models (http://www.ebi.ac.uk/biomodels/). It is copyright (c) 2005-2010 The BioModels.net Team.
  // To the extent possible under law, all copyright and related or neighbouring rights to this encoded model have been dedicated to the public domain worldwide. Please refer to CC0 Public Domain Dedication for more information.
  // In summary, you are entitled to use this encoded model in absolutely any manner you deem suitable, verbatim, or with modification, alone or embedded it in a larger context, redistribute it, commercially or not, in a restricted way or not..
  // To cite BioModels Database, please use: Li C, Donizelli M, Rodriguez N, Dharuri H, Endler L, Chelliah V, Li L, He E, Henry A, Stefan MI, Snoep JL, Hucka M, Le Novère N, Laibe C (2010) BioModels Database: An enhanced, curated and annotated resource for published quantitative kinetic models. BMC Syst Biol., 4:92.
  // biomodels.db:BIOMD0000000017
  // biomodels.db:MODEL6617235316
  // isDescribedBy pubmed:11932446
  // isVersionOf GO:0006090 GO:0006089
  // isPartOf kegg.pathway:map00620 kegg.pathway:map00650
  // occursIn taxonomy:1358

  // Compartments:
  compartment compartment = 1;

  // Species:
  substanceOnly species ADP in compartment = 4.9;  // CHEBI:16761 kegg.compound:C00008
  substanceOnly species NAD in compartment = 6.33;  // CHEBI:15846 kegg.compound:C00003
  substanceOnly species ATP in compartment = 0.1;  // CHEBI:15422 kegg.compound:C00002
  substanceOnly species NADH in compartment = 3.67;  // CHEBI:16908 kegg.compound:C00004
  substanceOnly species pyruvate in compartment = 1;  // CHEBI:15361 kegg.compound:C00022
  substanceOnly species $lactate in compartment = 0.1;  // CHEBI:24996 kegg.compound:C00186
  substanceOnly species CoA in compartment = 1;  // CHEBI:15346 kegg.compound:C00010
  substanceOnly species $halfglucose in compartment = 30;
  substanceOnly species AcCoA in compartment = 0;  // CHEBI:15351 kegg.compound:C00024
  substanceOnly species AcP in compartment = 0;  // CHEBI:15350 kegg.compound:C00227
  substanceOnly species $Ac in compartment = 1;  // CHEBI:30089 kegg.compound:C00033
  substanceOnly species AcO in compartment = 0;  // CHEBI:15343 kegg.compound:C00084
  substanceOnly species $EtOH in compartment = 1;  // CHEBI:16236 kegg.compound:C00469
  substanceOnly species AcLac in compartment = 0;  // CHEBI:16444 kegg.compound:C00900
  substanceOnly species AcetoinIn in compartment = 0;  // CHEBI:15688 kegg.compound:C00466
  substanceOnly species $AcetoinOut in compartment = 0;  // CHEBI:15688 kegg.compound:C00466
  substanceOnly species $Butanediol in compartment = 0.01;  // hasVersion CHEBI:16812 CHEBI:16982 kegg.compound:C03046 kegg.compound:C03044
  substanceOnly species $O2 in compartment = 0.2;  // CHEBI:15379 kegg.compound:C00007
  species $PO4 in compartment = 10/compartment;  // CHEBI:18367 kegg.compound:C00009

  // Reactions:
  R1: ADP + NAD + $halfglucose => ATP + NADH + pyruvate; 2*V_1*(halfglucose/(2*Kglc_1))*(NAD/Knad_1)*(ADP/Kadp_1)/((1 + halfglucose/(2*Kglc_1) + pyruvate/Kpyr_1)*(1 + NAD/Knad_1 + NADH/Knadh_1)*(1 + ADP/Kadp_1 + ATP/Katp_1));  // isPartOf kegg.pathway:map00010
    V_1 = 2397; Kglc_1 = 0.1; Knad_1 = 0.1412; Kadp_1 = 0.04699; Kpyr_1 = 2.5; Knadh_1 = 0.08999; Katp_1 = 0.01867;
  R2: NADH + pyruvate => NAD + $lactate; V_2*((pyruvate*NADH - lactate*NAD/Keq_2)/(Kpyr_2*Knadh_2))/((1 + pyruvate/Kpyr_2 + lactate/Klac_2)*(1 + NADH/Knadh_2 + NAD/Knad_2));  // hasVersion ec-code:1.1.1.27 ec-code:1.1.1.28 kegg.reaction:R00703 kegg.reaction:R00704
    V_2 = 5118; Keq_2 = 21120.69; Kpyr_2 = 1.5; Knadh_2 = 0.08; Klac_2 = 100; Knad_2 = 2.4;
  R3: NAD + pyruvate + CoA => NADH + AcCoA; V_3*(pyruvate/Kpyr_3)*(NAD/Knad_3)*(CoA/Kcoa_3)*(NAD/(NAD + Ki_3*NADH))/((1 + pyruvate/Kpyr_3)*(1 + NAD/Knad_3 + NADH/Knadh_3)*(1 + CoA/Kcoa_3 + AcCoA/Kaccoa_3));  // isVersionOf ec-code:1.2.1.51; kegg.reaction:R00209
    V_3 = 259; Kpyr_3 = 1; Knad_3 = 0.4; Kcoa_3 = 0.014; Ki_3 = 46.4159; Knadh_3 = 0.1; Kaccoa_3 = 0.008;
  R4: AcCoA + $PO4 => CoA + AcP; V_4*((AcCoA*PO4 - AcP*CoA/Keq_4)/(Kiaccoa_4*Kpi_4))/(1 + AcCoA/Kiaccoa_4 + PO4/Kipi_4 + AcP/Kiacp_4 + CoA/Kicoa_4 + AcCoA*PO4/(Kiaccoa_4*Kpi_4) + AcP*CoA/(Kacp_4*Kicoa_4));  // isVersionOf ec-code:2.3.1.8; kegg.reaction:R00230
    V_4 = 42; Keq_4 = 0.0065; Kiaccoa_4 = 0.2; Kpi_4 = 2.6; Kipi_4 = 2.6; Kiacp_4 = 0.2; Kicoa_4 = 0.029; Kacp_4 = 0.7;
  R5: ADP + AcP => ATP + $Ac; V_5*((AcP*ADP - Ac*ATP/Keq_5)/(Kadp_5*Kacp_5))/((1 + AcP/Kacp_5 + Ac/Kac_5)*(1 + ADP/Kadp_5 + ATP/Katp_5));  // isVersionOf ec-code:2.7.2.1; kegg.reaction:R00315
    V_5 = 2700; Keq_5 = 174.217; Kadp_5 = 0.5; Kacp_5 = 0.16; Kac_5 = 7; Katp_5 = 0.07;
  R6: NADH + AcCoA => NAD + CoA + AcO; V_6*((AcCoA*NADH - CoA*NAD*AcO/Keq_6)/(Kaccoa_6*Knadh_6))/((1 + NAD/Knad_6 + NADH/Knadh_6)*(1 + AcCoA/Kaccoa_6 + CoA/Kcoa_6)*(1 + AcO/Kaco_6));  // isVersionOf ec-code:1.2.1.10; kegg.reaction:R00228
    V_6 = 97; Keq_6 = 1; Kaccoa_6 = 0.007; Knadh_6 = 0.025; Knad_6 = 0.08; Kcoa_6 = 0.008; Kaco_6 = 10;
  R7: NADH + AcO => NAD + $EtOH; V_7*((AcO*NADH - EtOH*NAD/Keq_7)/(Kaco_7*Knadh_7))/((1 + NAD/Knad_7 + NADH/Knadh_7)*(1 + AcO/Kaco_7 + EtOH/Ketoh_7));  // isVersionOf ec-code:1.1.1.1; kegg.reaction:R00754 reactome:REACT_799
    V_7 = 162; Keq_7 = 12354.9; Kaco_7 = 0.03; Knadh_7 = 0.05; Knad_7 = 0.08; Ketoh_7 = 1;
  R8: 2 pyruvate => AcLac; V_8*(pyruvate/Kpyr_8)*(1 - AcLac/(pyruvate*Keq_8))*(pyruvate/Kpyr_8 + AcLac/Kaclac_8)^(n_8 - 1)/(1 + (pyruvate/Kpyr_8 + AcLac/Kaclac_8)^n_8);  // isVersionOf ec-code:2.2.1.6; kegg.reaction:R00006
    V_8 = 600; Kpyr_8 = 50; Keq_8 = 9000000000000; Kaclac_8 = 100; n_8 = 2.4;
  R9: AcLac => AcetoinIn; V_9*(AcLac/Kaclac_9)/(1 + AcLac/Kaclac_9 + AcetoinIn/Kacet_9);  // kegg.reaction:R02947; isVersionOf ec-code:4.1.1.5
    V_9 = 106; Kaclac_9 = 10; Kacet_9 = 100;
  R10: AcetoinIn => $AcetoinOut; V_10*(AcetoinIn/Kacet_10)/(1 + AcetoinIn/Kacet_10);  // isVersionOf GO:0015562
    V_10 = 200; Kacet_10 = 5;
  R11: NADH + AcetoinIn => NAD + $Butanediol; V_11*((AcetoinIn*NADH - Butanediol*NAD/Keq_11)/(Kacet_11*Knadh_11))/((1 + AcetoinIn/Kacet_11 + Butanediol/Kbut_11)*(1 + NADH/Knadh_11 + NAD/Knad_11));  // hasVersion ec-code:1.1.1.4 ec-code:1.1.1.76 kegg.reaction:R02344 kegg.reaction:R02946
    V_11 = 105; Keq_11 = 1400; Kacet_11 = 0.06; Knadh_11 = 0.02; Kbut_11 = 2.6; Knad_11 = 0.16;
  R12: ATP => ADP; V_12*(ATP/(ADP*Katp_12))^n_12/(1 + (ATP/(ADP*Katp_12))^n_12);  // isVersionOf GO:0016887
    V_12 = 900; Katp_12 = 6.196; n_12 = 2.58;
  R13: NADH + $O2 => NAD; V_13*(NADH*O2/(Knadh_13*Ko_13))/((1 + NADH/Knadh_13 + NAD/Knad_13)*(1 + O2/Ko_13));  // isVersionOf GO:0006116
    V_13 = 118; Knadh_13 = 0.041; Ko_13 = 0.2; Knad_13 = 1;
  R14: AcLac => AcetoinIn; k_14*AcLac;
    k_14 = 0.0003;

  // Unit definitions:
  unit substance = 1e-3 mole; substance is "millimole (default)";
  unit time = 60 second; time is "minute (default)";
end
