// SBML level 2 version 4

model Markevich2004_MAPK_orderedMM()
  // The model corresponds to the schemas 1 and 2 of Markevich et al 2004, as described in the figure 1 and modelled using Michaelis-Menten like kinetics. Phosphorylations and dephosphorylations follow distributive ordered kinetics.
  // It reproduces figure 3 in the main article.
  // The model is further described in:
  // Signaling switches and bistability arising from multisite phosphorylation in protein kinase cascades. Markevich NI, Hoek JB, Kholodenko BN. J Cell Biol. 2004 Feb 2;164(3):353-9.
  // PMID:14744999; DOI:10.1083/jcb.200308060
  // Abstract:
  // Mitogen-activated protein kinase (MAPK) cascades can operate as bistable switches residing in either of two different stable states. MAPK cascades are often embedded in positive feedback loops, which are considered to be a prerequisite for bistable behavior. Here we demonstrate that in the absence of any imposed feedback regulation, bistability and hysteresis can arise solely from a distributive kinetic mechanism of the two-site MAPK phosphorylation and dephosphorylation. Importantly, the reported kinetic properties of the kinase (MEK) and phosphatase (MKP3) of extracellular signal-regulated kinase (ERK) fulfill the essential requirements for generating a bistable switch at a single MAPK cascade level. Likewise, a cycle where multisite phosphorylations are performed by different kinases, but dephosphorylation reactions are catalyzed by the same phosphatase, can also exhibit bistability and hysteresis. Hence, bistability induced by multisite covalent modification may be a widespread mechanism of the control of protein activity.
  // This model originates from BioModels Database: A Database of Annotated Published Models (http://www.ebi.ac.uk/biomodels/). It is copyright (c) 2005-2010 The BioModels.net Team.
  // To the extent possible under law, all copyright and related or neighbouring rights to this encoded model have been dedicated to the public domain worldwide. Please refer to CC0 Public Domain Dedication for more information.
  // In summary, you are entitled to use this encoded model in absolutely any manner you deem suitable, verbatim, or with modification, alone or embedded it in a larger context, redistribute it, commercially or not, in a restricted way or not..
  // To cite BioModels Database, please use: Li C, Donizelli M, Rodriguez N, Dharuri H, Endler L, Chelliah V, Li L, He E, Henry A, Stefan MI, Snoep JL, Hucka M, Le Novère N, Laibe C (2010) BioModels Database: An enhanced, curated and annotated resource for published quantitative kinetic models. BMC Syst Biol., 4:92.
  // biomodels.db:BIOMD0000000027
  // biomodels.db:MODEL6618496308
  // isDescribedBy pubmed:14744999
  // isVersionOf GO:0000165
  // occursIn taxonomy:8355

  // Compartments:
  compartment uVol = 1;

  // Species:
  species M in uVol = 500/uVol;  // isVersionOf uniprot:P26696
  species Mp in uVol = 0;  // isVersionOf uniprot:P26696
  species Mpp in uVol = 0;  // isVersionOf uniprot:P26696
  species $MAPKK in uVol = 50/uVol;  // uniprot:Q05116
  species $MKP3 in uVol = 100/uVol;  // uniprot:Q90W58

  // Parameters:
  k1cat = 0.01;
  Km1 = 50;
  k2cat = 15;
  Km2 = 500;
  k3cat = 0.084;
  Km3 = 22;
  k4cat = 0.06;
  Km4 = 18;
  Km5 = 78;

  // Reactions:
  phosphorylation_of_MAPK: M => Mp; uVol*(k1cat*MAPKK*M/Km1/(1 + M/Km1 + Mp/Km2));  // modifiers: MAPKK; isHomologTo reactome:REACT_2247 reactome:REACT_136; isVersionOf ec-code:2.7.12.2 GO:0004708 GO:0006468
  phosphorylation_of_P_MAPK: Mp => Mpp; uVol*(k2cat*MAPKK*Mp/Km2/(1 + M/Km1 + Mp/Km2)); phosphorylation_of_P_MAPK is "phosphorylation of P-MAPK";  // modifiers: MAPKK, M; isHomologTo reactome:REACT_136 reactome:REACT_2247; isVersionOf ec-code:2.7.12.2 GO:0004708 GO:0000187 GO:0006468
  dephosphorylation_of_PP_MAPK: Mpp => Mp; uVol*(k3cat*MKP3*Mpp/Km3/(1 + Mpp/Km3 + Mp/Km4 + M/Km5)); dephosphorylation_of_PP_MAPK is "dephosphorylation of PP-MAPK";  // modifiers: MKP3, M; isVersionOf ec-code:3.1.3.16 GO:0000188 GO:0006470
  dephosphorylation_of_P_MAPK: Mp => M; uVol*(k4cat*MKP3*Mp/Km4/(1 + Mpp/Km3 + Mp/Km4 + M/Km5)); dephosphorylation_of_P_MAPK is "dephosphorylation of P-MAPK";  // modifiers: MKP3, Mpp; isVersionOf ec-code:3.1.3.16 GO:0006470

  // Unit definitions:
  unit substance = 1e-9 mole; substance is "nanomole (default)";
end
