// SBML level 2 version 4

model model_0000001()
  // Markevich2004_MAPK_phosphoRandomElementary
  // The model corresponds to the schema 3 of Markevich et al 2004, as described in the figure 2 and the supplementary table S2. Phosphorylations follow distributive random kinetics, while dephosphorylations follow an ordered mechanism. The phosphorylations are modeled with three elementary reactions:
  // E+S<=>ES->E+P
  // The dephosphorylations are modeled with five elementary reactions:
  // E+S<=>ES->EP<=>E+P
  // The model reproduces figure 5 in the main article.
  // The model is further described in:
  // Signaling switches and bistability arising from multisite phosphorylation in protein kinase cascades. Markevich NI, Hoek JB, Kholodenko BN. J Cell Biol. 2004 Feb 2;164(3):353-9.
  // PMID:14744999; DOI:10.1083/jcb.200308060
  // Abstract:
  // Mitogen-activated protein kinase (MAPK) cascades can operate as bistable switches residing in either of two different stable states. MAPK cascades are often embedded in positive feedback loops, which are considered to be a prerequisite for bistable behavior. Here we demonstrate that in the absence of any imposed feedback regulation, bistability and hysteresis can arise solely from a distributive kinetic mechanism of the two-site MAPK phosphorylation and dephosphorylation. Importantly, the reported kinetic properties of the kinase (MEK) and phosphatase (MKP3) of extracellular signal-regulated kinase (ERK) fulfill the essential requirements for generating a bistable switch at a single MAPK cascade level. Likewise, a cycle where multisite phosphorylations are performed by different kinases, but dephosphorylation reactions are catalyzed by the same phosphatase, can also exhibit bistability and hysteresis. Hence, bistability induced by multisite covalent modification may be a widespread mechanism of the control of protein activity.
  // This model originates from BioModels Database: A Database of Annotated Published Models (http://www.ebi.ac.uk/biomodels/). It is copyright (c) 2005-2010 The BioModels.net Team.
  // To the extent possible under law, all copyright and related or neighbouring rights to this encoded model have been dedicated to the public domain worldwide. Please refer to CC0 Public Domain Dedication for more information.
  // In summary, you are entitled to use this encoded model in absolutely any manner you deem suitable, verbatim, or with modification, alone or embedded it in a larger context, redistribute it, commercially or not, in a restricted way or not..
  // To cite BioModels Database, please use: Li C, Donizelli M, Rodriguez N, Dharuri H, Endler L, Chelliah V, Li L, He E, Henry A, Stefan MI, Snoep JL, Hucka M, Le Novère N, Laibe C (2010) BioModels Database: An enhanced, curated and annotated resource for published quantitative kinetic models. BMC Syst Biol., 4:92.
  // biomodels.db:BIOMD0000000028
  // biomodels.db:MODEL6618552953
  // isDescribedBy pubmed:14744999
  // isVersionOf GO:0000165
  // occursIn taxonomy:8355

  // Compartments:
  compartment cell = 1;  // GO:0005623

  // Species:
  species M in cell = 800; M is "ERK";  // isVersionOf uniprot:P26696
  species MpY in cell = 0; MpY is "ERK-PY";  // isVersionOf uniprot:P26696
  species MpT in cell = 0; MpT is "ERK-PT";  // isVersionOf uniprot:P26696
  species Mpp in cell = 0; Mpp is "ERK-PP";  // isVersionOf uniprot:P26696
  species MEK in cell = 180;  // uniprot:Q05116
  species MKP3 in cell = 100;  // uniprot:Q90W58
  species MpY_MEK in cell = 0; MpY_MEK is "ERK-PY_MEK";  // hasPart uniprot:Q05116 uniprot:P26696
  species MpT_MEK in cell = 0; MpT_MEK is "ERK-PT_MEK";  // hasPart uniprot:P26696 uniprot:Q05116
  species M_MEK_Y in cell = 0; M_MEK_Y is "ERK_MEK_Y";  // hasPart uniprot:P26696 uniprot:Q05116
  species M_MEK_T in cell = 0; M_MEK_T is "ERK_MEK_T";  // hasPart uniprot:P26696 uniprot:Q05116
  species Mpp_MKP3 in cell = 0; Mpp_MKP3 is "ERK-PP_MKP3";  // hasPart uniprot:P26696 uniprot:Q90W58
  species MpY_MKP3 in cell = 0; MpY_MKP3 is "ERK-PY_MKP3";  // hasPart uniprot:P26696 uniprot:Q90W58
  species MpT_MKP3_Y in cell = 0; MpT_MKP3_Y is "ERK-PT_MKP3_Y";  // hasPart uniprot:P26696 uniprot:Q90W58
  species MpT_MKP3_T in cell = 0; MpT_MKP3_T is "ERK-PT_MKP3_T";  // hasPart uniprot:P26696 uniprot:Q90W58
  species M_MKP3_T in cell = 0; M_MKP3_T is "ERK_MKP3_T";  // hasPart uniprot:P26696 uniprot:Q90W58
  species M_MKP3_Y in cell = 0; M_MKP3_Y is "ERK_MKP3_Y";  // hasPart uniprot:Q90W58 uniprot:P26696

  // Parameters:
  k1 = 0.005;
  k_1 = 1;
  k2 = 1.08;
  k3 = 0.025;
  k_3 = 1;
  k4 = 0.007;
  k5 = 0.05;
  k_5 = 1;
  k6 = 0.008;
  k7 = 0.005;
  k_7 = 1;
  k8 = 0.45;
  h1 = 0.045;
  h_1 = 1;
  h2 = 0.092;
  h3 = 1;
  h_3 = 0.01;
  h4 = 0.01;
  h_4 = 1;
  h5 = 0.5;
  h6 = 0.086;
  h_6 = 0.0011;
  h7 = 0.01;
  h_7 = 1;
  h8 = 0.47;
  h9 = 0.14;
  h_9 = 0.0018;

  // Reactions:
  reaction_0000001: M + MEK -> M_MEK_Y; cell*(k1*M*MEK - k_1*M_MEK_Y); reaction_0000001 is "binding ERK and MEK";  // isHomologTo reactome:REACT_495 reactome:REACT_1780; isVersionOf GO:0051019 GO:0031434
  reaction_0000002: M_MEK_Y => MpY + MEK; cell*k2*M_MEK_Y; reaction_0000002 is "tyr phosphorylation of ERK";  // isHomologTo reactome:REACT_2247 reactome:REACT_136; isVersionOf ec-code:2.7.12.2 GO:0018108 GO:0004708
  binding_ERK_PY_and_MEK: MpY + MEK -> MpY_MEK; cell*(k3*MpY*MEK - k_3*MpY_MEK); binding_ERK_PY_and_MEK is "binding ERK-PY and MEK";  // isHomologTo reactome:REACT_495 reactome:REACT_1780; isVersionOf GO:0051019 GO:0031434
  reaction_0000004: MpY_MEK => Mpp + MEK; cell*k4*MpY_MEK; reaction_0000004 is "thr phosphorylation of ERK";  // isHomologTo reactome:REACT_2247 reactome:REACT_136; isVersionOf ec-code:2.7.12.2 GO:0004708 GO:0018107 GO:0000187
  reaction_0000005: M + MEK -> M_MEK_T; cell*(k5*M*MEK - k_5*M_MEK_T); reaction_0000005 is "binding ERK and MEK";  // isHomologTo reactome:REACT_495 reactome:REACT_1780; isVersionOf GO:0051019 GO:0031434
  reaction_0000006: M_MEK_T => MpT + MEK; cell*k6*M_MEK_T; reaction_0000006 is "thr phosphorylation of ERK";  // isHomologTo reactome:REACT_2247 reactome:REACT_136; isVersionOf ec-code:2.7.12.2 GO:0018107 GO:0004708
  binding_ERK_PT_and_MEK: MpT + MEK -> MpT_MEK; cell*(k7*MpT*MEK - k_7*MpT_MEK); binding_ERK_PT_and_MEK is "binding ERK-PT and MEK";  // isHomologTo reactome:REACT_1780 reactome:REACT_495; isVersionOf GO:0051019 GO:0031434
  reaction_0000008: MpT_MEK => Mpp + MEK; cell*k8*MpT_MEK; reaction_0000008 is "tyr phosphorylation of ERK";  // isHomologTo reactome:REACT_2247 reactome:REACT_136; isVersionOf ec-code:2.7.12.2 GO:0000187 GO:0018108 GO:0004708
  binding_ERK_PP_and_MKP3: Mpp + MKP3 -> Mpp_MKP3; cell*(h1*Mpp*MKP3 - h_1*Mpp_MKP3); binding_ERK_PP_and_MKP3 is "binding ERK-PP and MKP3";  // isVersionOf GO:0051019
  reaction_0000010: Mpp_MKP3 => MpT_MKP3_Y; cell*h2*Mpp_MKP3; reaction_0000010 is "dephosphorylation of tyr on ERK-PP";  // isVersionOf ec-code:3.1.3.16 GO:0006470 GO:0000188
  dissociation_ERK_PT_and_MKP3: MpT_MKP3_Y -> MpT + MKP3; cell*(h3*MpT_MKP3_Y - h_3*MpT*MKP3); dissociation_ERK_PT_and_MKP3 is "dissociation ERK-PT and MKP3";  // isVersionOf GO:0043241
  dephosphorylation_of_ERK_PT: MpT_MKP3_T => M_MKP3_T; cell*h5*MpT_MKP3_T; dephosphorylation_of_ERK_PT is "dephosphorylation of ERK-PT";  // isVersionOf ec-code:3.1.3.16 GO:0006470
  binding_ERK_PT_and_MKP3: MpT + MKP3 -> MpT_MKP3_T; cell*(h4*MpT*MKP3 - h_4*MpT_MKP3_T); binding_ERK_PT_and_MKP3 is "binding ERK-PT and MKP3";  // isVersionOf GO:0051019
  dephosphorylation_of_ERK_PY: MpY_MKP3 => M_MKP3_Y; cell*h8*MpY_MKP3; dephosphorylation_of_ERK_PY is "dephosphorylation of ERK-PY";  // isVersionOf ec-code:3.1.3.16 GO:0006470
  dissociation_ERK_and_MKP3: M_MKP3_T -> M + MKP3; cell*(h6*M_MKP3_T - h_6*M*MKP3);  // isVersionOf GO:0043241
  binding_ERK_PY_and_MKP3: MpY + MKP3 -> MpY_MKP3; cell*(h7*MpY*MKP3 - h_7*MpY_MKP3); binding_ERK_PY_and_MKP3 is "binding ERK-PY and MKP3";  // isVersionOf GO:0051019
  Dissociation_ERK_and_MKP3: M_MKP3_Y -> M + MKP3; cell*(h9*M_MKP3_Y - h_9*M*MKP3);  // isVersionOf GO:0043241

  // Unit definitions:
  unit substance = 1e-9 mole; substance is "nanomole (default)";
end
