// SBML level 2 version 4

model Kofahl2004_PheromonePathway()
  // This a model from the article:
  // Modelling the dynamics of the yeast pheromone pathway.
  // Kofahl B, Klipp E Yeast[2004 Jul; Volume: 21 (Issue: 10 )] Page info: 831-50 15300679,
  // Abstract:
  // We present a mathematical model of the dynamics of the pheromone pathways in haploid yeast cells of mating type MATa after stimulation with pheromone alpha-factor. The model consists of a set of differential equations and describes the dynamics of signal transduction from the receptor via several steps, including a G protein and a scaffold MAP kinase cascade, up to changes in the gene expression after pheromone stimulation in terms of biochemical changes (complex formations, phosphorylations, etc.). The parameters entering the models have been taken from the literature or adapted to observed time courses or behaviour. Using this model we can follow the time course of the various complex formation processes and of the phosphorylation states of the proteins involved. Furthermore, we can explain the phenotype of more than a dozen well-characterized mutants and also the graded response of yeast cells to varying concentrations of the stimulating pheromone.
  // The model was updated on 21st October 2010, by Vijayalakshmi Chelliah.
  // The following changes were made: 1) The model has been converted to SBML l2v4. 2) The model has been recurated and the curation figure was updated (units are in nanoMolar; but the publication has units in microMolar). Simulations were done using Copasi v4.6 (Build 32). 3) Notes have been added. 4) Annotation for one of the species has been corrected (Complex M).
  // SBML level 2 code generated for the JWS Online project by Jacky Snoep using PySCeS
  // Run this model online at http://jjj.biochem.sun.ac.za
  // To cite JWS Online please refer to: Olivier, B.G. and Snoep, J.L. (2004) Web-based modelling using JWS Online, Bioinformatics, 20:2143-2144
  // The following are the four major differences between the original publication by Kofahl et al and the model that actually is able to replicate the results as depicted in the publication (those corrections have been made in agreement with the authors):
  // 1. Bar1 is the inactive protease present inside the cell but the publication wrongly mentions that Bar1 is also the protease that is present on the extracellular surface.
  // The model correctly names the protease in it's different forms by calling inactive Bar1 within the cell as Bar1, active Bar1 within the cell as Bar1a and extracellular Bar1 as Bar1aex
  // 2. The initial amount of Alpha-factor is given as 1000nM but the model uses a value of 100nM.
  // 3. The value of the paramenter k8 is given as 0.33 but the model uses a value of 0.033.
  // 4. The value of the paramenter k41 is given as 0.002 but the model uses a value of 0.02.
  // This model originates from BioModels Database: A Database of Annotated Published Models (http://www.ebi.ac.uk/biomodels/).
  // To the extent possible under law, all copyright and related or neighbouring rights to this encoded model have been dedicated to the public domain worldwide. Please refer to CC0 Public Domain Dedication for more information.
  // In summary, you are entitled to use this encoded model in absolutely any manner you deem suitable, verbatim, or with modification, alone or embedded it in a larger context, redistribute it, commercially or not, in a restricted way or not..
  // To cite BioModels Database, please use: Li C, Donizelli M, Rodriguez N, Dharuri H, Endler L, Chelliah V, Li L, He E, Henry A, Stefan MI, Snoep JL, Hucka M, Le Novère N, Laibe C (2010) BioModels Database: An enhanced, curated and annotated resource for published quantitative kinetic models. BMC Syst Biol., 4:92.
  // biomodels.db:BIOMD0000000032
  // biomodels.db:MODEL6618819961
  // isDescribedBy pubmed:15300679
  // isVersionOf GO:0000165 GO:0019236
  // occursIn taxonomy:4932

  // Compartments:
  compartment Extracellular = 1;  // isVersionOf GO:0005615
  compartment compartment in Extracellular = 1; compartment is "cell";  // isVersionOf GO:0005623

  // Species:
  species alpha in Extracellular = 100; alpha is "α-factor";
  species Ste2 in compartment = 1666.667;  // uniprot:P06842
  species Ste2a in compartment = 0; Ste2a is "Ste2active";  // uniprot:P06842
  species Gabc in compartment = 1666.667; Gabc is "Gαβγ";  // hasPart uniprot:P08539 uniprot:P18851 uniprot:P18852
  species GaGTP in compartment = 0; GaGTP is "GαGTP";  // uniprot:P08539
  species Gbc in compartment = 0; Gbc is "Gβγ";  // hasPart uniprot:P18851 uniprot:P18852; bind:50058
  species GaGDP in compartment = 0; GaGDP is "GαGDP";  // uniprot:P08539
  species complexC in compartment = 235.7249;  // hasPart uniprot:P16892 uniprot:P23561 uniprot:P06784 uniprot:P32917; bind:133390
  species complexD in compartment = 0;  // hasPart uniprot:P23561 uniprot:P18851 uniprot:P32917 uniprot:P06784
  species Ste5 in compartment = 158.3318;  // uniprot:P32917
  species Ste11 in compartment = 158.3318;  // uniprot:P23561
  species complexA in compartment = 105.9433;  // hasPart uniprot:P32917 uniprot:P23561
  species Ste7 in compartment = 36.3997;  // uniprot:P06784
  species Fus3 in compartment = 686.3997;  // uniprot:P16892
  species complexB in compartment = 77.87536;  // hasPart uniprot:P06784 uniprot:P16892; bind:130661
  species Ste20 in compartment = 1000;  // uniprot:Q03497
  species complexE in compartment = 0;  // hasPart uniprot:P18852 uniprot:P18851 uniprot:P08539 uniprot:P16892
  species complexF in compartment = 0;  // hasPart uniprot:P18851 uniprot:P18852 uniprot:P08539 uniprot:P16892
  species complexG in compartment = 0;  // hasPart uniprot:P18852 uniprot:P18851 uniprot:P08539 uniprot:P16892
  species complexH in compartment = 0;  // hasPart uniprot:P18852 uniprot:P18851 uniprot:P16892 uniprot:P08539
  species complexI in compartment = 0;  // hasPart uniprot:P18852 uniprot:P18851 uniprot:P08539 uniprot:P06784
  species complexL in compartment = 0;  // hasPart uniprot:P18852 uniprot:P18851 uniprot:P08539 uniprot:P06784
  species Fus3PP in compartment = 0;  // uniprot:P16892
  species complexK in compartment = 0;  // hasPart uniprot:P18852 uniprot:P18851 uniprot:P08539 uniprot:P16892
  species Ste12 in compartment = 200;  // uniprot:P13574
  species Ste12a in compartment = 0; Ste12a is "Ste12active";  // uniprot:P13574
  species Bar1 in compartment = 200;  // uniprot:P12630
  species Bar1a in compartment = 0; Bar1a is "Bar1active";  // uniprot:P12630
  species Bar1aex in Extracellular = 0; Bar1aex is "Bar1activeEx";  // uniprot:P12630
  species Far1 in compartment = 500;  // uniprot:P21268
  species Far1PP in compartment = 0;  // uniprot:P21268
  species Far1U in compartment = 0; Far1U is "Far1ubiquitin";  // uniprot:P21268
  species complexM in compartment = 0;  // hasPart uniprot:P21268 uniprot:P18851 uniprot:P18852
  species complexN in compartment = 0;  // hasPart uniprot:P21268 uniprot:P00546
  species Cdc28 in compartment = 300;  // uniprot:P00546
  species Sst2 in compartment = 0;  // uniprot:P11972
  species $p in compartment = 0;

  // Reactions:
  alpha_degradation: alpha -> ; Extracellular*alpha*Bar1aex*k1;  // modifiers: Bar1aex; isVersionOf GO:0030163
    k1 = 0.03 min_inv_nM_inv;
  v2: Ste2 -> Ste2a; compartment*Ste2*alpha*k2;  // modifiers: alpha; intact:EBI-904275; isVersionOf GO:0004934
    k2 = 0.0012 min_inv_nM_inv;
  v3: Ste2a -> Ste2; compartment*Ste2a*k3;  // intact:EBI-904275
    k3 = 0.6 min_inv;
  v4: Ste2a -> $p; compartment*Ste2a*k4;  // isVersionOf GO:0030163
    k4 = 0.24 min_inv;
  v5: Ste2 -> ; compartment*Ste2*k5;  // isVersionOf GO:0030163
    k5 = 0.024 min_inv;
  v6: Gabc -> GaGTP + Gbc; compartment*Ste2a*Gabc*k6;  // modifiers: Ste2a; hasVersion intact:EBI-380703 intact:EBI-48387 intact:EBI-877237; isVersionOf GO:0004930
    k6 = 0.0036 min_inv_nM_inv;
  v7: GaGTP -> GaGDP; compartment*GaGTP*k7;  // isVersionOf GO:0003924
    k7 = 0.24 min_inv;
  v8: GaGTP -> GaGDP; compartment*GaGTP*Sst2*k8;  // modifiers: Sst2; isVersionOf GO:0005096; intact:EBI-904406
    k8 = 0.033 min_inv_nM_inv;
  v9: GaGDP + Gbc -> Gabc; compartment*GaGDP*Gbc*k9;  // hasVersion intact:EBI-877243 intact:EBI-380703
    k9 = 2000 min_inv_nM_inv;
  v10: Gbc + complexC -> complexD; compartment*Gbc*complexC*k10;  // isVersionOf GO:0005078; intact:EBI-903953
    k10 = 0.1 min_inv_nM_inv;
  v11: complexD -> Gbc + complexC; compartment*complexD*k11;  // isVersionOf GO:0043241
    k11 = 5 min_inv;
  v12: Ste11 + Ste5 -> complexA; compartment*Ste5*Ste11*k12;  // intact:EBI-877414
    k12 = 1 min_inv_nM_inv;
  v13: complexA -> Ste11 + Ste5; compartment*complexA*k13;  // isVersionOf GO:0043241
    k13 = 3 min_inv;
  v14: Fus3 + Ste7 -> complexB; compartment*Ste7*Fus3*k14;  // isVersionOf GO:0051019; intact:EBI-877260
    k14 = 1 min_inv_nM_inv;
  v15: complexB -> Fus3 + Ste7; compartment*complexB*k15;  // isVersionOf GO:0043241
    k15 = 3 min_inv;
  v16: complexA + complexB -> complexC; compartment*complexA*complexB*k16;  // isVersionOf GO:0005078; hasPart intact:EBI-895753 intact:EBI-877421 intact:EBI-877417
    k16 = 3 min_inv_nM_inv;
  v17: complexC -> Fus3 + Ste11 + Ste7 + Ste5; compartment*complexC*k17;  // isVersionOf GO:0043241
    k17 = 100 min_inv;
  v18: complexD + Ste20 -> complexE; compartment*complexD*Ste20*k18;  // isVersionOf GO:0004674; intact:EBI-903992
    k18 = 5 min_inv_nM_inv;
  v19: complexE -> complexD + Ste20; compartment*complexE*k19;  // isVersionOf GO:0043241
    k19 = 1 min_inv;
  v20: complexE -> complexF; compartment*complexE*k20;  // isVersionOf ec-code:2.7.11.1 GO:0000185 GO:0008349
    k20 = 10 min_inv;
  v21: complexE -> Gbc + Ste7 + Ste5 + Fus3 + Ste20 + Ste11; compartment*complexE*k21;  // isVersionOf GO:0043241
    k21 = 5 min_inv;
  v22: complexF -> complexG; compartment*complexF*k22;  // isVersionOf ec-code:2.7.11.25 GO:0000186 GO:0004709
    k22 = 47 min_inv;
  v23: complexF -> Gbc + Ste7 + Ste5 + Fus3 + Ste20 + Ste11; compartment*complexF*k23;  // isVersionOf GO:0043241
    k23 = 5 min_inv;
  v24: complexG -> complexH; compartment*complexG*k24;  // isVersionOf ec-code:2.7.12.2 GO:0004708 GO:0000187
    k24 = 345 min_inv;
  v25: complexG -> Gbc + Ste7 + Ste5 + Fus3 + Ste20 + Ste11; compartment*complexG*k25;  // isVersionOf GO:0043241
    k25 = 5 min_inv;
  v26: complexH -> complexI; compartment*complexH*k26;  // isVersionOf GO:0006468
    k26 = 50 min_inv;
  v27: complexH -> Gbc + Ste7 + Ste5 + Fus3 + Ste20 + Ste11; compartment*complexH*k27;  // isVersionOf GO:0043241
    k27 = 5 min_inv;
  v28: complexI -> complexL + Fus3PP; compartment*complexI*k28;  // isVersionOf GO:0043241
    k28 = 140 min_inv;
  v29: complexL + Fus3 -> complexK; compartment*complexL*Fus3*k29;  // isVersionOf GO:0051019; hasPart intact:EBI-877260 intact:EBI-877421
    k29 = 10 min_inv_nM_inv;
  v30: complexK -> complexL + Fus3; compartment*complexK*k30;  // isVersionOf GO:0043241
    k30 = 1 min_inv;
  v31: complexK -> complexI; compartment*complexK*k31;  // isVersionOf ec-code:2.7.12.2 GO:0004708 GO:0000187
    k31 = 250 min_inv;
  v32: complexL -> Gbc + Ste7 + Ste5 + Ste20 + Ste11; compartment*complexL*k32;  // isVersionOf GO:0043241
    k32 = 5 min_inv;
  v33: Fus3PP -> Fus3; compartment*Fus3PP*k33;  // isVersionOf ec-code:3.1.3.16 GO:0016311 GO:0000188
    k33 = 50 min_inv;
  v34: Ste12 + Fus3PP -> Ste12a; compartment*Ste12*Fus3PP*k34;  // isVersionOf GO:0004707 GO:0051019
    k34 = 18 min_inv_nM_inv;
  v35: Ste12a -> Ste12 + Fus3PP; compartment*Ste12a*k35;  // isVersionOf GO:0043241
    k35 = 10 min_inv;
  v36: Bar1 -> Bar1a; compartment*Ste12a*Bar1*k36;  // modifiers: Ste12a; isVersionOf GO:0003700
    k36 = 0.1 min_inv_nM_inv;
  v37: Bar1a -> Bar1; compartment*Bar1a*k37;  // isVersionOf GO:0043241
    k37 = 0.1 min_inv;
  v38: Bar1a -> Bar1aex; compartment*Bar1a*k38;  // isVersionOf GO:0006611
    k38 = 0.01 min_inv;
  v39: Far1 -> Far1PP; compartment*(Far1*Fus3PP*Fus3PP/(100*100 + Fus3PP*Fus3PP))*k39;  // modifiers: Fus3PP; isVersionOf ec-code:2.7.11.24 GO:0004707
    k39 = 18 min_inv;
  v40: Far1PP -> Far1; compartment*Far1PP*k40;  // isVersionOf ec-code:3.1.3.16 GO:0016311
    k40 = 1 min_inv;
  v41: Far1 -> Far1U; compartment*Far1*Cdc28*k41;  // modifiers: Cdc28; isVersionOf GO:0016567
    k41 = 0.02 min_inv_nM_inv;
  v42: Gbc + Far1PP -> complexM; compartment*Gbc*Far1PP*k42;
    k42 = 0.1 min_inv_nM_inv;
  v43: complexM -> Gbc + Far1PP; compartment*complexM*k43;  // isVersionOf GO:0043241
    k43 = 0.01 min_inv;
  v44: complexN -> Cdc28 + Far1PP; compartment*complexN*k44;  // isVersionOf GO:0043241
    k44 = 0.01 min_inv;
  v45: Cdc28 + Far1PP -> complexN; compartment*Far1PP*Cdc28*k45;  // isVersionOf GO:0004861
    k45 = 0.1 min_inv_nM_inv;
  v46: $p -> Sst2; compartment*(Fus3PP^2/(4^2 + Fus3PP^2))*k46;  // modifiers: Fus3PP; isVersionOf ec-code:2.7.11.24 GO:0004707
    k46 = 200 nM_min_inv;
  v47: Sst2 -> $p; compartment*Sst2*k47;
    k47 = 1 min_inv;

  // Unit definitions:
  unit substance = 1e-9 mole; substance is "nanomole (default)";
  unit time = 60 second; time is "minute (default)";
  unit nanoMolar = 1e-9 mole / litre;
  unit min_inv = 1 / (60 second);
  unit min_inv_nM_inv = litre / (1e-9 mole * 60 second);
  unit nM_min_inv = 1e-9 mole / (litre * 60 second);
end
