// SBML level 2 version 3

model vilarOscillator()
  // Vilar2002_Oscillator
  // Minimal Model for Circadian Oscillations
  // Citation
  // Vilar JMG, Kueh HY, Barkai N, Leibler S, (2002) . Mechanisms of noise resistance in genetic oscillators, PNAS, 99(9):5988-5992. http://www.pnas.org/cgi/content/abstract/ 99/9/5988
  // Description
  // A minimal model of genomically based oscillation, based on two mutually interacting genes, an activator and a repressor. Postive feedback is provided by the activator protein, which binds to the promotors of both the activator and the repressor genes. Negative feedback is provided by the repressor protein which binds to the activator protein.
  // Rate constant Reaction
  // alphaA = 50 DA -> DA + MA
  // alphaAp = 500 DAp -> DAp + MA
  // alphaR = 0.01 DR -> DR + MR
  // alphaRp = 50 DRp -> DRp + MR
  // betaA = 50 MA -> A + MA
  // betaR = 5 MR -> MR + R
  // gammaA = 1 A + DA -> DAp
  // gammaC = 2 A + R -> C
  // gammaR = 1 A + DR -> DRp
  // deltaA = 1 A -> EmptySet
  // deltaA = 1 C -> R
  // deltaMA = 10 MA -> EmptySet
  // deltaMR = 0.5 MR -> EmptySet
  // deltaR = 0.2 R -> EmptySet
  // thetaA = 50 DAp -> A + DA
  // thetaR = 100 DRp -> A + DR
  // Variable IC ODE
  // A 0 A'[t] == -(deltaA*A[t]) - gammaA*A[t]*DA[t] + thetaA*DAp[ t] - gammaR*A[t]*DR[t] + thetaR*DRp[t] + betaA*MA[t] - gammaC*A[t]*R[t]
  // C 0 C'[t] == -(deltaA*C[t]) + gammaC*A[t]*R[t]
  // DA 1 DA'[t] == -(gammaA*A[t]*DA[t]) + thetaA*DAp[t]
  // DAp 0 DAp'[t] == gammaA*A[t]*DA[t] - thetaA*DAp[t]
  // DR 1 DR'[t] == -(gammaR*A[t]*DR[t]) + thetaR*DRp[t]
  // DRp 0 DRp'[t] == gammaR*A[t]*DR[t] - thetaR*DRp[t]
  // MA 0 MA'[t] == alphaA*DA[t] + alphaAp*DAp[t] - deltaMA*MA[t]
  // MR 0 MR'[t] == alphaR*DR[t] + alphaRp*DRp[t] - deltaMR*MR[t]
  // R 0 R'[t] == deltaA*C[t] + betaR*MR[t] - deltaR*R[t] - gammaC*A[t]*R[t]
  // Generated by Cellerator Version 1.0 update 2.1127 using Mathematica 4.2 for Mac OS X (June 4, 2002), November 27, 2002 12:17:46, using (PowerMac,PowerPC, Mac OS X,MacOSX,Darwin)
  // author=B.E.Shapiro
  // This model originates from BioModels Database: A Database of Annotated Published Models (http://www.ebi.ac.uk/biomodels/).
  // To the extent possible under law, all copyright and related or neighbouring rights to this encoded model have been dedicated to the public domain worldwide. Please refer to CC0 Public Domain Dedication for more information.
  // In summary, you are entitled to use this encoded model in absolutely any manner you deem suitable, verbatim, or with modification, alone or embedded it in a larger context, redistribute it, commercially or not, in a restricted way or not..
  // To cite BioModels Database, please use Le Novère N., Bornstein B., Broicher A., Courtot M., Donizelli M., Dharuri H., Li L., Sauro H., Schilstra M., Shapiro B., Snoep J.L., Hucka M. (2006) BioModels Database: A Free, Centralized Database of Curated, Published, Quantitative Kinetic Models of Biochemical and Cellular Systems Nucleic Acids Res., 34: D689-D691.
  // biomodels.db:BIOMD0000000035
  // biomodels.db:MODEL6619651140
  // isDescribedBy pubmed:11972055
  // isVersionOf GO:0042752
  // isVersionOf taxonomy:131567

  // Compartments:
  compartment deterministicOscillator = 1;

  // Species:
  substanceOnly species $EmptySet in deterministicOscillator = 0;
  substanceOnly species A in deterministicOscillator = 0;  // isVersionOf CHEBI:36080
  substanceOnly species C in deterministicOscillator = 0;  // isVersionOf CHEBI:36080
  substanceOnly species DA in deterministicOscillator = 1;
  substanceOnly species DAp in deterministicOscillator = 0;
  substanceOnly species DR in deterministicOscillator = 1;
  substanceOnly species DRp in deterministicOscillator = 0;
  substanceOnly species MA in deterministicOscillator = 0;  // isVersionOf CHEBI:33699
  substanceOnly species MR in deterministicOscillator = 0;  // isVersionOf CHEBI:33699
  substanceOnly species R in deterministicOscillator = 0;  // isVersionOf CHEBI:36080

  // Reactions:
  Reaction1: A + R => C; A*R*gammaC;  // isVersionOf GO:0006461
    gammaC = 2;
  Reaction2: A => $EmptySet; A*Reaction2_deltaA;  // isVersionOf GO:0030163
    Reaction2_deltaA = 1;
  Reaction3: C => R; C*Reaction3_deltaA;  // isVersionOf GO:0030163
    Reaction3_deltaA = 1;
  Reaction4: R => $EmptySet; R*deltaR;  // isVersionOf GO:0030163
    deltaR = 0.2;
  Reaction5: A + DA => DAp; A*DA*gammaA;  // isVersionOf GO:0016563
    gammaA = 1;
  Reaction6: DAp => A + DA; DAp*thetaA;  // isVersionOf GO:0032986
    thetaA = 50;
  Reaction7: DA => DA + MA; DA*alphaA;  // isVersionOf GO:0006350
    alphaA = 50;
  Reaction8: DAp => DAp + MA; DAp*alphaAp;  // isVersionOf GO:0006350
    alphaAp = 500;
  Reaction9: MA => $EmptySet; MA*deltaMA;  // isVersionOf GO:0006402
    deltaMA = 10;
  Reaction10: MA => A + MA; MA*betaA;  // isVersionOf GO:0006412
    betaA = 50;
  Reaction11: A + DR => DRp; A*DR*gammaR;  // isVersionOf GO:0016563 GO:0010843
    gammaR = 1;
  Reaction12: DRp => A + DR; DRp*thetaR;  // isVersionOf GO:0032986
    thetaR = 100;
  Reaction13: DR => DR + MR; DR*alphaR;  // isVersionOf GO:0006350
    alphaR = 0.01;
  Reaction14: DRp => DRp + MR; DRp*alphaRp;  // isVersionOf GO:0006350
    alphaRp = 50;
  Reaction15: MR => $EmptySet; MR*deltaMR;  // isVersionOf GO:0006402
    deltaMR = 0.5;
  Reaction16: MR => MR + R; MR*betaR;  // isVersionOf GO:0006412
    betaR = 5;

  // Unit definitions:
  unit time = 3600 second; time is "hour";
end
