// SBML level 2 version 1

model Rohwer2000_Phosphotransferase_System()
  // SBML level 2 code generated for the JWS Online project by Jacky Snoep using PySCeS
  // Run this model online at http://jjj.biochem.sun.ac.za
  // To cite JWS Online please refer to: Olivier, B.G. and Snoep, J.L. (2004) Web-based modelling using JWS Online, Bioinformatics, 20:2143-2144
  // To the extent possible under law, all copyright and related or neighbouring rights to this encoded model have been dedicated to the public domain worldwide. Please refer to CC0 Public Domain Dedication for more information.
  // In summary, you are entitled to use this encoded model in absolutely any manner you deem suitable, verbatim, or with modification, alone or embedded it in a larger context, redistribute it, commercially or not, in a restricted way or not.
  // To cite BioModels Database, please use: Li C, Donizelli M, Rodriguez N, Dharuri H, Endler L, Chelliah V, Li L, He E, Henry A, Stefan MI, Snoep JL, Hucka M, Le Novère N, Laibe C (2010) BioModels Database: An enhanced, curated and annotated resource for published quantitative kinetic models. BMC Syst Biol., 4:92.
  // biomodels.db:BIOMD0000000038
  // biomodels.db:MODEL6621395815
  // isDescribedBy pubmed:10889194
  // kegg.pathway:eco02060
  // isVersionOf GO:0009401
  // occursIn taxonomy:562

  // Compartments:
  compartment compartment = 1; compartment is "cell";  // isVersionOf GO:0005623

  // Species:
  species EI in compartment = 3;  // isVersionOf uniprot:P08839
  species PyrPI in compartment = 0;  // hasPart uniprot:P08839 kegg.compound:C00074; hasPart CHEBI:18021 uniprot:P08839 kegg.compound:C00615
  species EIP in compartment = 2;  // isVersionOf uniprot:P08839
  species HPr in compartment = 25;  // uniprot:P07006
  species EIPHPr in compartment = 0;  // hasPart uniprot:P07006 uniprot:P08839
  species HPrP in compartment = 25;  // hasPart uniprot:P07006 kegg.compound:C00615
  species EIIA in compartment = 20;  // uniprot:P69783
  species HPrPIIA in compartment = 0;  // hasPart uniprot:P07006 uniprot:P69783
  species EIIAP in compartment = 20;  // uniprot:P69783
  species EIICB in compartment = 5;  // uniprot:P69786
  species EIIAPIICB in compartment = 0;  // uniprot:P69786 uniprot:P69783
  species EIICBP in compartment = 5;  // uniprot:P69786
  species EIICBPGlc in compartment = 0;  // hasPart CHEBI:17234 uniprot:P69786 kegg.compound:C00293
  species $PEP in compartment = 2800;  // CHEBI:18021 kegg.compound:C00074
  species $Pyr in compartment = 900;  // CHEBI:15361 kegg.compound:C00022
  species $GlcP in compartment = 50;  // CHEBI:14314 kegg.compound:C00092
  species $Glc in compartment = 500;  // CHEBI:17234 kegg.compound:C00293

  // Reactions:
  v1: $PEP + EI -> PyrPI; compartment*(k1f*PEP*EI - k1r*PyrPI);  // isVersionOf ec-code:2.7.3.9 GO:0018106 GO:0008965 GO:0016772; kegg.reaction:R02628
    k1f = 1960; k1r = 480000;
  v2: PyrPI -> EIP + $Pyr; compartment*(k2f*PyrPI - k2r*Pyr*EIP);  // isVersionOf ec-code:2.7.3.9 GO:0016772 GO:0008965 GO:0018106; kegg.reaction:R02628
    k2f = 108000; k2r = 294;
  v3: HPr + EIP -> EIPHPr; compartment*(k3f*EIP*HPr - k3r*EIPHPr);  // isVersionOf GO:0016772 GO:0018106; intact:EBI-902828
    k3f = 14000; k3r = 14000;
  v4: EIPHPr -> HPrP + EI; compartment*(k4f*EIPHPr - k4r*EI*HPrP);  // isVersionOf GO:0016772 GO:0018106; intact:EBI-902828
    k4f = 84000; k4r = 3360;
  v5: HPrP + EIIA -> HPrPIIA; compartment*(k5f*HPrP*EIIA - k5r*HPrPIIA);  // isVersionOf GO:0018106 GO:0016772; intact:EBI-903339
    k5f = 21960; k5r = 21960;
  v6: HPrPIIA -> EIIAP + HPr; compartment*(k6f*HPrPIIA - k6r*HPr*EIIAP);  // isVersionOf GO:0018106 GO:0016772; intact:EBI-903339
    k6f = 4392; k6r = 3384;
  v7: EIICB + EIIAP -> EIIAPIICB; compartment*(k7f*EIIAP*EIICB - k7r*EIIAPIICB);  // isVersionOf GO:0018106 GO:0016772; intact:EBI-903826
    k7f = 880; k7r = 880;
  v8: EIIAPIICB -> EIICBP + EIIA; compartment*(k8f*EIIAPIICB - k8r*EIIA*EIICBP);  // intact:EBI-903826; isVersionOf GO:0016772 GO:0018106
    k8f = 2640; k8r = 960;
  v9: EIICBP + $Glc -> EIICBPGlc; compartment*(k9f*EIICBP*Glc - k9r*EIICBPGlc);  // isVersionOf GO:0016772 GO:0046835
    k9f = 260; k9r = 389;
  v10: EIICBPGlc -> EIICB + $GlcP; compartment*(k10f*EIICBPGlc - k10r*EIICB*GlcP);  // isVersionOf GO:0016772 GO:0046835
    k10f = 4800; k10r = 0.0054;

  // Unit definitions:
  unit substance = 1e-6 mole; substance is "micromole (default)";
  unit time = 60 second; time is "minute (default)";
end
