// SBML level 2 version 1

model Glycolysis_Nielsen()
  // Nielsen1998_Glycolysis
  // Reference: Nielsen et al; Biophys. Chem. (1998) 72:49-62
  // The reaction looks like this:
  // reaction_1: GLC + ATP -> F6P + ADP;
  // reaction_2: F6P + ATP -> FBP + ADP;
  // reaction_3: FBP => 2 * GAP;
  // reaction_4: GAP + NAD -> DPG + NADH;
  // reaction_5: DPG + ADP => PEP + ATP;
  // reaction_6: PEP + ADP -> PYR + ATP;
  // reaction_7: PYR -> ACA;
  // reaction_8: ACA + NADH => EtOH + NAD;
  // reaction_9: AMP + ATP => 2 * ADP;
  // reaction_10: F6P -> P;
  // flow reactor:
  // flow = 1.1e-2 reactorvolume/s
  // inflow concentrations:
  // ATP = 3.5 mM
  // ADP = 1.1 mM
  // NADH = 0.24 mM
  // NAD = 4.0 mM
  // GLC = 50 mM
  // specific flow rates (in reactorvolume/seconds):
  // flow = 1.1e-2 : periodic oscillations
  // flow = 8.25e-3 : complex periodic oscillations
  // flow = 8.154e-3 : complex periodic oscillations
  // flow = 1e-3 : harmonic periodic oscillations
  // V4 = 10 mM/s instead of 20 in the paper, in order to reproduce the figures.
  // we can reproduce the results from the paper only If we interpret the *seconds* for the constants from table 2 as *minutes* (to correspond to the flow units in figure 9)
  // Initial amounts are taken from a version of the model on JWS Online because table 3 of the paper contains only the input flows for the reactor and no initial conditions for the various species.
  // To the extent possible under law, all copyright and related or neighbouring rights to this encoded model have been dedicated to the public domain worldwide. Please refer to CC0 Public Domain Dedication for more information.
  // In summary, you are entitled to use this encoded model in absolutely any manner you deem suitable, verbatim, or with modification, alone or embedded it in a larger context, redistribute it, commercially or not, in a restricted way or not.
  // To cite BioModels Database, please use: Li C, Donizelli M, Rodriguez N, Dharuri H, Endler L, Chelliah V, Li L, He E, Henry A, Stefan MI, Snoep JL, Hucka M, Le Novère N, Laibe C (2010) BioModels Database: An enhanced, curated and annotated resource for published quantitative kinetic models. BMC Syst Biol., 4:92.
  // biomodels.db:BIOMD0000000042
  // biomodels.db:MODEL6622455387
  // isDescribedBy pubmed:17029704
  // isVersionOf GO:0006096
  // kegg.pathway:sce00010
  // occursIn taxonomy:4932

  // Compartments:
  compartment compartment = 1;  // isVersionOf GO:0005737

  // Species:
  species ATP in compartment = 4.49064/compartment;  // CHEBI:15422 kegg.compound:C00002
  species ADP in compartment = 0.108367/compartment;  // CHEBI:16761 kegg.compound:C00008
  species AMP in compartment = 0.00261149/compartment;  // CHEBI:16027 kegg.compound:C00020
  species GLC in compartment = 0.0112817/compartment;  // CHEBI:17234 kegg.compound:C00293
  species F6P in compartment = 0.65939/compartment;  // CHEBI:20935 kegg.compound:C05345
  species FBP in compartment = 0.00770135/compartment;  // CHEBI:16905 kegg.compound:C05378
  species GAP in compartment = 0.00190919/compartment;  // CHEBI:29052 kegg.compound:C00118
  species NAD in compartment = 3.62057/compartment;  // CHEBI:15846 kegg.compound:C00003
  species NADH in compartment = 0.616118/compartment;  // CHEBI:16908 kegg.compound:C00004
  species DPG in compartment = 0.299109/compartment;  // CHEBI:16001 kegg.compound:C00236
  species PEP in compartment = 0.0021125/compartment;  // CHEBI:18021; kegg.compound:C00074
  species PYR in compartment = 0.00422702/compartment;  // CHEBI:15361; kegg.compound:C00022
  species ACA in compartment = 0.0738334/compartment;  // CHEBI:15343 kegg.compound:C00084
  species EtOH in compartment = 0.33981/compartment;  // CHEBI:16236 kegg.compound:C00469
  species P in compartment = 0;

  // Parameters:
  V1 = 0.5;
  K1GLC = 0.1;
  K1ATP = 0.063;
  V2 = 1.5;
  K2 = 0.0016;
  k2 = 0.017;
  K2ATP = 0.01;
  k3f = 1;
  k3b = 50;
  V4 = 10;
  K4GAP = 1;
  K4NAD = 1;
  k5f = 1;
  k5b = 0.5;
  V6 = 10;
  K6PEP = 0.2;
  K6ADP = 0.3;
  V7 = 2;
  K7PYR = 0.3;
  k8f = 1;
  k8b = 0.000143;
  k9f = 10;
  k9b = 10;
  k10 = 0.05;
  flow = 0.011;

  // Reactions:
  ATPflow: -> ATP; compartment*(3.5 - ATP)*flow;  // isVersionOf GO:0006754
  ADPflow: -> ADP; compartment*(1.1 - ADP)*flow;  // isVersionOf GO:0006172
  NADHflow: -> NADH; compartment*(0.24 - NADH)*flow;  // isVersionOf GO:0006735
  NADflow: -> NAD; compartment*(4 - NAD)*flow;  // isVersionOf GO:0009435
  GLCflow: -> GLC; compartment*(50 - GLC)*flow;  // isVersionOf GO:0046323
  F6Pflow: F6P => ; compartment*F6P*flow;  // isVersionOf GO:0006002
  FBPflow: FBP => ; compartment*FBP*flow;  // isVersionOf GO:0030388
  GAPflow: GAP => ; compartment*GAP*flow;  // isVersionOf GO:0019683
  DPGflow: DPG => ; compartment*DPG*flow;
  PEPflow: PEP => ; compartment*PEP*flow;
  PYRflow: PYR => ; compartment*PYR*flow;  // isVersionOf GO:0042867
  ACAflow: ACA => ; compartment*ACA*flow;  // isVersionOf GO:0046187
  EtOHflow: EtOH => ; compartment*EtOH*flow;  // isVersionOf GO:0006068
  AMPflow: AMP => ; compartment*AMP*flow;  // isVersionOf GO:0006196
  Pflow: P => ; compartment*P*flow;
  reaction_1: GLC + ATP => F6P + ADP; compartment*(V1*ATP*GLC/((K1GLC + GLC)*(K1ATP + ATP)));  // hasPart ec-code:5.3.1.9 ec-code:2.7.1.2; hasPart kegg.reaction:R00299 kegg.reaction:R00771; isHomologTo reactome:REACT_1164
  reaction_2: F6P + ATP => FBP + ADP; compartment*(V2*ATP*F6P^2/((K2*(1 + k2*(ATP/AMP)^2) + F6P^2)*(K2ATP + ATP)));  // modifiers: AMP; isVersionOf ec-code:2.7.1.11 kegg.reaction:R00756; isHomologTo reactome:REACT_1840
  reaction_3: FBP -> 2 GAP; compartment*(k3f*FBP - k3b*GAP^2);  // hasPart kegg.reaction:R01015 kegg.reaction:R01070; hasPart ec-code:4.1.2.13 ec-code:5.3.1.1; isHomologTo reactome:REACT_1693
  reaction_4: GAP + NAD => DPG + NADH; compartment*(V4*NAD*GAP/((K4GAP + GAP)*(K4NAD + NAD)));  // isVersionOf ec-code:1.2.1.12 kegg.reaction:R01061; isHomologTo reactome:REACT_587
  reaction_5: DPG + ADP -> PEP + ATP; compartment*(k5f*DPG*ADP - k5b*PEP*ATP);  // hasPart kegg.reaction:R01518 kegg.reaction:R01512 kegg.reaction:R00658; hasPart ec-code:2.7.2.3 ec-code:5.4.2.1 ec-code:4.2.1.11; hasPart reactome:REACT_1771 reactome:REACT_1400
  reaction_6: PEP + ADP => PYR + ATP; compartment*(V6*ADP*PEP/((K6PEP + PEP)*(K6ADP + ADP)));  // hasVersion ec-code:2.7.1.40 kegg.reaction:R00200; isHomologTo reactome:REACT_1911
  reaction_7: PYR => ACA; compartment*(V7*PYR/(K7PYR + PYR));  // isVersionOf ec-code:4.1.1.1 kegg.reaction:R00224
  reaction_8: ACA + NADH -> EtOH + NAD; compartment*(k8f*NADH*ACA - k8b*NAD*EtOH);  // isVersionOf ec-code:1.1.1.71 kegg.reaction:R00754; isHomologTo reactome:REACT_799
  reaction_9: AMP + ATP -> 2 ADP; compartment*(k9f*AMP*ATP - k9b*ADP^2);  // isVersionOf ec-code:2.7.4.3 kegg.reaction:R00127
  reaction_10: F6P => P; compartment*k10*F6P;  // isVersionOf GO:0006001; isHomologTo reactome:REACT_1571

  // Unit definitions:
  unit substance = 1e-3 mole; substance is "millimole";
  unit time = 60 second; time is "minute";
end
