// SBML level 2 version 1

model Goldbeter_Calcium_Oscillation_based_on_CICR_AND_CA_channel_inhibition()
  // Borghans1997_CaOscillation_model1
  // To the extent possible under law, all copyright and related or neighbouring rights to this encoded model have been dedicated to the public domain worldwide. Please refer to CC0 Public Domain Dedication for more information.
  // In summary, you are entitled to use this encoded model in absolutely any manner you deem suitable, verbatim, or with modification, alone or embedded it in a larger context, redistribute it, commercially or not, in a restricted way or not.
  // To cite BioModels Database, please use: Li C, Donizelli M, Rodriguez N, Dharuri H, Endler L, Chelliah V, Li L, He E, Henry A, Stefan MI, Snoep JL, Hucka M, Le Novère N, Laibe C (2010) BioModels Database: An enhanced, curated and annotated resource for published quantitative kinetic models. BMC Syst Biol., 4:92.
  // biomodels.db:BIOMD0000000043
  // biomodels.db:MODEL6622689184
  // isDescribedBy pubmed:17029867
  // occursIn taxonomy:10114
  // kegg.pathway:rno04020
  // isVersionOf GO:0019722 GO:0048016

  // Compartments:
  compartment extracellular = 1;  // isVersionOf GO:0005615
  compartment cytosol in extracellular = 1;  // isVersionOf GO:0005829
  compartment intravesicular in cytosol = 1;  // isVersionOf GO:0005790

  // Species:
  species EC in extracellular = 0;  // CHEBI:29108 kegg.compound:C00076
  species Z in cytosol = 0;  // CHEBI:29108 kegg.compound:C00076
  species Rho in cytosol = 0;  // isVersionOf interpro:IPR000493 pirsf:PIRSF002433
  species Y in intravesicular = 0.36;  // CHEBI:29108 kegg.compound:C00076
  species Fraction_Inactive_Channels in cytosol = 0;  // isVersionOf interpro:IPR000493 pirsf:PIRSF002433

  // Parameters:
  a = 40000;
  d = 100;
  beta = 1;

  // Reactions:
  vin: EC => Z; cytosol*(v0 + v1*beta);  // isVersionOf GO:0007204 GO:0006816
    v0 = 1; v1 = 1;
  v2: Z => Y; intravesicular*(Vm2*Z^2/(K2^2 + Z^2));  // isVersionOf GO:0051481
    Vm2 = 6.5; K2 = 0.1;
  v3: Y => Z; cytosol*(beta*(Rho*(a/d)*Z^4/(1 + a/d*Z^4))*Vm3*Y^2/(Ky^2 + Y^2));  // modifiers: Rho; isVersionOf GO:0007204
    Vm3 = 50; Ky = 0.2;
  v4: Y => Z; cytosol*Kf*Y;  // isVersionOf GO:0007204
    Kf = 1;
  v5: Z => EC; extracellular*K*Z;  // isVersionOf GO:0051481
    K = 10;
  v6: Rho => Fraction_Inactive_Channels; cytosol*Kd*Z^4*Rho;  // modifiers: Z; isVersionOf GO:0005220
    Kd = 5000;
  v7: Fraction_Inactive_Channels => Rho; cytosol*Kr*(1 - Rho);  // isVersionOf GO:0005220
    Kr = 5;

  // Unit definitions:
  unit substance = 1e-6 mole; substance is "micromole (default)";
  unit time = 60 second; time is "minute (default)";
end
