// SBML level 2 version 4

model Goldbeter_Calcium_Oscillation_based_on_CICR_AND_CA_Activated_degradation_of_IP3()
  // Borghans1997_CaOscillation_model2
  // This model originates from BioModels Database: A Database of Annotated Published Models. It is copyright (c) 2005-2010 The BioModels Team.
  // To the extent possible under law, all copyright and related or neighbouring rights to this encoded model have been dedicated to the public domain worldwide. Please refer to CC0 Public Domain Dedication for more information.
  // In summary, you are entitled to use this encoded model in absolutely any manner you deem suitable, verbatim, or with modification, alone or embedded it in a larger context, redistribute it, commercially or not, in a restricted way or not..
  // To cite BioModels Database, please use Le Novère N., Bornstein B., Broicher A., Courtot M., Donizelli M., Dharuri H., Li L., Sauro H., Schilstra M., Shapiro B., Snoep J.L., Hucka M. (2006) BioModels Database: A Free, Centralized Database of Curated, Published, Quantitative Kinetic Models of Biochemical and Cellular Systems Nucleic Acids Res., 34: D689-D691.
  // biomodels.db:BIOMD0000000044
  // biomodels.db:MODEL6622948601
  // isDescribedBy pubmed:17029867
  // taxonomy:10114
  // isVersionOf GO:0048016 GO:0019722
  // kegg.pathway:rno04020

  // Compartments:
  compartment extracellular = 1;  // isVersionOf GO:0005615
  compartment cytosol in extracellular = 1;  // isVersionOf GO:0005829
  compartment intravesicular in cytosol = 1;  // isVersionOf GO:0005790

  // Species:
  species EC in extracellular = 1000;  // CHEBI:29108 kegg.compound:C00076
  species Z in cytosol = 0;  // CHEBI:29108 kegg.compound:C00076
  species A in cytosol = 0.45;  // CHEBI:16595 kegg.compound:C01245
  species Y in intravesicular = 0.36;  // CHEBI:29108 kegg.compound:C00076

  // Parameters:
  beta = 0.5;

  // Reactions:
  vin: EC => Z; cytosol*(v0 + v1*beta);  // isVersionOf GO:0007204 GO:0006816
    v0 = 2; v1 = 1;
  v2: Z => Y; intravesicular*(Vm2*Z^2/(K2^2 + Z^2));  // isVersionOf GO:0051481
    Vm2 = 6.5; K2 = 0.1;
  v3: Y => Z; cytosol*Vm3*A^4*Y^2*Z^4/((Ka^4 + A^4)*(Ky^2 + Y^2)*(Kz^4 + Z^4));  // modifiers: A; isVersionOf GO:0051482 GO:0006816
    Vm3 = 19.5; Ka = 0.2; Ky = 0.2; Kz = 0.3;
  v4: Y => Z; cytosol*Kf*Y;  // isVersionOf GO:0007204
    Kf = 1;
  v5: Z => EC; extracellular*K*Z;  // isVersionOf GO:0051481
    K = 10;
  v6: => A; cytosol*beta*Vp; v6 is "Agonist stimulated production of IP3";  // isVersionOf GO:0007200 GO:0006021
    Vp = 2.5;
  Ca_dependent_IP3_degradation: A => ; cytosol*Vd*A^2*Z^n/((Kp^2 + A^2)*(Kd^n + Z^n));  // modifiers: Z; isVersionOf GO:0019310
    Vd = 80; Kp = 1; Kd = 0.4; n = 4;
  Ca_independent_IP3_degradation: A => ; cytosol*epsilon*A;  // isVersionOf GO:0019310
    epsilon = 0.1;

  // Unit definitions:
  unit substance = 1e-6 mole; substance is "micromole (default)";
  unit time = 60 second; time is "minute (default)";
end
