// SBML level 2 version 1

model Goldbeter_Calcium_Oscillation_based_onCICR_AND_two_pool_model()
  // Borghans1997_CaOscillation_model3
  // To the extent possible under law, all copyright and related or neighbouring rights to this encoded model have been dedicated to the public domain worldwide. Please refer to CC0 Public Domain Dedication for more information.
  // In summary, you are entitled to use this encoded model in absolutely any manner you deem suitable, verbatim, or with modification, alone or embedded it in a larger context, redistribute it, commercially or not, in a restricted way or not.
  // To cite BioModels Database, please use: Li C, Donizelli M, Rodriguez N, Dharuri H, Endler L, Chelliah V, Li L, He E, Henry A, Stefan MI, Snoep JL, Hucka M, Le Novère N, Laibe C (2010) BioModels Database: An enhanced, curated and annotated resource for published quantitative kinetic models. BMC Syst Biol., 4:92.
  // biomodels.db:BIOMD0000000045
  // biomodels.db:MODEL6623009547
  // isDescribedBy pubmed:17029867
  // kegg.pathway:rno04020
  // occursIn taxonomy:10114
  // isVersionOf GO:0019722 GO:0048016

  // Compartments:
  compartment extracellular = 1;  // isVersionOf GO:0005615
  compartment cytosol in extracellular = 1;  // isVersionOf GO:0005829
  compartment intravesicular1 in cytosol = 1;  // isVersionOf GO:0005790
  compartment intravesicular2 in cytosol = 1;

  // Species:
  species EC in extracellular = 0;  // CHEBI:29108 kegg.compound:C00076
  species Z in cytosol = 0;  // CHEBI:29108 kegg.compound:C00076
  species Y in intravesicular2 = 0;  // CHEBI:29108 kegg.compound:C00076
  species X in intravesicular1 = 0.5;  // CHEBI:29108 kegg.compound:C00076

  // Parameters:
  beta = 1;

  // Reactions:
  vin: EC => Z; cytosol*(v0 + v1*beta);  // isVersionOf GO:0007204 GO:0006816
    v0 = 0.015; v1 = 0.012;
  v2i: Z => Y; intravesicular2*Vm2i*Z^2/(K2i^2 + Z^2);  // isVersionOf GO:0006816 GO:0051481
    Vm2i = 3.1; K2i = 0.005;
  v3i: Y => Z; cytosol*Vm3i*Y^2*Z^2/((K3y^2 + Y^2)*(K3z^2 + Z^2));  // isVersionOf GO:0007204 GO:0006816 GO:0005219
    Vm3i = 25; K3y = 0.065; K3z = 0.022;
  v4: Y => Z; cytosol*v4_Kf*Y;  // isVersionOf GO:0007204 GO:0006816
    v4_Kf = 0.5;
  v5: Z => EC; extracellular*K*Z;  // isVersionOf GO:0006816 GO:0051481
    K = 1;
  v6: X => Z; cytosol*v6_Kf*X;  // isVersionOf GO:0007204 GO:0006816
    v6_Kf = 0.5;
  v2s: Z => X; intravesicular1*Vm2s*Z^2/(K2s^2 + Z^2);  // isVersionOf GO:0006816 GO:0051481
    Vm2s = 1.5; K2s = 0.0265;
  v3s: X => Z; cytosol*beta*Vm3s*X^2/(K3s^2 + X^2);  // isVersionOf GO:0006816 GO:0051482
    Vm3s = 0.169; K3s = 0.1;

  // Unit definitions:
  unit substance = 1e-6 mole; substance is "micromole (default)";
  unit time = 60 second; time is "minute (default)";
end
