// SBML level 2 version 1

model Sasagawa2005_MAPK()
  // This a model from the article:
  // Prediction and validation of the distinct dynamics of transient and sustained ERK activation.
  // Sasagawa S, Ozaki Y, Fujita K, Kuroda S Nat. Cell Biol.[2005 Apr; Volume: 7 (Issue: 4 )]: 365-73 15793571,
  // Abstract:
  // To elucidate the hidden dynamics of extracellular-signal-regulated kinase (ERK) signalling networks, we developed a simulation model of ERK signalling networks by constraining in silico dynamics based on in vivo dynamics in PC12 cells. We predicted and validated that transient ERK activation depends on rapid increases of epidermal growth factor and nerve growth factor (NGF) but not on their final concentrations, whereas sustained ERK activation depends on the final concentration of NGF but not on the temporal rate of increase. These ERK dynamics depend on Ras and Rap1 dynamics, the inactivation processes of which are growth-factor-dependent and -independent, respectively. Therefore, the Ras and Rap1 systems capture the temporal rate and concentration of growth factors, and encode these distinct physical properties into transient and sustained ERK activation, respectively.
  // Dynamics of active Ras, active Rap1 and phosphorylated ERK were correctly reproduced with CellDesigner 3.0
  // This model originates from BioModels Database: A Database of Annotated Published Models (http://www.ebi.ac.uk/biomodels/).
  // To the extent possible under law, all copyright and related or neighbouring rights to this encoded model have been dedicated to the public domain worldwide. Please refer to CC0 Public Domain Dedication for more information.
  // In summary, you are entitled to use this encoded model in absolutely any manner you deem suitable, verbatim, or with modification, alone or embedded it in a larger context, redistribute it, commercially or not, in a restricted way or not..
  // To cite BioModels Database, please use: Li C, Donizelli M, Rodriguez N, Dharuri H, Endler L, Chelliah V, Li L, He E, Henry A, Stefan MI, Snoep JL, Hucka M, Le Novère N, Laibe C (2010) BioModels Database: An enhanced, curated and annotated resource for published quantitative kinetic models. BMC Syst Biol., 4:92.
  // biomodels.db:BIOMD0000000049
  // biomodels.db:MODEL6624243033
  // isDescribedBy pubmed:15793571
  // occursIn taxonomy:10114
  // isVersionOf GO:0007173 GO:0007265 GO:0048011 GO:0000165

  // Compartments:
  compartment compartment = 1;  // isVersionOf GO:0009898
  compartment c1 in compartment = 1;  // isVersionOf GO:0005737

  // Species:
  species EGFR in compartment = 0.3;  // isPartOf uniprot:Q9QX70
  species L_EGFR in compartment = 0;  // hasPart uniprot:P07522 uniprot:Q9QX70
  species L_EGFR_dimer in compartment = 0;  // hasPart uniprot:P07522 uniprot:Q9QX70
  species SOS in c1 = 0.1;  // isVersionOf uniprot:Q9Z1I1
  species L_dpEGFR in compartment = 0;  // hasPart uniprot:Q9QX70 uniprot:P07522
  species pSOS in c1 = 0;  // isVersionOf uniprot:Q9Z1I1
  species SOS_Grb2 in c1 = 0;  // hasPart uniprot:Q9Z1I1 uniprot:P62994
  species Grb2 in c1 = 1;  // uniprot:P62994
  species Dok in c1 = 0.3;  // isVersionOf uniprot:Q4QQV2 interpro:IPR002404
  species pDok in c1 = 0;  // isVersionOf uniprot:Q4QQV2 interpro:IPR002404; isVersionOf kegg.compound:C00562
  species Crk in c1 = 1;  // uniprot:Q63768
  species FRS2 in c1 = 1;  // isVersionOf uniprot:D4A244
  species Shc in c1 = 1;  // isVersionOf uniprot:Q5M824
  species pSOS_Grb2 in c1 = 0;  // hasPart uniprot:Q9Z1I1 uniprot:P62994
  species Rap1_GDP in c1 = 0.2;  // hasPart CHEBI:17552 uniprot:Q62636
  species MEK in c1 = 0.68;  // hasVersion uniprot:Q01986
  species MKP3 in c1 = 0.018;  // uniprot:Q64346
  species pShc_dpEGFR in c1 = 0;  // hasPart uniprot:P07522 uniprot:Q5M824 uniprot:Q9QX70
  species dpEGFR_c_Cbl in c1 = 0;  // hasPart uniprot:Q8K4S7 uniprot:Q9QX70
  species B_Raf_Rap1_GTP in c1 = 0;  // hasPart CHEBI:15996 uniprot:Q62636 uniprot:Q99MC6
  species pShc_dpEGFR_c_Cbl in c1 = 0;  // hasPart uniprot:Q8K4S7 uniprot:Q5M824 uniprot:Q9QX70
  species pFRS2_dpEGFR_c_Cbl in c1 = 0;  // hasPart uniprot:Q9QX70 uniprot:D4A244 uniprot:Q8K4S7
  species Shc_dpEGFR in c1 = 0;  // hasPart uniprot:Q5M824 uniprot:P07522 uniprot:Q9QX70
  species c_Cbl in c1 = 0.5;  // isHomologTo uniprot:Q8K4S7
  species RasGAP in c1 = 0.1;  // interpro:IPR011575
  species c_Raf in c1 = 0.5;  // uniprot:P11345
  species B_Raf in c1 = 0.2;  // uniprot:Q99MC6
  species ERK in c1 = 0.26;  // uniprot:P63086
  species PP2A in c1 = 0.24;  // hasVersion uniprot:P62716 uniprot:P63331
  species Ras_GDP in c1 = 0.1;  // hasPart CHEBI:17552 interpro:IPR003577
  species Rap1GAP in c1 = 0.012;  // hasVersion uniprot:P47736
  species C3G in c1 = 0.5;  // uniprot:Q9QYV3
  species NGFR in compartment = 0.061894;  // uniprot:P35739
  species pShc in c1 = 0;  // isVersionOf uniprot:Q5M824
  species pFRS2_dpEGFR in c1 = 0;  // hasPart uniprot:Q8C180 uniprot:P07522 uniprot:Q9QX70
  species pTrkA_endo in c1 = 0;  // isVersionOf uniprot:P35739
  species MEK_ERK in c1 = 0;  // hasPart uniprot:P63086 uniprot:Q01986
  species pMEK_ERK in c1 = 0;  // hasPart uniprot:P63086 uniprot:Q01986
  species FRS2_dpEGFR_c_Cbl_ubiq in c1 = 0;  // hasPart uniprot:Q9QX70 uniprot:D4A244 uniprot:Q8K4S7
  species Crk_C3G_pFRS2_dpEGFR_c_Cbl in c1 = 0;  // hasPart uniprot:Q9QYV3 uniprot:Q9QX70 uniprot:Q63768 uniprot:D4A244
  species pShc_dpEGFR_c_Cbl_ubiq in c1 = 0;  // hasPart uniprot:Q9QX70 uniprot:Q5M824 uniprot:Q8K4S7
  species Crk_C3G_pFRS2_dpEGFR in c1 = 0;  // hasPart uniprot:Q9QX70 uniprot:Q9QYV3 uniprot:Q63768 uniprot:D4A244
  species Grb2_SOS_pShc_dpEGFR_c_Cbl_ubiq in c1 = 0;  // hasPart uniprot:Q8K4S7 uniprot:Q9QX70 uniprot:Q5M824 uniprot:P62994
  species Grb2_SOS_pShc_dpEGFR_c_Cbl in c1 = 0;  // hasPart uniprot:Q8K4S7 uniprot:Q9QX70 uniprot:Q5M824 uniprot:P62994
  species Shc_dpEGFR_c_Cbl_ubiq in c1 = 0;  // hasPart uniprot:Q8K4S7 uniprot:Q9QX70 uniprot:Q5M824
  species dpEGFR_c_Cbl_ubiq in c1 = 0;  // hasPart uniprot:Q8K4S7 uniprot:Q9QX70
  species proteosome in c1 = 0; proteosome is "proteasome";  // isVersionOf GO:0000502
  species Grb2_SOS_pShc in c1 = 0;  // hasPart uniprot:P62994 uniprot:Q5M824 uniprot:Q9Z1I1
  species Shc_dpEGFR_c_Cbl in c1 = 0;  // hasPart uniprot:Q5M824 uniprot:Q8K4S7 uniprot:Q9QX70
  species Grb2_SOS_pShc_dpEGFR in c1 = 0;  // hasPart uniprot:Q9QX70 uniprot:Q9Z1I1 uniprot:Q5M824 uniprot:P62994
  species pFRS2 in c1 = 0;  // isVersionOf uniprot:D4A244 kegg.compound:C00562
  species FRS2_dpEGFR in c1 = 0;  // hasPart uniprot:Q9QX70 uniprot:D4A244
  species pDok_RasGAP in c1 = 0;  // hasPart uniprot:Q4QQV2 interpro:IPR011575
  species pMEK in c1 = 0;  // isVersionOf uniprot:Q01986
  species FRS2_dpEGFR_c_Cbl in c1 = 0;  // hasPart uniprot:Q9QX70 uniprot:D4A244 uniprot:Q8K4S7
  species pFRS2_dpEGFR_c_Cbl_ubiq in c1 = 0;  // hasPart uniprot:D4A244 uniprot:Q8K4S7 uniprot:Q9QX70
  species Ras_GTP in c1 = 0;  // interpro:IPR003577
  species Crk_C3G_pFRS2_dpEGFR_c_Cbl_ubiq in c1 = 0;  // hasPart uniprot:D4A244 uniprot:Q9QX70 uniprot:Q9QYV3 uniprot:Q63768
  species c_Raf_Ras_GTP in c1 = 0;  // hasPart uniprot:P11345 interpro:IPR003577
  species B_Raf_Ras_GTP in c1 = 0;  // hasPart uniprot:P28028 interpro:IPR003577
  species ppMEK in c1 = 0;  // isVersionOf uniprot:Q01986
  species ppERK in c1 = 0;  // isVersionOf uniprot:P63086
  species pTrkA in compartment = 0;  // isVersionOf uniprot:P35739
  species Crk_C3G in c1 = 0;  // hasPart uniprot:Q63768 uniprot:Q9QYV3
  species Rap1_GTP in c1 = 0;  // isVersionOf uniprot:Q62636
  species L_NGFR in compartment = 0;  // hasPart uniprot:P35739 uniprot:P25427
  species ppMEK_ERK in c1 = 0;  // hasPart uniprot:Q01986 uniprot:P63086
  species dppERK in c1 = 0;  // isVersionOf uniprot:P63086
  species Shc_pTrkA in c1 = 0;  // hasPart uniprot:P35739 uniprot:Q5M824
  species Shc_pTrkA_endo in c1 = 0;  // hasPart uniprot:P35739 uniprot:Q5M824
  species pShc_pTrkA in c1 = 0;  // hasPart uniprot:P35739 uniprot:Q5M824
  species pFRS2_pTrkA in c1 = 0;  // hasPart uniprot:P35739 uniprot:D4A244
  species FRS2_pTrkA in c1 = 0;  // hasPart uniprot:D4A244 uniprot:P35739
  species pShc_pTrkA_endo in c1 = 0;  // hasPart uniprot:Q5M824 uniprot:P35739
  species FRS2_pTrkA_endo in c1 = 0;  // hasPart uniprot:D4A244 uniprot:P35739
  species pFRS2_pTrkA_endo in c1 = 0;  // hasPart uniprot:P35739 uniprot:D4A244
  species Crk_C3G_pFRS2_pTrkA_endo in c1 = 0;  // hasPart uniprot:P35739 uniprot:Q9QYV3 uniprot:Q63768 uniprot:D4A244
  species Grb2_SOS_pShc_pTrkA in c1 = 0;  // hasPart uniprot:Q5M824 uniprot:Q9Z1I1 uniprot:P62994 uniprot:P35739
  species Crk_C3G_pFRS2_pTrkA in c1 = 0;  // hasPart uniprot:P35739 uniprot:Q9QYV3 uniprot:Q63768 uniprot:D4A244
  species Grb2_SOS_pShc_pTrkA_endo in c1 = 0;  // hasPart uniprot:Q9Z1I1 uniprot:P35739 uniprot:Q5M824 uniprot:P62994
  species c_Raf_Ras_GTP_MEK in c1 = 0;  // hasPart uniprot:Q01986 uniprot:P11345 interpro:IPR003577
  species c_Raf_Ras_GTP_pMEK in c1 = 0;  // hasPart uniprot:P11345 uniprot:P36506 interpro:IPR003577
  species c_Raf_Ras_GTP_MEK_ERK in c1 = 0;  // hasPart uniprot:P63086 uniprot:P11345 uniprot:Q01986 interpro:IPR003577
  species c_Raf_Ras_GTP_pMEK_ERK in c1 = 0;  // hasPart uniprot:P63086 uniprot:Q01986 uniprot:P11345 interpro:IPR003577
  species B_Raf_Ras_GTP_MEK in c1 = 0;  // hasPart uniprot:Q01986 uniprot:Q99MC6 interpro:IPR003577
  species B_Raf_Ras_GTP_pMEK in c1 = 0;  // hasPart uniprot:Q01986 uniprot:Q99MC6 interpro:IPR003577
  species B_Raf_Ras_GTP_MEK_ERK in c1 = 0;  // hasPart uniprot:P63086 uniprot:Q01986 uniprot:Q99MC6 interpro:IPR003577
  species B_Raf_Ras_GTP_pMEK_ERK in c1 = 0;  // hasPart uniprot:Q01986 uniprot:P63086 uniprot:Q99MC6 interpro:IPR003577
  species B_Raf_Rap1_GTP_MEK in c1 = 0;  // hasPart CHEBI:15996 uniprot:Q01986 uniprot:Q99MC6 uniprot:Q62636
  species B_Raf_Rap1_GTP_pMEK in c1 = 0;  // hasPart CHEBI:15996 uniprot:Q01986 uniprot:Q62636 uniprot:Q99MC6
  species B_Raf_Rap1_GTP_MEK_ERK in c1 = 0;  // hasPart CHEBI:15996 uniprot:P63086 uniprot:Q01986 uniprot:Q62636
  species B_Raf_Rap1_GTP_pMEK_ERK in c1 = 0;  // hasPart CHEBI:15996 uniprot:P63086 uniprot:Q01986 uniprot:Q62636
  species ppERK_MKP3 in c1 = 0;  // hasPart uniprot:Q64346 uniprot:P63086
  species dppERK_MKP3 in c1 = 0;  // hasPart uniprot:Q64346 uniprot:Q01986
  species $pro_TrkA in c1 = 0.020631;  // isVersionOf uniprot:P35739
  species $NGF in compartment = 0;  // uniprot:P25427
  species $EGF in compartment = 0.001613;  // uniprot:P07522
  species $pro_EGFR in c1 = 0.3;  // isVersionOf uniprot:Q9QX70
  species $degradation in c1 = 0;

  // Reactions:
  form_EGFreceptor: $pro_EGFR -> EGFR; compartment*(re1_k1*pro_EGFR - re1_k2*EGFR);  // isPartOf GO:0045741
    re1_k1 = 0.0001; re1_k2 = 0.0001;
  EGFbinding: $EGF + EGFR -> L_EGFR; compartment*(re2_k1*EGF*EGFR - re2_k2*L_EGFR);  // isPartOf GO:0045741; GO:0005154 GO:0048408
    re2_k1 = 2.2833; re2_k2 = 0.0029666;
  dimerization: 2 L_EGFR -> L_EGFR_dimer; compartment*(re8_k1*L_EGFR*L_EGFR - re8_k2*L_EGFR_dimer);  // isVersionOf GO:0005154
    re8_k1 = 10; re8_k2 = 0.02;
  J3: SOS + Grb2 -> SOS_Grb2; c1*(J3_k1*SOS*Grb2 - J3_k2*SOS_Grb2); J3 is "binding_SOS_Grb2";  // isVersionOf GO:0005068 GO:0005070 GO:0017124
    J3_k1 = 0.03; J3_k2 = 0.0168;
  J4: Grb2 + pSOS -> pSOS_Grb2; c1*(J4_k1*Grb2*pSOS - J4_k2*pSOS_Grb2); J4 is "binding_pSOS_Grb2";  // isVersionOf GO:0017124 GO:0005070 GO:0005068
    J4_k1 = 0.03; J4_k2 = 0.0168;
  J5: L_EGFR_dimer -> L_dpEGFR; compartment*(J5_k1*L_EGFR_dimer - J5_k2*L_dpEGFR); J5 is "EGFRphosphorylation";  // isVersionOf GO:0004716
    J5_k1 = 4; J5_k2 = 0.001;
  J6: L_dpEGFR + c_Cbl -> dpEGFR_c_Cbl; c1*(J6_k1*L_dpEGFR*c_Cbl - J6_k2*dpEGFR_c_Cbl); J6 is "binding_cCbI_dpEGFR";  // isVersionOf GO:0051425
    J6_k1 = 0.5; J6_k2 = 0.2;
  J7: L_dpEGFR + pShc -> pShc_dpEGFR; c1*(J7_k1*L_dpEGFR*pShc - J7_k2*pShc_dpEGFR); J7 is "binding_pShc_LdpEGFR";  // isVersionOf GO:0051425 GO:0042169
    J7_k1 = 10; J7_k2 = 0.2;
  J8: pDok -> Dok; c1*(J8_k1*pDok - J8_k2*Dok); J8 is "pDOKdephosphorylation";  // isVersionOf ec-code:3.1.3.16 GO:0006470
    J8_k1 = 0.002; J8_k2 = 1e-5;
  J9: c_Cbl + pShc_dpEGFR -> pShc_dpEGFR_c_Cbl; c1*(J9_k1*c_Cbl*pShc_dpEGFR - J9_k2*pShc_dpEGFR_c_Cbl); J9 is "binding_cCbl_pShc_dpEGFR";  // GO:0031625 GO:0017124
    J9_k1 = 0.5; J9_k2 = 0.2;
  J10: pSOS => SOS; c1*J10_k*pSOS; J10 is "SOSdephosphorylation";  // isVersionOf ec-code:3.1.3.16 GO:0006470
    J10_k = 0.002;
  J11: pSOS_Grb2 => SOS_Grb2; c1*J11_k*pSOS_Grb2; J11 is "pSOS_Grb2_dephosphorylation";  // isVersionOf ec-code:3.1.3.16 GO:0006470
    J11_k = 0.002;
  J12: L_dpEGFR + Shc -> Shc_dpEGFR; c1*(J12_k1*L_dpEGFR*Shc - J12_k2*Shc_dpEGFR); J12 is "binding_Shc_LdpEGFR";  // isVersionOf GO:0042169
    J12_k1 = 10; J12_k2 = 0.2;
  J13: Shc_dpEGFR => pShc_dpEGFR; c1*J13_k*Shc_dpEGFR; J13 is "Shc_dpEGFR_phosphorylation";  // isVersionOf GO:0006468 GO:0004716
    J13_k = 1;
  J14: dpEGFR_c_Cbl => dpEGFR_c_Cbl_ubiq; c1*J14_k*dpEGFR_c_Cbl; J14 is "dpEGFR_c_Cbl_ubiquitination";  // isVersionOf GO:0016567
    J14_k = 0.05;
  J15: dpEGFR_c_Cbl_ubiq => proteosome + c_Cbl; c1*J15_k*dpEGFR_c_Cbl_ubiq; J15 is "dpEGFR_cCbl_degrad";  // GO:0043161
    J15_k = 0.001;
  J16: c_Cbl + Shc_dpEGFR -> Shc_dpEGFR_c_Cbl; c1*(J16_k1*c_Cbl*Shc_dpEGFR - J16_k2*Shc_dpEGFR_c_Cbl); J16 is "binding_cCbl_Shc_dpEGFR";  // GO:0031625 GO:0017124
    J16_k1 = 0.5; J16_k2 = 0.2;
  J17: Shc_dpEGFR_c_Cbl => Shc_dpEGFR_c_Cbl_ubiq; c1*J17_k*Shc_dpEGFR_c_Cbl; J17 is "Shc_dpEGFR_c_CBl_Ubiquitination";  // isVersionOf GO:0016567
    J17_k = 0.05;
  J18: Shc_dpEGFR_c_Cbl_ubiq => proteosome + c_Cbl + Shc; c1*J18_k*Shc_dpEGFR_c_Cbl_ubiq; J18 is "Shc_dpEGFR_c_Cbl_ubiq_Degradation";  // GO:0043161
    J18_k = 0.001;
  J19: pShc_dpEGFR_c_Cbl => pShc_dpEGFR_c_Cbl_ubiq; c1*J19_k*pShc_dpEGFR_c_Cbl; J19 is "pShc_dpEGFR_c_Cbl_ubiquitination";  // isVersionOf GO:0016567
    J19_k = 0.05;
  J20: pShc_dpEGFR_c_Cbl_ubiq => proteosome + c_Cbl + pShc; c1*J20_k*pShc_dpEGFR_c_Cbl_ubiq; J20 is "pShc_dpEGFR_c_Cbl_ubiq_degradation";  // GO:0043161
    J20_k = 0.001;
  J21: Shc_dpEGFR_c_Cbl => pShc_dpEGFR_c_Cbl; c1*J21_k*Shc_dpEGFR_c_Cbl; J21 is "Shc_dpEGFR_c_Cblphosphorylation";  // isVersionOf GO:0004716 GO:0006468
    J21_k = 1;
  J22: pShc + SOS_Grb2 -> Grb2_SOS_pShc; c1*(J22_k1*pShc*SOS_Grb2 - J22_k2*Grb2_SOS_pShc); J22 is "binding_Grb2_SOS_pShc";  // isVersionOf GO:0005070
    J22_k1 = 10; J22_k2 = 0.2;
  J23: L_dpEGFR + Grb2_SOS_pShc -> Grb2_SOS_pShc_dpEGFR; c1*(J23_k1*L_dpEGFR*Grb2_SOS_pShc - J23_k2*Grb2_SOS_pShc_dpEGFR); J23 is "binding_Grb2_SOS_pShc_dpEGFR";  // isVersionOf GO:0042169
    J23_k1 = 10; J23_k2 = 0.2;
  J24: pShc_dpEGFR + SOS_Grb2 -> Grb2_SOS_pShc_dpEGFR; c1*(J24_k1*pShc_dpEGFR*SOS_Grb2 - J24_k2*Grb2_SOS_pShc_dpEGFR); J24 is "binding_Grb2_SOS_pShc_dpEGFR";  // isVersionOf GO:0005070
    J24_k1 = 10; J24_k2 = 0.2;
  J25: c_Cbl + Grb2_SOS_pShc_dpEGFR -> Grb2_SOS_pShc_dpEGFR_c_Cbl; c1*(J25_k1*c_Cbl*Grb2_SOS_pShc_dpEGFR - J25_k2*Grb2_SOS_pShc_dpEGFR_c_Cbl); J25 is "binding_c_Cbl_Grb2_SOS_pShc_dpEGFR";  // GO:0031625 GO:0017124
    J25_k1 = 0.5; J25_k2 = 0.2;
  J27: dpEGFR_c_Cbl + Grb2_SOS_pShc -> Grb2_SOS_pShc_dpEGFR_c_Cbl; c1*(J27_k1*dpEGFR_c_Cbl*Grb2_SOS_pShc - J27_k2*Grb2_SOS_pShc_dpEGFR_c_Cbl); J27 is "binding_Grb2_SOS_pShc_to_dpEGFR_c_Cbl";  // isVersionOf GO:0042169
    J27_k1 = 10; J27_k2 = 0.2;
  J28: Grb2_SOS_pShc_dpEGFR_c_Cbl => Grb2_SOS_pShc_dpEGFR_c_Cbl_ubiq; c1*J28_k*Grb2_SOS_pShc_dpEGFR_c_Cbl; J28 is "Grb2_SOS_pShc_dpEGFR_c_Cbl_ubiquitination";  // isVersionOf GO:0016567
    J28_k = 0.05;
  J29: Grb2_SOS_pShc_dpEGFR_c_Cbl_ubiq => proteosome + c_Cbl + Grb2_SOS_pShc; c1*J29_k*Grb2_SOS_pShc_dpEGFR_c_Cbl_ubiq; J29 is "Grb2_SOS_pShc_dpEGFR_c_Cbl_ubiq_degradation";  // GO:0043161
    J29_k = 0.001;
  J30: Grb2_SOS_pShc => Shc + SOS_Grb2; J30_k*Grb2_SOS_pShc; J30 is "Grb2_SOS_pShc_Dissociation";  // isVersionOf GO:0043241
    J30_k = 0.005;
  J31: Dok => pDok; c1*(J31_Vmax*Dok*(L_dpEGFR + Shc_dpEGFR + pShc_dpEGFR + Grb2_SOS_pShc_dpEGFR + dpEGFR_c_Cbl + Shc_dpEGFR_c_Cbl + pShc_dpEGFR_c_Cbl + Grb2_SOS_pShc_dpEGFR_c_Cbl + FRS2_dpEGFR + pFRS2_dpEGFR + Crk_C3G_pFRS2_dpEGFR + FRS2_dpEGFR_c_Cbl + Crk_C3G_pFRS2_dpEGFR_c_Cbl)/(J31_Km1 + Dok));  // modifiers: L_dpEGFR, Shc_dpEGFR, pShc_dpEGFR, Grb2_SOS_pShc_dpEGFR_c_Cbl, Grb2_SOS_pShc_dpEGFR, dpEGFR_c_Cbl, Shc_dpEGFR_c_Cbl, pShc_dpEGFR_c_Cbl, FRS2_dpEGFR, pFRS2_dpEGFR, Crk_C3G_pFRS2_dpEGFR, FRS2_dpEGFR_c_Cbl, Crk_C3G_pFRS2_dpEGFR_c_Cbl; isVersionOf GO:0006468 GO:0004716
    J31_Vmax = 0.2; J31_Km1 = 0.1;
  J32: pShc => Shc; c1*J32_k*pShc; J32 is "pShc_dephosphorylation";  // isVersionOf ec-code:3.1.3.16 GO:0006470
    J32_k = 0.005;
  J33: pFRS2 => FRS2; c1*J33_k*pFRS2; J33 is "pFRS2_dephosphorylation";  // isVersionOf ec-code:3.1.3.16 GO:0006470
    J33_k = 0.005;
  J34: Crk + C3G -> Crk_C3G; c1*(J34_k1*Crk*C3G - J34_k2*Crk_C3G); J34 is "binding_Crk_to_C3G";  // isVersionOf GO:0006461
    J34_k1 = 1; J34_k2 = 0.002;
  J35: L_dpEGFR + FRS2 -> FRS2_dpEGFR; c1*(J35_k1*L_dpEGFR*FRS2 - J35_k2*FRS2_dpEGFR); J35 is "binding_L_dpEGFR_to_FRS2";  // GO:0051425
    J35_k1 = 1; J35_k2 = 0.2;
  J36: L_dpEGFR + pFRS2 -> pFRS2_dpEGFR; c1*(J36_k1*L_dpEGFR*pFRS2 - J36_k2*pFRS2_dpEGFR); J36 is "binding_pFRS2_to_L_dpEGFR";  // GO:0051425
    J36_k1 = 1; J36_k2 = 0.2;
  J37: FRS2_dpEGFR => pFRS2_dpEGFR; c1*J37_k*FRS2_dpEGFR; J37 is "FRS2_dpEGFRphsphorylation";  // isVersionOf GO:0004716
    J37_k = 1;
  J38: pFRS2_dpEGFR + Crk_C3G -> Crk_C3G_pFRS2_dpEGFR; c1*(J38_k1*pFRS2_dpEGFR*Crk_C3G - J38_k2*Crk_C3G_pFRS2_dpEGFR); J38 is "binding_Crk_C3G_to_pFRS2_pRTK";  // isVersionOf GO:0042169
    J38_k1 = 1; J38_k2 = 0.2;
  J39: FRS2_dpEGFR + c_Cbl -> FRS2_dpEGFR_c_Cbl; c1*(J39_k1*FRS2_dpEGFR*c_Cbl - J39_k2*FRS2_dpEGFR_c_Cbl); J39 is "binding_c_Cbl_to_FRS2_dpEGFR";  // isVersionOf GO:0031625
    J39_k1 = 0.5; J39_k2 = 0.2;
  J40: c_Cbl + pFRS2_dpEGFR -> pFRS2_dpEGFR_c_Cbl; c1*(J40_k1*c_Cbl*pFRS2_dpEGFR - J40_k2*pFRS2_dpEGFR_c_Cbl); J40 is "binding_c_Cbl_to_pFRS2_dpEGFR";  // isVersionOf GO:0031625
    J40_k1 = 0.5; J40_k2 = 0.2;
  J41: pFRS2_dpEGFR_c_Cbl => pFRS2_dpEGFR_c_Cbl_ubiq; c1*J41_k*pFRS2_dpEGFR_c_Cbl; J41 is "pFRS2_dpEGFR_c_Cbl_ubiquitiation";  // isVersionOf GO:0016567
    J41_k = 0.05;
  J42: FRS2_dpEGFR_c_Cbl => FRS2_dpEGFR_c_Cbl_ubiq; c1*J42_k*FRS2_dpEGFR_c_Cbl; J42 is "FRS2_dpEGFR_c_Cbl_ubiquitination";  // isVersionOf GO:0016567
    J42_k = 0.05;
  J43: FRS2_dpEGFR_c_Cbl => pFRS2_dpEGFR_c_Cbl; c1*J43_k*FRS2_dpEGFR_c_Cbl; J43 is "FRS2_dpEGFR_c_Cbl_phosphorylation";  // isVersionOf GO:0004716 GO:0006468
    J43_k = 1;
  J44: pFRS2_dpEGFR_c_Cbl + Crk_C3G -> Crk_C3G_pFRS2_dpEGFR_c_Cbl; c1*(J44_k1*pFRS2_dpEGFR_c_Cbl*Crk_C3G - J44_k2*Crk_C3G_pFRS2_dpEGFR_c_Cbl); J44 is "binding_Crk_C3G_to_pFRS2_pFRS2_dpEGFR_c_Cbl";  // isVersionOf GO:0042169
    J44_k1 = 1; J44_k2 = 0.2;
  J45: Crk_C3G_pFRS2_dpEGFR_c_Cbl => Crk_C3G_pFRS2_dpEGFR_c_Cbl_ubiq; c1*J45_k*Crk_C3G_pFRS2_dpEGFR_c_Cbl; J45 is "Crk_C3G_pFRS2_dpEGFR_c_Cbl_ubiquitination";  // isVersionOf GO:0016567
    J45_k = 0.05;
  J46: FRS2_dpEGFR_c_Cbl_ubiq => proteosome + c_Cbl + FRS2; c1*J46_k*FRS2_dpEGFR_c_Cbl_ubiq; J46 is "FRS2_dpEGFR_c_Cbl_ubiq_dissociation";  // isVersionOf GO:0043161
    J46_k = 0.001;
  J47: pFRS2_dpEGFR_c_Cbl_ubiq => proteosome + c_Cbl + pFRS2; c1*J47_k*pFRS2_dpEGFR_c_Cbl_ubiq; J47 is "pFRS2_dpEGFR_c_Cbl_ubiq_dissociation";  // isVersionOf GO:0043161
    J47_k = 0.001;
  J49: pDok + RasGAP -> pDok_RasGAP; c1*(J49_k1*pDok*RasGAP - J49_k2*pDok_RasGAP); J49 is "binding_RasGAP_to_pDOK";  // isPartOf GO:0046580
    J49_k1 = 0.12; J49_k2 = 0.01;
  J50: SOS_Grb2 => pSOS_Grb2; c1*(J50_Vmax*SOS_Grb2*dppERK/(J50_Km1 + SOS_Grb2)); J50 is "SOS_Grb2_phosphorylation";  // modifiers: dppERK; isVersionOf GO:0006468
    J50_Vmax = 1; J50_Km1 = 25.641;
  J51: SOS => pSOS; c1*(J51_Vmax*SOS*dppERK/(J51_Km1 + SOS)); J51 is "SOS_phosphorylation";  // modifiers: dppERK; isVersionOf GO:0006468
    J51_Vmax = 1; J51_Km1 = 25.641;
  J52: c_Raf + Ras_GTP -> c_Raf_Ras_GTP; c1*(J52_k1*c_Raf*Ras_GTP - J52_k2*c_Raf_Ras_GTP); J52 is "binding_c_Raf_to_Ras_GTP";  // isVersionOf GO:0000185
    J52_k1 = 60; J52_k2 = 0.5;
  J53: Rap1_GTP + B_Raf -> B_Raf_Rap1_GTP; c1*(J53_k1*Rap1_GTP*B_Raf - J53_k2*B_Raf_Rap1_GTP); J53 is "binding_B_Raf_to_Rap1_GTP";  // isVersionOf GO:0000185
    J53_k1 = 60; J53_k2 = 0.5;
  J54: Ras_GTP + B_Raf -> B_Raf_Ras_GTP; c1*(J54_k1*Ras_GTP*B_Raf - J54_k2*B_Raf_Ras_GTP); J54 is "binding_B_Raf_to_Ras_GTP";  // isVersionOf GO:0000185
    J54_k1 = 60; J54_k2 = 0.5;
  J57: ppMEK => pMEK; J57_Vmax*ppMEK*PP2A/(J57_Km1 + ppMEK); J57 is "ppMEK_dephosphorylation";  // modifiers: PP2A; isVersionOf ec-code:3.1.3.16 GO:0006470; isPartOf GO:0051389
    J57_Vmax = 3; J57_Km1 = 15.657;
  J58: pMEK => MEK; c1*(J58_Vmax*pMEK*PP2A/(J58_Km1 + pMEK)); J58 is "pMEK_dephosphorylation";  // modifiers: PP2A; isVersionOf ec-code:3.1.3.16 GO:0006470; isPartOf GO:0051389
    J58_Vmax = 3; J58_Km1 = 15.657;
  J61: ppMEK_ERK => pMEK_ERK; c1*(J61_Vmax*ppMEK_ERK*PP2A/(J61_Km1 + ppMEK_ERK)); J61 is "ppMEK_ERK";  // modifiers: PP2A; isVersionOf ec-code:3.1.3.16 GO:0006470; isPartOf GO:0051389
    J61_Vmax = 3; J61_Km1 = 15.657;
  J62: pMEK_ERK => MEK_ERK; c1*(J62_Vmax*pMEK_ERK*PP2A/(J62_Km1 + pMEK_ERK)); J62 is "pMEK_ERK_dephosphorylation";  // modifiers: PP2A; isVersionOf ec-code:3.1.3.16 GO:0006470; isPartOf GO:0051389
    J62_Vmax = 3; J62_Km1 = 15.657;
  J63: 2 ppERK -> dppERK; c1*(J63_k1*ppERK*ppERK - J63_k2*dppERK); J63 is "ppERK_dimerization";  // isVersionOf GO:0005154
    J63_k1 = 10; J63_k2 = 0.075;
  J66: Ras_GTP => Ras_GDP; c1*J66_k*Ras_GTP; J66 is "Ras_GTP_dephosphorylation";  // isVersionOf ec-code:3.1.3.16 GO:0006470; isPartOf GO:0046580
    J66_k = 0.0001667;
  J67: Rap1_GTP => Rap1_GDP; c1*J67_k*Rap1_GTP; J67 is "Rap1_GTP_dephosphorylation";  // isVersionOf ec-code:3.1.3.16 GO:0006470
    J67_k = 0.0001166;
  J68: Rap1_GDP => Rap1_GTP; c1*(J68_Vmax*Rap1_GDP*(Crk_C3G_pFRS2_dpEGFR + Crk_C3G_pFRS2_dpEGFR_c_Cbl + Crk_C3G_pFRS2_pTrkA_endo)/(J68_Km1 + Rap1_GDP)); J68 is "Rap1_GTP_phosphorylation";  // modifiers: Crk_C3G_pFRS2_dpEGFR_c_Cbl, Crk_C3G_pFRS2_dpEGFR, Crk_C3G_pFRS2_pTrkA_endo; isVersionOf GO:0005085 GO:0006468
    J68_Vmax = 0.024; J68_Km1 = 0.01;
  J69: Ras_GDP => Ras_GTP; c1*(J69_Vmax*Ras_GDP*(Grb2_SOS_pShc_dpEGFR + Grb2_SOS_pShc_dpEGFR_c_Cbl + Grb2_SOS_pShc_pTrkA)/(J69_Km1 + Ras_GDP)); J69 is "Ras_GDP_phosphorylation";  // modifiers: Grb2_SOS_pShc_dpEGFR_c_Cbl, Grb2_SOS_pShc_dpEGFR, Grb2_SOS_pShc_pTrkA; isVersionOf GO:0006468 GO:0005085
    J69_Vmax = 2; J69_Km1 = 0.02;
  J70: $NGF + NGFR -> L_NGFR; compartment*(J70_k1*NGF*NGFR - J70_k2*L_NGFR); J70 is "binding_NGF_to_NGFR";  // isVersionOf GO:0048406 GO:0051396
    J70_k1 = 6.2; J70_k2 = 6.4e-5;
  J71: L_NGFR => pTrkA; compartment*J71_k*L_NGFR; J71 is "TrkA_phosphorylation";  // isVersionOf GO:0004716 GO:0006468
    J71_k = 1;
  J72: pTrkA => pTrkA_endo; c1*J72_k*pTrkA; J72 is "pTrkA_intermalization";  // isVersionOf GO:0031623
    J72_k = 0.00063;
  J73: pTrkA_endo => $degradation; c1*J73_k*pTrkA_endo; J73 is "pTrkA_endo_degradation";  // isVersionOf GO:0043241
    J73_k = 0.00042;
  J74: pTrkA => $degradation; c1*J74_k*pTrkA; J74 is "pTrkA_degradation";  // isVersionOf GO:0043241
    J74_k = 0.0022;
  J75: Shc + pTrkA -> Shc_pTrkA; c1*(J75_k1*Shc*pTrkA - J75_k2*Shc_pTrkA); J75 is "binding_Shc_to_pTrkA";  // isVersionOf GO:0042169 GO:0051425
    J75_k1 = 10; J75_k2 = 0.2;
  J76: pShc + pTrkA -> pShc_pTrkA; c1*(J76_k1*pShc*pTrkA - J76_k2*pShc_pTrkA); J76 is "binding_pShc_to_pTrkA";  // isVersionOf GO:0051425 GO:0042169
    J76_k1 = 10; J76_k2 = 0.2;
  J77: FRS2 + pTrkA -> FRS2_pTrkA; c1*(J77_k1*FRS2*pTrkA - J77_k2*FRS2_pTrkA); J77 is "binding_FRS2_to_pTrkA";  // isVersionOf GO:0051425
    J77_k1 = 5; J77_k2 = 0.1;
  J78: pFRS2 + pTrkA -> pFRS2_pTrkA; c1*(J78_k1*pFRS2*pTrkA - J78_k2*pFRS2_pTrkA); J78 is "binding_pFRS2_to_pTrkA";  // isVersionOf GO:0051425
    J78_k1 = 5; J78_k2 = 0.1;
  J79: pTrkA_endo + Shc -> Shc_pTrkA_endo; c1*(J79_k1*pTrkA_endo*Shc - J79_k2*Shc_pTrkA_endo); J79 is "binding_Shc_to_pTrkA_endo";  // isVersionOf GO:0051425 GO:0042169
    J79_k1 = 10; J79_k2 = 0.2;
  J80: pTrkA_endo + pShc -> pShc_pTrkA_endo; c1*(J80_k1*pTrkA_endo*pShc - J80_k2*pShc_pTrkA_endo); J80 is "binding_pShc_to_pTrkA_endo";  // isVersionOf GO:0042169 GO:0051425
    J80_k1 = 10; J80_k2 = 0.2;
  J81: Shc_pTrkA_endo => pShc_pTrkA_endo; c1*J81_k*Shc_pTrkA_endo; J81 is "Shc_pTrkA_endo_phosphorylation";  // isVersionOf GO:0006468
    J81_k = 0.1;
  J82: Shc_pTrkA => pShc_pTrkA; c1*J82_k*Shc_pTrkA; J82 is "Shc_pTrkA_phosphorylation";  // isVersionOf GO:0006468
    J82_k = 0.1;
  J83: FRS2_pTrkA => pFRS2_pTrkA; c1*J83_k*FRS2_pTrkA; J83 is "pFRS2_pTrkA_phosphorylation";  // isVersionOf GO:0006468
    J83_k = 2;
  J84: pTrkA_endo + FRS2 -> FRS2_pTrkA_endo; c1*(J84_k1*pTrkA_endo*FRS2 - J84_k2*FRS2_pTrkA_endo); J84 is "binding_FRS2_to_pTrkA_endo";  // isVersionOf GO:0051425
    J84_k1 = 5; J84_k2 = 0.1;
  J85: pTrkA_endo + pFRS2 -> pFRS2_pTrkA_endo; c1*(J85_k1*pTrkA_endo*pFRS2 - J85_k2*pFRS2_pTrkA_endo); J85 is "binding_pFRS2_to_pTrkA_endo";  // isVersionOf GO:0051425
    J85_k1 = 5; J85_k2 = 0.1;
  J86: FRS2_pTrkA_endo => pFRS2_pTrkA_endo; c1*J86_k*FRS2_pTrkA_endo; J86 is "FRS2_pTrkA_endo_phosphorylation";  // isVersionOf GO:0006468
    J86_k = 2;
  J87: FRS2_pTrkA => $degradation + FRS2; c1*J87_k*FRS2_pTrkA; J87 is "FRS2_pTrkA_degradation";  // isVersionOf GO:0043241
    J87_k = 0.0022;
  J88: pFRS2_pTrkA => $degradation + pFRS2; c1*J88_k*pFRS2_pTrkA; J88 is "pFRS2_pTrkA_degradation";  // isVersionOf GO:0043241
    J88_k = 0.0022;
  J89: Shc_pTrkA => $degradation + Shc; c1*J89_k*Shc_pTrkA; J89 is "Shc_pTrkA_degradation";  // isVersionOf GO:0043241
    J89_k = 0.0022;
  J90: pShc_pTrkA => $degradation + pShc; c1*J90_k*pShc_pTrkA; J90 is "pShc_pTrkA_degradation";  // isVersionOf GO:0043241
    J90_k = 0.0022;
  J92: FRS2_pTrkA_endo => $degradation + FRS2; c1*J92_k*FRS2_pTrkA_endo; J92 is "FRS2_pTrkA_endo_degradation";  // isVersionOf GO:0043241
    J92_k = 0.00042;
  J93: Shc_pTrkA_endo => $degradation + Shc; c1*J93_k*Shc_pTrkA_endo; J93 is "Shc_pTrkA_endo_degradation";  // isVersionOf GO:0043241
    J93_k = 0.00042;
  J94: pShc_pTrkA_endo => $degradation + pShc; c1*J94_k*pShc_pTrkA_endo; J94 is "pShc_pTrkA_endo_degradation";  // isVersionOf GO:0043241
    J94_k = 0.00042;
  J95: SOS_Grb2 + pShc_pTrkA_endo -> Grb2_SOS_pShc_pTrkA_endo; c1*(J95_k1*SOS_Grb2*pShc_pTrkA_endo - J95_k2*Grb2_SOS_pShc_pTrkA_endo); J95 is "binding_Grb2_SOS_to_pShc_pTrkA_endo";  // isVersionOf GO:0005070
    J95_k1 = 10; J95_k2 = 0.2;
  J96: SOS_Grb2 + pShc_pTrkA -> Grb2_SOS_pShc_pTrkA; c1*(J96_k1*SOS_Grb2*pShc_pTrkA - J96_k2*Grb2_SOS_pShc_pTrkA); J96 is "binding_Grb2_SOS_to_pShc_pTrkA";  // isVersionOf GO:0005070
    J96_k1 = 10; J96_k2 = 0.2;
  J97: Grb2_SOS_pShc_pTrkA => Grb2_SOS_pShc_pTrkA_endo; c1*J97_k*Grb2_SOS_pShc_pTrkA; J97 is "Grb2_SOS_pShc_pTrkA_ubiquitination";  // isVersionOf GO:0016567
    J97_k = 0.00063;
  J98: Crk_C3G_pFRS2_pTrkA => Crk_C3G_pFRS2_pTrkA_endo; c1*J98_k*Crk_C3G_pFRS2_pTrkA; J98 is "Crk_C3G_pFRS2_pTrkA_ubiquitination";  // isVersionOf GO:0016567
    J98_k = 0.00063;
  J99: pFRS2_pTrkA => pFRS2_pTrkA_endo; c1*J99_k*pFRS2_pTrkA; J99 is "pFRS2_pTrkA_ubiquitination";  // isVersionOf GO:0016567
    J99_k = 0.00063;
  J100: FRS2_pTrkA => FRS2_pTrkA_endo; c1*J100_k*FRS2_pTrkA; J100 is "FRS2_pTrkA_ubiquitination";  // isVersionOf GO:0016567
    J100_k = 0.00063;
  J101: pShc_pTrkA => pShc_pTrkA_endo; c1*J101_k*pShc_pTrkA; J101 is "pShc_pTrkA_ubiquitination";  // isVersionOf GO:0016567
    J101_k = 0.00063;
  J102: Shc_pTrkA => Shc_pTrkA_endo; c1*J102_k*Shc_pTrkA; J102 is "Shc_pTrkA_ubiquitination";  // isVersionOf GO:0016567
    J102_k = 0.00063;
  J103: Crk_C3G + pFRS2_pTrkA -> Crk_C3G_pFRS2_pTrkA; c1*(J103_k1*Crk_C3G*pFRS2_pTrkA - J103_k2*Crk_C3G_pFRS2_pTrkA); J103 is "binding_Crk_C3G_to_pFRS2_pTrkA";  // isVersionOf GO:0042169
    J103_k1 = 1; J103_k2 = 0.2;
  J104: Crk_C3G + pFRS2_pTrkA_endo -> Crk_C3G_pFRS2_pTrkA_endo; c1*(J104_k1*Crk_C3G*pFRS2_pTrkA_endo - J104_k2*Crk_C3G_pFRS2_pTrkA_endo); J104 is "binding_Crk_C3G_to_pFRS2_pTrkA_endo";  // isVersionOf GO:0042169
    J104_k1 = 1; J104_k2 = 0.2;
  J105: Grb2_SOS_pShc + pTrkA -> Grb2_SOS_pShc_pTrkA; c1*(J105_k1*Grb2_SOS_pShc*pTrkA - J105_k2*Grb2_SOS_pShc_pTrkA); J105 is "binding_Grb2_SOS_pShc_to_pTrkA";  // isVersionOf GO:0051425 GO:0042169
    J105_k1 = 10; J105_k2 = 0.2;
  J106: Grb2_SOS_pShc + pTrkA_endo -> Grb2_SOS_pShc_pTrkA_endo; c1*(J106_k1*Grb2_SOS_pShc*pTrkA_endo - J106_k2*Grb2_SOS_pShc_pTrkA_endo); J106 is "binding_Grb2_SOS_pShc_to_pTrkA_endo";  // isVersionOf GO:0051425 GO:0042169
    J106_k1 = 10; J106_k2 = 0.2;
  J107: Crk_C3G_pFRS2_pTrkA => $degradation + pFRS2 + Crk_C3G; c1*J107_k*Crk_C3G_pFRS2_pTrkA; J107 is "Crk_C3G_pFRS2_pTrkA_degradation";  // isVersionOf GO:0043241
    J107_k = 0.0022;
  J108: Crk_C3G_pFRS2_pTrkA_endo => $degradation + Crk_C3G + pFRS2; c1*J108_k*Crk_C3G_pFRS2_pTrkA_endo; J108 is "Crk_C3G_pFRS2_pTrkA_endo_degradation";  // isVersionOf GO:0043241
    J108_k = 0.00042;
  J109: Grb2_SOS_pShc_pTrkA => $degradation + Grb2_SOS_pShc; c1*J109_k*Grb2_SOS_pShc_pTrkA; J109 is "Grb2_SOS_pShc_pTrkA_degradation";  // isVersionOf GO:0043241
    J109_k = 0.0022;
  J110: Grb2_SOS_pShc_pTrkA_endo => $degradation + Grb2_SOS_pShc; c1*J110_k*Grb2_SOS_pShc_pTrkA_endo; J110 is "Grb2_SOS_pShc_pTrkA_endo_degradation";  // isVersionOf GO:0043241
    J110_k = 0.00042;
  J112: pFRS2_pTrkA_endo => $degradation + pFRS2; J112_k*pFRS2_pTrkA_endo; J112 is "pFRS2_pTrkA_endo_degradation";  // isVersionOf GO:0043241
    J112_k = 0.00042;
  J113: $pro_TrkA -> NGFR; compartment*(J113_k1*pro_TrkA - J113_k2*NGFR); J113 is "form_NGFreceptor";  // isPartOf GO:0051396
    J113_k1 = 0.0008333; J113_k2 = 0.00027778;
  J115: Shc + dpEGFR_c_Cbl -> Shc_dpEGFR_c_Cbl; c1*(J115_k1*Shc*dpEGFR_c_Cbl - J115_k2*Shc_dpEGFR_c_Cbl); J115 is "binding_Shc_to_dpEGFR_c_Cbl";  // isVersionOf GO:0042169 GO:0051425
    J115_k1 = 10; J115_k2 = 0.2;
  J116: dpEGFR_c_Cbl + pShc -> pShc_dpEGFR_c_Cbl; c1*(J116_k1*dpEGFR_c_Cbl*pShc - J116_k2*pShc_dpEGFR_c_Cbl); J116 is "binding_pShc_to_dpEGFR_c_Cbl";  // isVersionOf GO:0042169 GO:0051425
    J116_k1 = 10; J116_k2 = 0.2;
  J117: pShc_dpEGFR_c_Cbl + SOS_Grb2 -> Grb2_SOS_pShc_dpEGFR_c_Cbl; c1*(J117_k1*pShc_dpEGFR_c_Cbl*SOS_Grb2 - J117_k2*Grb2_SOS_pShc_dpEGFR_c_Cbl); J117 is "binding_SOS_Grb2_to_pShc_dpEGFR_c_Cbl";  // isVersionOf GO:0005070
    J117_k1 = 10; J117_k2 = 0.2;
  J119: c_Cbl + Crk_C3G_pFRS2_dpEGFR -> Crk_C3G_pFRS2_dpEGFR_c_Cbl; c1*(J119_k1*c_Cbl*Crk_C3G_pFRS2_dpEGFR - J119_k2*Crk_C3G_pFRS2_dpEGFR_c_Cbl); J119 is "binding_c_Cbl_to_Crk_C3G_pFRS2_dpEGFR";  // isVersionOf GO:0031625
    J119_k1 = 0.5; J119_k2 = 0.2;
  J118: dpEGFR_c_Cbl + FRS2 -> FRS2_dpEGFR_c_Cbl; c1*(J118_k1*dpEGFR_c_Cbl*FRS2 - J118_k2*FRS2_dpEGFR_c_Cbl); J118 is "binding_FRS2_to_dpEGFR_c_Cbl";  // isVersionOf GO:0051425
    J118_k1 = 1; J118_k2 = 0.2;
  J120: dpEGFR_c_Cbl + pFRS2 -> pFRS2_dpEGFR_c_Cbl; c1*(J120_k1*dpEGFR_c_Cbl*pFRS2 - J120_k2*pFRS2_dpEGFR_c_Cbl); J120 is "binding_pFRS2_to_dpEGFR_c_Cbl";  // isVersionOf GO:0051425
    J120_k1 = 1; J120_k2 = 0.2;
  J121: Ras_GTP => Ras_GDP; c1*(J121_Vmax*Ras_GTP*pDok_RasGAP/(J121_Km1 + Ras_GTP)); J121 is "Ras_GTP_dephosphorylation";  // modifiers: pDok_RasGAP; isVersionOf ec-code:3.1.3.16 GO:0006470
    J121_Vmax = 10; J121_Km1 = 1;
  J122: Rap1_GTP => Rap1_GDP; c1*(J122_Vmax*Rap1_GTP*Rap1GAP/(J122_Km1 + Rap1_GTP)); J122 is "RAP1_GTP_dephosphorylation";  // modifiers: Rap1GAP; isVersionOf ec-code:3.1.3.16 GO:0006470
    J122_Vmax = 2; J122_Km1 = 1;
  J123: Dok => pDok; c1*(J123_Vmax*Dok*(pTrkA + Shc_pTrkA + pShc_pTrkA + Grb2_SOS_pShc_pTrkA + FRS2_pTrkA + pFRS2_pTrkA + Crk_C3G_pFRS2_pTrkA)/(J123_Km1 + Dok)); J123 is "Dok_phosphorylation";  // modifiers: pTrkA, Shc_pTrkA, pShc_pTrkA, Grb2_SOS_pShc_pTrkA, FRS2_pTrkA, pFRS2_pTrkA, Crk_C3G_pFRS2_pTrkA; isVersionOf GO:0006468
    J123_Vmax = 0.02; J123_Km1 = 0.1;
  J124: Grb2_SOS_pShc => pShc + pSOS_Grb2; c1*(J124_Vmax*Grb2_SOS_pShc*dppERK/(J124_Km1 + Grb2_SOS_pShc)); J124 is "Grb1_SOS_pShc_dissociation";  // modifiers: dppERK; isVersionOf GO:0043241
    J124_Vmax = 1; J124_Km1 = 25.641;
  J133: ERK + MEK -> MEK_ERK; c1*(J133_k1*ERK*MEK - J133_k2*MEK_ERK); J133 is "binding_MEK_to_ERK";  // isPartOf GO:0000187
    J133_k1 = 16.304; J133_k2 = 0.6;
  J134: ERK + pMEK -> pMEK_ERK; c1*(J134_k1*ERK*pMEK - J134_k2*pMEK_ERK); J134 is "binding_ERK_to_pMEK";  // isPartOf GO:0000187
    J134_k1 = 16.304; J134_k2 = 0.6;
  J135: ERK + ppMEK -> ppMEK_ERK; c1*(J135_k1*ERK*ppMEK - J135_k2*ppMEK_ERK); J135 is "binding_ERK_to_ppMEK";  // isPartOf GO:0000187
    J135_k1 = 16.304; J135_k2 = 0.6;
  J136: ppMEK_ERK => ppERK + ppMEK; c1*J136_k*ppMEK_ERK; J136 is "ppMEK_ERK_dissociation";  // isVersionOf GO:0043241
    J136_k = 0.15;
  J137: c_Raf_Ras_GTP => c_Raf + Ras_GDP; c1*(J137_Vmax*c_Raf_Ras_GTP*pDok_RasGAP/(J137_Km1 + c_Raf_Ras_GTP)); J137 is "c_Raf_Ras_GTP_dissociation";  // modifiers: pDok_RasGAP; isVersionOf GO:0043241
    J137_Vmax = 10; J137_Km1 = 1;
  J138: B_Raf_Ras_GTP => B_Raf + Ras_GDP; c1*(J138_Vmax*B_Raf_Ras_GTP*pDok_RasGAP/(J138_Km1 + B_Raf_Ras_GTP)); J138 is "B_Raf_Ras_GTP_dissociation";  // modifiers: pDok_RasGAP; isVersionOf GO:0043241
    J138_Vmax = 10; J138_Km1 = 1;
  J139: B_Raf_Rap1_GTP => B_Raf + Rap1_GDP; c1*(J139_Vmax*B_Raf_Rap1_GTP*Rap1GAP/(J139_Km1 + B_Raf_Rap1_GTP)); J139 is "B_Raf_Rap1_GTP_dissociation";  // modifiers: Rap1GAP; isVersionOf GO:0043241
    J139_Vmax = 2; J139_Km1 = 1;
  J140: c_Raf_Ras_GTP + MEK => c_Raf_Ras_GTP_MEK; c1*(J140_k1*c_Raf_Ras_GTP*MEK - J140_k2*c_Raf_Ras_GTP_MEK);  // isVersionOf GO:0019899
    J140_k1 = 15.625; J140_k2 = 2;
  J141: c_Raf_Ras_GTP + pMEK -> c_Raf_Ras_GTP_pMEK; c1*(J141_k1*c_Raf_Ras_GTP*pMEK - J141_k2*c_Raf_Ras_GTP_pMEK);  // isVersionOf GO:0019899
    J141_k1 = 15.625; J141_k2 = 2;
  J142: c_Raf_Ras_GTP + MEK_ERK -> c_Raf_Ras_GTP_MEK_ERK; c1*(J142_k1*c_Raf_Ras_GTP*MEK_ERK - J142_k2*c_Raf_Ras_GTP_MEK_ERK);  // isVersionOf GO:0019899
    J142_k1 = 15.625; J142_k2 = 2;
  J143: c_Raf_Ras_GTP + pMEK_ERK -> c_Raf_Ras_GTP_pMEK_ERK; c1*(J143_k1*c_Raf_Ras_GTP*pMEK_ERK - J143_k2*c_Raf_Ras_GTP_pMEK_ERK);  // isVersionOf GO:0019899
    J143_k1 = 15.625; J143_k2 = 2;
  J144: B_Raf_Ras_GTP + MEK -> B_Raf_Ras_GTP_MEK; c1*(J144_k1*B_Raf_Ras_GTP*MEK - J144_k2*B_Raf_Ras_GTP_MEK);  // isVersionOf GO:0019899
    J144_k1 = 6.25; J144_k2 = 0.8;
  J145: B_Raf_Ras_GTP + pMEK -> B_Raf_Ras_GTP_pMEK; c1*(J145_k1*B_Raf_Ras_GTP*pMEK - J145_k2*B_Raf_Ras_GTP_pMEK);  // isVersionOf GO:0019899
    J145_k1 = 6.25; J145_k2 = 0.8;
  J146: B_Raf_Ras_GTP + MEK_ERK -> B_Raf_Ras_GTP_MEK_ERK; c1*(J146_k1*B_Raf_Ras_GTP*MEK_ERK - J146_k2*B_Raf_Ras_GTP_MEK_ERK);  // isVersionOf GO:0019899
    J146_k1 = 6.25; J146_k2 = 0.8;
  J147: B_Raf_Ras_GTP + pMEK_ERK -> B_Raf_Ras_GTP_pMEK_ERK; c1*(J147_k1*B_Raf_Ras_GTP*pMEK_ERK - J147_k2*B_Raf_Ras_GTP_pMEK_ERK);  // isVersionOf GO:0019899
    J147_k1 = 6.25; J147_k2 = 0.8;
  J148: B_Raf_Rap1_GTP + MEK -> B_Raf_Rap1_GTP_MEK; c1*(J148_k1*B_Raf_Rap1_GTP*MEK - J148_k2*B_Raf_Rap1_GTP_MEK);  // isVersionOf GO:0019899
    J148_k1 = 9.375; J148_k2 = 1.2;
  J149: B_Raf_Rap1_GTP + pMEK -> B_Raf_Rap1_GTP_pMEK; c1*(J149_k1*B_Raf_Rap1_GTP*pMEK - J149_k2*B_Raf_Rap1_GTP_pMEK);  // isVersionOf GO:0019899
    J149_k1 = 9.375; J149_k2 = 1.2;
  J150: B_Raf_Rap1_GTP + MEK_ERK -> B_Raf_Rap1_GTP_MEK_ERK; c1*(J150_k1*B_Raf_Rap1_GTP*MEK_ERK - J150_k2*B_Raf_Rap1_GTP_MEK_ERK);  // isVersionOf GO:0019899
    J150_k1 = 9.375; J150_k2 = 1.2;
  J151: B_Raf_Rap1_GTP + pMEK_ERK -> B_Raf_Rap1_GTP_pMEK_ERK; c1*(J151_k1*B_Raf_Rap1_GTP*pMEK_ERK - J151_k2*B_Raf_Rap1_GTP_pMEK_ERK);  // isVersionOf GO:0019899
    J151_k1 = 9.375; J151_k2 = 1.2;
  J152: c_Raf_Ras_GTP_MEK => c_Raf_Ras_GTP + pMEK; c1*J152_k*c_Raf_Ras_GTP_MEK;  // isVersionOf GO:0004709
    J152_k = 0.5;
  J153: c_Raf_Ras_GTP_pMEK => c_Raf_Ras_GTP + ppMEK; c1*J153_k*c_Raf_Ras_GTP_pMEK;  // isVersionOf GO:0004709
    J153_k = 0.5;
  J154: c_Raf_Ras_GTP_MEK_ERK => c_Raf_Ras_GTP + pMEK_ERK; c1*J154_k*c_Raf_Ras_GTP_MEK_ERK;  // isVersionOf GO:0004709
    J154_k = 0.5;
  J155: c_Raf_Ras_GTP_pMEK_ERK => c_Raf_Ras_GTP + ppMEK_ERK; c1*J155_k*c_Raf_Ras_GTP_pMEK_ERK;  // isVersionOf GO:0004709
    J155_k = 0.5;
  J156: B_Raf_Ras_GTP_MEK => B_Raf_Ras_GTP + pMEK; c1*J156_k*B_Raf_Ras_GTP_MEK;  // isVersionOf GO:0004709
    J156_k = 0.2;
  J157: B_Raf_Ras_GTP_pMEK => B_Raf_Ras_GTP + ppMEK; c1*J157_k*B_Raf_Ras_GTP_pMEK;  // isVersionOf GO:0004709
    J157_k = 0.2;
  J158: B_Raf_Ras_GTP_MEK_ERK => B_Raf_Ras_GTP + pMEK_ERK; c1*J158_k*B_Raf_Ras_GTP_MEK_ERK;  // isVersionOf GO:0004709
    J158_k = 0.2;
  J159: B_Raf_Ras_GTP_pMEK_ERK => B_Raf_Ras_GTP + ppMEK_ERK; c1*J159_k*B_Raf_Ras_GTP_pMEK_ERK;  // isVersionOf GO:0004709
    J159_k = 0.2;
  J160: B_Raf_Rap1_GTP_MEK => B_Raf_Rap1_GTP + pMEK; c1*J160_k*B_Raf_Rap1_GTP_MEK;  // isVersionOf GO:0004709
    J160_k = 0.3;
  J161: B_Raf_Rap1_GTP_pMEK => B_Raf_Rap1_GTP + ppMEK; c1*J161_k*B_Raf_Rap1_GTP_pMEK;  // isVersionOf GO:0004709
    J161_k = 0.3;
  J162: B_Raf_Rap1_GTP_MEK_ERK => B_Raf_Rap1_GTP + pMEK_ERK; c1*J162_k*B_Raf_Rap1_GTP_MEK_ERK;  // isVersionOf GO:0004709
    J162_k = 0.3;
  J163: B_Raf_Rap1_GTP_pMEK_ERK => B_Raf_Rap1_GTP + ppMEK_ERK; c1*J163_k*B_Raf_Rap1_GTP_pMEK_ERK;  // isVersionOf GO:0004709
    J163_k = 0.3;
  J164: Crk_C3G_pFRS2_dpEGFR_c_Cbl_ubiq => c_Cbl + pFRS2 + Crk_C3G; c1*J164_k*Crk_C3G_pFRS2_dpEGFR_c_Cbl_ubiq;  // isVersionOf GO:0043241
    J164_k = 0.001;
  J165: MKP3 + dppERK => dppERK_MKP3; c1*(J165_k1*MKP3*dppERK - J165_k2*dppERK_MKP3);  // isPartOf GO:0000188
    J165_k1 = 15; J165_k2 = 0.24;
  J166: MKP3 + ppERK -> ppERK_MKP3; c1*(J166_k1*MKP3*ppERK - J166_k2*ppERK_MKP3);  // isPartOf GO:0000188
    J166_k1 = 15; J166_k2 = 0.24;
  J167: ppERK_MKP3 => ERK + MKP3; c1*J167_k*ppERK_MKP3;  // isPartOf GO:0043241; isPartOf GO:0000188
    J167_k = 0.06;
  J168: dppERK_MKP3 => ppERK + ERK + MKP3; c1*J168_k*dppERK_MKP3;  // isPartOf GO:0000188; isPartOf GO:0043241
    J168_k = 0.06;

  // Unit definitions:
  unit substance = 1e-6 mole; substance is "microMole";
end
