// SBML level 2 version 4

model Kinetic_modelling_of_Amadori_degradation()
  // Martins2003_AmadoriDegradation
  // This a model from the article:
  // Kinetic modelling of Amadori N-(1-deoxy-D-fructos-1-yl)-glycine degradation pathways. Part II--kinetic analysis.
  // Martins SI, Van Boekel MA. Carbohydr Res2003 Jul;338(16):1665-78. 12873422,
  // Abstract:
  // A kinetic model for N-(1-deoxy-Image -fructos-1-yl)-glycine (DFG) thermal decomposition was proposed. Two temperatures (100 and 120 °C) and two pHs (5.5 and 6.8) were studied. The measured responses were DFG, 3-deoxyosone, 1-deoxyosone, methylglyoxal, acetic acid, formic acid, glucose, fructose, mannose and melanoidins. For each system the model parameters, the rate constants, were estimated by non-linear regression, via multiresponse modelling. The determinant criterion was used as the statistical fit criterion. Model discrimination was performed by both chemical insight and statistical tests (Posterior Probability and Akaike criterion). Kinetic analysis showed that at lower pH DFG 1,2-enolization is favoured whereas with increasing pH 2,3-enolization becomes a more relevant degradation pathway. The lower amount observed of 1-DG is related with its high reactivity. It was shown that acetic acid, a main degradation product from DFG, was mainly formed through 1-DG degradation. Also from the estimated parameters 3-DG was found to be the main precursor in carbohydrate fragments formation, responsible for colour formation. Some indication was given that as the reaction proceeded other compounds besides DFG become reactants themselves with the formation among others of methylglyoxal. The multiresponse kinetic analysis was shown to be both helpful in deriving relevant kinetic parameters as well as in obtaining insight into the reaction mechanism.
  // Model was intially tested in Jarnac.
  // The model was recently updated on 9th July 2010. The reference publication has reported two models M1 and M2, where the parameter values are given for conditions A) 100oC, pH5.5, B) 120oC, pH5.5, C) 100oC, pH6.8 and D) 120oC, pH6.8.
  // This model corresponds to the model M2 with condition 100oC, pH6.8
  // The model reproduces Figure 6 of the reference publication. The curation figure was recently added
  // This model originates from BioModels Database: A Database of Annotated Published Models. It is copyright (c) 2005-2010 The BioModels Team.
  // To the extent possible under law, all copyright and related or neighbouring rights to this encoded model have been dedicated to the public domain worldwide. Please refer to CC0 Public Domain Dedication for more information.
  // In summary, you are entitled to use this encoded model in absolutely any manner you deem suitable, verbatim, or with modification, alone or embedded it in a larger context, redistribute it, commercially or not, in a restricted way or not..
  // To cite BioModels Database, please use Le Novère N., Bornstein B., Broicher A., Courtot M., Donizelli M., Dharuri H., Li L., Sauro H., Schilstra M., Shapiro B., Snoep J.L., Hucka M. (2006) BioModels Database: A Free, Centralized Database of Curated, Published, Quantitative Kinetic Models of Biochemical and Cellular Systems Nucleic Acids Res., 34: D689-D691.
  // biomodels.db:BIOMD0000000050
  // biomodels.db:MODEL7981660691
  // isDescribedBy pubmed:12873422
  // isVersionOf GO:0009056
  // occursIn taxonomy:131567

  // Compartments:
  compartment compartment = 1;

  // Species:
  species DFG in compartment = 9;
  species E1 in compartment = 0;
  species E2 in compartment = 0;
  species Cn in compartment = 0;  // isVersionOf CHEBI:23008
  species Gly in compartment = 0;  // CHEBI:15428 kegg.compound:C00037
  species _3DG in compartment = 0;
  species FA in compartment = 0;  // CHEBI:30751 kegg.compound:C00058
  species _1DG in compartment = 0;
  species AA in compartment = 0;  // CHEBI:15366 kegg.compound:C00033
  species Man in compartment = 0;  // CHEBI:14575 kegg.compound:C00159
  species Glu in compartment = 0;  // CHEBI:17234 kegg.compound:C00293
  species MG in compartment = 0;  // CHEBI:17158 kegg.compound:C00546
  species Mel in compartment = 0;
  species Fru in compartment = 0;  // CHEBI:28757 kegg.compound:C01496

  // Reactions:
  v1: DFG => E1; k1*DFG;
    k1 = 0.0057;
  v2: DFG => E2; k2*DFG;
    k2 = 0.0156;
  v3: DFG => Gly + Cn; k3*DFG;
    k3 = 0.0155;
  v4: E1 => Gly + _3DG; k4*E1;
    k4 = 0.0794;
  v5: _3DG => Cn; k5*_3DG;
    k5 = 0.0907;
  v6: _3DG => FA; k6*_3DG;
    k6 = 0.0274;
  v7: E2 => Gly + _1DG; k7*E2;
    k7 = 0.2125;
  v8: _1DG => Cn; k8*_1DG;
    k8 = 0;
  v9: _1DG => AA; k9*_1DG;
    k9 = 1.9085;
  v10: E1 => Gly + Man; k10*E1;
    k10 = 0.0707;
  v11: E1 => Gly + Glu; k11*E1;
    k11 = 0.1131;
  v12: Man => Glu; k12*Man;
    k12 = 0.0008;
  v13: Glu => _3DG; k13*Glu;
    k13 = 0.0022;
  v14: Gly + Cn => Mel; k14*Cn*Gly;
    k14 = 0.0034;
  v15: Cn => AA + FA + MG; k15*Cn;
    k15 = 0.0159;
  v16: E2 => Gly + Fru; k16*E2;
    k16 = 0.0134;

  // Unit definitions:
  unit substance = 1e-6 mole; substance is "micromole (default)";
  unit time = 60 second; time is "minute (default)";
end
