// SBML level 2 version 1

function L_PFK(L, CiATP, KiATP, CAMP, KAMP, CF26BP, KF26BP, CF16BP, KF16BP, AT, AM, F16, F26)
  L*((1 + CiATP*(AT/KiATP))/(1 + AT/KiATP))^2*((1 + CAMP*(AM/KAMP))/(1 + AM/KAMP))^2*((1 + CF26BP*F26/KF26BP + CF16BP*F16/KF16BP)/(1 + F26/KF26BP + F16/KF16BP))^2;
end

function R_PFK(KmF6P, KmATP, g, AT, F6)
  1 + F6/KmF6P + AT/KmATP + g*(F6/KmF6P)*(AT/KmATP);
end

function T_PFK(CATP, KmATP, AT)
  1 + CATP*(AT/KmATP);
end

model Teusink2000_Glycolysis()
  // Can yeast glycolysis be understood in terms of in vitro kinetics of the constituent enzymes? Testing biochemistry.
  // Teusink,B et al.: Eur J Biochem 2000 Sep;267(17):5313-29.
  // The model reproduces the steady-state fluxes and metabolite concentrations of the branched model as given in Table 4 of the paper. It is derived from the model on JWS online, but has the ATP consumption in the succinate branch with the same stoichiometrie as in the publication. The model was successfully tested on copasi v.4.4(build 26).
  // For Vmax values, please note that there is a conversion factor of approx. 270 to convert from U/mg-protein as shown in Table 1 of the paper to mmol/(min*L_cytosol). The equilibrium constant for the ADH reaction in the paper is given for the reverse reaction (Keq = 1.45*10 4 ). The value used in this model is for the forward reaction: 1/Keq = 6.9*10 -5 .
  // Vmax parameters values used (in [mM/min] except VmGLT):
  // VmGLT 97.264 mmol/min
  // VmGLK 226.45
  // VmPGI 339.667
  // VmPFK 182.903
  // VmALD 322.258
  // VmGAPDH_f 1184.52
  // VmGAPDH_r 6549.68
  // VmPGK 1306.45
  // VmPGM 2525.81
  // VmENO 365.806
  // VmPYK 1088.71
  // VmPDC 174.194
  // VmG3PDH 70.15
  // The result of the G6P steady state concentration (marked in red) differs slightly from the one given in table 4. of the publication
  // Results for steady state:
  // orig. article this model
  // Fluxes[mM/min]
  // Glucose 88 88
  // Ethanol 129 129
  // Glycogen 6 6
  // Trehalose 4.8 4.8 (G6P flux through trehalose branch)
  // Glycerol 18.2 18.2
  // Succinate 3.6 3.6
  // Conc.[mM]
  // G6P 1.07 1.03
  // F6P 0.11 0.11
  // F1,6P 0.6 0.6
  // DHAP 0.74 0.74
  // 3PGA 0.36 0.36
  // 2PGA 0.04 0.04
  // PEP 0.07 0.07
  // PYR 8.52 8.52
  // AcAld 0.17 0.17
  // ATP 2.51 2.51
  // ADP 1.29 1.29
  // AMP 0.3 0.3
  // NAD 1.55 1.55
  // NADH 0.04 0.04
  // Authors of the publication also mentioned a few misprints in the original article:
  // in the kinetic law for ADH :
  // the species a should denote NAD and b Ethanol
  // the last term in the equation should read bpq /( K ib K iq K p )
  // in the kinetic law for PFK :
  // R = 1 + λ 1 + λ 2 + g r λ 1 λ 2
  // equation L should read: L = L0*(..) 2 *(..) 2 *(..) 2 not L = L0*(..) 2 *(..) 2 *(..)
  // To make the model easier to curate, the species ATP , ADP and AMP were added. These are calculated via assignment rules from the active phosphate species, P , and the sum of all AXP , SUM_P .
  // To the extent possible under law, all copyright and related or neighbouring rights to this encoded model have been dedicated to the public domain worldwide. Please refer to CC0 Public Domain Dedication for more information.
  // In summary, you are entitled to use this encoded model in absolutely any manner you deem suitable, verbatim, or with modification, alone or embedded it in a larger context, redistribute it, commercially or not, in a restricted way or not.
  // To cite BioModels Database, please use: Li C, Donizelli M, Rodriguez N, Dharuri H, Endler L, Chelliah V, Li L, He E, Henry A, Stefan MI, Snoep JL, Hucka M, Le Novère N, Laibe C (2010) BioModels Database: An enhanced, curated and annotated resource for published quantitative kinetic models. BMC Syst Biol., 4:92.

  // Compartments:
  compartment extracellular = 1;
  compartment cytosol in extracellular = 1;

  // Species:
  species GLCi in cytosol = 0.087; GLCi is "Glucose in Cytosol";
  species G6P in cytosol = 2.45; G6P is "Glucose 6 Phosphate";
  species F6P in cytosol = 0.62; F6P is "Fructose 6 Phosphate";
  species F16P in cytosol = 5.51; F16P is "Fructose-1,6 bisphosphate";
  species TRIO in cytosol = 0.96; TRIO is "Triose-phosphate";
  species BPG in cytosol = 0; BPG is "1,3-bisphosphoglycerate";
  species P3G in cytosol = 0.9; P3G is "3-phosphoglycerate";
  species P2G in cytosol = 0.12; P2G is "2-phosphoglycerate";
  species PEP in cytosol = 0.07; PEP is "Phosphoenolpyruvate";
  species PYR in cytosol = 1.85; PYR is "Pyruvate";
  species ACE in cytosol = 0.17; ACE is "Acetaldehyde";
  species P in cytosol = 6.31; P is "High energy phosphates";
  species NAD in cytosol = 1.2;
  species NADH in cytosol = 0.39;
  species $Glyc in cytosol = 0; Glyc is "Glycogen";
  species $Trh in cytosol = 0; Trh is "Trehalose";
  species $CO2 in cytosol = 1;
  species $SUCC in cytosol = 0; SUCC is "Succinate";
  species $GLCo in extracellular = 50; GLCo is "Extracellular Glucose";
  species $ETOH in cytosol = 50; ETOH is "Ethanol";
  species $GLY in cytosol = 0.15; GLY is "Glycerol";
  species ATP in cytosol; ATP is "ATP concentration";
  species ADP in cytosol; ADP is "ADP concentration";
  species AMP in cytosol; AMP is "AMP concentration";
  species $SUM_P in cytosol = 4.1; SUM_P is "sum of AXP conc";
  species $F26BP in cytosol = 0.02; F26BP is "F2,6P";

  // Parameters:
  gR = 5.12 dimensionless;
  KmPFKF6P = 0.1 mM;
  KmPFKATP = 0.71 mM;
  Lzero = 0.66 dimensionless;
  CiPFKATP = 100 dimensionless;
  KiPFKATP = 0.65 mM;
  CPFKAMP = 0.0845 dimensionless;
  KPFKAMP = 0.0995 mM;
  CPFKF26BP = 0.0174 dimensionless;
  KPFKF26BP = 0.000682 mM;
  CPFKF16BP = 0.397 dimensionless;
  KPFKF16BP = 0.111 mM;
  CPFKATP = 3 dimensionless;
  KeqAK = 0.45 dimensionless; KeqAK is "AK eq constant";
  KeqTPI = 0.045 dimensionless; KeqTPI is "TPI eq constant";

  // Assignment rules:
  ADP := (SUM_P - (P^2*(1 - 4*KeqAK) + 2*SUM_P*P*(4*KeqAK - 1) + SUM_P^2)^0.5)/(1 - 4*KeqAK);
  ATP := (P - ADP)/2;
  AMP := SUM_P - ATP - ADP;

  // Reactions:
  vGLK: GLCi + P -> G6P; cytosol*VmGLK/(KmGLKGLCi*KmGLKATP)*(GLCi*ATP - G6P*ADP/KeqGLK)/((1 + GLCi/KmGLKGLCi + G6P/KmGLKG6P)*(1 + ATP/KmGLKATP + ADP/KmGLKADP)); vGLK is "Hexokinase";  // modifiers: ATP, ADP
    VmGLK = 226.452 mMpermin; KmGLKGLCi = 0.08 mM; KmGLKATP = 0.15 mM; KeqGLK = 3800 dimensionless; KmGLKG6P = 30 mM; KmGLKADP = 0.23 mM;
  vPGI: G6P -> F6P; cytosol*VmPGI_2/KmPGIG6P_2*(G6P - F6P/KeqPGI_2)/(1 + G6P/KmPGIG6P_2 + F6P/KmPGIF6P_2); vPGI is "Glucose-6-phosphate isomerase";
    VmPGI_2 = 339.677 mMpermin; KmPGIG6P_2 = 1.4 mM; KeqPGI_2 = 0.314 dimensionless; KmPGIF6P_2 = 0.3 mM;
  vGLYCO: G6P + P => $Glyc; cytosol*KGLYCOGEN_3; vGLYCO is "Glycogen synthesis";
    KGLYCOGEN_3 = 6 mMpermin;
  vTreha: 2 G6P + P => $Trh; cytosol*KTREHALOSE; vTreha is "Trehalose 6-phosphate synthase";
    KTREHALOSE = 2.4 mMpermin;
  vPFK: F6P + P => F16P; cytosol*VmPFK*gR*(F6P/KmPFKF6P)*(ATP/KmPFKATP)*R_PFK(KmPFKF6P, KmPFKATP, gR, ATP, F6P)/(R_PFK(KmPFKF6P, KmPFKATP, gR, ATP, F6P)^2 + L_PFK(Lzero, CiPFKATP, KiPFKATP, CPFKAMP, KPFKAMP, CPFKF26BP, KPFKF26BP, CPFKF16BP, KPFKF16BP, ATP, AMP, F16P, F26BP)*T_PFK(CPFKATP, KmPFKATP, ATP)^2); vPFK is "Phosphofructokinase";  // modifiers: AMP, ATP, F26BP
    VmPFK = 182.903 mMpermin;
  vALD: F16P -> 2 TRIO; cytosol*VmALD/KmALDF16P*(F16P - KeqTPI/(1 + KeqTPI)*TRIO*(1/(1 + KeqTPI))*TRIO/KeqALD)/(1 + F16P/KmALDF16P + KeqTPI/(1 + KeqTPI)*TRIO/KmALDGAP + 1/(1 + KeqTPI)*TRIO/KmALDDHAP + KeqTPI/(1 + KeqTPI)*TRIO*(1/(1 + KeqTPI))*TRIO/(KmALDGAP*KmALDDHAP) + F16P*(KeqTPI/(1 + KeqTPI))*TRIO/(KmALDGAPi*KmALDF16P)); vALD is "Aldolase";
    VmALD = 322.258 mMpermin; KmALDF16P = 0.3 mM; KeqALD = 0.069 dimensionless; KmALDGAP = 2 mM; KmALDDHAP = 2.4 mM; KmALDGAPi = 10 mM;
  vGAPDH: TRIO + NAD -> BPG + NADH; cytosol*(VmGAPDHf*(KeqTPI/(1 + KeqTPI))*TRIO*NAD/(KmGAPDHGAP*KmGAPDHNAD) - VmGAPDHr*BPG*NADH/(KmGAPDHBPG*KmGAPDHNADH))/((1 + KeqTPI/(1 + KeqTPI)*TRIO/KmGAPDHGAP + BPG/KmGAPDHBPG)*(1 + NAD/KmGAPDHNAD + NADH/KmGAPDHNADH)); vGAPDH is "Glyceraldehyde 3-phosphate dehydrogenase";
    VmGAPDHf = 1184.52 mMpermin; KmGAPDHGAP = 0.21 mM; KmGAPDHNAD = 0.09 mM; VmGAPDHr = 6549.8 mMpermin; KmGAPDHBPG = 0.0098 mM; KmGAPDHNADH = 0.06 mM;
  vPGK: BPG -> P3G + P; cytosol*VmPGK/(KmPGKP3G*KmPGKATP)*(KeqPGK*BPG*ADP - P3G*ATP)/((1 + BPG/KmPGKBPG + P3G/KmPGKP3G)*(1 + ATP/KmPGKATP + ADP/KmPGKADP)); vPGK is "Phosphoglycerate kinase";  // modifiers: ATP, ADP
    VmPGK = 1306.45 mMpermin; KmPGKP3G = 0.53 mM; KmPGKATP = 0.3 mM; KeqPGK = 3200 dimensionless; KmPGKBPG = 0.003 mM; KmPGKADP = 0.2 mM;
  vPGM: P3G -> P2G; cytosol*VmPGM/KmPGMP3G*(P3G - P2G/KeqPGM)/(1 + P3G/KmPGMP3G + P2G/KmPGMP2G); vPGM is "Phosphoglycerate mutase";
    VmPGM = 2525.81 mMpermin; KmPGMP3G = 1.2 mM; KeqPGM = 0.19 dimensionless; KmPGMP2G = 0.08 mM;
  vENO: P2G -> PEP; cytosol*VmENO/KmENOP2G*(P2G - PEP/KeqENO)/(1 + P2G/KmENOP2G + PEP/KmENOPEP); vENO is "Enolase";
    VmENO = 365.806 mMpermin; KmENOP2G = 0.04 mM; KeqENO = 6.7 dimensionless; KmENOPEP = 0.5 mM;
  vPYK: PEP -> PYR + P; cytosol*VmPYK/(KmPYKPEP*KmPYKADP)*(PEP*ADP - PYR*ATP/KeqPYK)/((1 + PEP/KmPYKPEP + PYR/KmPYKPYR)*(1 + ATP/KmPYKATP + ADP/KmPYKADP)); vPYK is "Pyruvate kinase";  // modifiers: ATP, ADP
    VmPYK = 1088.71 mMpermin; KmPYKPEP = 0.14 mM; KmPYKADP = 0.53 mM; KeqPYK = 6500 dimensionless; KmPYKPYR = 21 mM; KmPYKATP = 1.5 mM;
  vPDC: PYR => ACE + $CO2; cytosol*VmPDC*(PYR^nPDC/KmPDCPYR^nPDC)/(1 + PYR^nPDC/KmPDCPYR^nPDC); vPDC is "Pyruvate decarboxylase";
    VmPDC = 174.194 mMpermin; nPDC = 1.9 dimensionless; KmPDCPYR = 4.33 mM;
  vSUC: 2 ACE + 3 NAD + 4 P => 3 NADH + $SUCC; cytosol*KSUCC*ACE; vSUC is "Succinate synthesis";
    KSUCC = 21.4;
  vGLT: $GLCo -> GLCi; VmGLT/KmGLTGLCo*(GLCo - GLCi/KeqGLT)/(1 + GLCo/KmGLTGLCo + GLCi/KmGLTGLCi + 0.91*GLCo*GLCi/(KmGLTGLCo*KmGLTGLCi)); vGLT is "Glucose transport";
    VmGLT = 97.264 mmolepermin; KmGLTGLCo = 1.1918 mM; KeqGLT = 1 mM; KmGLTGLCi = 1.1918 mM;
  vADH: ACE + NADH -> NAD + $ETOH; -cytosol*(VmADH/(KiADHNAD*KmADHETOH)*(NAD*ETOH - NADH*ACE/KeqADH)/(1 + NAD/KiADHNAD + KmADHNAD*ETOH/(KiADHNAD*KmADHETOH) + KmADHNADH*ACE/(KiADHNADH*KmADHACE) + NADH/KiADHNADH + NAD*ETOH/(KiADHNAD*KmADHETOH) + KmADHNADH*NAD*ACE/(KiADHNAD*KiADHNADH*KmADHACE) + KmADHNAD*ETOH*NADH/(KiADHNAD*KmADHETOH*KiADHNADH) + NADH*ACE/(KiADHNADH*KmADHACE) + NAD*ETOH*ACE/(KiADHNAD*KmADHETOH*KiADHACE) + ETOH*NADH*ACE/(KiADHETOH*KiADHNADH*KmADHACE))); vADH is "Alcohol dehydrogenase";
    VmADH = 810 mMpermin; KiADHNAD = 0.92 mM; KmADHETOH = 17 mM; KeqADH = 6.9e-5 dimensionless; KmADHNAD = 0.17 mM; KmADHNADH = 0.11 mM; KiADHNADH = 0.031 mM; KmADHACE = 1.11 mM; KiADHACE = 1.1 mM; KiADHETOH = 90 mM;
  vG3PDH: TRIO + NADH => NAD + $GLY; cytosol*VmG3PDH/(KmG3PDHDHAP*KmG3PDHNADH)*(1/(1 + KeqTPI)*TRIO*NADH - GLY*NAD/KeqG3PDH)/((1 + 1/(1 + KeqTPI)*TRIO/KmG3PDHDHAP + GLY/KmG3PDHGLY)*(1 + NADH/KmG3PDHNADH + NAD/KmG3PDHNAD)); vG3PDH is "Glycerol 3-phosphate dehydrogenase";
    VmG3PDH = 70.15 mMpermin; KmG3PDHDHAP = 0.4 mM; KmG3PDHNADH = 0.023 mM; KeqG3PDH = 4300 dimensionless; KmG3PDHGLY = 1 mM; KmG3PDHNAD = 0.93 mM;
  vATP: P -> ; cytosol*KATPASE*ATP; vATP is "ATPase activity";  // modifiers: ATP
    KATPASE = 33.7 permin;

  // Unit definitions:
  unit substance = 1e-3 mole; substance is "millimole";
  unit time = 60 second; time is "minute";
  unit mM = 1e-3 mole / litre;
  unit mMpermin = 1e-3 mole / (litre * 60 second);
  unit permin = 1 / (60 second);
  unit mmolepermin = 1e-3 mole / (60 second);
end
