// SBML level 2 version 4

model Yildirim2003_Lac_operon()
  // Yildirim2003_Lac_Operon
  // This a model from the article:
  // Feedback regulation in the lactose operon: a mathematical modeling study and comparison with experimental data.
  // Yildirim N, Mackey MC Biophys. J.2003 12719218,
  // Abstract:
  // A mathematical model for the regulation of induction in the lac operon in Escherichia coli is presented. This model takes into account the dynamics of the permease facilitating the internalization of external lactose; internal lactose; beta-galactosidase, which is involved in the conversion of lactose to allolactose, glucose and galactose; the allolactose interactions with the lac repressor; and mRNA. The final model consists of five nonlinear differential delay equations with delays due to the transcription and translation process. We have paid particular attention to the estimation of the parameters in the model. We have tested our model against two sets of beta-galactosidase activity versus time data, as well as a set of data on beta-galactosidase activity during periodic phosphate feeding. In all three cases we find excellent agreement between the data and the model predictions. Analytical and numerical studies also indicate that for physiologically realistic values of the external lactose and the bacterial growth rate, a regime exists where there may be bistable steady-state behavior, and that this corresponds to a cusp bifurcation in the model dynamics.
  // The model reproduces the time profile of beta-galactosidase activity as shown in Fig 3 of the paper. The delay functions for transcription (M) and translation (B and P) have been implemented by introducing intermediates ( I1, I2 and I3) in the reaction scheme which then give their respective products (I1-> M, I2 ->B and I3 ->P) after an appropriate length of time. The steady state values, attained upon simulation of model equations, for Allolactose (A), mRNA (M), beta-galactosidase (B), Lactose (L), and Permease (P) match with those predicted by the paper. The model was successfully tested on Jarnac, MathSBML and COPASI
  // This model originates from BioModels Database: A Database of Annotated Published Models (http://www.ebi.ac.uk/biomodels/). It is copyright (c) 2005-2010 The BioModels.net Team.
  // To the extent possible under law, all copyright and related or neighbouring rights to this encoded model have been dedicated to the public domain worldwide. Please refer to CC0 Public Domain Dedication for more information.
  // In summary, you are entitled to use this encoded model in absolutely any manner you deem suitable, verbatim, or with modification, alone or embedded it in a larger context, redistribute it, commercially or not, in a restricted way or not..
  // To cite BioModels Database, please use: Li C, Donizelli M, Rodriguez N, Dharuri H, Endler L, Chelliah V, Li L, He E, Henry A, Stefan MI, Snoep JL, Hucka M, Le Novère N, Laibe C (2010) BioModels Database: An enhanced, curated and annotated resource for published quantitative kinetic models. BMC Syst Biol., 4:92.
  // biomodels.db:BIOMD0000000065
  // biomodels.db:MODEL6624248569
  // isDescribedBy pubmed:12719218
  // isVersionOf GO:0045990
  // occursIn taxonomy:562

  // Compartments:
  compartment cell = 1;  // GO:0005623

  // Species:
  species M in cell = 0.000626; M is "mRNA";
  species B in cell = 0; B is "Betagalactosidase";  // uniprot:P00722
  species A in cell = 0.038; A is "allolactose";  // hasPart CHEBI:36229
  species L in cell = 0.372; L is "lactose_internal";  // CHEBI:17716 kegg.compound:C00243
  species P in cell = 0.0149; P is "permease";  // uniprot:P02920
  species I1 in cell = 0; I1 is "PartialmRNA";
  species I2 in cell = 0; I2 is "PartialBetagalactosidase";
  species I3 in cell = 0; I3 is "PartialPermease";
  species $L_e in cell = 0.08; L_e is "External_Lactose";  // CHEBI:17716 kegg.compound:C00243

  // Parameters:
  mu = 0.0226;
  gamma_M = 0.411;
  gamma_B = 0.000833;
  gamma_A = 0.52;
  gamma_0 = 7.25e-7;
  K = 7200;
  alpha_M = 0.000997;
  tau_B = 2;
  alpha_A = 17600;
  K_L1 = 1.81;
  alpha_B = 0.0166;
  K_A = 1.95;
  beta_A = 21500;
  tau_M = 0.1;
  K_L = 0.97;
  gamma_L = 0;
  gamma_P = 0.65;
  alpha_L = 2880;
  alpha_P = 10;
  tau_P = 0.83;
  beta_L1 = 2650;
  K_Le = 0.26;
  K_1 = 25200;

  // Reactions:
  r_m1: => M; cell*gamma_0; r_m1 is "Basal_mRNA_Synthesis";  // isVersionOf GO:0006351
  r_m2: M => ; cell*M*(gamma_M + mu); r_m2 is "mRNA_Degradation";  // GO:0006402
  r_m3_i1: I1 => M; cell*I1/tau_M; r_m3_i1 is "allolactose_controlled_mRNA_synthesis";  // isVersionOf GO:0009299
  r_i1: => I1; cell*alpha_M*((K_1*exp(mu*tau_M*(-2))*A^2 + 1)/(K + K_1*exp(-2*mu*tau_M)*A^2)); r_i1 is "allolactose_controlled_partial_mRNA_synthesis";  // modifiers: A; isVersionOf GO:0009299
  r_b1: B => ; cell*B*(gamma_B + mu); r_b1 is "Beta_galactosidase_Degradation";  // isVersionOf GO:0044257
  r_b2_i2: I2 => B; cell*I2/tau_B; r_b2_i2 is "Beta_galactosidase_synthesis";  // isVersionOf GO:0006412
  r_i2: => I2; cell*alpha_B*M*exp(-(mu*tau_B)); r_i2 is "Partial_Beta_galactosidase_synthesis";  // modifiers: M; isVersionOf GO:0006412
  r_a1: A => ; cell*A*(gamma_A + mu); r_a1 is "Basal_Allolactose_Degradation";  // isVersionOf GO:0046352
  r_a2: A => ; cell*beta_A*B*(A/(K_A + A)); r_a2 is "Betagalactosidase_mediated_Allolactose_Degradation";  // modifiers: B; isVersionOf GO:0046352
  r_a3_l1: L => A; cell*alpha_A*B*(L/(K_L + L)); r_a3_l1 is "Beta_galactosidase_reaction";  // modifiers: B; ec-code:3.2.1.108 GO:0004565
  r_l2: L => ; cell*L*(gamma_L + mu); r_l2 is "lactose_degradation";  // GO:0005990
  r_l3: L => ; cell*beta_L1*P*(L/(K_L1 + L)); r_l3 is "Lactose_transport_out";  // modifiers: P; GO:0015767 GO:0015155
  r_l4: => L; cell*alpha_L*P*(L_e/(K_Le + L_e)); r_l4 is "Lactose_transport_in";  // modifiers: P, L_e; GO:0015767 GO:0015155
  r_p1: P => ; cell*P*(gamma_P + mu); r_p1 is "permease_degradation";  // isVersionOf GO:0044257
  r_p2_i3: I3 => P; cell*I3/(tau_B + tau_P); r_p2_i3 is "permease_synthesis";  // isVersionOf GO:0006412
  r_i3: => I3; cell*alpha_P*M*exp(-1*mu*(tau_B + tau_P)); r_i3 is "partial_permease_synthesis";  // modifiers: M; isVersionOf GO:0006412

  // Unit definitions:
  unit time = 60 second; time is "minute";
  unit substance = 1e-3 mole; substance is "millimoles";
end
