// SBML level 2 version 1

model Chassagnole2001_Threonine_Synthesis()
  // .
  // .
  // .
  // SBML level 2 code generated for the JWS Online project by Jacky Snoep using PySCeS
  // Run this model online at http://jjj.biochem.sun.ac.za
  // To cite JWS Online please refer to: Olivier, B.G. and Snoep, J.L. (2004) Web-based modelling using JWS Online, Bioinformatics, 20:2143-2144
  // .
  // .
  // .
  // .
  // .
  // .
  // Biomodels Curation: The model reproduces Fig 2f of the paper. The Vmax values for different reactions are obtained by multiplying the specific activites given in Table 3 of the paper with the protein concentration and an assay correction factor that was provided by the authors. The protein concentration is 202 mg/litre. The specific activities that need to be taken into consideration are those given for "variable threonine" in Table 3. The following are the assay correction factors provided by the authors: vak1=1.49; vak3=1.12; vasd=1.14; vhsd=1.42; vts=1.15; vhk=1.13. The model was successfully tested on MathSBML and Jarnac
  // To the extent possible under law, all copyright and related or neighbouring rights to this encoded model have been dedicated to the public domain worldwide. Please refer to CC0 Public Domain Dedication for more information.
  // In summary, you are entitled to use this encoded model in absolutely any manner you deem suitable, verbatim, or with modification, alone or embedded it in a larger context, redistribute it, commercially or not, in a restricted way or not.
  // To cite BioModels Database, please use: Li C, Donizelli M, Rodriguez N, Dharuri H, Endler L, Chelliah V, Li L, He E, Henry A, Stefan MI, Snoep JL, Hucka M, Le Novère N, Laibe C (2010) BioModels Database: An enhanced, curated and annotated resource for published quantitative kinetic models. BMC Syst Biol., 4:92.
  // biomodels.db:BIOMD0000000066
  // biomodels.db:MODEL6624131052
  // isDescribedBy pubmed:11368770
  // hasPart GO:0009088 GO:0006531
  // occursIn taxonomy:83333
  // isVersionOf kegg.pathway:map00260

  // Compartments:
  compartment compartment = 1;  // GO:0005623

  // Species:
  species aspp in compartment = 0; aspp is "Aspartyl phosphate";  // CHEBI:15836 kegg.compound:C03082
  species asa in compartment = 0; asa is "Aspartate beta-semialdehyde";  // CHEBI:18051 kegg.compound:C00441
  species hs in compartment = 0; hs is "Homoserine";  // CHEBI:15699 kegg.compound:C00263
  species hsp in compartment = 0; hsp is "O-Phospho-homoserine";  // CHEBI:15961 kegg.compound:C01102
  species phos in compartment = 0; phos is "Phos";  // CHEBI:18367 kegg.compound:C00009
  species thr in compartment = 2; thr is "Threonine";  // CHEBI:16857 kegg.compound:C00188
  species asp in compartment = 2; asp is "Aspartate";  // CHEBI:17053 kegg.compound:C00049
  species nadp in compartment = 0; nadp is "NADP";  // CHEBI:18009 kegg.compound:C00006
  species nadph in compartment = 2; nadph is "NADPH";  // CHEBI:16474 kegg.compound:C00005
  species adp in compartment = 0; adp is "ADP";  // CHEBI:16761 kegg.compound:C00008
  species atp in compartment = 10; atp is "ATP";  // CHEBI:15422 kegg.compound:C00002

  // Reactions:
  vak: atp + asp -> aspp + adp; compartment*(vm11*(asp*atp - aspp*adp/keqak)/((k11*(1 + (thr/k1thr)^nak1)/(1 + (thr/(alpha*k1thr))^nak1) + k11*aspp/k1aspp + asp)*(k1atp*(1 + adp/k1adp) + atp)) + vm13*(asp*atp - aspp*adp/keqak)/((1 + (vak_lys/k1lys)^nak3)*(k13*(1 + aspp/k13aspp) + asp)*(k13atp*(1 + adp/k13adp) + atp))); vak is "Aspartate Kinase";  // modifiers: thr; kegg.reaction:R00480; isVersionOf ec-code:2.7.2.4 GO:0004072
    vm11 = 0.15 mM_per_min; keqak = 0.00064 dimensionless; k11 = 0.97 mM; k1thr = 0.167 mM; nak1 = 4.09 dimensionless; alpha = 2.47 dimensionless; k1aspp = 0.017 mM; k1atp = 0.98 mM; k1adp = 0.25 mM; vm13 = 0.0722 mM_per_min; vak_lys = 0.46 mM; k1lys = 0.391 mM; nak3 = 2.8 dimensionless; k13 = 0.32 mM; k13aspp = 0.017 mM; k13atp = 0.22 mM; k13adp = 0.25 mM;
  vasd: nadph + aspp -> nadp + phos + asa; compartment*(vm2f*(aspp*nadph - asa*nadp*phos/k2eq)/((k2aspp*(1 + asa/k2asa)*(1 + phos/k2p) + aspp)*(k2nadph*(1 + nadp/k2nadp) + nadph))); vasd is "Aspartate semialdehyde dehydrogenase";  // isVersionOf ec-code:1.2.1.11 GO:0004073; kegg.reaction:R02291
    vm2f = 0.1812 mM_per_min; k2eq = 56.41503 dimensionless; k2aspp = 0.022 mM; k2asa = 0.11 mM; k2p = 10 mM; k2nadph = 0.029 mM; k2nadp = 0.144 mM;
  vhdh: nadph + asa -> hs + nadp; compartment*(vm3f*(asa*nadph - hs*nadp/k3eq)/((1 + (thr/k3thr)^nhdh1)/(1 + (thr/(alpha3*k3thr))^nhdh1)*(k3asa + asa + hs*k3asa/k3hs)*(k3nadph*(1 + nadp/k3nadp) + nadph))); vhdh is "Homoserine dehydrogenase";  // modifiers: asp, thr; isVersionOf ec-code:1.1.1.3 GO:0004412; kegg.reaction:R01775
    vm3f = 1.001 mM_per_min; k3eq = 3162.278 dimensionless; k3thr = 0.097 mM; nhdh1 = 1.41 dimensionless; alpha3 = 3.93 dimensionless; k3asa = 0.24 mM; k3hs = 3.39 mM; k3nadph = 0.037 mM; k3nadp = 0.067 mM;
  vtsy: hsp -> thr + phos; compartment*vm5*hsp/(hsp + k5hsp); vtsy is "Threonine synthase";  // kegg.reaction:R01466; isVersionOf ec-code:4.2.3.1 GO:0004795
    vm5 = 0.0434 mM_per_min; k5hsp = 0.31 mM;
  vhk: hs + atp -> hsp + adp; compartment*(vm4f*hs*atp/((1 + vhk_lys/k4lys)*(atp + k4atp*(1 + hs/k4ihs))*(hs + k4hs*(1 + thr/k4thr)*(1 + atp/k4iatp)))); vhk is "Homoserine kinase";  // modifiers: thr; isVersionOf ec-code:2.7.1.39 GO:0004413; kegg.reaction:R01771
    vm4f = 0.1 mM_per_min; vhk_lys = 0.46 mM; k4lys = 9.45 mM; k4atp = 0.072 mM; k4ihs = 4.7 mM; k4hs = 0.11 mM; k4thr = 1.09 mM; k4iatp = 4.35 mM;
  vnadph_endo: nadph -> nadp; compartment*vnadph_endo_prot*knadph*nadph; vnadph_endo is "Endogenous consumption of NADPH";  // isVersionOf GO:0006739
    knadph = 5.4e-6 litre_per_mg_per_min; vnadph_endo_prot = 202 mg_per_litre;
  vatpase: atp -> adp + phos; compartment*vatpase_prot*katpase; vatpase is "ATPase";  // GO:0016887
    katpase = 4.1e-5 millimole_per_mg_per_min; vatpase_prot = 202 mg_per_litre;

  // Unit definitions:
  unit substance = 1e-3 mole; substance is "millimole";
  unit time = 60 second; time is "min";
  unit mM = 1e-3 mole / litre;
  unit mM_per_min = 1e-3 mole / (litre * 60 second);
  unit litre_per_mg_per_min = litre / (1e-3 gram * 60 second);
  unit millimole_per_mg_per_min = 1e-3 mole / (1e-3 gram * 60 second);
  unit mg_per_litre = 1e-3 gram / litre;
end
