// SBML level 2 version 1

model Curien2003_MetThr_synthesis()
  // This a model from the article:
  // A kinetic model of the branch-point between the methionine and threonine biosynthesis pathways in Arabidopsis thaliana.
  // Curien G, Ravanel S, Dumas R Eur. J. Biochem. 2003 Dec; Volume: 270 (Issue: 23 )]:4615-27 14622248,
  // Abstract:
  // This work proposes a model of the metabolic branch-point between the methionine and threonine biosynthesis pathways in Arabidopsis thaliana which involves kinetic competition for phosphohomoserine between the allosteric enzyme threonine synthase and the two-substrate enzyme cystathionine gamma-synthase. Threonine synthase is activated by S-adenosylmethionine and inhibited by AMP. Cystathionine gamma-synthase condenses phosphohomoserine to cysteine via a ping-pong mechanism. Reactions are irreversible and inhibited by inorganic phosphate. The modelling procedure included an examination of the kinetic links, the determination of the operating conditions in chloroplasts and the establishment of a computer model using the enzyme rate equations. To test the model, the branch-point was reconstituted with purified enzymes. The computer model showed a partial agreement with the in vitro results. The model was subsequently improved and was then found consistent with flux partition in vitro and in vivo. Under near physiological conditions, S-adenosylmethionine, but not AMP, modulates the partition of a steady-state flux of phosphohomoserine. The computer model indicates a high sensitivity of cystathionine flux to enzyme and S-adenosylmethionine concentrations. Cystathionine flux is sensitive to modulation of threonine flux whereas the reverse is not true. The cystathionine gamma-synthase kinetic mechanism favours a low sensitivity of the fluxes to cysteine. Though sensitivity to inorganic phosphate is low, its concentration conditions the dynamics of the system. Threonine synthase and cystathionine gamma-synthase display similar kinetic efficiencies in the metabolic context considered and are first-order for the phosphohomoserine substrate. Under these conditions outflows are coordinated.
  // SBML level 2 code generated for the JWS Online project by Jacky Snoep using PySCeS
  // Run this model online at http://jjj.biochem.sun.ac.za
  // To cite JWS Online please refer to: Olivier, B.G. and Snoep, J.L. (2004) Web-based modelling using JWS Online, Bioinformatics, 20:2143-2144
  // Biomodels Curation The model simulates the flux for TS and CGS under conditions given in Table 2 and reproduces the dotted lines given in Table 3 of the paper. There is a typo in the equation for the apparent specificity constant for Phser, Kts (equation13). This was changed after communication with the authors to be: Kts = 5.9E-4+6.2E-2*pow(AdoMet,2.9)/(pow(32,2.9)+pow(AdoMet,2.9)). The model was successfully tested on Jarnac and Copasi. Due to a suggestion from Pedro Mendez the parameter AdoMet, TS and CGS where made constant species.
  // This model originates from BioModels Database: A Database of Annotated Published Models (http://www.ebi.ac.uk/biomodels/). It is copyright (c) 2005-2010 The BioModels.net Team.
  // To the extent possible under law, all copyright and related or neighbouring rights to this encoded model have been dedicated to the public domain worldwide. Please refer to CC0 Public Domain Dedication for more information.
  // In summary, you are entitled to use this encoded model in absolutely any manner you deem suitable, verbatim, or with modification, alone or embedded it in a larger context, redistribute it, commercially or not, in a restricted way or not..
  // To cite BioModels Database, please use: Li C, Donizelli M, Rodriguez N, Dharuri H, Endler L, Chelliah V, Li L, He E, Henry A, Stefan MI, Snoep JL, Hucka M, Le Novère N, Laibe C (2010) BioModels Database: An enhanced, curated and annotated resource for published quantitative kinetic models. BMC Syst Biol., 4:92.
  // biomodels.db:BIOMD0000000068
  // biomodels.db:MODEL6624146302
  // isDescribedBy pubmed:14622248
  // hasPart GO:0019283 GO:0009088
  // hasPart kegg.pathway:map00260 kegg.pathway:map00271
  // occursIn taxonomy:3702

  // Compartments:
  compartment compartment = 1; compartment is "Cell";  // GO:0005623

  // Species:
  species Phser in compartment = 0; Phser is "Phosphohomoserine";  // CHEBI:15961 kegg.compound:C01102
  species $Thr in compartment = 0; Thr is "Threonine";  // CHEBI:16857 kegg.compound:C00188
  species $Cystathionine in compartment = 0;  // CHEBI:17482 kegg.compound:C02291
  species $Hser in compartment = 0; Hser is "Homoserine";  // CHEBI:15699 kegg.compound:C00263
  species $Phi in compartment = 10000; Phi is "Inorganic phosphate";  // CHEBI:18367 kegg.compound:C00009
  species $Cys in compartment = 15; Cys is "Cysteine";  // CHEBI:17561 kegg.compound:C00097
  species $AdoMet in compartment = 20; AdoMet is "S-adenosylmethionine";  // CHEBI:15414 kegg.compound:C00019
  species $CGS in compartment = 0.7; CGS is "Cystathionine gamma-synthase";  // isVersionOf uniprot:P55217
  species $TS in compartment = 5; TS is "Threonine synthase";  // isVersionOf uniprot:Q9S7B5

  // Reactions:
  Phosphohomoserine_synthesis: $Hser -> Phser; compartment*V0;  // isVersionOf ec-code:2.7.1.39 GO:0004413; kegg.reaction:R01775
    V0 = 1 microM_per_second;
  vCys: Phser + $Cys -> $Cystathionine + $Phi; CGS*(kcat2/(1 + KmCYS/Cys))*Phser/(Phser + KmPHSER*(1 + Phi/Ki2)/(1 + KmCYS/Cys)); vCys is "Cystathionine gamma-synthase";  // modifiers: CGS; isVersionOf ec-code:2.5.1.48 GO:0003962
    kcat2 = 30 microM; KmCYS = 460 microM; KmPHSER = 2500 microM; Ki2 = 2000 microM;
  vThr: Phser -> $Thr + $Phi; TS*(5.9e-4 + 0.062*AdoMet^2.9/(32^2.9 + AdoMet^2.9))*Phser/(1 + Phi/Ki3); vThr is "Threonine Synthase";  // modifiers: AdoMet, TS; kegg.reaction:R01466; isVersionOf ec-code:4.2.3.1 GO:0004795
    Ki3 = 1000 microM;

  // Unit definitions:
  unit substance = 1e-6 mole; substance is "micromole";
  unit microM = 1e-6 mole / litre;
  unit sec_inverse = 1 / second;
  unit microM_per_second = 1e-6 mole / (litre * second);
end
