// SBML level 2 version 1

model Src_MitoticActivation()
  // Fuss2006_MitoticActivation
  // The model was curated with XPP. The figure 3 was successfully reproduced.
  // To the extent possible under law, all copyright and related or neighbouring rights to this encoded model have been dedicated to the public domain worldwide. Please refer to CC0 Public Domain Dedication for more information.
  // In summary, you are entitled to use this encoded model in absolutely any manner you deem suitable, verbatim, or with modification, alone or embedded it in a larger context, redistribute it, commercially or not, in a restricted way or not.
  // To cite BioModels Database, please use: Li C, Donizelli M, Rodriguez N, Dharuri H, Endler L, Chelliah V, Li L, He E, Henry A, Stefan MI, Snoep JL, Hucka M, Le Novère N, Laibe C (2010) BioModels Database: An enhanced, curated and annotated resource for published quantitative kinetic models. BMC Syst Biol., 4:92.
  // biomodels.db:BIOMD0000000069
  // biomodels.db:MODEL7146478294
  // isDescribedBy pubmed:16873466
  // occursIn taxonomy:9606
  // isVersionOf reactome:REACT_152 GO:0000278

  // Compartments:
  compartment default = 1;  // GO:0005623

  // Species:
  species srci in default = 1;  // isVersionOf uniprot:P12931
  species srco in default = 0;  // isVersionOf uniprot:P12931
  species srca in default = 0;  // isVersionOf uniprot:P12931
  species srcc in default = 0;  // isVersionOf uniprot:P12931
  species Cbp_P_CSK in default = 0;  // hasPart uniprot:P41240 uniprot:Q9NWQ8
  species CSK_cytoplasm in default = 1;  // uniprot:P41240
  species PTP in default = 1;  // isVersionOf uniprot:P18433
  species PTP_pY789 in default = 0;  // isVersionOf uniprot:P18433
  species Cbp in default = 1;  // isVersionOf uniprot:Q9NWQ8
  species Cbp_P in default = 0;  // isVersionOf uniprot:Q9NWQ8

  // Parameters:
  k1 = 1;
  k2 = 0.8;
  k3 = 1;
  k4 = 10;
  kPTP = 1;
  kCbp = 1;
  p1 = 0.05;
  p2 = 0.15;
  p3 = 0.035;
  src_background = 0.0001;
  PTP_background = 0;
  kCSKon = 0.1;
  kCSKoff = 0.01;
  rho_srca = 1;
  rho_srco = 0;
  rho_srcc = 1;
  Kser = 1;
  acsk0 = 0;

  // Assignment rules:
  src_activity := rho_srco*srco + rho_srca*srca + src_background + rho_srcc*srcc;
  ptp_activity := PTP_background + Kser*PTP_pY789;

  // Reactions:
  v1: srci -> srco; (k2*ptp_activity*srci - k1*Cbp_P_CSK*srco)*default;  // modifiers: Cbp_P_CSK; isVersionOf ec-code:2.7.10.2 GO:0004713
  v2: srco -> srca; (k3*src_activity*srco - p1*srca)*default;  // isVersionOf ec-code:2.7.10.2 GO:0004713
  v3: srca -> srcc; (k1*Cbp_P_CSK*srca - k2*ptp_activity*srcc)*default;  // modifiers: Cbp_P_CSK; isVersionOf ec-code:2.7.10.2 GO:0004713
  v4: srcc => srci; default*k4*p1*srcc;  // isVersionOf ec-code:3.1.3.48 GO:0004725
  CSK_translocation: CSK_cytoplasm + Cbp_P -> Cbp_P_CSK; (Cbp_P*kCSKon*CSK_cytoplasm - kCSKoff*Cbp_P_CSK)*default;  // hasPart GO:0006461 GO:0006612
  PTP_phosphorylation: PTP -> PTP_pY789; default*((kPTP*src_activity + p3)*PTP - p2*PTP_pY789);  // isVersionOf ec-code:2.7.10.2 GO:0004713
  Cbp_phosphorylation: Cbp => Cbp_P; kCbp*src_activity*Cbp*default;  // isVersionOf ec-code:2.7.10.2 GO:0004713
end
