// SBML level 2 version 1

model Holzhutter2004_Erythrocyte_Metabolism()
  // .
  // .
  // .
  // SBML level 2 code generated for the JWS Online project by Jacky Snoep using PySCeS
  // Run this model online at http://jjj.biochem.sun.ac.za
  // To cite JWS Online please refer to: Olivier, B.G. and Snoep, J.L. (2004) Web-based modelling using JWS Online, Bioinformatics, 20:2143-2144
  // .
  // .
  // .
  // .
  // .
  // .
  // Biomodels Curation The model simulates the flux values as given for "kinetic model" in Table 1 of the paper. The model was successfully tested on Jarnac.
  // To the extent possible under law, all copyright and related or neighbouring rights to this encoded model have been dedicated to the public domain worldwide. Please refer to CC0 Public Domain Dedication for more information.
  // In summary, you are entitled to use this encoded model in absolutely any manner you deem suitable, verbatim, or with modification, alone or embedded it in a larger context, redistribute it, commercially or not, in a restricted way or not.
  // To cite BioModels Database, please use: Li C, Donizelli M, Rodriguez N, Dharuri H, Endler L, Chelliah V, Li L, He E, Henry A, Stefan MI, Snoep JL, Hucka M, Le Novère N, Laibe C (2010) BioModels Database: An enhanced, curated and annotated resource for published quantitative kinetic models. BMC Syst Biol., 4:92.
  // biomodels.db:BIOMD0000000070
  // biomodels.db:MODEL6624180840
  // isDescribedBy pubmed:15233787
  // hasPart GO:0006096 GO:0006098 GO:0006749
  // hasPart kegg.pathway:hsa00010 kegg.pathway:hsa00030 kegg.pathway:hsa00480
  // hasPart reactome:REACT_1383 reactome:REACT_2220 reactome:REACT_1859

  // Compartments:
  compartment compartment = 1; compartment is "cytoplasm";  // GO:0005737

  // Species:
  species Glcin in compartment = 4.5663; Glcin is "Glucose in";  // CHEBI:17234 kegg.compound:C00293
  species MgATP in compartment = 1.4;  // hasPart CHEBI:25107 CHEBI:15422; hasPart kegg.compound:C00305 kegg.compound:C00002
  species Glc6P in compartment = 0.0394; Glc6P is "Glucose 6-phosphate";  // CHEBI:17665 kegg.compound:C00668
  species MgADP in compartment = 0.1;  // hasPart CHEBI:25107 CHEBI:16761; hasPart kegg.compound:C00305 kegg.compound:C00008
  species Fru6P in compartment = 0.0153; Fru6P is "Fructose 6-phosphate";  // CHEBI:16084 kegg.compound:C05345
  species Fru16P2 in compartment = 0.0097; Fru16P2 is "Fructose 1,6-phosphate";  // CHEBI:28013 kegg.compound:C05378
  species GraP in compartment = 0.0061; GraP is "Glyceraldehyde 3-phosphate";  // CHEBI:29052 kegg.compound:C00118
  species DHAP in compartment = 0.1492; DHAP is "Dihydroxyacetone phosphate";  // CHEBI:16108 kegg.compound:C00111
  species Phi in compartment = 0.9992; Phi is "Phosphate";  // CHEBI:35780
  species NAD in compartment = 0.0653;  // CHEBI:15846 kegg.compound:C00003
  species Gri13P2 in compartment = 0.0005; Gri13P2 is "1,3-Bisphospho-D-glycerate";  // CHEBI:16001 kegg.compound:C00236
  species NADH in compartment = 0.0002;  // CHEBI:16908 kegg.compound:C00004
  species Gri3P in compartment = 0.0658; Gri3P is "3-Phospho-D-glycerate";  // CHEBI:17794 kegg.compound:C00197
  species Gri23P2f in compartment = 2.0601; Gri23P2f is "2,3-Bisphospho-D-glycerate";  // CHEBI:17720 kegg.compound:C01159
  species Gri2P in compartment = 0.0084; Gri2P is "2-Phospho-D-glycerate";  // CHEBI:17835 kegg.compound:C00631
  species PEP in compartment = 0.0109; PEP is "Phosphoenolpyruvate";  // kegg.compound:C00074; CHEBI:18021
  species Pyr in compartment = 0.084; Pyr is "Pyruvate";  // CHEBI:15361; kegg.compound:C00022
  species Lac in compartment = 1.6803; Lac is "Lactate";  // kegg.compound:C00256
  species NADPHf in compartment = 0.004;  // CHEBI:16474 kegg.compound:C00005
  species NADPf in compartment = 0;  // CHEBI:18009 kegg.compound:C00006
  species AMPf in compartment = 0;  // CHEBI:16027 kegg.compound:C00020
  species ADPf in compartment = 0.25;  // CHEBI:16761 kegg.compound:C00008
  species GlcA6P in compartment = 0.025; GlcA6P is "Phospho-D-glucono-1,5-lactone";  // CHEBI:16938 kegg.compound:C01236
  species Rul5P in compartment = 0.0047; Rul5P is "Ribulose 5-phosphate";  // CHEBI:17363 kegg.compound:C00199
  species GSSG in compartment = 0.0004; GSSG is "Oxidized Glutathione";  // CHEBI:17858 kegg.compound:C00127
  species GSH in compartment = 3.1136; GSH is "Reduced Glutathione";  // CHEBI:16856 kegg.compound:C00051
  species Xul5P in compartment = 0.0127; Xul5P is "Xylulose 5-phosphate";  // CHEBI:16332 kegg.compound:C00231
  species Rib5P in compartment = 0.014; Rib5P is "Ribose 5-phosphate";  // CHEBI:17797 kegg.compound:C00117
  species Sed7P in compartment = 0.0154; Sed7P is "Sedoheptulose 7-phosphate";  // kegg.compound:C05382
  species E4P in compartment = 0.0063; E4P is "Erythrose 4-phosphate";  // CHEBI:16897 kegg.compound:C00279
  species MgAMP in compartment = 0;  // hasPart CHEBI:25107 CHEBI:16027; hasPart kegg.compound:C00305 kegg.compound:C00020
  species ATPf in compartment = 0.25;  // CHEBI:15422 kegg.compound:C00002
  species Mgf in compartment = 0.8;  // CHEBI:25107 kegg.compound:C00305
  species MgGri23P2 in compartment = 0.5;  // hasPart CHEBI:25107 CHEBI:17720; hasPart kegg.compound:C00305 kegg.compound:C01159
  species P1NADP in compartment = 0; P1NADP is "Protein1 bound NADP";  // hasPart CHEBI:36080 CHEBI:18009; hasPart kegg.compound:C00006 kegg.compound:C00017
  species P1f in compartment = 0; P1f is "Protein1";  // isVersionOf CHEBI:36080; isVersionOf kegg.compound:C00017
  species P1NADPH in compartment = 0.024; P1NADPH is "Protein1 bound NADPH";  // hasPart CHEBI:16474 CHEBI:36080; hasPart kegg.compound:C00005 kegg.compound:C00017
  species P2NADP in compartment = 0; P2NADP is "Protein2 bound NADP";  // hasPart CHEBI:18009 CHEBI:36080; hasPart kegg.compound:C00006 kegg.compound:C00017
  species P2f in compartment = 0; P2f is "Protein2";  // isVersionOf CHEBI:36080; isVersionOf kegg.compound:C00017
  species P2NADPH in compartment = 0.024; P2NADPH is "Protein2 bound NADPH";  // hasPart CHEBI:16474 CHEBI:36080; hasPart kegg.compound:C00005 kegg.compound:C00017
  species $PRPP in compartment = 1;  // CHEBI:17111 kegg.compound:C00119
  species $Lacex in compartment = 1.68; Lacex is "External Lactate";  // kegg.compound:C00256
  species $Pyrex in compartment = 0.084; Pyrex is "External Pyruvate";  // CHEBI:32816 kegg.compound:C00022
  species $Glcout in compartment = 5; Glcout is "Glucose outside";  // CHEBI:17234 kegg.compound:C00293
  species $Phiex in compartment = 1; Phiex is "Phosphate external";  // CHEBI:35780

  // Reactions:
  vGLT: $Glcout -> Glcin; compartment*(Vmaxv0/KMoutv0*(Glcout - Glcin/Keqv0)/(1 + Glcout/KMoutv0 + Glcin/KMinv0 + alfav0*Glcout*Glcin/KMoutv0/KMinv0)); vGLT is "Glucose transport";  // isVersionOf GO:0046323; reactome:REACT_2092
    Vmaxv0 = 33.6 mM_per_hour; KMoutv0 = 1.7 mM; Keqv0 = 1 dimensionless; KMinv0 = 6.9 mM; alfav0 = 0.54 dimensionless;
  vHEX: Glcin + MgATP -> Glc6P + MgADP; compartment*(Inhibv1*Glcin/(Glcin + KMGlcv1)*(Vmax1v1/KMgATPv1)*(MgATP + Vmax2v1/Vmax1v1*MgATP*Mgf/KMgATPMgv1 - Glc6P*MgADP/Keqv1)/(1 + MgATP/KMgATPv1*(1 + Mgf/KMgATPMgv1) + Mgf/KMgv1 + (1.55 + Glc6P/KGlc6Pv1)*(1 + Mgf/KMgv1) + (Gri23P2f + MgGri23P2)/K23P2Gv1 + Mgf*(Gri23P2f + MgGri23P2)/(KMgv1*KMg23P2Gv1))); vHEX is "Hexokinase";  // modifiers: Mgf, Gri23P2f, MgGri23P2; isVersionOf ec-code:2.7.1.2; kegg.reaction:R00299 reactome:REACT_1318
    Inhibv1 = 1 dimensionless; KMGlcv1 = 0.1 mM; Vmax1v1 = 15.8 mM_per_hour; KMgATPv1 = 1.44 mM; Vmax2v1 = 33.2 mM_per_hour; KMgATPMgv1 = 1.14 mM; Keqv1 = 3900 mM; KMgv1 = 1.03 mM; KGlc6Pv1 = 0.0045 mM; K23P2Gv1 = 2.7 mM; KMg23P2Gv1 = 3.44 mM;
  vGPI: Glc6P -> Fru6P; compartment*(Vmaxv2*(Glc6P - Fru6P/Keqv2)/(Glc6P + KGlc6Pv2*(1 + Fru6P/KFru6Pv2))); vGPI is "Glucosephosphate isomerase";  // isVersionOf ec-code:5.3.1.9; kegg.reaction:R00771 reactome:REACT_1164
    Vmaxv2 = 935 mM_per_hour; Keqv2 = 0.3925 dimensionless; KGlc6Pv2 = 0.182 mM; KFru6Pv2 = 0.071 mM;
  vPFK: MgATP + Fru6P -> Fru16P2 + MgADP; compartment*(Vmaxv3*(Fru6P*MgATP - Fru16P2*MgADP/Keqv3)/((Fru6P + KFru6Pv3)*(MgATP + KMgATPv3)*(1 + L0v3*((1 + ATPf/KATPv3)*(1 + Mgf/KMgv3)/((1 + (AMPf + MgAMP)/KAMPv3)*(1 + Fru6P/KFru6Pv3)))^4))); vPFK is "Phosphofructokinase";  // modifiers: ATPf, Mgf, AMPf, MgAMP; isVersionOf ec-code:2.7.1.11; kegg.reaction:R00756 reactome:REACT_736
    Vmaxv3 = 239 mM_per_hour; Keqv3 = 100000 dimensionless; KFru6Pv3 = 0.1 mM; KMgATPv3 = 0.068 mM; L0v3 = 0.001072 dimensionless; KATPv3 = 0.01 mM; KMgv3 = 0.44 mM; KAMPv3 = 0.033 mM;
  vALD: Fru16P2 -> GraP + DHAP; compartment*(Vmaxv4/KFru16P2v4*(Fru16P2 - GraP*DHAP/Keqv4)/(1 + Fru16P2/KFru16P2v4 + GraP/KiGraPv4 + DHAP*(GraP + KGraPv4)/(KDHAPv4*KiGraPv4) + Fru16P2*GraP/(KFru16P2v4*KiiGraPv4))); vALD is "Aldolase";  // isVersionOf ec-code:4.1.2.13; kegg.reaction:R01070 reactome:REACT_1602
    Vmaxv4 = 98.91 mM_per_hour; KFru16P2v4 = 0.0071 mM; Keqv4 = 0.114 mM; KiGraPv4 = 0.0572 mM; KGraPv4 = 0.1906 mM; KDHAPv4 = 0.0364 mM; KiiGraPv4 = 0.176 mM;
  vTPI: DHAP -> GraP; compartment*(Vmaxv5*(DHAP - GraP/Keqv5)/(DHAP + KDHAPv5*(1 + GraP/KGraPv5))); vTPI is "Triosephosphate isomerase";  // isVersionOf ec-code:5.3.1.1; kegg.reaction:R01015 reactome:REACT_775
    Vmaxv5 = 5456.6 mM_per_hour; Keqv5 = 0.0407 dimensionless; KDHAPv5 = 0.838 mM; KGraPv5 = 0.428 mM;
  vGAPDH: GraP + Phi + NAD -> NADH + Gri13P2; compartment*(Vmaxv6/(KNADv6*KGraPv6*KPv6)*(NAD*GraP*Phi - Gri13P2*NADH/Keqv6)/((1 + NAD/KNADv6)*(1 + GraP/KGraPv6)*(1 + Phi/KPv6) + (1 + NADH/KNADHv6)*(1 + Gri13P2/K13P2Gv6) - 1)); vGAPDH is "Glyceraldehyde 3-phosphate dehydrogenase";  // kegg.reaction:R01061 reactome:REACT_1847; isVersionOf ec-code:1.2.1.12
    Vmaxv6 = 4300 mM_per_hour; KNADv6 = 0.05 mM; KGraPv6 = 0.005 mM; KPv6 = 3.9 mM; Keqv6 = 0.000192 dimensionless; KNADHv6 = 0.0083 mM; K13P2Gv6 = 0.0035 mM;
  vPGK: MgADP + Gri13P2 -> MgATP + Gri3P; compartment*(Vmaxv7/(KMgADPv7*K13P2Gv7)*(MgADP*Gri13P2 - MgATP*Gri3P/Keqv7)/((1 + MgADP/KMgADPv7)*(1 + Gri13P2/K13P2Gv7) + (1 + MgATP/KMgATPv7)*(1 + Gri3P/K3PGv7) - 1)); vPGK is "Phosphoglycerate kinase";  // kegg.reaction:R01512 reactome:REACT_1186; isVersionOf ec-code:2.7.2.3
    Vmaxv7 = 5000 mM_per_hour; KMgADPv7 = 0.35 mM; K13P2Gv7 = 0.002 mM; Keqv7 = 1455 dimensionless; KMgATPv7 = 0.48 mM; K3PGv7 = 1.2 mM;
  vBPGM: Gri13P2 -> Gri23P2f; compartment*(kDPGMv8*(Gri13P2 - (Gri23P2f + MgGri23P2)/Keqv8)/(1 + (Gri23P2f + MgGri23P2)/K23P2Gv8)); vBPGM is "Bisphosphoglycerate mutase";  // modifiers: MgGri23P2; isVersionOf ec-code:5.4.2.4; kegg.reaction:R01662
    kDPGMv8 = 76000 hour_inverse; Keqv8 = 100000 dimensionless; K23P2Gv8 = 0.04 mM;
  vBPGP: Gri23P2f -> Gri3P + Phi; compartment*(Vmaxv9*(Gri23P2f + MgGri23P2 - Gri3P/Keqv9)/(Gri23P2f + MgGri23P2 + K23P2Gv9)); vBPGP is "Bisphosphoglycerate phosphatase";  // modifiers: MgGri23P2; kegg.reaction:R01516; isVersionOf ec-code:3.1.3.13
    Vmaxv9 = 0.53 mM_per_hour; Keqv9 = 100000 dimensionless; K23P2Gv9 = 0.2 mM;
  vPGM: Gri3P -> Gri2P; compartment*(Vmaxv10*(Gri3P - Gri2P/Keqv10)/(Gri3P + K3PGv10*(1 + Gri2P/K2PGv10))); vPGM is "Phosphoglycerate mutase";  // isVersionOf ec-code:5.4.2.1; kegg.reaction:R01518 reactome:REACT_576
    Vmaxv10 = 2000 mM_per_hour; Keqv10 = 0.145 dimensionless; K3PGv10 = 5 mM; K2PGv10 = 1 mM;
  vENO: Gri2P -> PEP; compartment*(Vmaxv11*(Gri2P - PEP/Keqv11)/(Gri2P + K2PGv11*(1 + PEP/KPEPv11))); vENO is "Enolase";  // isVersionOf ec-code:4.2.1.11; kegg.reaction:R00658 reactome:REACT_1400
    Vmaxv11 = 1500 mM_per_hour; Keqv11 = 1.7 dimensionless; K2PGv11 = 1 mM; KPEPv11 = 1 mM;
  vPK: PEP + MgADP -> MgATP + Pyr; compartment*(Vmaxv12*(PEP*MgADP - Pyr*MgATP/Keqv12)/((PEP + KPEPv12)*(MgADP + KMgADPv12)*(1 + L0v12*(1 + (ATPf + MgATP)/KATPv12)^4/((1 + PEP/KPEPv12)^4*(1 + Fru16P2/KFru16P2v12)^4)))); vPK is "Pyruvate kinase";  // modifiers: ATPf, Fru16P2; kegg.reaction:R00200 reactome:REACT_1911; isVersionOf ec-code:2.7.1.40
    Vmaxv12 = 570 mM_per_hour; Keqv12 = 13790 dimensionless; KPEPv12 = 0.225 mM; KMgADPv12 = 0.474 mM; L0v12 = 19 dimensionless; KATPv12 = 3.39 mM; KFru16P2v12 = 0.005 mM;
  vLDHNADH: NADH + Pyr -> Lac + NAD; compartment*Vmaxv13*(Pyr*NADH - Lac*NAD/Keqv13); vLDHNADH is "Lactate dehydrogenase";  // kegg.reaction:R00703 reactome:REACT_178; isVersionOf ec-code:1.1.1.27
    Vmaxv13 = 2800000 per_mM_hour; Keqv13 = 9090 dimensionless;
  vLDHNADPH: Pyr + NADPHf -> Lac + NADPf; compartment*kLDHv14*(Pyr*NADPHf - Lac*NADPf/Keqv14); vLDHNADPH is "Lactate dehydrogenase";  // isVersionOf ec-code:1.1.1.27
    kLDHv14 = 243.4 per_mM_hour; Keqv14 = 14181.8 dimensionless;
  vATPase: MgATP -> Phi + MgADP; compartment*kATPasev15*MgATP;  // kegg.reaction:R00086; isVersionOf ec-code:3.6.1.3
    kATPasev15 = 1.68 hour_inverse;
  vAK: MgATP + AMPf -> ADPf + MgADP; compartment*(Vmaxv16/(KATPv16*KAMPv16)*(MgATP*AMPf - MgADP*ADPf/Keqv16)/((1 + MgATP/KATPv16)*(1 + AMPf/KAMPv16) + (MgADP + ADPf)/KADPv16 + MgADP*ADPf/KADPv16^2)); vAK is "Adenylate kinase";  // isVersionOf ec-code:2.7.4.3; kegg.reaction:R00127
    Vmaxv16 = 1380 mM_per_hour; KATPv16 = 0.09 mM; KAMPv16 = 0.08 mM; Keqv16 = 0.25 dimensionless; KADPv16 = 0.11 mM;
  vG6PDH: Glc6P + NADPf -> GlcA6P + NADPHf; compartment*(Vmaxv17/KG6Pv17/KNADPv17*(Glc6P*NADPf - GlcA6P*NADPHf/Keqv17)/(1 + NADPf*(1 + Glc6P/KG6Pv17)/KNADPv17 + (ATPf + MgATP)/KATPv17 + NADPHf/KNADPHv17 + (Gri23P2f + MgGri23P2)/KPGA23v17)); vG6PDH is "Glucose 6-phosphate dehydrogenase";  // modifiers: ATPf, MgATP, Gri23P2f, MgGri23P2; isVersionOf ec-code:1.1.1.49; hasVersion reactome:REACT_1868 reactome:REACT_1125; kegg.reaction:R00835
    Vmaxv17 = 162 mM_per_hour; KG6Pv17 = 0.0667 mM; KNADPv17 = 0.00367 mM; Keqv17 = 2000 dimensionless; KATPv17 = 0.749 mM; KNADPHv17 = 0.00312 mM; KPGA23v17 = 2.289 mM;
  vPGLDH: GlcA6P + NADPf -> Rul5P + NADPHf; compartment*(Vmaxv18/K6PG1v18/KNADPv18*(GlcA6P*NADPf - Rul5P*NADPHf/Keqv18)/((1 + NADPf/KNADPv18)*(1 + GlcA6P/K6PG1v18 + (Gri23P2f + MgGri23P2)/KPGA23v18) + (ATPf + MgATP)/KATPv18 + NADPHf*(1 + GlcA6P/K6PG2v18)/KNADPHv18)); vPGLDH is "Phosphogluconate dehydrogenase";  // modifiers: Gri23P2f, MgGri23P2, ATPf, MgATP; isVersionOf ec-code:1.1.1.44; hasPart kegg.reaction:R02035 kegg.reaction:R01528; hasPart reactome:REACT_2072 reactome:REACT_611
    Vmaxv18 = 1575 mM_per_hour; K6PG1v18 = 0.01 mM; KNADPv18 = 0.018 mM; Keqv18 = 141.7 dimensionless; KPGA23v18 = 0.12 mM; KATPv18 = 0.154 mM; K6PG2v18 = 0.058 mM; KNADPHv18 = 0.0045 mM;
  vGSSGRD: GSSG + NADPHf -> 2 GSH + NADPf; compartment*(Vmaxv19*(GSSG*NADPHf/(KGSSGv19*KNADPHv19) - GSH^2/KGSHv19^2*NADPf/(KNADPv19*Keqv19))/(1 + NADPHf*(1 + GSSG/KGSSGv19)/KNADPHv19 + NADPf/KNADPv19*(1 + GSH*(1 + GSH/KGSHv19)/KGSHv19))); vGSSGRD is "Glutathione reductase";  // kegg.reaction:R00094 reactome:REACT_2220; isVersionOf ec-code:1.8.1.7
    Vmaxv19 = 90 mM_per_hour; KGSSGv19 = 0.0652 mM; KNADPHv19 = 0.00852 mM; KGSHv19 = 20 mM; KNADPv19 = 0.07 mM; Keqv19 = 1.04 dimensionless;
  vGSHox: 2 GSH -> GSSG; compartment*Kv20*GSH; vGSHox is "Glutathione oxidation";  // isVersionOf ec-code:1.8.1.7; reactome:REACT_2037
    Kv20 = 0.03 hour_inverse;
  vRibPepi: Rul5P -> Xul5P; compartment*(Vmaxv21*(Rul5P - Xul5P/Keqv21)/(Rul5P + KRu5Pv21*(1 + Xul5P/KX5Pv21))); vRibPepi is "Phosphoribulose epimerase";  // kegg.reaction:R01529 reactome:REACT_1522; isVersionOf ec-code:5.1.3.1
    Vmaxv21 = 4634 mM_per_hour; Keqv21 = 2.7 dimensionless; KRu5Pv21 = 0.19 mM; KX5Pv21 = 0.5 mM;
  vRibPiso: Rul5P -> Rib5P; compartment*(Vmaxv22*(Rul5P - Rib5P/Keqv22)/(Rul5P + KRu5Pv22*(1 + Rib5P/KR5Pv22))); vRibPiso is "Ribose phosphate isomerase";  // ec-code:5.3.1.6; kegg.reaction:R01056 reactome:REACT_2033
    Vmaxv22 = 730 mM_per_hour; Keqv22 = 3 dimensionless; KRu5Pv22 = 0.78 mM; KR5Pv22 = 2.2 mM;
  vTrKet1: Xul5P + Rib5P -> GraP + Sed7P; compartment*(Vmaxv23*(Rib5P*Xul5P - GraP*Sed7P/Keqv23)/((K1v23 + Rib5P)*Xul5P + (K2v23 + K6v23*Sed7P)*Rib5P + (K3v23 + K5v23*Sed7P)*GraP + K4v23*Sed7P + K7v23*Xul5P*GraP)); vTrKet1 is "Transketolase 1";  // isVersionOf ec-code:2.2.1.1; kegg.reaction:R01641 reactome:REACT_1629
    Vmaxv23 = 23.5 mM_per_hour; Keqv23 = 1.05 dimensionless; K1v23 = 0.4177 mM; K2v23 = 0.3055 mM; K6v23 = 0.00774 dimensionless; K3v23 = 12.432 mM; K5v23 = 0.41139 dimensionless; K4v23 = 0.00496 mM; K7v23 = 48.8 dimensionless;
  vTrAld: GraP + Sed7P -> E4P + Fru6P; compartment*(Vmaxv24*(Sed7P*GraP - E4P*Fru6P/Keqv24)/((K1v24 + GraP)*Sed7P + (K2v24 + K6v24*Fru6P)*GraP + (K3v24 + K5v24*Fru6P)*E4P + K4v24*Fru6P + K7v24*Sed7P*E4P)); vTrAld is "Transaldolase";  // isVersionOf ec-code:2.2.1.2; kegg.reaction:R01827 reactome:REACT_479
    Vmaxv24 = 27.2 mM_per_hour; Keqv24 = 1.05 dimensionless; K1v24 = 0.00823 mM; K2v24 = 0.04765 mM; K6v24 = 0.4653 dimensionless; K3v24 = 0.1733 mM; K5v24 = 0.8683 dimensionless; K4v24 = 0.006095 mM; K7v24 = 2.524 dimensionless;
  vPPRPPS: MgATP + Rib5P -> MgAMP + $PRPP; compartment*(Vmaxv25*(Rib5P*MgATP - PRPP*MgAMP/Keqv25)/((KATPv25 + MgATP)*(KR5Pv25 + Rib5P))); vPPRPPS is "Phosphoribosylpyrophosphate synthetase";  // isVersionOf ec-code:2.7.6.1; kegg.reaction:R01049 reactome:REACT_2023
    Vmaxv25 = 1.1 mM_per_hour; Keqv25 = 100000 dimensionless; KATPv25 = 0.03 mM; KR5Pv25 = 0.57 mM;
  vTrKet2: Xul5P + E4P -> GraP + Fru6P; compartment*(Vmaxv26*(E4P*Xul5P - GraP*Fru6P/Keqv26)/((K1v26 + E4P)*Xul5P + (K2v26 + K6v26*Fru6P)*E4P + (K3v26 + K5v26*Fru6P)*GraP + K4v26*Fru6P + K7v26*Xul5P*GraP)); vTrKet2 is "Transketolase 2";  // kegg.reaction:R01830 reactome:REACT_1811; isVersionOf ec-code:2.2.1.1
    Vmaxv26 = 23.5 mM_per_hour; Keqv26 = 1.2 dimensionless; K1v26 = 0.00184 mM; K2v26 = 0.3055 mM; K6v26 = 0.122 dimensionless; K3v26 = 0.0548 mM; K5v26 = 0.0287 dimensionless; K4v26 = 0.0003 mM; K7v26 = 0.215 dimensionless;
  vPhiexch: $Phiex -> Phi; compartment*Vmaxv27*(Phiex - Phi/Keqv27); vPhiexch is "Phosphate exchange";  // isVersionOf GO:0009935
    Vmaxv27 = 100 hour_inverse; Keqv27 = 1 dimensionless;
  vLacexch: $Lacex -> Lac; compartment*Vmaxv28*(Lacex - Lac/Keqv28); vLacexch is "Lactate exchange";  // isVersionOf GO:0009935
    Vmaxv28 = 10000 hour_inverse; Keqv28 = 1 dimensionless;
  vPyrexch: $Pyrex -> Pyr; compartment*Vmaxv29*(Pyrex - Pyr/Keqv29); vPyrexch is "Pyruvate exchange";  // isVersionOf GO:0009935
    Vmaxv29 = 10000 hour_inverse; Keqv29 = 1 dimensionless;
  vMgATP: MgATP -> Mgf + ATPf; compartment*vMgATP_EqMult*(MgATP - Mgf*ATPf/KdATP); vMgATP is "MgATP dissociation";  // isVersionOf GO:0006759
    vMgATP_EqMult = 10000000 hour_inverse; KdATP = 0.072 mM;
  vMgADP: MgADP -> Mgf + ADPf; compartment*vMgADP_EqMult*(MgADP - Mgf*ADPf/KdADP); vMgADP is "MgADP dissociation";
    vMgADP_EqMult = 10000000 hour_inverse; KdADP = 0.76 mM;
  vMgAMP: MgAMP -> Mgf + AMPf; compartment*vMgAMP_EqMult*(MgAMP - Mgf*AMPf/KdAMP); vMgAMP is "MgAMP dissociation";
    vMgAMP_EqMult = 10000000 hour_inverse; KdAMP = 16.64 mM;
  vMgGri23P2: MgGri23P2 -> Mgf + Gri23P2f; compartment*vMgGri23P2_EqMult*(MgGri23P2 - Mgf*Gri23P2f/Kd23P2G); vMgGri23P2 is "MgGri23P2 dissociation";
    vMgGri23P2_EqMult = 10000000 hour_inverse; Kd23P2G = 1.667 mM;
  vP1NADP: P1NADP -> P1f + NADPf; compartment*vP1NADP_EqMult*(P1NADP - P1f*NADPf/Kd1); vP1NADP is "P1NADP dissociation";
    vP1NADP_EqMult = 10000000 hour_inverse; Kd1 = 0.0002 mM;
  vP1NADPH: P1NADPH -> P1f + NADPHf; compartment*vP1NADPH_EqMult*(P1NADPH - P1f*NADPHf/Kd3); vP1NADPH is "P1NADPH dissociation";  // isVersionOf GO:0006740
    vP1NADPH_EqMult = 10000000 hour_inverse; Kd3 = 1e-5 mM;
  vP2NADP: P2NADP -> P2f + NADPf; compartment*vP2NADP_EqMult*(P2NADP - P2f*NADPf/Kd2); vP2NADP is "P2NADP dissociation";
    vP2NADP_EqMult = 10000000 hour_inverse; Kd2 = 1e-5 mM;
  vP2NADPH: P2NADPH -> P2f + NADPHf; compartment*vP2NADPH_EqMult*(P2NADPH - P2f*NADPHf/Kd4); vP2NADPH is "P2NADPH dissociation";  // isVersionOf GO:0006735
    vP2NADPH_EqMult = 10000000 hour_inverse; Kd4 = 0.0002 mM;

  // Unit definitions:
  unit substance = 1e-3 mole; substance is "millimole";
  unit time = 3600 second; time is "hour";
  unit mM = 1e-3 mole / litre;
  unit mM_per_hour = 1e-3 mole / (litre * 3600 second);
  unit hour_inverse = 1 / (3600 second);
  unit per_mM_hour = litre / (1e-3 mole * 3600 second);
end
