// SBML level 2 version 1

function Activation_of_gene(Vs, B, n, K)
  Vs*B^n/(K^n + B^n);
end

function Michaelis_Menten_irreversible(V, substrate, Km)
  V*substrate/(Km + substrate);
end
Michaelis_Menten_irreversible is "Michaelis-Menten(irreversible)";

function mRNA_translated_into_protein(k, mRNA)
  k*mRNA;
end

function Inhibition_of_gene(vsb, K, m, Bn)
  vsb*K^m/(K^m + Bn^m);
end

model Model_1()
  // Leloup2003_CircClock_DD
  // This is model is according to the paperToward a detailed computational model for the mammalian circadian clockIn this model only interlocked negative and positive regulation of Per,Cry,Bmal gene are involving.Some initial values are not given ,we choose them by ourselves in order to fit the curve in the paper.
  // Figure2A is produced by Copasi 4.0.19 and roadRunner online.
  // This model originates from BioModels Database: A Database of Annotated Published Models. It is copyright (c) 2005-2009 The BioModels Team.
  // To the extent possible under law, all copyright and related or neighbouring rights to this encoded model have been dedicated to the public domain worldwide. Please refer to CC0 Public Domain Dedication for more information.
  // In summary, you are entitled to use this encoded model in absolutely any manner you deem suitable, verbatim, or with modification, alone or embedded it in a larger context, redistribute it, commercially or not, in a restricted way or not..
  // To cite BioModels Database, please use Le Novère N., Bornstein B., Broicher A., Courtot M., Donizelli M., Dharuri H., Li L., Sauro H., Schilstra M., Shapiro B., Snoep J.L., Hucka M. (2006) BioModels Database: A Free, Centralized Database of Curated, Published, Quantitative Kinetic Models of Biochemical and Cellular Systems Nucleic Acids Res., 34: D689-D691.
  // biomodels.db:BIOMD0000000073
  // biomodels.db:MODEL1109528188
  // isDescribedBy pubmed:12775757
  // hasVersion kegg.pathway:hsa04710
  // isVersionOf GO:0007623
  // occursIn taxonomy:40674

  // Compartments:
  compartment cell = 1;  // isVersionOf GO:0005622

  // Species:
  // The initial concentration of Mb got from the curve in the paper at time=0
  species Mb in cell = 9;  // isVersionOf CHEBI:33699
  // In order to get the similar shape of the plot,we assigned 2nM as initial concentration for Bc
  species Bc in cell = 2;  // hasVersion uniprot:O00327
  species Bcp in cell = 0;  // hasVersion uniprot:O00327
  species Bn in cell = 1.9;  // uniprot:O00327
  species Cc in cell = 0;  // hasVersion uniprot:Q8IV71 uniprot:Q16526
  // Initial concentration for Mc got from the value of the curve at time=0 in the paper.
  species Mc in cell = 1.4;  // isVersionOf CHEBI:33699
  species Ccp in cell = 0;  // hasVersion uniprot:Q8IV71 uniprot:Q16526
  // Initial concentration for Mp got from the value of curve at time=0 in the paper.
  species Mp in cell = 1.6;  // isVersionOf CHEBI:33699
  species Pc in cell = 0;  // hasVersion uniprot:P56645 uniprot:O15055 uniprot:O15534
  species Pcp in cell = 0;  // hasVersion uniprot:P56645 uniprot:O15055 uniprot:O15534
  species PCc in cell = 0;  // hasPart uniprot:Q16526 uniprot:P56645; hasPart uniprot:Q16526 uniprot:O15055; hasPart uniprot:Q16526 uniprot:O15534
  species PCcp in cell = 0;  // hasPart uniprot:Q8IV71 uniprot:P56645; hasPart uniprot:Q8IV71 uniprot:O15055; hasPart uniprot:Q16526 uniprot:O15534
  species PCn in cell = 1;  // hasPart uniprot:Q8IV71 uniprot:P56645; hasPart uniprot:Q16526 uniprot:P56645; hasPart uniprot:Q16526 uniprot:O15534
  species Bnp in cell = 0;  // hasVersion uniprot:O00327
  species PCnp in cell = 0;  // hasPart uniprot:Q8IV71 uniprot:P56645; hasPart uniprot:Q8IV71 uniprot:O15534; hasPart uniprot:Q16526 uniprot:O15534
  species In in cell = 0;

  // Reactions:
  Mb_synthesized: => Mb; cell*Inhibition_of_gene(vsb, Mb_synthesized_K, m, Bn);  // modifiers: Bn; isVersionOf GO:0045892
    vsb = 1; Mb_synthesized_K = 2.2; m = 2;
  Mb_translated_into_protein: => Bc; cell*mRNA_translated_into_protein(Mb_translated_into_protein_k, Mb);  // modifiers: Mb; isVersionOf GO:0006412
    Mb_translated_into_protein_k = 0.12;
  Mb_nonspecific_degradation: Mb => ; cell*Mb_nonspecific_degradation_k1*Mb;  // isVersionOf GO:0044257
    Mb_nonspecific_degradation_k1 = 0.01;
  Bc_phosphorylation: Bc => Bcp; cell*Michaelis_Menten_irreversible(Bc_phosphorylation_V, Bc, Bc_phosphorylation_Km);  // isVersionOf GO:0006468
    Bc_phosphorylation_V = 0.5; Bc_phosphorylation_Km = 0.1;
  reaction_4: Bc -> Bn; cell*(reaction_4_k1*Bc - reaction_4_k2*Bn); reaction_4 is "Bc transfered from cytosolic to nuclear";  // isVersionOf GO:0000060
    reaction_4_k1 = 0.4; reaction_4_k2 = 0.2;
  Mc_translated_into_protein: => Cc; cell*mRNA_translated_into_protein(Mc_translated_into_protein_k, Mc);  // modifiers: Mc; isVersionOf GO:0006412
    Mc_translated_into_protein_k = 1.6;
  Mc_nonspecific_degradation: Mc => ; cell*Mc_nonspecific_degradation_k1*Mc;  // isVersionOf GO:0044257
    Mc_nonspecific_degradation_k1 = 0.01;
  Cc_phosphorylation: Cc => Ccp; cell*Michaelis_Menten_irreversible(Cc_phosphorylation_V, Cc, Cc_phosphorylation_Km);  // isVersionOf GO:0006468
    Cc_phosphorylation_V = 0.6; Cc_phosphorylation_Km = 0.1;
  Ccp_specific_degradation: Ccp => ; cell*Michaelis_Menten_irreversible(Ccp_specific_degradation_V, Ccp, Ccp_specific_degradation_Km);  // isVersionOf GO:0008233
    Ccp_specific_degradation_V = 0.7; Ccp_specific_degradation_Km = 0.3;
  Mp_synthesis: => Mp; cell*Activation_of_gene(Mp_synthesis_Vs, Bn, Mp_synthesis_n, Mp_synthesis_K);  // modifiers: Bn; GO:0043193
    Mp_synthesis_Vs = 1.5; Mp_synthesis_n = 4; Mp_synthesis_K = 0.7;
  Mp_translated_into_protein: => Pc; cell*mRNA_translated_into_protein(Mp_translated_into_protein_k, Mp);  // modifiers: Mp; isVersionOf GO:0006412
    Mp_translated_into_protein_k = 0.6;
  Pcp_specific_degradation: Pcp => ; cell*Michaelis_Menten_irreversible(Pcp_specific_degradation_V, Pcp, Pcp_specific_degradation_Km);  // isVersionOf GO:0008233
    Pcp_specific_degradation_V = 0.7; Pcp_specific_degradation_Km = 0.3;
  Pc_phosphorylation: Pc => Pcp; cell*Michaelis_Menten_irreversible(Pc_phosphorylation_V, Pc, Pc_phosphorylation_Km);  // isVersionOf GO:0006468
    Pc_phosphorylation_V = 0.4; Pc_phosphorylation_Km = 0.1;
  reaction_13: Cc + Pc -> PCc; cell*(reaction_13_k1*Cc*Pc - reaction_13_k2*PCc); reaction_13 is "Cc and Pc produce complex Per_Cry";  // isVersionOf GO:0043623
    reaction_13_k1 = 0.4; reaction_13_k2 = 0.2;
  PCc_phosphorylation: PCc => PCcp; cell*Michaelis_Menten_irreversible(PCc_phosphorylation_V, PCc, PCc_phosphorylation_Km);  // isVersionOf GO:0006468
    PCc_phosphorylation_V = 0.4; PCc_phosphorylation_Km = 0.1;
  PCcp_specific_degradation: PCcp => ; cell*Michaelis_Menten_irreversible(PCcp_specific_degradation_V, PCcp, PCcp_specific_degradation_Km);  // isVersionOf GO:0008233
    PCcp_specific_degradation_V = 0.7; PCcp_specific_degradation_Km = 0.3;
  PCc_transfered_into_nuclear: PCc -> PCn; cell*(PCc_transfered_into_nuclear_k1*PCc - PCc_transfered_into_nuclear_k2*PCn);  // isVersionOf GO:0000060
    PCc_transfered_into_nuclear_k1 = 0.4; PCc_transfered_into_nuclear_k2 = 0.2;
  PCnp_nonspecific_degradation: PCnp => ; cell*PCnp_nonspecific_degradation_k1*PCnp;  // isVersionOf GO:0044257
    PCnp_nonspecific_degradation_k1 = 0.01;
  Bcp_nonspecific_degradation: Bcp => ; cell*Bcp_nonspecific_degradation_k1*Bcp;  // isVersionOf GO:0044257
    Bcp_nonspecific_degradation_k1 = 0.01;
  Bnp_nonspecific_degradation: Bnp => ; cell*Bnp_nonspecific_degradation_k1*Bnp;  // isVersionOf GO:0044257
    Bnp_nonspecific_degradation_k1 = 0.01;
  Mc_synthesis: => Mc; cell*Activation_of_gene(Mc_synthesis_Vs, Bn, Mc_synthesis_n, Mc_synthesis_K);  // modifiers: Bn; isVersionOf GO:0043193
    Mc_synthesis_Vs = 1.1; Mc_synthesis_n = 4; Mc_synthesis_K = 0.6;
  PCn_phosphorylation: PCn => PCnp; cell*Michaelis_Menten_irreversible(PCn_phosphorylation_V, PCn, PCn_phosphorylation_Km);  // isVersionOf GO:0006468
    PCn_phosphorylation_V = 0.4; PCn_phosphorylation_Km = 0.1;
  Mp_nonspecific_degradation: Mp => ; cell*Mp_nonspecific_degradation_k1*Mp;  // isVersionOf GO:0044257
    Mp_nonspecific_degradation_k1 = 0.01;
  reaction_23: PCn + Bn -> In; cell*(reaction_23_k1*PCn*Bn - reaction_23_k2*In); reaction_23 is "Per_Cry and Clock_Bmal form inactive complex";  // isVersionOf GO:0043623
    reaction_23_k1 = 0.5; reaction_23_k2 = 0.1;
  Mb_specific_degradation: Mb => ; cell*Michaelis_Menten_irreversible(Mb_specific_degradation_V, Mb, Mb_specific_degradation_Km);  // isVersionOf GO:0008233
    Mb_specific_degradation_V = 0.8; Mb_specific_degradation_Km = 0.4;
  Mc_specific_degradation: Mc => ; cell*Michaelis_Menten_irreversible(Mc_specific_degradation_V, Mc, Mc_specific_degradation_Km);  // isVersionOf GO:0008233
    Mc_specific_degradation_V = 1; Mc_specific_degradation_Km = 0.4;
  Mp_specific_degradation: Mp => ; cell*Michaelis_Menten_irreversible(Mp_specific_degradation_V, Mp, Mp_specific_degradation_Km);  // isVersionOf GO:0008233
    Mp_specific_degradation_V = 1.1; Mp_specific_degradation_Km = 0.31;
  Pc_nonspecific_degradation: Pc => ; cell*Pc_nonspecific_degradation_k1*Pc;  // isVersionOf GO:0044257
    Pc_nonspecific_degradation_k1 = 0.01;
  Cc_nonspecific_degradation: Cc => ; cell*Cc_nonspecific_degradation_k1*Cc;  // isVersionOf GO:0044257
    Cc_nonspecific_degradation_k1 = 0.12;
  Pcp_nonspecific_degradation: Pcp => ; cell*Pcp_nonspecific_degradation_k1*Pcp;  // isVersionOf GO:0044257
    Pcp_nonspecific_degradation_k1 = 0.01;
  Ccp_nonspecific_degradation: Ccp => ; cell*Ccp_nonspecific_degradation_k1*Ccp;  // isVersionOf GO:0044257
    Ccp_nonspecific_degradation_k1 = 0.01;
  PCcp_nonspecific_degradation: PCcp => ; cell*PCcp_nonspecific_degradation_k1*PCcp;  // isVersionOf GO:0044257
    PCcp_nonspecific_degradation_k1 = 0.01;
  PCc_nonspecific_degradation: PCc => ; cell*PCc_nonspecific_degradation_k1*PCc;  // isVersionOf GO:0044257
    PCc_nonspecific_degradation_k1 = 0.01;
  PCnp_specific_degradation: PCnp => ; cell*Michaelis_Menten_irreversible(PCnp_specific_degradation_V, PCnp, PCnp_specific_degradation_Km);  // isVersionOf GO:0008233
    PCnp_specific_degradation_V = 0.7; PCnp_specific_degradation_Km = 0.3;
  Bc_nonspecific_degradation: Bc => ; cell*Bc_nonspecific_degradation_k1*Bc;  // isVersionOf GO:0044257
    Bc_nonspecific_degradation_k1 = 0.01;
  Bcp_specific_degradation: Bcp => ; cell*Michaelis_Menten_irreversible(Bcp_specific_degradation_V, Bcp, Bcp_specific_degradation_Km);  // isVersionOf GO:0008233
    Bcp_specific_degradation_V = 0.5; Bcp_specific_degradation_Km = 0.3;
  Bn_phosphorylation: Bn => Bnp; cell*Michaelis_Menten_irreversible(Bn_phosphorylation_V, Bn, Bn_phosphorylation_Km);  // isVersionOf GO:0006468
    Bn_phosphorylation_V = 0.5; Bn_phosphorylation_Km = 0.1;
  Bnp_specific_degradation: Bnp => ; cell*Michaelis_Menten_irreversible(Bnp_specific_degradation_V, Bnp, Bnp_specific_degradation_Km);  // isVersionOf GO:0008233
    Bnp_specific_degradation_V = 0.6; Bnp_specific_degradation_Km = 0.3;
  In_nonspecific_degration: In => ; cell*In_nonspecific_degration_k1*In;  // isVersionOf GO:0044257
    In_nonspecific_degration_k1 = 0.01;
  In_specific_degradation: In => ; cell*Michaelis_Menten_irreversible(In_specific_degradation_V, In, In_specific_degradation_Km);  // isPartOf GO:0008233
    In_specific_degradation_V = 0.8; In_specific_degradation_Km = 0.3;
  Bn_nonspecific_degradation: Bn => ; cell*Bn_nonspecific_degradation_k1*Bn;  // isVersionOf GO:0044257
    Bn_nonspecific_degradation_k1 = 0.01;
  Bcp_dephosphorylation: Bcp => Bc; cell*Michaelis_Menten_irreversible(Bcp_dephosphorylation_V, Bcp, Bcp_dephosphorylation_Km);  // isVersionOf GO:0006470
    Bcp_dephosphorylation_V = 0.1; Bcp_dephosphorylation_Km = 0.1;
  Bnp_dephosphorylation: Bnp => Bn; cell*Michaelis_Menten_irreversible(Bnp_dephosphorylation_V, Bnp, Bnp_dephosphorylation_Km);  // isVersionOf GO:0006470
    Bnp_dephosphorylation_V = 0.2; Bnp_dephosphorylation_Km = 0.1;
  Ccp_dephosphorylation: Ccp => Cc; cell*Michaelis_Menten_irreversible(Ccp_dephosphorylation_V, Ccp, Ccp_dephosphorylation_Km);  // isVersionOf GO:0006470
    Ccp_dephosphorylation_V = 0.1; Ccp_dephosphorylation_Km = 0.1;
  Pcp_dephosphorylation: Pcp => Pc; cell*Michaelis_Menten_irreversible(Pcp_dephosphorylation_V, Pcp, Pcp_dephosphorylation_Km);  // isVersionOf GO:0006470
    Pcp_dephosphorylation_V = 0.3; Pcp_dephosphorylation_Km = 0.1;
  PCnp_dephosphorylation: PCnp => PCn; cell*Michaelis_Menten_irreversible(PCnp_dephosphorylation_V, PCnp, PCnp_dephosphorylation_Km);  // isVersionOf GO:0006470
    PCnp_dephosphorylation_V = 0.1; PCnp_dephosphorylation_Km = 0.1;
  PCn_nonspecific_degradation: PCn => ; cell*PCn_nonspecific_degradation_k1*PCn;  // isVersionOf GO:0044257
    PCn_nonspecific_degradation_k1 = 0.01;
  PCcp_dephosphorylation: PCcp => PCc; cell*Michaelis_Menten_irreversible(PCcp_dephosphorylation_V, PCcp, PCcp_dephosphorylation_Km);  // isVersionOf GO:0006470 GO:0016311
    PCcp_dephosphorylation_V = 0.1; PCcp_dephosphorylation_Km = 0.1;

  // Unit definitions:
  unit time = 3600 second;
  unit substance = 1e-9 mole;
end
