// SBML level 2 version 1

function Activation_of_gene(Vs, B, n, K)
  Vs*B^n/(K^n + B^n);
end

function Michaelis_Menten_irreversible(V, substrate, Km)
  V*substrate/(Km + substrate);
end
Michaelis_Menten_irreversible is "Michaelis-Menten (irreversible)";

function mRNA_translated_into_protein(k, mRNA)
  k*mRNA;
end

function Inhibition_of_gene(vsb, K, m, Bn)
  vsb*K^m/(K^m + Bn^m);
end

model Model_1()
  // Leloup2003_CircClock_DD_REV-ERBalpha
  // This is model in continous darkness (DD) described in the article Toward a detailed computational model for the mammalian circadian clock
  // This model features the full interlocked negative and positive regulation of Per,Cry,Bmal and REV-ERBalpha. The model exhibits robust oscillations quite independent of the initial conditions for teh parameters given. Each species is assigned zero as initial value, and the graph started at time=120h.
  // Simulation results could be reproduced using Copasi 4.0.19(development) and roadRunner online.
  // This model originates from BioModels Database: A Database of Annotated Published Models. It is copyright (c) 2005-2010 The BioModels Team.
  // To the extent possible under law, all copyright and related or neighbouring rights to this encoded model have been dedicated to the public domain worldwide. Please refer to CC0 Public Domain Dedication for more information.
  // In summary, you are entitled to use this encoded model in absolutely any manner you deem suitable, verbatim, or with modification, alone or embedded it in a larger context, redistribute it, commercially or not, in a restricted way or not..
  // To cite BioModels Database, please use Le Novère N., Bornstein B., Broicher A., Courtot M., Donizelli M., Dharuri H., Li L., Sauro H., Schilstra M., Shapiro B., Snoep J.L., Hucka M. (2006) BioModels Database: A Free, Centralized Database of Curated, Published, Quantitative Kinetic Models of Biochemical and Cellular Systems Nucleic Acids Res., 34: D689-D691.
  // biomodels.db:BIOMD0000000074
  // biomodels.db:MODEL1272626224
  // isDescribedBy pubmed:12775757
  // hasVersion kegg.pathway:hsa04710
  // isVersionOf GO:0007623
  // isDerivedFrom biomodels.db:BIOMD0000000021

  // Compartments:
  compartment cell = 1;  // isVersionOf GO:0005623

  // Species:
  species Mb in cell = 0;  // isVersionOf CHEBI:33699
  species Bc in cell = 0;  // hasVersion uniprot:O00327
  species Bcp in cell = 0;  // hasVersion uniprot:O00327
  species Bn in cell = 0;  // hasVersion uniprot:O00327
  species Cc in cell = 0;  // hasVersion uniprot:Q16526 uniprot:Q8IV71
  species Mc in cell = 0;  // isVersionOf CHEBI:33699
  species Ccp in cell = 0;  // hasVersion uniprot:Q16526 uniprot:Q8IV71
  species Mp in cell = 0;  // isVersionOf CHEBI:33699
  species Pc in cell = 0;  // hasVersion uniprot:O15534 uniprot:O15055 uniprot:P56645
  species Pcp in cell = 0;  // hasVersion uniprot:O15534 uniprot:O15055 uniprot:P56645
  species PCc in cell = 0;  // hasPart uniprot:O15534 uniprot:Q16526; hasPart uniprot:P56645 uniprot:Q8IV71
  species PCcp in cell = 0;  // hasPart uniprot:O15534 uniprot:Q16526; hasPart uniprot:P56645 uniprot:Q8IV71
  species PCn in cell = 0;  // hasPart uniprot:O15534 uniprot:Q16526; hasPart uniprot:P56645 uniprot:Q8IV71
  species Bnp in cell = 0;  // hasVersion uniprot:O00327
  species PCnp in cell = 0;  // hasPart uniprot:O15534 uniprot:Q16526; hasPart uniprot:O15055 uniprot:Q16526; hasPart uniprot:P56645 uniprot:Q8IV71
  species In in cell = 0;
  species Mr in cell = 0;  // isVersionOf CHEBI:33699
  species Rc in cell = 0;  // hasVersion uniprot:Q6EEZ7
  species Rn in cell = 0;  // hasVersion uniprot:Q6EEZ7

  // Reactions:
  Mb_synthesized: => Mb; cell*Inhibition_of_gene(vsb, Mb_synthesized_K, m, Rn);  // modifiers: Rn; isVersionOf GO:0045892
    vsb = 1.8; Mb_synthesized_K = 1; m = 2;
  Mb_translated_into_protein: => Bc; cell*mRNA_translated_into_protein(Mb_translated_into_protein_k, Mb);  // modifiers: Mb; isVersionOf GO:0006412
    Mb_translated_into_protein_k = 0.32;
  Mb_nonspecific_degradation: Mb => ; cell*Mb_nonspecific_degradation_k1*Mb;  // isVersionOf GO:0044257
    Mb_nonspecific_degradation_k1 = 0.02;
  Bc_phosphorylation: Bc => Bcp; cell*Michaelis_Menten_irreversible(Bc_phosphorylation_V, Bc, Bc_phosphorylation_Km);  // isVersionOf GO:0006468
    Bc_phosphorylation_V = 1.4; Bc_phosphorylation_Km = 1.006;
  reaction_4: Bc -> Bn; cell*(reaction_4_k1*Bc - reaction_4_k2*Bn); reaction_4 is "Bc transfered from cytosolic to nuclear";  // isVersionOf GO:0000060
    reaction_4_k1 = 0.8; reaction_4_k2 = 0.4;
  Mc_translated_into_protein: => Cc; cell*mRNA_translated_into_protein(Mc_translated_into_protein_k, Mc);  // modifiers: Mc; isVersionOf GO:0006412
    Mc_translated_into_protein_k = 3.2;
  Mc_nonspecific_degradation: Mc => ; cell*Mc_nonspecific_degradation_k1*Mc;  // isVersionOf GO:0044257
    Mc_nonspecific_degradation_k1 = 0.02;
  Cc_phosphorylation: Cc => Ccp; cell*Michaelis_Menten_irreversible(Cc_phosphorylation_V, Cc, Cc_phosphorylation_Km);  // isVersionOf GO:0006468
    Cc_phosphorylation_V = 1.2; Cc_phosphorylation_Km = 1.006;
  Ccp_specific_degradation: Ccp => ; cell*Michaelis_Menten_irreversible(Ccp_specific_degradation_V, Ccp, Ccp_specific_degradation_Km);  // isVersionOf GO:0008233
    Ccp_specific_degradation_V = 1.4; Ccp_specific_degradation_Km = 0.3;
  Mp_synthesis: => Mp; cell*Activation_of_gene(Mp_synthesis_Vs, Bn, Mp_synthesis_n, Mp_synthesis_K);  // modifiers: Bn; isVersionOf GO:0043193
    Mp_synthesis_Vs = 2.4; Mp_synthesis_n = 2; Mp_synthesis_K = 0.6;
  Mp_translated_into_protein: => Pc; cell*mRNA_translated_into_protein(Mp_translated_into_protein_k, Mp);  // modifiers: Mp
    Mp_translated_into_protein_k = 1.2;
  Pcp_specific_degradation: Pcp => ; cell*Michaelis_Menten_irreversible(Pcp_specific_degradation_V, Pcp, Pcp_specific_degradation_Km);  // isVersionOf GO:0008233
    Pcp_specific_degradation_V = 3.4; Pcp_specific_degradation_Km = 0.3;
  Pc_phospholation: Pc => Pcp; cell*Michaelis_Menten_irreversible(Pc_phospholation_V, Pc, Pc_phospholation_Km);  // isVersionOf GO:0006468
    Pc_phospholation_V = 9.6; Pc_phospholation_Km = 1.006;
  Cc_and_Pc_produce_PCc: Cc + Pc -> PCc; cell*(Cc_and_Pc_produce_PCc_k1*Cc*Pc - Cc_and_Pc_produce_PCc_k2*PCc);  // isVersionOf GO:0043623
    Cc_and_Pc_produce_PCc_k1 = 0.8; Cc_and_Pc_produce_PCc_k2 = 0.4;
  PCc_phospholation: PCc => PCcp; cell*Michaelis_Menten_irreversible(PCc_phospholation_V, PCc, PCc_phospholation_Km);  // isVersionOf GO:0006468
    PCc_phospholation_V = 2.4; PCc_phospholation_Km = 1.006;
  PCcp_specific_degradation: PCcp => ; cell*Michaelis_Menten_irreversible(PCcp_specific_degradation_V, PCcp, PCcp_specific_degradation_Km);  // isVersionOf GO:0008233
    PCcp_specific_degradation_V = 1.4; PCcp_specific_degradation_Km = 0.3;
  PCc_transfered_into_nuclear: PCc -> PCn; cell*(PCc_transfered_into_nuclear_k1*PCc - PCc_transfered_into_nuclear_k2*PCn);  // isVersionOf GO:0000060
    PCc_transfered_into_nuclear_k1 = 0.8; PCc_transfered_into_nuclear_k2 = 0.4;
  PCnp_nonspecific_degradation: PCnp => ; cell*PCnp_nonspecific_degradation_k1*PCnp;  // isVersionOf GO:0044257
    PCnp_nonspecific_degradation_k1 = 0.02;
  Bcp_nonspecific_degradation: Bcp => ; cell*Bcp_nonspecific_degradation_k1*Bcp;  // isVersionOf GO:0044257
    Bcp_nonspecific_degradation_k1 = 0.02;
  Bnp_nonspecific_degradation: Bnp => ; cell*Bnp_nonspecific_degradation_k1*Bnp;  // isVersionOf GO:0044257
    Bnp_nonspecific_degradation_k1 = 0.02;
  Mc_synthesis: => Mc; cell*Activation_of_gene(Mc_synthesis_Vs, Bn, Mc_synthesis_n, Mc_synthesis_K);  // modifiers: Bn; isPartOf GO:0043193
    Mc_synthesis_Vs = 2.2; Mc_synthesis_n = 2; Mc_synthesis_K = 0.6;
  PCn_phospholation: PCn => PCnp; cell*Michaelis_Menten_irreversible(PCn_phospholation_V, PCn, PCn_phospholation_Km);  // isVersionOf GO:0006468
    PCn_phospholation_V = 2.4; PCn_phospholation_Km = 1.006;
  Mp_nonspecific_degradation: Mp => ; cell*Mp_nonspecific_degradation_k1*Mp;  // isVersionOf GO:0044257
    Mp_nonspecific_degradation_k1 = 0.02;
  reaction_23: PCn + Bn -> In; cell*(reaction_23_k1*PCn*Bn - reaction_23_k2*In); reaction_23 is "Per_Cry and Clock_Bmal form inactive complex";  // isVersionOf GO:0043623
    reaction_23_k1 = 1; reaction_23_k2 = 0.2;
  Mb_specific_degradation: Mb => ; cell*Michaelis_Menten_irreversible(Mb_specific_degradation_V, Mb, Mb_specific_degradation_Km);  // isVersionOf GO:0008233
    Mb_specific_degradation_V = 1.3; Mb_specific_degradation_Km = 0.4;
  Mc_specific_degradation: Mc => ; cell*Michaelis_Menten_irreversible(Mc_specific_degradation_V, Mc, Mc_specific_degradation_Km);  // isVersionOf GO:0008233
    Mc_specific_degradation_V = 2; Mc_specific_degradation_Km = 0.4;
  Mp_specific_degradation: Mp => ; cell*Michaelis_Menten_irreversible(Mp_specific_degradation_V, Mp, Mp_specific_degradation_Km);  // isVersionOf GO:0008233
    Mp_specific_degradation_V = 2.2; Mp_specific_degradation_Km = 0.3;
  Pc_nonspecific_degradation: Pc => ; cell*Pc_nonspecific_degradation_k1*Pc;  // isVersionOf GO:0044257
    Pc_nonspecific_degradation_k1 = 0.02;
  Cc_nonspecific_degradation: Cc => ; cell*Cc_nonspecific_degradation_k1*Cc;  // isVersionOf GO:0044257
    Cc_nonspecific_degradation_k1 = 0.02;
  Pcp_nonspecific_degradation: Pcp => ; cell*Pcp_nonspecific_degradation_k1*Pcp;  // isVersionOf GO:0044257
    Pcp_nonspecific_degradation_k1 = 0.02;
  Ccp_nonspecific_degradation: Ccp => ; cell*Ccp_nonspecific_degradation_k1*Ccp;  // isVersionOf GO:0044257
    Ccp_nonspecific_degradation_k1 = 0.02;
  PCcp_nonspecific_degradation: PCcp => ; cell*PCcp_nonspecific_degradation_k1*PCcp;  // isVersionOf GO:0044257
    PCcp_nonspecific_degradation_k1 = 0.02;
  PCc_nonspecific_degradation: PCc => ; cell*PCc_nonspecific_degradation_k1*PCc;  // isVersionOf GO:0044257
    PCc_nonspecific_degradation_k1 = 0.02;
  PCnp_specific_degradation: PCnp => ; cell*Michaelis_Menten_irreversible(PCnp_specific_degradation_V, PCnp, PCnp_specific_degradation_Km);  // isVersionOf GO:0008233
    PCnp_specific_degradation_V = 1.4; PCnp_specific_degradation_Km = 0.3;
  Bc_nonspecific_degradation: Bc => ; cell*Bc_nonspecific_degradation_k1*Bc;  // isVersionOf GO:0044257
    Bc_nonspecific_degradation_k1 = 0.02;
  Bcp_specific_degradation: Bcp => ; cell*Michaelis_Menten_irreversible(Bcp_specific_degradation_V, Bcp, Bcp_specific_degradation_Km);  // isVersionOf GO:0008233
    Bcp_specific_degradation_V = 3; Bcp_specific_degradation_Km = 0.3;
  Bn_phospholation: Bn => Bnp; cell*Michaelis_Menten_irreversible(Bn_phospholation_V, Bn, Bn_phospholation_Km);  // isVersionOf GO:0006468
    Bn_phospholation_V = 1.4; Bn_phospholation_Km = 1.006;
  Bnp_specific_degradation: Bnp => ; cell*Michaelis_Menten_irreversible(Bnp_specific_degradation_V, Bnp, Bnp_specific_degradation_Km);  // isVersionOf GO:0008233
    Bnp_specific_degradation_V = 3; Bnp_specific_degradation_Km = 0.3;
  In_nonspecific_degration: In => ; cell*In_nonspecific_degration_k1*In;  // isVersionOf GO:0044257
    In_nonspecific_degration_k1 = 0.02;
  In_specific_degradation: In => ; cell*Michaelis_Menten_irreversible(In_specific_degradation_V, In, In_specific_degradation_Km);  // isVersionOf GO:0008233
    In_specific_degradation_V = 1.6; In_specific_degradation_Km = 0.3;
  Bn_nonspecific_degradation: Bn => ; cell*Bn_nonspecific_degradation_k1*Bn;  // isVersionOf GO:0044257
    Bn_nonspecific_degradation_k1 = 0.02;
  Bcp_dephospholation: Bcp => Bc; cell*Michaelis_Menten_irreversible(Bcp_dephospholation_V, Bcp, Bcp_dephospholation_Km);  // isVersionOf GO:0006470
    Bcp_dephospholation_V = 0.2; Bcp_dephospholation_Km = 0.1;
  Bnp_dephospholation: Bnp => Bn; cell*Michaelis_Menten_irreversible(Bnp_dephospholation_V, Bnp, Bnp_dephospholation_Km);  // isVersionOf GO:0006470
    Bnp_dephospholation_V = 0.4; Bnp_dephospholation_Km = 0.1;
  Ccp_dephospholation: Ccp => Cc; cell*Michaelis_Menten_irreversible(Ccp_dephospholation_V, Ccp, Ccp_dephospholation_Km);  // isPartOf GO:0006470
    Ccp_dephospholation_V = 0.2; Ccp_dephospholation_Km = 0.1;
  Pcp_dephospholation: Pcp => Pc; cell*Michaelis_Menten_irreversible(Pcp_dephospholation_V, Pcp, Pcp_dephospholation_Km);  // isVersionOf GO:0006470
    Pcp_dephospholation_V = 0.6; Pcp_dephospholation_Km = 0.1;
  PCnp_dephospholation: PCnp => PCn; cell*Michaelis_Menten_irreversible(PCnp_dephospholation_V, PCnp, PCnp_dephospholation_Km);  // isVersionOf GO:0006470
    PCnp_dephospholation_V = 0.2; PCnp_dephospholation_Km = 0.1;
  PCn_nonspecific_degradation: PCn => ; cell*PCn_nonspecific_degradation_k1*PCn;  // isVersionOf GO:0044257
    PCn_nonspecific_degradation_k1 = 0.02;
  PCcp_dephospholation: PCcp => PCc; cell*Michaelis_Menten_irreversible(PCcp_dephospholation_V, PCcp, PCcp_dephospholation_Km);  // isVersionOf GO:0006470
    PCcp_dephospholation_V = 0.2; PCcp_dephospholation_Km = 0.1;
  Mr_synthesized: => Mr; cell*Activation_of_gene(Mr_synthesized_Vs, Bn, Mr_synthesized_n, Mr_synthesized_K);  // modifiers: Bn; isPartOf GO:0043193
    Mr_synthesized_Vs = 1.6; Mr_synthesized_n = 2; Mr_synthesized_K = 0.6;
  Mr_nonspecific_degradation: Mr => ; cell*Mr_nonspecific_degradation_k1*Mr;  // isVersionOf GO:0044257
    Mr_nonspecific_degradation_k1 = 0.02;
  Mr_specific_degradation: Mr => ; cell*Michaelis_Menten_irreversible(Mr_specific_degradation_V, Mr, Mr_specific_degradation_Km);  // isVersionOf GO:0008233
    Mr_specific_degradation_V = 1.6; Mr_specific_degradation_Km = 0.4;
  Mr_translated_into_protein: => Rc; cell*mRNA_translated_into_protein(Mr_translated_into_protein_k, Mr);  // modifiers: Mr; isVersionOf GO:0006412
    Mr_translated_into_protein_k = 1.7;
  Rc_transfered_into_nuclear: Rc -> Rn; cell*(Rc_transfered_into_nuclear_k1*Rc - Rc_transfered_into_nuclear_k2*Rn);  // isVersionOf GO:0000060
    Rc_transfered_into_nuclear_k1 = 0.8; Rc_transfered_into_nuclear_k2 = 0.4;
  Rc_specific_degradation: Rc => ; cell*Michaelis_Menten_irreversible(Rc_specific_degradation_V, Rc, Rc_specific_degradation_Km);  // isVersionOf GO:0008233
    Rc_specific_degradation_V = 4.4; Rc_specific_degradation_Km = 0.3;
  Rc_nonspecific_degradation: Rc => ; cell*Rc_nonspecific_degradation_k1*Rc;  // isVersionOf GO:0044257
    Rc_nonspecific_degradation_k1 = 0.02;
  Rn_specific_degradation: Rn => ; cell*Michaelis_Menten_irreversible(Rn_specific_degradation_V, Rn, Rn_specific_degradation_Km);  // isVersionOf GO:0008233
    Rn_specific_degradation_V = 0.8; Rn_specific_degradation_Km = 0.3;
  Rn_nonspecific_degradation: Rn => ; cell*Rn_nonspecific_degradation_k1*Rn;  // isVersionOf GO:0044257
    Rn_nonspecific_degradation_k1 = 0.02;

  // Unit definitions:
  unit time = 3600 second;
  unit substance = 1e-9 mole;
end
