// SBML level 2 version 1

model Cronwright2002_Glycerol_Synthesis()
  // .
  // .
  // .
  // SBML level 2 code generated for the JWS Online project by Jacky Snoep using PySCeS
  // Run this model online at http://jjj.biochem.sun.ac.za
  // To cite JWS Online please refer to: Olivier, B.G. and Snoep, J.L. (2004) Web-based modelling using JWS Online, Bioinformatics, 20:2143-2144
  // .
  // .
  // .
  // .
  // .
  // .
  // Biomodels Curation The model reproduces the flux value of "Gpp p" (rate of Glycerol synthesis) as depicted in Fig 3 of the paper. The model reproduces the flux for early exponential phase , however it can be used to reproduce the values for other phases by plugging in appropriate values for maximal rates as given in Table 1 and metabolite concentrations as given in Table 2 of the paper. The model was succesfully reproduced using Jarnac.
  // To the extent possible under law, all copyright and related or neighbouring rights to this encoded model have been dedicated to the public domain worldwide. Please refer to CC0 Public Domain Dedication for more information.
  // In summary, you are entitled to use this encoded model in absolutely any manner you deem suitable, verbatim, or with modification, alone or embedded it in a larger context, redistribute it, commercially or not, in a restricted way or not.
  // To cite BioModels Database, please use: Li C, Donizelli M, Rodriguez N, Dharuri H, Endler L, Chelliah V, Li L, He E, Henry A, Stefan MI, Snoep JL, Hucka M, Le Novère N, Laibe C (2010) BioModels Database: An enhanced, curated and annotated resource for published quantitative kinetic models. BMC Syst Biol., 4:92.
  // biomodels.db:BIOMD0000000076
  // biomodels.db:MODEL6624139162
  // isDescribedBy pubmed:12200299
  // GO:0006114
  // isPartOf kegg.pathway:sce00561
  // occursIn taxonomy:4932

  // Compartments:
  compartment compartment = 1; compartment is "Cytoplasm";  // GO:0005737

  // Species:
  species G3P in compartment = 0; G3P is "Glycerol 3-phosphate";  // CHEBI:15978 kegg.compound:C00093
  species $Gly in compartment = 15.1; Gly is "Glycerol";  // CHEBI:17754 kegg.compound:C00116
  species $DHAP in compartment = 0.59;  // CHEBI:16108 kegg.compound:C00111

  // Reactions:
  Gpd_p: $DHAP -> G3P; compartment*Vf1/(K1nadh*K1dhap)*(NADH*DHAP - NAD*G3P/Keq1)/((1 + F16BP/K1f16bp + ATP/K1atp + ADP/K1adp)*(1 + NADH/K1nadh + NAD/K1nad)*(1 + DHAP/K1dhap + G3P/K1g3p)); Gpd_p is "Glycerol 3-phosphate dehydrogenase";  // ec-code:1.1.1.94 kegg.reaction:R00842
    Vf1 = 47 mM_per_minute; K1nadh = 0.023 mM; K1dhap = 0.54 mM; NADH = 1.87 mM; NAD = 1.45 mM; Keq1 = 10000 dimensionless; F16BP = 6.01 mM; K1f16bp = 4.8 mM; ATP = 2.37 mM; K1atp = 0.73 mM; ADP = 2.17 mM; K1adp = 2 mM; K1nad = 0.93 mM; K1g3p = 1.2 mM;
  Gpp_p: G3P -> $Gly; compartment*V2*G3P/K2g3p/((1 + G3P/K2g3p)*(1 + Phi/K2phi)); Gpp_p is "Glycerol 3-phosphatase";  // ec-code:3.1.3.21 kegg.reaction:R00841
    V2 = 53 mM_per_minute; K2g3p = 3.5 mM; Phi = 1 mM; K2phi = 1 mM;

  // Unit definitions:
  unit substance = 1e-3 mole; substance is "millimole";
  unit time = 60 second; time is "minute";
  unit mM_per_minute = 1e-3 mole / (litre * 60 second);
  unit mM = 1e-3 mole / litre;
end
