// SBML level 2 version 1

model Model_1()
  // Thomsen1989_AdenylateCyclase
  // This model reproduces figure 5 and figure 4(B)of the paper, with Kinh represented by [G-GTP]. We arbitrarily chosed to set the initial concentration of D to 31 micorMolar based on legend of figure 4. [R] was not given anywhere in the paper and was chosen to calibrate the sigmoid response to an increased [GTP]. THe figure 5 in the model was successfully simulated on COPASI 4.0 ,the figure 4(B) was sucessfully simulated on both COPASI and SBML_odeSolver.
  // There are two curves for Kinh in the absence and presence of NaCl in the figure obtained from simulations of the model using parameters of set C and set D.Here in the model the initial value given is from set D.The parameters in set C :k7=0.5, k10=1.0,k5=0.1,the others are the same with set D.
  // To the extent possible under law, all copyright and related or neighbouring rights to this encoded model have been dedicated to the public domain worldwide. Please refer to CC0 Public Domain Dedication for more information.
  // In summary, you are entitled to use this encoded model in absolutely any manner you deem suitable, verbatim, or with modification, alone or embedded it in a larger context, redistribute it, commercially or not, in a restricted way or not.
  // To cite BioModels Database, please use: Li C, Donizelli M, Rodriguez N, Dharuri H, Endler L, Chelliah V, Li L, He E, Henry A, Stefan MI, Snoep JL, Hucka M, Le Novère N, Laibe C (2010) BioModels Database: An enhanced, curated and annotated resource for published quantitative kinetic models. BMC Syst Biol., 4:92.
  // biomodels.db:BIOMD0000000080
  // biomodels.db:MODEL1173806337
  // isDescribedBy pubmed:2574993
  // isVersionOf GO:0031684 GO:0007194
  // occursIn taxonomy:9606

  // Compartments:
  compartment cell = 1;  // isVersionOf GO:0005623

  // Species:
  species D in cell = 3.1e-5;  // CHEBI:35569
  species DR in cell = 0;  // hasPart CHEBI:35569 uniprot:P08913; hasPart CHEBI:35569 uniprot:P18089; hasPart CHEBI:35569 uniprot:P18825
  species DRG_GDP in cell = 0;  // hasPart CHEBI:35569 CHEBI:17552 uniprot:P08913 GO:0005834; hasPart CHEBI:35569 CHEBI:17552 uniprot:P18089 GO:0005834; hasPart CHEBI:35569 CHEBI:17552 uniprot:P18825 GO:0005834
  species G_GDP in cell = 1e-6;  // hasPart CHEBI:17552 GO:0005834
  species DRG in cell = 0;  // hasPart CHEBI:35569 uniprot:P08913 GO:0005834; hasPart CHEBI:35569 uniprot:P18089 GO:0005834; hasPart CHEBI:35569 uniprot:P18825 GO:0005834
  species GDP in cell = 0;  // CHEBI:17552
  species DRG_GTP in cell = 0;  // hasPart CHEBI:35569 CHEBI:15996 uniprot:P08913 GO:0005834; hasPart CHEBI:35569 CHEBI:15996 uniprot:P18089 GO:0005834; hasPart CHEBI:35569 CHEBI:15996 uniprot:P18825 GO:0005834
  species GTP in cell = 1e-5;  // CHEBI:15996
  species G_GTP in cell = 0;  // hasPart CHEBI:15996 GO:0005834
  species R in cell = 1e-10;  // hasVersion uniprot:P08913 uniprot:P18089 uniprot:P18825

  // Reactions:
  Forming_DR: D + R -> DR; cell*(k1*D*R - k7*DR);  // isVersionOf GO:0031690
    k1 = 5000000; k7 = 10;
  Reaction_2: DR + G_GDP -> DRG_GDP; cell*(k2*DR*G_GDP - k8*DRG_GDP); Reaction_2 is "DR Binding with G_GDP produce DRG_GDP";  // isVersionOf GO:0001664
    k2 = 100000000; k8 = 0.1;
  GDP_Releasing: DRG_GDP -> GDP + DRG; cell*(k3*DRG_GDP - k9*GDP*DRG);  // isVersionOf GO:0043241
    k3 = 5; k9 = 100000;
  GTP_binding_with_DRG: DRG + GTP -> DRG_GTP; cell*(k4*DRG*GTP - k10*DRG_GTP);  // isVersionOf GO:0005525 GO:0032403
    k4 = 5000000; k10 = 55;
  G_protein_activation: DRG_GTP => G_GTP + DR; cell*k5*DRG_GTP;  // isVersionOf GO:0043241
    k5 = 1;
  Hydrolysis_of_GTP_to_GDP: G_GTP => G_GDP; cell*k6*G_GTP;  // isVersionOf GO:0003924
    k6 = 2;
end
