// SBML level 2 version 1

model Model_1()
  // Thomsen1988_AdenylateCyclase_Inhibition
  // This model was created according to the paper Inhibition of Adenylate Cyclase Is Mediated by the High Affinity Conformation of the alpha2-Adrenergic Receptor published in 1988.
  // The figure4 (steady state curve) in the paper has been simulated having the same plot with Copasi 4.0.19 (development) and roadRunner(online).Because the initial concentration of R and D were not given in the paper ,so we gave it 1e-9 Mol/L and 1e-8 Mol/L respectively.
  // Pay attention that the simulations of steady state concentration of species in arbitrary units are shown for figure4 and figure6 in the paper.
  // To the extent possible under law, all copyright and related or neighbouring rights to this encoded model have been dedicated to the public domain worldwide. Please refer to CC0 Public Domain Dedication for more information.
  // In summary, you are entitled to use this encoded model in absolutely any manner you deem suitable, verbatim, or with modification, alone or embedded it in a larger context, redistribute it, commercially or not, in a restricted way or not.
  // To cite BioModels Database, please use: Li C, Donizelli M, Rodriguez N, Dharuri H, Endler L, Chelliah V, Li L, He E, Henry A, Stefan MI, Snoep JL, Hucka M, Le Novère N, Laibe C (2010) BioModels Database: An enhanced, curated and annotated resource for published quantitative kinetic models. BMC Syst Biol., 4:92.
  // biomodels.db:BIOMD0000000082
  // biomodels.db:MODEL1166069080
  // isDescribedBy pubmed:2904647
  // isVersionOf GO:0031684 GO:0007194
  // occursIn taxonomy:9606

  // Compartments:
  compartment cell = 1;  // isVersionOf GO:0005623

  // Species:
  species agonist in cell = 1e-8; agonist is "D";  // isVersionOf CHEBI:35569
  species DR in cell = 0;  // hasPart CHEBI:35569 uniprot:P18825; hasPart CHEBI:35569 uniprot:P08913; hasPart CHEBI:35569 uniprot:P18089
  species DRG_GDP in cell = 0;  // hasPart CHEBI:17552 CHEBI:35569 uniprot:P08913 GO:0005834; hasPart CHEBI:17552 CHEBI:35569 uniprot:P18089 GO:0005834; hasPart CHEBI:17552 CHEBI:35569 uniprot:P18825 GO:0005834
  species DRG in cell = 0;  // hasPart CHEBI:35569 uniprot:P18089 GO:0005834; hasPart CHEBI:35569 uniprot:P08913 GO:0005834; hasPart CHEBI:35569 uniprot:P18825 GO:0005834
  species GDP in cell = 0;  // CHEBI:17552
  species DRG_GTP in cell = 0;  // hasPart CHEBI:15996 CHEBI:35569 uniprot:P08913 GO:0005834; hasPart CHEBI:15996 CHEBI:35569 uniprot:P18089 GO:0005834; hasPart CHEBI:15996 CHEBI:35569 uniprot:P18825 GO:0005834
  species GTP in cell = 1e-5;  // CHEBI:15996
  species Recptor in cell = 1e-9;  // hasVersion uniprot:P08913 uniprot:P18089 uniprot:P18825
  species G_GDP in cell = 1e-9;  // hasPart CHEBI:17552 GO:0005834
  species G_GTP in cell = 0;  // hasPart CHEBI:15996 GO:0005834

  // Reactions:
  Forming: agonist + Recptor -> DR; cell*(k1*agonist*Recptor - k7*DR); Forming is "Forming DR";  // isVersionOf GO:0031690
    k1 = 5000000; k7 = 0.5;
  reaction_1: DR + G_GDP -> DRG_GDP; cell*(k2*DR*G_GDP - k8*DRG_GDP); reaction_1 is "DR binding with G_GDP produc DRG_GDP";  // isVersionOf GO:0001664
    k2 = 100000000; k8 = 0.1;
  GDP_releasing: DRG_GDP -> GDP + DRG; cell*(k3*DRG_GDP - k9*DRG*GDP);  // isVersionOf GO:0043241
    k3 = 0.1; k9 = 100000;
  GTP_binding_with_DRG: DRG + GTP -> DRG_GTP; cell*(k4*DRG*GTP - k10*DRG_GTP);  // isVersionOf GO:0005525 GO:0032403
    k4 = 10000000; k10 = 0.1;
  reaction_4: DRG_GTP => G_GTP + DR; cell*k5*DRG_GTP; reaction_4 is "DRG_GTP dissociates(G protein activation)";  // isVersionOf GO:0043241
    k5 = 0.05;
  G_protein_inactivated: G_GTP => G_GDP; cell*k6*G_GTP;  // isVersionOf GO:0003924
    k6 = 0.1;
end
