// SBML level 2 version 1

model Hornberg2005_ERKcascade()
  // SBML level 2 code generated for the JWS Online project by Jacky Snoep using PySCeS
  // Run this model online at http://jjj.biochem.sun.ac.za
  // To cite JWS Online please refer to: Olivier, B.G. and Snoep, J.L. (2004) Web-based modelling using JWS Online, Bioinformatics, 20:2143-2144
  // Biomodels Curation The model reproduces the time series depicted in Fig 2 of the paper. Also, by varying the values of Vmax for the second kinase (k5) the time series of X3P as shown in Fig3 can be reproduced. The model was successfully tested on MathSBML and Jarnac.
  // To the extent possible under law, all copyright and related or neighbouring rights to this encoded model have been dedicated to the public domain worldwide. Please refer to CC0 Public Domain Dedication for more information.
  // In summary, you are entitled to use this encoded model in absolutely any manner you deem suitable, verbatim, or with modification, alone or embedded it in a larger context, redistribute it, commercially or not, in a restricted way or not.
  // To cite BioModels Database, please use: Li C, Donizelli M, Rodriguez N, Dharuri H, Endler L, Chelliah V, Li L, He E, Henry A, Stefan MI, Snoep JL, Hucka M, Le Novère N, Laibe C (2010) BioModels Database: An enhanced, curated and annotated resource for published quantitative kinetic models. BMC Syst Biol., 4:92.
  // biomodels.db:BIOMD0000000084
  // biomodels.db:MODEL6623610941
  // isDescribedBy pubmed:15634347
  // GO:0000165 GO:0007173
  // hasPart kegg.pathway:rno04010
  // occursIn taxonomy:40674

  // Compartments:
  compartment compartment = 1; compartment is "Cytosol";  // GO:0005829

  // Species:
  substanceOnly species R in compartment = 0.5;  // isVersionOf uniprot:Q9QX70
  substanceOnly species Rin in compartment = 0;  // isVersionOf uniprot:Q9QX70
  substanceOnly species x1 in compartment = 1;  // isVersionOf uniprot:P04049
  substanceOnly species x1p in compartment = 0;  // isVersionOf uniprot:P04049
  substanceOnly species x2 in compartment = 1;  // isVersionOf uniprot:Q02750
  substanceOnly species x2p in compartment = 0;  // isVersionOf uniprot:Q02750
  substanceOnly species x3 in compartment = 1;  // isVersionOf uniprot:P28482
  substanceOnly species x3p in compartment = 0;  // isVersionOf uniprot:P28482

  // Reactions:
  Receptor_inactivation: R -> Rin; Vm1*R/(Km1 + R);  // isVersionOf GO:0007175
    Vm1 = 1; Km1 = 0.1;
  Receptor_activation: Rin -> R; Vm2*Rin/(Km2 + Rin);  // isVersionOf GO:0045741
    Vm2 = 0.01; Km2 = 0.1;
  Kinase_1_activation: x1 -> x1p; k3*R*x1/(Km3 + x1); Kinase_1_activation is "Kinase-1 activation";  // modifiers: R; GO:0000185
    k3 = 1; Km3 = 0.1;
  Kinase_1_inactivation: x1p -> x1; Vm4*x1p/(Km4 + x1p); Kinase_1_inactivation is "Kinase-1 inactivation";  // GO:0051390
    Vm4 = 0.3; Km4 = 1;
  Kinase_2_activation: x2 -> x2p; k5*x1p*x2/(Km5 + x2); Kinase_2_activation is "Kinase-2 activation";  // modifiers: x1p; ec-code:2.7.11.1 GO:0000186 GO:0004709
    k5 = 1; Km5 = 0.1;
  Kinase_2_inactivation: x2p -> x2; Vm6*x2p/(Km6 + x2p); Kinase_2_inactivation is "Kinase-2 inactivation";  // GO:0051389
    Vm6 = 0.3; Km6 = 1;
  Kinase_3_activation: x3 -> x3p; k7*x2p*x3/(Km7 + x3); Kinase_3_activation is "Kinase-3 activation";  // modifiers: x2p; ec-code:2.7.12.2 GO:0000187 GO:0004708
    k7 = 1; Km7 = 0.1;
  Kinase_3_inactivation: x3p -> x3; Vm8*x3p/Km8/(1 + x3p/Km8 + Inh/Ki8); Kinase_3_inactivation is "Kinase-3 inactivation";  // isVersionOf GO:0043407
    Vm8 = 0.3; Km8 = 1; Inh = 0; Ki8 = 1;

  // Unit definitions:
  unit substance = item; substance is "dimensionless";
end
