// SBML level 2 version 1

model Proctor2005_Hsp90()
  // Hsp90model_basis510
  // This is model is according to the paper Modelling the actions of chaperones and their role in ageing. This is a stochastic model coded in SBML. Figure 2A and Figure2B has been reproduced by Gillespie2 and Copasi4.0.19(development).
  // To the extent possible under law, all copyright and related or neighbouring rights to this encoded model have been dedicated to the public domain worldwide. Please refer to CC0 Public Domain Dedication for more information.
  // In summary, you are entitled to use this encoded model in absolutely any manner you deem suitable, verbatim, or with modification, alone or embedded it in a larger context, redistribute it, commercially or not, in a restricted way or not.
  // To cite BioModels Database, please use: Li C, Donizelli M, Rodriguez N, Dharuri H, Endler L, Chelliah V, Li L, He E, Henry A, Stefan MI, Snoep JL, Hucka M, Le Novère N, Laibe C (2010) BioModels Database: An enhanced, curated and annotated resource for published quantitative kinetic models. BMC Syst Biol., 4:92.
  // biomodels.db:BIOMD0000000091
  // biomodels.db:MODEL2223638385
  // isDescribedBy pubmed:15610770
  // isVersionOf GO:0051085 GO:0007569 GO:0009408
  // occursIn taxonomy:131567

  // Compartments:
  compartment compartment = 1;  // isVersionOf GO:0005623

  // Species:
  substanceOnly species Hsp90 in compartment = 300000;  // interpro:IPR001404
  substanceOnly species HCom in compartment = 5900;  // isVersionOf GO:0043234
  substanceOnly species HSF1 in compartment = 100;  // isVersionOf interpro:IPR000232
  substanceOnly species MisP in compartment = 0;
  substanceOnly species MCom in compartment = 0;  // isVersionOf GO:0043234
  substanceOnly species TriH in compartment = 0;  // isVersionOf GO:0043234; hasPart interpro:IPR000232
  substanceOnly species DiH in compartment = 0;  // isVersionOf GO:0043234; hasPart interpro:IPR000232
  substanceOnly species NatP in compartment = 6000000;
  substanceOnly species AggP in compartment = 0;
  substanceOnly species HSE in compartment = 1;
  substanceOnly species HSETriH in compartment = 0;
  substanceOnly species X in compartment = 0;
  substanceOnly species ROS in compartment = 100;  // isVersionOf CHEBI:26523
  substanceOnly species ATP in compartment = 10000;  // CHEBI:15422 kegg.compound:C00002
  substanceOnly species ADP in compartment = 1000;  // CHEBI:16761 kegg.compound:C00008
  substanceOnly species $source in compartment = 0;

  // Parameters:
  k1 = 10;
  k2 = 2e-5;
  k3 = 50;
  k4 = 1e-5;
  k5 = 4e-6;
  k6 = 6e-7;
  k7 = 1e-7;
  k8 = 500;
  k9 = 1;
  k10 = 0.01;
  k11 = 100;
  k12 = 0.5;
  k13 = 0.5;
  k14 = 0.05;
  k15 = 0.08;
  k16 = 1000;
  k17 = 8.02e-9;
  k18 = 12;
  k19 = 0.02;
  k20 = 0.1;
  k21 = 0.001;

  // Reactions:
  proteinSynthesis: 0 $source => NatP; k1;  // isVersionOf GO:0009059
  misfolding: NatP + ROS => MisP + ROS; k2*NatP*ROS;  // hasVersion GO:0022417
  Hsp90MisPBinding: MisP + Hsp90 => MCom; k3*MisP*Hsp90;  // isVersionOf GO:0051879
  unsuccessulRefolding: MCom => MisP + Hsp90; k4*MCom; unsuccessulRefolding is "unsuccessfulRefolding";  // isVersionOf GO:0043624
  refolding: MCom + ATP => Hsp90 + NatP + ADP; k5*MCom*ATP;  // isVersionOf GO:0042026 GO:0016887
  proteinDegradation: MisP + ATP => ADP; k6*MisP*ATP;  // isVersionOf GO:0016887
  proteinAggregation1: 2 MisP => AggP; (MisP - 1)*k7*MisP/2;  // isVersionOf GO:0043623
  proteinAggregation2: MisP + AggP => 2 AggP; k7*MisP*AggP;  // isVersionOf GO:0043623
  Hsp90HSF1Binding: Hsp90 + HSF1 => HCom; k8*Hsp90*HSF1;  // isVersionOf GO:0051879
  Hsp90HSF1Release: HCom => Hsp90 + HSF1; k9*HCom;  // isVersionOf GO:0043624
  dimerisation: 2 HSF1 => DiH; (HSF1 - 1)*k10*HSF1/2;  // isVersionOf GO:0043623
  trimerisation: HSF1 + DiH => TriH; k11*HSF1*DiH;  // isVersionOf GO:0043623
  deTrimerisation: TriH => HSF1 + DiH; k12*TriH;  // isVersionOf GO:0043624
  deDimerisation: DiH => 2 HSF1; k13*DiH;  // isVersionOf GO:0043624
  HSETriHBinding: TriH + HSE => HSETriH; k14*HSE*TriH;  // isVersionOf GO:0043623
  HSETriHRelease: HSETriH => HSE + TriH; k15*HSETriH;  // isVersionOf GO:0043624
  Hsp90Transcription: HSETriH => HSETriH + Hsp90; k16*HSETriH;  // isVersionOf GO:0006350
  Hsp90Degradation: Hsp90 + ATP => ADP; k17*Hsp90*ATP;  // isVersionOf GO:0016887 GO:0044257
  countTime: 0 $source => X; 1;
  ATPformation: ADP => ATP; k18*ADP;  // isVersionOf GO:0006757
  ATPconsumption: ATP => ADP; k19*ATP;  // isVersionOf GO:0016887
  radicalFormation: 0 $source => ROS; k20;  // isPartOf GO:0006800
  radicalScavenging: ROS => ; k21*ROS;  // isVersionOf GO:0016209

  // Unit definitions:
  unit substance = item;
end
