// SBML level 2 version 1

model Fuentes2005_ZymogenActivation()
  // .
  // .
  // .
  // SBML level 2 code generated for the JWS Online project by Jacky Snoep using PySCeS
  // Run this model online at http://jjj.biochem.sun.ac.za
  // To cite JWS Online please refer to: Olivier, B.G. and Snoep, J.L. (2004) Web-based modelling using JWS Online, Bioinformatics, 20:2143-2144
  // .
  // .
  // .
  // .
  // .
  // .
  // The model reproduces Fig 1A of the paper. The model was successfully tested on MathSBML.
  // To the extent possible under law, all copyright and related or neighbouring rights to this encoded model have been dedicated to the public domain worldwide. Please refer to CC0 Public Domain Dedication for more information.
  // In summary, you are entitled to use this encoded model in absolutely any manner you deem suitable, verbatim, or with modification, alone or embedded it in a larger context, redistribute it, commercially or not, in a restricted way or not.
  // To cite BioModels Database, please use: Li C, Donizelli M, Rodriguez N, Dharuri H, Endler L, Chelliah V, Li L, He E, Henry A, Stefan MI, Snoep JL, Hucka M, Le Novère N, Laibe C (2010) BioModels Database: An enhanced, curated and annotated resource for published quantitative kinetic models. BMC Syst Biol., 4:92.
  // biomodels.db:BIOMD0000000092
  // biomodels.db:MODEL6623597435
  // isDescribedBy pubmed:15634334
  // GO:0031638
  // occursIn taxonomy:131567

  // Compartments:
  compartment compartment = 1;  // GO:0005623

  // Species:
  species z in compartment = 2.4e-5; z is "Zymogen";  // isPartOf GO:0042588
  species e in compartment = 0; e is "Enzyme";
  species w in compartment = 0; w is "Peptide";
  species ez in compartment = 0; ez is "Enzyme-Substrate complex";  // isVersionOf GO:0043234

  // Reactions:
  Intramolecular_autoactivation: z -> w + e; compartment*k1*z;  // isVersionOf GO:0043085
    k1 = 0.004 sec_inv;
  v2: z + e -> ez; compartment*(k21*e*z - k22*ez); v2 is "Intermolecular autoactivation-Complex formation";  // isVersionOf GO:0019899
    k21 = 1000 M_inv_sec_inv; k22 = 0.00021 sec_inv;
  v3: ez -> w + 2 e; compartment*k3*ez; v3 is "Intermolecular autoactivation-Enzyme release";  // isVersionOf GO:0043085
    k3 = 0.00054 sec_inv;

  // Unit definitions:
  unit M_inv_sec_inv = litre / (mole * second);
  unit sec_inv = 1 / second;
end
