// SBML level 2 version 1

model Yamada2003_JAK_STAT_Pathway()
  // Yamada2003_JAK_STAT_pathway
  // NCBS Curation CommentsThis model shows the control mechanism of Jak-Stat pathway, here SOCS1 (Suppressor of cytokine signaling-I) was identified as the negative regulator of Jak and STAT signal transduction pathway. Note: There are a few ambiguities in the paper like initial concentration of IFN and some reactions were missing in the paper that were employed for obtaining the results. The graphs are almost similar to the graphs as shown in the paper but still some ambiguities regarding the concentration are there. Thanks to Dr Satoshi Yamada for clarifying some of those ambiguities and providing the values used in simulations.
  // Biomodels Curation Comments The model reproduces Fig 2 (A,C,E,G,I,K,M) of the paper. The set of equations present in the paper are inadequate to reproduce the figures mentioned . The model appears to have been fine tuned after correspondence between the curators at NCBS and the authors. There is however a slight discrepancy between the simulation results and the plots in the paper. The model was tested on MathSBML.
  // To the extent possible under law, all copyright and related or neighbouring rights to this encoded model have been dedicated to the public domain worldwide. Please refer to CC0 Public Domain Dedication for more information.
  // In summary, you are entitled to use this encoded model in absolutely any manner you deem suitable, verbatim, or with modification, alone or embedded it in a larger context, redistribute it, commercially or not, in a restricted way or not.
  // To cite BioModels Database, please use: Li C, Donizelli M, Rodriguez N, Dharuri H, Endler L, Chelliah V, Li L, He E, Henry A, Stefan MI, Snoep JL, Hucka M, Le Novère N, Laibe C (2010) BioModels Database: An enhanced, curated and annotated resource for published quantitative kinetic models. BMC Syst Biol., 4:92.
  // biomodels.db:BIOMD0000000093
  // biomodels.db:MODEL4879478021
  // isDescribedBy pubmed:12527385
  // kegg.pathway:mmu04630 GO:0007259
  // occursIn taxonomy:10090

  // Compartments:
  compartment cytoplasm = 1;  // GO:0005737
  compartment nucleus in cytoplasm = 1;  // GO:0005634

  // Species:
  species R in cytoplasm = 10; R is "Receptor";  // uniprot:O88507
  species JAK in cytoplasm = 10;  // uniprot:P52332 interpro:IPR009127
  species RJ in cytoplasm = 0; RJ is "Receptor JAK complex";  // hasPart uniprot:P52332 uniprot:O88507
  species IFNRJ in cytoplasm = 0; IFNRJ is "Interferon-Receptor-JAK complex";  // hasPart uniprot:P52332 uniprot:O88507 uniprot:P01572
  species IFNRJ2 in cytoplasm = 0; IFNRJ2 is "IFNRJ dimer";  // hasPart uniprot:P52332 uniprot:O88507 uniprot:P01572
  species IFNRJ2_star in cytoplasm = 0; IFNRJ2_star is "Activated IFNRJ complex";  // hasPart uniprot:P52332 uniprot:O88507 uniprot:P01572
  species STAT1c in cytoplasm = 1000;  // uniprot:P42225 interpro:IPR001217
  species IFNRJ2_star_STAT1c in cytoplasm = 0;  // hasPart uniprot:P42225 uniprot:P52332 uniprot:O88507 uniprot:P01572
  species STAT1c_star in cytoplasm = 0;  // uniprot:P42225
  species IFNRJ2_star_STAT1c_star in cytoplasm = 0;  // hasPart uniprot:P42225 uniprot:P52332 uniprot:O88507 uniprot:P01572
  species STAT1c_star_STAT1c_star in cytoplasm = 0;  // uniprot:P42225
  species SHP2 in cytoplasm = 100;  // uniprot:P35235 interpro:IPR000980
  species IFNRJ2_star_SHP2 in cytoplasm = 0;  // hasPart uniprot:P35235 uniprot:P52332 uniprot:O88507 uniprot:P01572
  species PPX in cytoplasm = 50;
  species STAT1c_star_PPX in cytoplasm = 0;  // hasPart uniprot:P42225
  species STAT1c_STAT1c_star in cytoplasm = 0;  // uniprot:P42225
  species STAT1n_star_STAT1n_star in nucleus = 0;  // uniprot:P42225
  species STAT1n_star in nucleus = 0;  // uniprot:P42225
  species PPN in nucleus = 60;
  species STAT1n_star_PPN in nucleus = 0;  // hasPart uniprot:P42225
  species STAT1n in nucleus = 0;  // uniprot:P42225
  species STAT1n_STAT1n_star in nucleus = 0;  // uniprot:P42225
  species mRNAn in nucleus = 0;  // CHEBI:33699 kegg.compound:C00046
  species mRNAc in cytoplasm = 0;  // CHEBI:33699 kegg.compound:C00046
  species SOCS1 in cytoplasm = 0;  // uniprot:O35716 interpro:IPR001496
  species IFNRJ2_star_SOCS1 in cytoplasm = 0;  // hasPart uniprot:O35716 uniprot:P52332 uniprot:O88507 uniprot:P01572
  species IFNRJ2_star_SHP2_SOCS1_STAT1c in cytoplasm = 0;  // hasPart uniprot:P42225 uniprot:O35716 uniprot:P35235 uniprot:P52332
  species STAT1c_star_STAT1c_star_PPX in cytoplasm = 0;  // hasPart uniprot:P42225
  species STAT1n_star_STAT1n_star_PPN in nucleus = 0;  // hasPart uniprot:P42225
  species IFNRJ2_star_SOCS1_STAT1c in cytoplasm = 0;  // hasPart uniprot:P42225 uniprot:O35716 uniprot:P52332 uniprot:O88507
  species $IFN in cytoplasm = 10;  // uniprot:P01572
  species IFNRJ2_star_SHP2_STAT1c in cytoplasm = 0;  // hasPart uniprot:P42225 uniprot:P35235 uniprot:P52332 uniprot:O88507
  species IFNRJ2_star_SHP2_SOCS1 in cytoplasm = 0;  // hasPart uniprot:O35716 uniprot:P35235 uniprot:P52332 uniprot:O88507
  species IFNR in cytoplasm = 0;  // uniprot:O88507 uniprot:P01572

  // Reactions:
  Receptor_JAK_Binding: JAK + R => RJ; cytoplasm*(Receptor_JAK_Binding_kf*R*JAK - Receptor_JAK_Binding_kb*RJ); Receptor_JAK_Binding is "Receptor-JAK Binding";  // GO:0005133 GO:0005515
    Receptor_JAK_Binding_kf = 0.1 nM_inv_sec_inv; Receptor_JAK_Binding_kb = 0.05 sec_inv;
  Interferon_Receptor_Binding: RJ + $IFN => IFNRJ; cytoplasm*(Interferon_Receptor_Binding_kf*IFN*RJ - Interferon_Receptor_Binding_kb*IFNRJ); Interferon_Receptor_Binding is "Interferon-Receptor Binding";  // GO:0004906 GO:0019964
    Interferon_Receptor_Binding_kf = 0.02 nM_inv_sec_inv; Interferon_Receptor_Binding_kb = 0.02 sec_inv;
  v3: 2 IFNRJ => IFNRJ2; cytoplasm*(v3_kf*IFNRJ*IFNRJ - v3_kb*IFNRJ2); v3 is "IFN-Receptor complex dimerization";  // GO:0007171
    v3_kf = 0.04 nM_inv_sec_inv; v3_kb = 0.2 sec_inv;
  INF_Receptor_complex_activation: IFNRJ2 => IFNRJ2_star; cytoplasm*INF_Receptor_complex_activation_kf*IFNRJ2; INF_Receptor_complex_activation is "INF-Receptor complex activation";  // ec-code:2.7.10.2 kegg.reaction:R02584 GO:0004718
    INF_Receptor_complex_activation_kf = 0.005 sec_inv;
  Activated_INFRJ2_STAT1c_binding: IFNRJ2_star + STAT1c => IFNRJ2_star_STAT1c; cytoplasm*(Activated_INFRJ2_STAT1c_binding_kf*STAT1c*IFNRJ2_star - Activated_INFRJ2_STAT1c_binding_kb*IFNRJ2_star_STAT1c); Activated_INFRJ2_STAT1c_binding is "Activated INFRJ2-STAT1c binding";  // GO:0005515
    Activated_INFRJ2_STAT1c_binding_kf = 0.008 nM_inv_sec_inv; Activated_INFRJ2_STAT1c_binding_kb = 0.8 sec_inv;
  STAT1c_activation: IFNRJ2_star_STAT1c => STAT1c_star + IFNRJ2_star; cytoplasm*STAT1c_activation_kf*IFNRJ2_star_STAT1c;  // ec-code:2.7.10.2 GO:0007260
    STAT1c_activation_kf = 0.4 sec_inv;
  Activated_IFNRJ2_STAT1c_binding: STAT1c_star + IFNRJ2_star => IFNRJ2_star_STAT1c_star; cytoplasm*(Activated_IFNRJ2_STAT1c_binding_kf*IFNRJ2_star*STAT1c_star - Activated_IFNRJ2_STAT1c_binding_kb*IFNRJ2_star_STAT1c_star); Activated_IFNRJ2_STAT1c_binding is "Activated IFNRJ2-STAT1c binding";  // GO:0005515
    Activated_IFNRJ2_STAT1c_binding_kf = 0.005 nM_inv_sec_inv; Activated_IFNRJ2_STAT1c_binding_kb = 0.5 sec_inv;
  Activated_STAT1c_dimerization: 2 STAT1c_star => STAT1c_star_STAT1c_star; cytoplasm*(Activated_STAT1c_dimerization_kf*STAT1c_star*STAT1c_star - Activated_STAT1c_dimerization_kb*STAT1c_star_STAT1c_star);  // GO:0007261
    Activated_STAT1c_dimerization_kf = 0.02 nM_inv_sec_inv; Activated_STAT1c_dimerization_kb = 0.1 sec_inv;
  v9: SHP2 + IFNRJ2_star => IFNRJ2_star_SHP2; cytoplasm*(v9_kf*IFNRJ2_star*SHP2 - v9_kb*IFNRJ2_star_SHP2); v9 is "SHP2 binding";  // GO:0019902 GO:0005515
    v9_kf = 0.001 nM_inv_sec_inv; v9_kb = 0.2 sec_inv;
  IFNJR2_dephosphorylation: IFNRJ2_star_SHP2 => SHP2 + IFNRJ2; cytoplasm*IFNJR2_dephosphorylation_kf*IFNRJ2_star_SHP2;  // ec-code:3.1.3.48 kegg.reaction:R02585 GO:0005001
    IFNJR2_dephosphorylation_kf = 0.003 sec_inv;
  v11: STAT1c_star + PPX => STAT1c_star_PPX; cytoplasm*(v11_kf*PPX*STAT1c_star - v11_kb*STAT1c_star_PPX); v11 is "Phosphorylated STAT1c-PPX binding";  // GO:0019902 GO:0005515
    v11_kf = 0.001 nM_inv_sec_inv; v11_kb = 0.2 sec_inv;
  STAT1c_dephosphorylation: STAT1c_star_PPX => STAT1c + PPX; cytoplasm*STAT1c_dephosphorylation_kf*STAT1c_star_PPX;  // GO:0042512
    STAT1c_dephosphorylation_kf = 0.003 sec_inv;
  PPX_binding: STAT1c_star_STAT1c_star + PPX => STAT1c_star_STAT1c_star_PPX; cytoplasm*(PPX_binding_kf*PPX*STAT1c_star_STAT1c_star - PPX_binding_kb*STAT1c_star_STAT1c_star_PPX);  // GO:0019902
    PPX_binding_kf = 0.001 nM_inv_sec_inv; PPX_binding_kb = 0.2 sec_inv;
  STAT1c_dimer_dephosphorylation: STAT1c_star_STAT1c_star_PPX => STAT1c_STAT1c_star + PPX; cytoplasm*STAT1c_dimer_dephosphorylation_kf*STAT1c_star_STAT1c_star_PPX;  // GO:0042512
    STAT1c_dimer_dephosphorylation_kf = 0.003 sec_inv;
  v15: STAT1c_star + STAT1c => STAT1c_STAT1c_star; cytoplasm*(v15_kf*STAT1c*STAT1c_star - v15_kb*STAT1c_STAT1c_star); v15 is "STAT1c-phosphorylated STAT1c binding";  // GO:0005515
    v15_kf = 2e-7 nM_inv_sec_inv; v15_kb = 0.2 sec_inv;
  STAT1c_nuclear_transport: STAT1c_star_STAT1c_star => STAT1n_star_STAT1n_star; cytoplasm*STAT1c_nuclear_transport_kf*STAT1c_star_STAT1c_star; STAT1c_nuclear_transport is "STAT1c-nuclear transport";  // GO:0007262
    STAT1c_nuclear_transport_kf = 0.005 sec_inv;
  v17: 2 STAT1n_star => STAT1n_star_STAT1n_star; nucleus*(v17_kf*STAT1n_star*STAT1n_star - v17_kb*STAT1n_star_STAT1n_star); v17 is "Phosphorylated STAT1n dimerization";  // GO:0007261
    v17_kf = 0.02 nM_inv_sec_inv; v17_kb = 0.1 sec_inv;
  v18: STAT1n_star + PPN => STAT1n_star_PPN; nucleus*(v18_kf*PPN*STAT1n_star - v18_kb*STAT1n_star_PPN); v18 is "PPN binding";  // GO:0019902
    v18_kf = 0.001 nM_inv_sec_inv; v18_kb = 0.2 sec_inv;
  v19: STAT1n_star_PPN => STAT1n + PPN; nucleus*v19_kf*STAT1n_star_PPN; v19 is "STAT1n dephosphorylation";  // GO:0042512
    v19_kf = 0.005 sec_inv;
  v20: STAT1n_star_STAT1n_star + PPN => STAT1n_star_STAT1n_star_PPN; nucleus*(v20_kf*PPN*STAT1n_star_STAT1n_star - v20_kb*STAT1n_star_STAT1n_star_PPN); v20 is "PPN binding";  // GO:0019902
    v20_kf = 0.001 nM_inv_sec_inv; v20_kb = 0.2 sec_inv;
  v21: STAT1n_star_STAT1n_star_PPN => STAT1n_STAT1n_star + PPN; nucleus*v21_kf*STAT1n_star_STAT1n_star_PPN; v21 is "STAT1n dephosphorylation";  // GO:0042512
    v21_kf = 0.005 sec_inv;
  v22: STAT1n_star + STAT1n => STAT1n_STAT1n_star; nucleus*(v22_kf*STAT1n*STAT1n_star - v22_kb*STAT1n_STAT1n_star); v22 is "STAT1n-phosphorylated STAT1n dimerization";  // GO:0007261
    v22_kf = 2e-7 nM_inv_sec_inv; v22_kb = 0.2 sec_inv;
  STAT1n_transport_to_cytoplasm: STAT1n => STAT1c; nucleus*STAT1n_transport_to_cytoplasm_kf*STAT1n;  // GO:0065002
    STAT1n_transport_to_cytoplasm_kf = 0.05 sec_inv;
  Transcription: => mRNAn; nucleus*ka*STAT1n_star_STAT1n_star/(Transcription_kb + STAT1n_star_STAT1n_star);  // modifiers: STAT1n_star_STAT1n_star; GO:0006350
    ka = 0.01 nM_per_second; Transcription_kb = 400 nM;
  mRNA_transport_to_cytoplasm: mRNAn => mRNAc; nucleus*mRNA_transport_to_cytoplasm_kf*mRNAn;  // GO:0006406
    mRNA_transport_to_cytoplasm_kf = 0.001 sec_inv;
  SOCS1_synthesis: => SOCS1; cytoplasm*SOCS1_synthesis_kf*mRNAc;  // modifiers: mRNAc; GO:0006412
    SOCS1_synthesis_kf = 0.01 sec_inv;
  mRNAc_degradation: mRNAc => ; cytoplasm*mRNAc_degradation_kf*mRNAc;  // GO:0006402
    mRNAc_degradation_kf = 0.0005 sec_inv;
  SOCS1_degradation: SOCS1 => ; cytoplasm*SOCS1_degradation_kf*SOCS1;  // GO:0044257
    SOCS1_degradation_kf = 0.0005 sec_inv;
  v29: IFNRJ2_star + SOCS1 => IFNRJ2_star_SOCS1; cytoplasm*(v29_kf*SOCS1*IFNRJ2_star - v29_kb*IFNRJ2_star_SOCS1); v29 is "phosphorylated IFNRJ2-SOCS1 binding";  // GO:0005515
    v29_kf = 0.02 nM_inv_sec_inv; v29_kb = 0.1 sec_inv;
  v30: IFNRJ2_star_SOCS1 + STAT1c => IFNRJ2_star_SOCS1_STAT1c; cytoplasm*(v30_kf*STAT1c*IFNRJ2_star_SOCS1 - v30_kb*IFNRJ2_star_SOCS1_STAT1c); v30 is "STAT1c binding";  // GO:0005515
    v30_kf = 0.008 nM_inv_sec_inv; v30_kb = 0.8 sec_inv;
  v31: IFNRJ2_star_SOCS1_STAT1c + SHP2 => IFNRJ2_star_SHP2_SOCS1_STAT1c; cytoplasm*(v31_kf*SHP2*IFNRJ2_star_SOCS1_STAT1c - v31_kb*IFNRJ2_star_SHP2_SOCS1_STAT1c); v31 is "SHP2 binding";  // GO:0005515 GO:0019902
    v31_kf = 0.001 nM_inv_sec_inv; v31_kb = 0.2 sec_inv;
  v32: IFNRJ2_star_SHP2_SOCS1_STAT1c => IFNRJ2 + SOCS1 + STAT1c + SHP2; cytoplasm*v32_kf*IFNRJ2_star_SHP2_SOCS1_STAT1c; v32 is "IFNRJ2 dephosphorylation";  // GO:0005001
    v32_kf = 0.003 sec_inv;
  v33: IFNRJ2_star_SHP2_SOCS1_STAT1c => IFNRJ2_star_SHP2_STAT1c; cytoplasm*v33_kf*IFNRJ2_star_SHP2_SOCS1_STAT1c; v33 is "SOCS1 unbinding";
    v33_kf = 0.0005 sec_inv;
  v34: IFNRJ2_star_SOCS1 + SHP2 => IFNRJ2_star_SHP2_SOCS1; cytoplasm*(v34_kf*SHP2*IFNRJ2_star_SOCS1 - v34_kb*IFNRJ2_star_SHP2_SOCS1); v34 is "SHP2 binding";  // GO:0019902
    v34_kf = 0.001 nM_inv_sec_inv; v34_kb = 0.2 sec_inv;
  v35: IFNRJ2_star_SHP2_SOCS1 + STAT1c => IFNRJ2_star_SHP2_SOCS1_STAT1c; cytoplasm*(v35_kf*STAT1c*IFNRJ2_star_SHP2_SOCS1 - v35_kb*IFNRJ2_star_SHP2_SOCS1_STAT1c); v35 is "STAT1c binding";  // GO:0005515
    v35_kf = 0.008 nM_inv_sec_inv; v35_kb = 0.8 sec_inv;
  v36: IFNRJ2_star_STAT1c + SHP2 => IFNRJ2_star_SHP2_STAT1c; cytoplasm*(v36_kf*SHP2*IFNRJ2_star_STAT1c - v36_kb*IFNRJ2_star_SHP2_STAT1c); v36 is "SHP2 binding";  // GO:0019902
    v36_kf = 0.001 nM_inv_sec_inv; v36_kb = 0.2 sec_inv;
  v37: IFNRJ2_star_SHP2_STAT1c => STAT1c + SHP2 + IFNRJ2; cytoplasm*v37_kf*IFNRJ2_star_SHP2_STAT1c;  // GO:0043624
    v37_kf = 0.003 sec_inv;
  v38: IFNRJ2_star_SOCS1_STAT1c => IFNRJ2_star_STAT1c; cytoplasm*v38_kf*IFNRJ2_star_SOCS1_STAT1c; v38 is "SOCS1 unbinding";
    v38_kf = 0.0005 sec_inv;
  v39: IFNRJ2_star_SHP2_SOCS1 => IFNRJ2_star_SHP2; cytoplasm*v39_kf*IFNRJ2_star_SHP2_SOCS1; v39 is "SOCS1 unbinding";
    v39_kf = 0.0005 sec_inv;
  v40: IFNRJ2_star_SHP2_SOCS1 => SHP2 + IFNRJ2 + SOCS1; cytoplasm*v40_kf*IFNRJ2_star_SHP2_SOCS1; v40 is "IFNRJ2 dephosphorylation";  // GO:0005001 GO:0043624
    v40_kf = 0.003 sec_inv;
  v41: IFNRJ2_star_SOCS1 => IFNRJ2_star; cytoplasm*v41_kf*IFNRJ2_star_SOCS1; v41 is "SOCS1 unbinding";
    v41_kf = 0.0005 sec_inv;
  v42: IFNRJ2_star_STAT1c + SOCS1 => IFNRJ2_star_SOCS1_STAT1c; cytoplasm*(v42_kf*SOCS1*IFNRJ2_star_STAT1c - v42_kb*IFNRJ2_star_SOCS1_STAT1c); v42 is "SOCS1 binding";  // GO:0005515
    v42_kf = 0.02 nM_inv_sec_inv; v42_kb = 0.1 sec_inv;
  v43: IFNRJ2_star_SHP2 + SOCS1 => IFNRJ2_star_SHP2_SOCS1; cytoplasm*(v43_kf*SOCS1*IFNRJ2_star_SHP2 - v43_kb*IFNRJ2_star_SHP2_SOCS1); v43 is "SOCS1 binding";  // GO:0005515
    v43_kf = 0.02 nM_inv_sec_inv; v43_kb = 0.1 sec_inv;
  v44: IFNRJ2_star_SHP2_STAT1c + SOCS1 => IFNRJ2_star_SHP2_SOCS1_STAT1c; cytoplasm*(v44_kf*SOCS1*IFNRJ2_star_SHP2_STAT1c - v44_kb*IFNRJ2_star_SHP2_SOCS1_STAT1c); v44 is "SOCS1 binding";  // GO:0005515
    v44_kf = 0.02 nM_inv_sec_inv; v44_kb = 0.1 sec_inv;
  Interferon_receptor_binding: R + $IFN => IFNR; cytoplasm*(Interferon_receptor_binding_kf*IFN*R - Interferon_receptor_binding_kb*IFNR); Interferon_receptor_binding is "Interferon-receptor binding";  // GO:0019964 GO:0004906
    Interferon_receptor_binding_kf = 0.02 nM_inv_sec_inv; Interferon_receptor_binding_kb = 0.02 sec_inv;
  IFNR_JAK_binding: JAK + IFNR => IFNRJ; cytoplasm*(IFNR_JAK_binding_kf*IFNR*JAK - IFNR_JAK_binding_kb*IFNRJ); IFNR_JAK_binding is "IFNR-JAK binding";  // GO:0005515 GO:0005133
    IFNR_JAK_binding_kf = 0.1 nM_inv_sec_inv; IFNR_JAK_binding_kb = 0.05 sec_inv;

  // Unit definitions:
  unit substance = 1e-9 mole; substance is "nanomoles";
  unit nM_per_second = 1e-9 mole / (litre * second);
  unit sec_inv = 1 / second;
  unit nM_inv_sec_inv = litre / (1e-9 mole * second);
  unit nM = 1e-9 mole / litre;
end
