// SBML level 2 version 1

model Rozi2003_Glycogen_Phosphorylase_Activation()
  // Rozi2003_GlycogenPhosphorylase_Activation
  // The model reproduces the temporal evolution of Glycogen phosphorylase for a vale of Vm5=30 as depicted in Fig 1a of the paper. The model makes use of calcium oscillations from the Borghans model to stimulate the activation of glycogen phosphorylase. Hence, this is a simple extension of the Borghans model. The model was succesfully tested on MathSBML and Jarnac
  // This model originates from BioModels Database: A Database of Annotated Published Models. It is copyright (c) 2005-2008 The BioModels Team.
  // To the extent possible under law, all copyright and related or neighbouring rights to this encoded model have been dedicated to the public domain worldwide. Please refer to CC0 Public Domain Dedication for more information.
  // In summary, you are entitled to use this encoded model in absolutely any manner you deem suitable, verbatim, or with modification, alone or embedded it in a larger context, redistribute it, commercially or not, in a restricted way or not..
  // To cite BioModels Database, please use Le Novère N., Bornstein B., Broicher A., Courtot M., Donizelli M., Dharuri H., Li L., Sauro H., Schilstra M., Shapiro B., Snoep J.L., Hucka M. (2006) BioModels Database: A Free, Centralized Database of Curated, Published, Quantitative Kinetic Models of Biochemical and Cellular Systems Nucleic Acids Res., 34: D689-D691.
  // biomodels.db:BIOMD0000000100
  // biomodels.db:MODEL4589754842
  // isDescribedBy pubmed:14556891
  // isVersionOf GO:0048016 GO:0019722
  // hasPart GO:0008607
  // hasPart kegg.pathway:hsa04020

  // Compartments:
  compartment extracellular = 1;  // GO:0005615
  compartment cytosol in extracellular = 1;  // GO:0005829
  compartment intravesicular in cytosol = 1;  // isVersionOf GO:0005783

  // Species:
  species $EC in extracellular = 1000; EC is "Extracellular Calcium";  // CHEBI:29108 kegg.compound:C00076
  species Z in cytosol = 0; Z is "Cytosolic Calcium";  // CHEBI:29108 kegg.compound:C00076
  species A in cytosol = 0.45; A is "IP3";  // CHEBI:16595 kegg.compound:C01245
  species Y in intravesicular = 0.36; Y is "Intravesicular Calcium";  // CHEBI:29108 kegg.compound:C00076
  species GP in cytosol = 1; GP is "Glycogen Phosphorylase";  // isVersionOf uniprot:P11216

  // Parameters:
  v0 = 2 uM_per_min;
  v1 = 2 uM_per_min;
  beta = 0.5 dimensionless;
  Vm2 = 6 uM_per_min;
  K2 = 0.1 uM;
  Vm3 = 20 uM_per_min;
  m = 2 dimensionless;
  Ka = 0.2 uM;
  Ky = 0.2 uM;
  Kz = 0.5 uM;
  Kf = 1 min_inv;
  K = 10 min_inv;
  V4 = 2 uM_per_min;
  Vm5 = 30 uM_per_min;
  n = 4 dimensionless;
  K5 = 1 uM;
  Kd = 0.4 uM;
  epsilon = 0.1 min_inv;
  Vpm1 = 1.5 min_inv;
  gamma = 9 dimensionless;
  Ka5 = 0.5 uM;
  K1 = 0.1;
  Ka6 = 0.5 uM;
  Vpm2 = 0.6 min_inv;
  alpha = 9 dimensionless;
  G = 10000 uM;
  Ka1 = 10000 uM;
  Kp2 = 0.2;
  Ka2 = 10000 uM;
  p = 2 dimensionless;

  // Reactions:
  vin: $EC => Z; extracellular*(v0 + v1*beta); vin is "Calcium Influx";  // isVersionOf GO:0006816 GO:0007204
  R2: Z => Y; cytosol*(Vm2*Z^2/(K2^2 + Z^2)); R2 is "Calcium transport to internal store";  // isVersionOf GO:0051481 GO:0032470
  Calcium_transport_to_cytosol: Y => Z; intravesicular*Vm3*A^4*Y^2*Z^m/((Ka^4 + A^4)*(Ky^2 + Y^2)*(Kz^m + Z^m));  // modifiers: A; isVersionOf GO:0007204
  Rkf: Y => Z; intravesicular*Kf*Y; Rkf is "Calcium leak";  // isVersionOf GO:0007204
  Rkz: Z => $EC; cytosol*K*Z; Rkz is "Calcium efflux";  // isVersionOf GO:0051481
  R4: => A; cytosol*beta*V4; R4 is "Agonist stimulated production of IP3";  // isVersionOf GO:0032959
  Ca_dependant_IP3_degradation: A => ; cytosol*Vm5*A^p*Z^n/((K5^p + A^p)*(Kd^n + Z^n)); Ca_dependant_IP3_degradation is "Ca-dependant IP3 degradation";  // modifiers: Z; isVersionOf GO:0032961
  Ca_independent_IP3_degradation: A => ; cytosol*epsilon*A;  // isVersionOf GO:0032961
  Phosphorylase_kinase_activity: => GP; cytosol*(Vpm1*(1 + gamma*Z^4/(Ka5^4 + Z^4))*(1 - GP)/(K1/(1 + Z^4/Ka6^4) + 1 - GP));  // modifiers: Z; ec-code:2.7.11.19 GO:0004689
  Phosphatase_activity: GP => ; cytosol*(Vpm2*(1 + alpha*G/(Ka1 + G))*GP/(Kp2/(1 + G/Ka2) + GP));  // ec-code:3.1.3.17 GO:0050196

  // Unit definitions:
  unit substance = 1e-6 mole; substance is "micromole";
  unit uM = 1e-6 mole / litre;
  unit uM_per_min = 1e-6 mole / (litre * 3600 second);
  unit time = 3600 second; time is "minutes";
  unit min_inv = 1 / (3600 second);
end
