// SBML level 2 version 4
// dcterms:bibliographicCitation: http://identifiers.org/pubmed/17408507

function Function_for_ProteinSynthesis(Source, cytosol, k1)
  k1*Source*cytosol/cytosol;
end

function Function_for_Refolding(MisP, cytosol, k3)
  k3*MisP*cytosol/cytosol;
end

function Function_for_Misfolding(NatP, ROS, cytosol, k2)
  k2*NatP*cytosol*ROS*cytosol/cytosol;
end

function Function_for_Monoubiquitination(E2_Ub, E3_MisP, cytosol, k64)
  k64*E2_Ub*cytosol*E3_MisP*cytosol/cytosol;
end

function Function_for_Polyubiquitination1(E2_Ub, MisP_Ub, cytosol, k65)
  k65*MisP_Ub*cytosol*E2_Ub*cytosol/cytosol;
end

function Function_for_Polyubiquitination2(E2_Ub, MisP_Ub2, cytosol, k65)
  k65*MisP_Ub2*cytosol*E2_Ub*cytosol/cytosol;
end

function Function_for_DeubiquitinationBoundMisP5(DUB, MisP_Ub8_Proteasome, cytosol, k68)
  k68*MisP_Ub8_Proteasome*cytosol*DUB*cytosol/cytosol;
end

function Function_for_Deubiqutination4(DUB, MisP_Ub5, cytosol, k66)
  k66*MisP_Ub5*cytosol*DUB*cytosol/cytosol;
end

function Function_for_ProteasomeBinding2(MisP_Ub5, Proteasome, cytosol, k67)
  k67*MisP_Ub5*cytosol*Proteasome*cytosol/cytosol;
end

function Function_for_Polyubiquitination4(E2_Ub, MisP_Ub4, cytosol, k65)
  k65*MisP_Ub4*cytosol*E2_Ub*cytosol/cytosol;
end

function Function_for_Deubiqutination7(DUB, MisP_Ub2, cytosol, k66)
  k66*MisP_Ub2*cytosol*DUB*cytosol/cytosol;
end

function Function_for_E1UbBinding(ATP, E1, Ub, cytosol, k62)
  k62*E1*cytosol*Ub*cytosol*ATP*cytosol/(5000 + ATP*cytosol)/cytosol;
end

function Function_for_Polyubiquitination3(E2_Ub, MisP_Ub3, cytosol, k65)
  k65*MisP_Ub3*cytosol*E2_Ub*cytosol/cytosol;
end

function Function_for_E2UbBinding(E1_Ub, E2, cytosol, k63)
  k63*E2*cytosol*E1_Ub*cytosol/cytosol;
end

function Function_for_Deubiqutination3(DUB, MisP_Ub6, cytosol, k66)
  k66*MisP_Ub6*cytosol*DUB*cytosol/cytosol;
end

function Function_for_MisPE3Binding(E3, MisP, cytosol, k61)
  k61*MisP*cytosol*E3*cytosol/cytosol;
end

function Function_for_MisPE3Release(E3_MisP, cytosol, k61r)
  k61r*E3_MisP*cytosol/cytosol;
end

function Function_for_DeubiquitinationBoundMisP3(DUB, MisP_Ub6_Proteasome, cytosol, k68)
  k68*MisP_Ub6_Proteasome*cytosol*DUB*cytosol/cytosol;
end

function Function_for_Polyubiquitination6(E2_Ub, MisP_Ub6, cytosol, k65)
  k65*MisP_Ub6*cytosol*E2_Ub*cytosol/cytosol;
end

function Function_for_ProteasomeBinding3(MisP_Ub6, Proteasome, cytosol, k67)
  k67*MisP_Ub6*cytosol*Proteasome*cytosol/cytosol;
end

function Function_for_ProteasomeBinding5(MisP_Ub8, Proteasome, cytosol, k67)
  k67*MisP_Ub8*cytosol*Proteasome*cytosol/cytosol;
end

function Function_for_Polyubiquitination5(E2_Ub, MisP_Ub5, cytosol, k65)
  k65*MisP_Ub5*cytosol*E2_Ub*cytosol/cytosol;
end

function Function_for_DeubiquitinationBoundMisP4(DUB, MisP_Ub7_Proteasome, cytosol, k68)
  k68*MisP_Ub7_Proteasome*cytosol*DUB*cytosol/cytosol;
end

function Function_for_Deubiqutination1(DUB, MisP_Ub8, cytosol, k66)
  k66*MisP_Ub8*cytosol*DUB*cytosol/cytosol;
end

function Function_for_Deubiqutination5(DUB, MisP_Ub4, cytosol, k66)
  k66*MisP_Ub4*cytosol*DUB*cytosol/cytosol;
end

function Function_for_Deubiqutination6(DUB, MisP_Ub3, cytosol, k66)
  k66*MisP_Ub3*cytosol*DUB*cytosol/cytosol;
end

function Function_for_Deubiqutination2(DUB, MisP_Ub7, cytosol, k66)
  k66*MisP_Ub7*cytosol*DUB*cytosol/cytosol;
end

function Function_for_Polyubiquitination7(E2_Ub, MisP_Ub7, cytosol, k65)
  k65*MisP_Ub7*cytosol*E2_Ub*cytosol/cytosol;
end

function Function_for_ProteasomeActivity1(ATP, MisP_Ub4_Proteasome, cytosol, k69)
  k69*MisP_Ub4_Proteasome*cytosol*ATP*cytosol/(5000 + ATP*cytosol)/cytosol;
end

function Function_for_ProteasomeActivity4(ATP, MisP_Ub7_Proteasome, cytosol, k69)
  k69*MisP_Ub7_Proteasome*cytosol*ATP*cytosol/(5000 + ATP*cytosol)/cytosol;
end

function Function_for_ProteasomeBinding4(MisP_Ub7, Proteasome, cytosol, k67)
  k67*MisP_Ub7*cytosol*Proteasome*cytosol/cytosol;
end

function Function_for_ProteasomeBinding1(MisP_Ub4, Proteasome, cytosol, k67)
  k67*MisP_Ub4*cytosol*Proteasome*cytosol/cytosol;
end

function Function_for_DeubiquitinationBoundMisP2(DUB, MisP_Ub5_Proteasome, cytosol, k68)
  k68*MisP_Ub5_Proteasome*cytosol*DUB*cytosol/cytosol;
end

function Function_for_DeubiquitinationBoundMisP1(DUB, MisP_Ub4_Proteasome, cytosol, k68)
  k68*MisP_Ub4_Proteasome*cytosol*DUB*cytosol/cytosol;
end

function Function_for_ProteasomeActivity3(ATP, MisP_Ub6_Proteasome, cytosol, k69)
  k69*MisP_Ub6_Proteasome*cytosol*ATP*cytosol/(5000 + ATP*cytosol)/cytosol;
end

function Function_for_ProteasomeActivity2(ATP, MisP_Ub5_Proteasome, cytosol, k69)
  k69*MisP_Ub5_Proteasome*cytosol*ATP*cytosol/(5000 + ATP*cytosol)/cytosol;
end

function Function_for_Deubiqutination8(DUB, MisP_Ub, cytosol, k66)
  k66*MisP_Ub*cytosol*DUB*cytosol/cytosol;
end

function Function_for_ProteasomeActivity5(ATP, MisP_Ub8_Proteasome, cytosol, k69)
  k69*MisP_Ub8_Proteasome*cytosol*ATP*cytosol/(5000 + ATP*cytosol)/cytosol;
end

function Function_for_Aggregation2(AggP, MisP, cytosol, k71)
  k71*MisP*cytosol*AggP*cytosol/cytosol;
end

function Function_for_Aggregation3(MisP_Ub, cytosol, k72)
  k72*MisP_Ub*cytosol*(MisP_Ub*cytosol - 1)*0.5/cytosol;
end

function Function_for_Aggregation4(MisP_Ub2, cytosol, k72)
  k72*MisP_Ub2*cytosol*(MisP_Ub2*cytosol - 1)*0.5/cytosol;
end

function Function_for_Aggregation5(MisP_Ub3, cytosol, k72)
  k72*MisP_Ub3*cytosol*(MisP_Ub3*cytosol - 1)*0.5/cytosol;
end

function Function_for_Aggregation26(AggP, MisP_Ub8, cytosol, k72)
  k72*MisP_Ub8*cytosol*AggP*cytosol/cytosol;
end

function Function_for_Aggregation21(AggP, MisP_Ub3, cytosol, k72)
  k72*MisP_Ub3*cytosol*AggP*cytosol/cytosol;
end

function Function_for_Aggregation46(MisP_Ub4, MisP_Ub6, cytosol, k72)
  k72*MisP_Ub4*cytosol*MisP_Ub6*cytosol/cytosol;
end

function Function_for_Aggregation25(AggP, MisP_Ub7, cytosol, k72)
  k72*MisP_Ub7*cytosol*AggP*cytosol/cytosol;
end

function Function_for_Aggregation27(MisP_Ub, MisP_Ub2, cytosol, k72)
  k72*MisP_Ub*cytosol*MisP_Ub2*cytosol/cytosol;
end

function Function_for_Aggregation36(MisP_Ub2, MisP_Ub5, cytosol, k72)
  k72*MisP_Ub2*cytosol*MisP_Ub5*cytosol/cytosol;
end

function Function_for_Aggregation6(MisP_Ub4, cytosol, k72)
  k72*MisP_Ub4*cytosol*(MisP_Ub4*cytosol - 1)*0.5/cytosol;
end

function Function_for_Aggregation7(MisP_Ub5, cytosol, k72)
  k72*MisP_Ub5*cytosol*(MisP_Ub5*cytosol - 1)*0.5/cytosol;
end

function Function_for_Aggregation9(MisP_Ub7, cytosol, k72)
  k72*MisP_Ub7*cytosol*(MisP_Ub7*cytosol - 1)*0.5/cytosol;
end

function Function_for_Aggregation8(MisP_Ub6, cytosol, k72)
  k72*MisP_Ub6*cytosol*(MisP_Ub6*cytosol - 1)*0.5/cytosol;
end

function Function_for_Aggregation1(MisP, cytosol, k71)
  k71*MisP*cytosol*(MisP*cytosol - 1)*0.5/cytosol;
end

function Function_for_Aggregation11(MisP, MisP_Ub, cytosol, k72)
  k72*MisP_Ub*cytosol*MisP*cytosol/cytosol;
end

function Function_for_Aggregation22(AggP, MisP_Ub4, cytosol, k72)
  k72*MisP_Ub4*cytosol*AggP*cytosol/cytosol;
end

function Function_for_Aggregation14(MisP, MisP_Ub4, cytosol, k72)
  k72*MisP_Ub4*cytosol*MisP*cytosol/cytosol;
end

function Function_for_Aggregation24(AggP, MisP_Ub6, cytosol, k72)
  k72*MisP_Ub6*cytosol*AggP*cytosol/cytosol;
end

function Function_for_Aggregation34(MisP_Ub2, MisP_Ub3, cytosol, k72)
  k72*MisP_Ub2*cytosol*MisP_Ub3*cytosol/cytosol;
end

function Function_for_Aggregation41(MisP_Ub3, MisP_Ub5, cytosol, k72)
  k72*MisP_Ub3*cytosol*MisP_Ub5*cytosol/cytosol;
end

function Function_for_Aggregation13(MisP, MisP_Ub3, cytosol, k72)
  k72*MisP_Ub3*cytosol*MisP*cytosol/cytosol;
end

function Function_for_Aggregation43(MisP_Ub3, MisP_Ub7, cytosol, k72)
  k72*MisP_Ub3*cytosol*MisP_Ub7*cytosol/cytosol;
end

function Function_for_Aggregation10(MisP_Ub8, cytosol, k72)
  k72*MisP_Ub8*cytosol*(MisP_Ub8*cytosol - 1)*0.5/cytosol;
end

function Function_for_Aggregation12(MisP, MisP_Ub2, cytosol, k72)
  k72*MisP_Ub2*cytosol*MisP*cytosol/cytosol;
end

function Function_for_Aggregation15(MisP, MisP_Ub5, cytosol, k72)
  k72*MisP_Ub5*cytosol*MisP*cytosol/cytosol;
end

function Function_for_Aggregation16(MisP, MisP_Ub6, cytosol, k72)
  k72*MisP_Ub6*cytosol*MisP*cytosol/cytosol;
end

function Function_for_Aggregation17(MisP, MisP_Ub7, cytosol, k72)
  k72*MisP_Ub7*cytosol*MisP*cytosol/cytosol;
end

function Function_for_Aggregation18(MisP, MisP_Ub8, cytosol, k72)
  k72*MisP_Ub8*cytosol*MisP*cytosol/cytosol;
end

function Function_for_Aggregation44(MisP_Ub3, MisP_Ub8, cytosol, k72)
  k72*MisP_Ub3*cytosol*MisP_Ub8*cytosol/cytosol;
end

function Function_for_Aggregation33(MisP_Ub, MisP_Ub8, cytosol, k72)
  k72*MisP_Ub*cytosol*MisP_Ub8*cytosol/cytosol;
end

function Function_for_Aggregation23(AggP, MisP_Ub5, cytosol, k72)
  k72*MisP_Ub5*cytosol*AggP*cytosol/cytosol;
end

function Function_for_Aggregation52(MisP_Ub6, MisP_Ub7, cytosol, k72)
  k72*MisP_Ub6*cytosol*MisP_Ub7*cytosol/cytosol;
end

function Function_for_Aggregation31(MisP_Ub, MisP_Ub6, cytosol, k72)
  k72*MisP_Ub*cytosol*MisP_Ub6*cytosol/cytosol;
end

function Function_for_Aggregation50(MisP_Ub5, MisP_Ub7, cytosol, k72)
  k72*MisP_Ub5*cytosol*MisP_Ub7*cytosol/cytosol;
end

function Function_for_Aggregation53(MisP_Ub6, MisP_Ub8, cytosol, k72)
  k72*MisP_Ub6*cytosol*MisP_Ub8*cytosol/cytosol;
end

function Function_for_Aggregation51(MisP_Ub5, MisP_Ub8, cytosol, k72)
  k72*MisP_Ub5*cytosol*MisP_Ub8*cytosol/cytosol;
end

function Function_for_Aggregation35(MisP_Ub2, MisP_Ub4, cytosol, k72)
  k72*MisP_Ub2*cytosol*MisP_Ub4*cytosol/cytosol;
end

function Function_for_Aggregation37(MisP_Ub2, MisP_Ub6, cytosol, k72)
  k72*MisP_Ub2*cytosol*MisP_Ub6*cytosol/cytosol;
end

function Function_for_Aggregation32(MisP_Ub, MisP_Ub7, cytosol, k72)
  k72*MisP_Ub*cytosol*MisP_Ub7*cytosol/cytosol;
end

function Function_for_Aggregation19(AggP, MisP_Ub, cytosol, k72)
  k72*MisP_Ub*cytosol*AggP*cytosol/cytosol;
end

function Function_for_Aggregation20(AggP, MisP_Ub2, cytosol, k72)
  k72*MisP_Ub2*cytosol*AggP*cytosol/cytosol;
end

function Function_for_Aggregation47(MisP_Ub4, MisP_Ub7, cytosol, k72)
  k72*MisP_Ub4*cytosol*MisP_Ub7*cytosol/cytosol;
end

function Function_for_Aggregation49(MisP_Ub5, MisP_Ub6, cytosol, k72)
  k72*MisP_Ub5*cytosol*MisP_Ub6*cytosol/cytosol;
end

function Function_for_Aggregation48(MisP_Ub4, MisP_Ub8, cytosol, k72)
  k72*MisP_Ub4*cytosol*MisP_Ub8*cytosol/cytosol;
end

function Function_for_Aggregation45(MisP_Ub4, MisP_Ub5, cytosol, k72)
  k72*MisP_Ub4*cytosol*MisP_Ub5*cytosol/cytosol;
end

function Function_for_Aggregation42(MisP_Ub3, MisP_Ub6, cytosol, k72)
  k72*MisP_Ub3*cytosol*MisP_Ub6*cytosol/cytosol;
end

function Function_for_Aggregation28(MisP_Ub, MisP_Ub3, cytosol, k72)
  k72*MisP_Ub*cytosol*MisP_Ub3*cytosol/cytosol;
end

function Function_for_Aggregation29(MisP_Ub, MisP_Ub4, cytosol, k72)
  k72*MisP_Ub*cytosol*MisP_Ub4*cytosol/cytosol;
end

function Function_for_Aggregation30(MisP_Ub, MisP_Ub5, cytosol, k72)
  k72*MisP_Ub*cytosol*MisP_Ub5*cytosol/cytosol;
end

function Function_for_Aggregation38(MisP_Ub2, MisP_Ub7, cytosol, k72)
  k72*MisP_Ub2*cytosol*MisP_Ub7*cytosol/cytosol;
end

function Function_for_Aggregation39(MisP_Ub2, MisP_Ub8, cytosol, k72)
  k72*MisP_Ub2*cytosol*MisP_Ub8*cytosol/cytosol;
end

function Function_for_Aggregation40(MisP_Ub3, MisP_Ub4, cytosol, k72)
  k72*MisP_Ub3*cytosol*MisP_Ub4*cytosol/cytosol;
end

function Function_for_Aggregation54(MisP_Ub7, MisP_Ub8, cytosol, k72)
  k72*MisP_Ub7*cytosol*MisP_Ub8*cytosol/cytosol;
end

function Function_for_SequesteringOfAggregates(AggP, cytosol, k73)
  k73*AggP*cytosol/cytosol;
end

function Function_for_ProteasomeInhibtion(AggP, Proteasome, cytosol, k74)
  k74*AggP*cytosol*Proteasome*cytosol/cytosol;
end

model Proctor2007___Age_related_decline_of_proteolysis__ubiquitin_proteome_system()
  // Proctor2007 - Age related decline of proteolysis, ubiquitin-proteome system
  // This is a stochastic model of the ubiquitin-proteasome system for a generic pool of native proteins (NatP), which have a half-life of about 10 hours under normal conditions. It is assumed that these proteins are only degraded after they have lost their native structure due to a damage event. This is represented in the model by the misfolding reaction which depends on the level of reactive oxygen species (ROS) in the cell. Misfolded proteins (MisP) are first bound by an E3 ubiquitin ligase. Ubiquitin (Ub) is activated by E1 (ubiquitin-activating enzyme) and then passed to E2 (ubiquitin-conjugating enzyme). The E2 enzyme then passes the ubiquitin molecule to the E3/MisP complex with the net effect that the misfolded protein is monoubiquitinated and both E2 and E3 are released. Further ubiquitin molecules are added in a step-wise manner. When the chain of ubiquitin molecules is of length 4 or more, the polyubiquitinated misfolded protein may bind to the proteasome. The model also includes de-ubiquitinating enzymes (DUB) which cleave ubiquitin molecules from the chain in a step-wise manner. They work on chains attached to misfolded proteins both unbound and bound to the proteasomes. Misfolded proteins bound to the proteasome may be degraded releasing ubiquitin. Misfolded proteins including ubiquitinated proteins may also aggregate. Aggregates (AggP) may be sequestered (Seq_AggP) which takes them out of harm's way or they may bind to the proteasome (AggP_Proteasome). Proteasomes bound by aggregates are no longer available for protein degradation.
  // Figure 2 and Figure 3 has been simulated using Gillespie2.
  // This model is described in the article:
  // An in silico model of the ubiquitin-proteasome system that incorporates normal homeostasis and age-related decline.
  // Proctor CJ, Tsirigotis M, Gray DA.
  // BMC Syst Biol 2007; 1: 17
  // Abstract:
  // BACKGROUND: The ubiquitin-proteasome system is responsible for homeostatic degradation of intact protein substrates as well as the elimination of damaged or misfolded proteins that might otherwise aggregate. During ageing there is a decline in proteasome activity and an increase in aggregated proteins. Many neurodegenerative diseases are characterised by the presence of distinctive ubiquitin-positive inclusion bodies in affected regions of the brain. These inclusions consist of insoluble, unfolded, ubiquitinated polypeptides that fail to be targeted and degraded by the proteasome. We are using a systems biology approach to try and determine the primary event in the decline in proteolytic capacity with age and whether there is in fact a vicious cycle of inhibition, with accumulating aggregates further inhibiting proteolysis, prompting accumulation of aggregates and so on. A stochastic model of the ubiquitin-proteasome system has been developed using the Systems Biology Mark-up Language (SBML). Simulations are carried out on the BASIS (Biology of Ageing e-Science Integration and Simulation) system and the model output is compared to experimental data wherein levels of ubiquitin and ubiquitinated substrates are monitored in cultured cells under various conditions. The model can be used to predict the effects of different experimental procedures such as inhibition of the proteasome or shutting down the enzyme cascade responsible for ubiquitin conjugation. RESULTS: The model output shows good agreement with experimental data under a number of different conditions. However, our model predicts that monomeric ubiquitin pools are always depleted under conditions of proteasome inhibition, whereas experimental data show that monomeric pools were depleted in IMR-90 cells but not in ts20 cells, suggesting that cell lines vary in their ability to replenish ubiquitin pools and there is the need to incorporate ubiquitin turnover into the model. Sensitivity analysis of the model revealed which parameters have an important effect on protein turnover and aggregation kinetics. CONCLUSION: We have developed a model of the ubiquitin-proteasome system using an iterative approach of model building and validation against experimental data. Using SBML to encode the model ensures that it can be easily modified and extended as more data become available. Important aspects to be included in subsequent models are details of ubiquitin turnover, models of autophagy, the inclusion of a pool of short-lived proteins and further details of the aggregation process.
  // This model is hosted on BioModels Database and identified by: BIOMD0000000105.
  // To cite BioModels Database, please use: BioModels Database: An enhanced, curated and annotated resource for published quantitative kinetic models.
  // To the extent possible under law, all copyright and related or neighbouring rights to this encoded model have been dedicated to the public domain worldwide. Please refer to CC0 Public Domain Dedication for more information.
  // biomodels.db:MODEL6540028317
  // biomodels.db:BIOMD0000000105
  // isVersionOf GO:0043161
  // isVersionOf biomodels.db:BIOMD0000000091
  // hasProperty DOID:1289
  // hasTaxon taxonomy:2759

  // Compartments:
  compartment cytosol = 1;  // isVersionOf GO:0005829

  // Species:
  species NatP in cytosol = 500;
  species MisP in cytosol = 0;
  species Ub in cytosol = 500;  // isVersionOf interpro:IPR000626
  species E1 in cytosol = 100;  // isVersionOf interpro:IPR000011
  species E2 in cytosol = 100;  // isVersionOf interpro:IPR000608
  species E3 in cytosol = 100;  // isVersionOf interpro:IPR000569
  species DUB in cytosol = 200;  // isVersionOf interpro:IPR001394
  species Proteasome in cytosol = 100;  // isVersionOf GO:0000502
  species ROS in cytosol = 10;  // isVersionOf CHEBI:26523
  species E1_Ub in cytosol = 0;  // hasPart interpro:IPR000011; hasPart interpro:IPR000626
  species E2_Ub in cytosol = 0;  // hasPart interpro:IPR000626; hasPart interpro:IPR000608
  species E3_MisP in cytosol = 0;
  species MisP_Ub in cytosol = 0;
  species MisP_Ub2 in cytosol = 0;
  species MisP_Ub3 in cytosol = 0;
  species MisP_Ub4 in cytosol = 0;
  species MisP_Ub5 in cytosol = 0;
  species MisP_Ub6 in cytosol = 0;
  species MisP_Ub7 in cytosol = 0;
  species MisP_Ub8 in cytosol = 0;
  species MisP_Ub4_Proteasome in cytosol = 0;
  species MisP_Ub5_Proteasome in cytosol = 0;
  species MisP_Ub6_Proteasome in cytosol = 0;
  species MisP_Ub7_Proteasome in cytosol = 0;
  species MisP_Ub8_Proteasome in cytosol = 0;
  species $ATP in cytosol = 10000;  // CHEBI:15422
  species $ADP in cytosol = 1000;  // CHEBI:16761
  species $AMP in cytosol = 1000;  // CHEBI:16027
  species $Source in cytosol = 1;
  species degUb4 in cytosol = 0;
  species degUb5 in cytosol = 0;
  species degUb6 in cytosol = 0;
  species degUb7 in cytosol = 0;
  species degUb8 in cytosol = 0;
  species totMisP in cytosol = 0;
  species refNatP in cytosol = 0;
  species AggP in cytosol = 0;
  species SeqAggP in cytosol = 0;
  species AggP_Proteasome in cytosol = 0;

  // Parameters:
  k1 = 0.01;
  k2 = 2e-6;
  k3 = 4e-6;
  k61 = 1.7e-5;
  k61r = 0.0002;
  k62 = 0.0002;
  k63 = 0.001;
  k64 = 0.001;
  k65 = 0.01;
  k66 = 1e-5;
  k67 = 1e-5;
  k68 = 1e-5;
  // This is the inhibiting proteasome activity situlation, k69=0. All the other parameters as in Tables2 and 3. If in the model is in the normal conditions, k69=1e-3.
  k69 = 0.001;
  k71 = 1e-8;
  k72 = 1e-8;
  k73 = 0.001;
  k74 = 1e-5;

  // Reactions:
  ProteinSynthesis: $Source => NatP; cytosol*Function_for_ProteinSynthesis(Source, cytosol, k1);  // isVersionOf GO:0009059
  Misfolding: NatP + ROS => MisP + ROS + totMisP; cytosol*Function_for_Misfolding(NatP, ROS, cytosol, k2);  // hasVersion GO:0022417
  Refolding: MisP => NatP + refNatP; cytosol*Function_for_Refolding(MisP, cytosol, k3);  // isVersionOf GO:0042026
  MisPE3Binding: MisP + E3 => E3_MisP; cytosol*Function_for_MisPE3Binding(E3, MisP, cytosol, k61);  // isVersionOf GO:0004842; isVersionOf GO:0005515
  MisPE3Release: E3_MisP => MisP + E3; cytosol*Function_for_MisPE3Release(E3_MisP, cytosol, k61r);  // isVersionOf GO:0043624
  E1UbBinding: E1 + Ub + $ATP => E1_Ub + $AMP; cytosol*Function_for_E1UbBinding(ATP, E1, Ub, cytosol, k62);  // isVersionOf GO:0005515; isVersionOf GO:0008641; isVersionOf GO:0006167
  E2UbBinding: E2 + E1_Ub => E2_Ub + E1; cytosol*Function_for_E2UbBinding(E1_Ub, E2, cytosol, k63);  // isVersionOf GO:0005515; isVersionOf GO:0019787
  Monoubiquitination: E2_Ub + E3_MisP => MisP_Ub + E2 + E3; cytosol*Function_for_Monoubiquitination(E2_Ub, E3_MisP, cytosol, k64);  // isVersionOf GO:0006513
  Polyubiquitination1: MisP_Ub + E2_Ub => MisP_Ub2 + E2; cytosol*Function_for_Polyubiquitination1(E2_Ub, MisP_Ub, cytosol, k65);  // isVersionOf GO:0000209
  Polyubiquitination2: MisP_Ub2 + E2_Ub => MisP_Ub3 + E2; cytosol*Function_for_Polyubiquitination2(E2_Ub, MisP_Ub2, cytosol, k65);  // isVersionOf GO:0000209
  Polyubiquitination3: MisP_Ub3 + E2_Ub => MisP_Ub4 + E2; cytosol*Function_for_Polyubiquitination3(E2_Ub, MisP_Ub3, cytosol, k65);  // isVersionOf GO:0000209
  Polyubiquitination4: MisP_Ub4 + E2_Ub => MisP_Ub5 + E2; cytosol*Function_for_Polyubiquitination4(E2_Ub, MisP_Ub4, cytosol, k65);  // isVersionOf GO:0000209
  Polyubiquitination5: MisP_Ub5 + E2_Ub => MisP_Ub6 + E2; cytosol*Function_for_Polyubiquitination5(E2_Ub, MisP_Ub5, cytosol, k65);  // isVersionOf GO:0000209
  Polyubiquitination6: MisP_Ub6 + E2_Ub => MisP_Ub7 + E2; cytosol*Function_for_Polyubiquitination6(E2_Ub, MisP_Ub6, cytosol, k65);  // isVersionOf GO:0000209
  Polyubiquitination7: MisP_Ub7 + E2_Ub => MisP_Ub8 + E2; cytosol*Function_for_Polyubiquitination7(E2_Ub, MisP_Ub7, cytosol, k65);  // isVersionOf GO:0000209
  Deubiqutination1: MisP_Ub8 + DUB => MisP_Ub7 + DUB + Ub; cytosol*Function_for_Deubiqutination1(DUB, MisP_Ub8, cytosol, k66);  // isVersionOf GO:0016579
  Deubiqutination2: MisP_Ub7 + DUB => MisP_Ub6 + DUB + Ub; cytosol*Function_for_Deubiqutination2(DUB, MisP_Ub7, cytosol, k66);  // isVersionOf GO:0016579
  Deubiqutination3: MisP_Ub6 + DUB => MisP_Ub5 + DUB + Ub; cytosol*Function_for_Deubiqutination3(DUB, MisP_Ub6, cytosol, k66);  // isVersionOf GO:0016579
  Deubiqutination4: MisP_Ub5 + DUB => MisP_Ub4 + DUB + Ub; cytosol*Function_for_Deubiqutination4(DUB, MisP_Ub5, cytosol, k66);  // isVersionOf GO:0016579
  Deubiqutination5: MisP_Ub4 + DUB => MisP_Ub3 + DUB + Ub; cytosol*Function_for_Deubiqutination5(DUB, MisP_Ub4, cytosol, k66);  // isVersionOf GO:0016579
  Deubiqutination6: MisP_Ub3 + DUB => MisP_Ub2 + DUB + Ub; cytosol*Function_for_Deubiqutination6(DUB, MisP_Ub3, cytosol, k66);  // isVersionOf GO:0016579
  Deubiqutination7: MisP_Ub2 + DUB => MisP_Ub + DUB + Ub; cytosol*Function_for_Deubiqutination7(DUB, MisP_Ub2, cytosol, k66);  // isVersionOf GO:0016579
  Deubiqutination8: MisP_Ub + DUB => MisP + DUB + Ub; cytosol*Function_for_Deubiqutination8(DUB, MisP_Ub, cytosol, k66);  // isVersionOf GO:0016579
  ProteasomeBinding1: MisP_Ub4 + Proteasome => MisP_Ub4_Proteasome; cytosol*Function_for_ProteasomeBinding1(MisP_Ub4, Proteasome, cytosol, k67);  // isVersionOf GO:0005515
  ProteasomeBinding2: MisP_Ub5 + Proteasome => MisP_Ub5_Proteasome; cytosol*Function_for_ProteasomeBinding2(MisP_Ub5, Proteasome, cytosol, k67);  // isVersionOf GO:0005515
  ProteasomeBinding3: MisP_Ub6 + Proteasome => MisP_Ub6_Proteasome; cytosol*Function_for_ProteasomeBinding3(MisP_Ub6, Proteasome, cytosol, k67);  // isVersionOf GO:0005515
  ProteasomeBinding4: MisP_Ub7 + Proteasome => MisP_Ub7_Proteasome; cytosol*Function_for_ProteasomeBinding4(MisP_Ub7, Proteasome, cytosol, k67);  // isVersionOf GO:0005515
  ProteasomeBinding5: MisP_Ub8 + Proteasome => MisP_Ub8_Proteasome; cytosol*Function_for_ProteasomeBinding5(MisP_Ub8, Proteasome, cytosol, k67);  // isVersionOf GO:0005515
  DeubiquitinationBoundMisP5: MisP_Ub8_Proteasome + DUB => MisP_Ub7_Proteasome + Ub + DUB; cytosol*Function_for_DeubiquitinationBoundMisP5(DUB, MisP_Ub8_Proteasome, cytosol, k68);  // isVersionOf GO:0016579
  DeubiquitinationBoundMisP4: MisP_Ub7_Proteasome + DUB => MisP_Ub6_Proteasome + Ub + DUB; cytosol*Function_for_DeubiquitinationBoundMisP4(DUB, MisP_Ub7_Proteasome, cytosol, k68);  // isVersionOf GO:0016579
  DeubiquitinationBoundMisP3: MisP_Ub6_Proteasome + DUB => MisP_Ub5_Proteasome + Ub + DUB; cytosol*Function_for_DeubiquitinationBoundMisP3(DUB, MisP_Ub6_Proteasome, cytosol, k68);  // isVersionOf GO:0016579
  DeubiquitinationBoundMisP2: MisP_Ub5_Proteasome + DUB => MisP_Ub4_Proteasome + Ub + DUB; cytosol*Function_for_DeubiquitinationBoundMisP2(DUB, MisP_Ub5_Proteasome, cytosol, k68);  // isVersionOf GO:0016579
  DeubiquitinationBoundMisP1: MisP_Ub4_Proteasome + DUB => MisP_Ub3 + Proteasome + Ub + DUB; cytosol*Function_for_DeubiquitinationBoundMisP1(DUB, MisP_Ub4_Proteasome, cytosol, k68);  // isVersionOf GO:0016579
  ProteasomeActivity1: MisP_Ub4_Proteasome + $ATP => 4 Ub + Proteasome + $ADP + degUb4; cytosol*Function_for_ProteasomeActivity1(ATP, MisP_Ub4_Proteasome, cytosol, k69);  // isVersionOf GO:0008233; isVersionOf GO:0016887
  ProteasomeActivity2: MisP_Ub5_Proteasome + $ATP => 5 Ub + Proteasome + $ADP + degUb5; cytosol*Function_for_ProteasomeActivity2(ATP, MisP_Ub5_Proteasome, cytosol, k69);  // isVersionOf GO:0008233; isVersionOf GO:0016887
  ProteasomeActivity3: MisP_Ub6_Proteasome + $ATP => 6 Ub + Proteasome + $ADP + degUb6; cytosol*Function_for_ProteasomeActivity3(ATP, MisP_Ub6_Proteasome, cytosol, k69);  // isVersionOf GO:0008233; isVersionOf GO:0016887
  ProteasomeActivity4: MisP_Ub7_Proteasome + $ATP => 7 Ub + Proteasome + $ADP + degUb7; cytosol*Function_for_ProteasomeActivity4(ATP, MisP_Ub7_Proteasome, cytosol, k69);  // isVersionOf GO:0008233; isVersionOf GO:0016887
  ProteasomeActivity5: MisP_Ub8_Proteasome + $ATP => 8 Ub + Proteasome + $ADP + degUb8; cytosol*Function_for_ProteasomeActivity5(ATP, MisP_Ub8_Proteasome, cytosol, k69);  // isVersionOf GO:0008233; isVersionOf GO:0016887
  Aggregation1: 2 MisP => AggP; cytosol*Function_for_Aggregation1(MisP, cytosol, k71);  // isVersionOf GO:0006461
  Aggregation2: MisP + AggP => 2 AggP; cytosol*Function_for_Aggregation2(AggP, MisP, cytosol, k71);  // isVersionOf GO:0006461
  Aggregation3: 2 MisP_Ub => AggP; cytosol*Function_for_Aggregation3(MisP_Ub, cytosol, k72);  // isVersionOf GO:0006461
  Aggregation4: 2 MisP_Ub2 => AggP; cytosol*Function_for_Aggregation4(MisP_Ub2, cytosol, k72);  // isVersionOf GO:0006461
  Aggregation5: 2 MisP_Ub3 => AggP; cytosol*Function_for_Aggregation5(MisP_Ub3, cytosol, k72);  // isVersionOf GO:0006461
  Aggregation6: 2 MisP_Ub4 => AggP; cytosol*Function_for_Aggregation6(MisP_Ub4, cytosol, k72);  // isVersionOf GO:0006461
  Aggregation7: 2 MisP_Ub5 => AggP; cytosol*Function_for_Aggregation7(MisP_Ub5, cytosol, k72);  // isVersionOf GO:0006461
  Aggregation8: 2 MisP_Ub6 => AggP; cytosol*Function_for_Aggregation8(MisP_Ub6, cytosol, k72);  // isVersionOf GO:0006461
  Aggregation9: 2 MisP_Ub7 => AggP; cytosol*Function_for_Aggregation9(MisP_Ub7, cytosol, k72);  // isVersionOf GO:0006461
  Aggregation10: 2 MisP_Ub8 => AggP; cytosol*Function_for_Aggregation10(MisP_Ub8, cytosol, k72);  // isVersionOf GO:0006461
  Aggregation11: MisP_Ub + MisP => AggP; cytosol*Function_for_Aggregation11(MisP, MisP_Ub, cytosol, k72);  // isVersionOf GO:0006461
  Aggregation12: MisP_Ub2 + MisP => AggP; cytosol*Function_for_Aggregation12(MisP, MisP_Ub2, cytosol, k72);  // isVersionOf GO:0006461
  Aggregation13: MisP_Ub3 + MisP => AggP; cytosol*Function_for_Aggregation13(MisP, MisP_Ub3, cytosol, k72);  // isVersionOf GO:0006461
  Aggregation14: MisP_Ub4 + MisP => AggP; cytosol*Function_for_Aggregation14(MisP, MisP_Ub4, cytosol, k72);  // isVersionOf GO:0006461
  Aggregation15: MisP_Ub5 + MisP => AggP; cytosol*Function_for_Aggregation15(MisP, MisP_Ub5, cytosol, k72);  // isVersionOf GO:0006461
  Aggregation16: MisP_Ub6 + MisP => AggP; cytosol*Function_for_Aggregation16(MisP, MisP_Ub6, cytosol, k72);  // isVersionOf GO:0006461
  Aggregation17: MisP_Ub7 + MisP => AggP; cytosol*Function_for_Aggregation17(MisP, MisP_Ub7, cytosol, k72);  // isVersionOf GO:0006461
  Aggregation18: MisP_Ub8 + MisP => AggP; cytosol*Function_for_Aggregation18(MisP, MisP_Ub8, cytosol, k72);  // isVersionOf GO:0006461
  Aggregation19: MisP_Ub + AggP => 2 AggP; cytosol*Function_for_Aggregation19(AggP, MisP_Ub, cytosol, k72);  // isVersionOf GO:0006461
  Aggregation20: MisP_Ub2 + AggP => 2 AggP; cytosol*Function_for_Aggregation20(AggP, MisP_Ub2, cytosol, k72);  // isVersionOf GO:0006461
  Aggregation21: MisP_Ub3 + AggP => 2 AggP; cytosol*Function_for_Aggregation21(AggP, MisP_Ub3, cytosol, k72);  // isVersionOf GO:0006461
  Aggregation22: MisP_Ub4 + AggP => 2 AggP; cytosol*Function_for_Aggregation22(AggP, MisP_Ub4, cytosol, k72);  // isVersionOf GO:0006461
  Aggregation23: MisP_Ub5 + AggP => 2 AggP; cytosol*Function_for_Aggregation23(AggP, MisP_Ub5, cytosol, k72);  // isVersionOf GO:0006461
  Aggregation24: MisP_Ub6 + AggP => 2 AggP; cytosol*Function_for_Aggregation24(AggP, MisP_Ub6, cytosol, k72);  // isVersionOf GO:0006461
  Aggregation25: MisP_Ub7 + AggP => 2 AggP; cytosol*Function_for_Aggregation25(AggP, MisP_Ub7, cytosol, k72);  // isVersionOf GO:0006461
  Aggregation26: MisP_Ub8 + AggP => 2 AggP; cytosol*Function_for_Aggregation26(AggP, MisP_Ub8, cytosol, k72);  // isVersionOf GO:0006461
  Aggregation27: MisP_Ub + MisP_Ub2 => AggP; cytosol*Function_for_Aggregation27(MisP_Ub, MisP_Ub2, cytosol, k72);  // isVersionOf GO:0006461
  Aggregation28: MisP_Ub + MisP_Ub3 => AggP; cytosol*Function_for_Aggregation28(MisP_Ub, MisP_Ub3, cytosol, k72);  // isVersionOf GO:0006461
  Aggregation29: MisP_Ub + MisP_Ub4 => AggP; cytosol*Function_for_Aggregation29(MisP_Ub, MisP_Ub4, cytosol, k72);  // isVersionOf GO:0006461
  Aggregation30: MisP_Ub + MisP_Ub5 => AggP; cytosol*Function_for_Aggregation30(MisP_Ub, MisP_Ub5, cytosol, k72);  // isVersionOf GO:0006461
  Aggregation31: MisP_Ub + MisP_Ub6 => AggP; cytosol*Function_for_Aggregation31(MisP_Ub, MisP_Ub6, cytosol, k72);  // isVersionOf GO:0006461
  Aggregation32: MisP_Ub + MisP_Ub7 => AggP; cytosol*Function_for_Aggregation32(MisP_Ub, MisP_Ub7, cytosol, k72);  // isVersionOf GO:0006461
  Aggregation33: MisP_Ub + MisP_Ub8 => AggP; cytosol*Function_for_Aggregation33(MisP_Ub, MisP_Ub8, cytosol, k72);  // isVersionOf GO:0006461
  Aggregation34: MisP_Ub2 + MisP_Ub3 => AggP; cytosol*Function_for_Aggregation34(MisP_Ub2, MisP_Ub3, cytosol, k72);  // isVersionOf GO:0006461
  Aggregation35: MisP_Ub2 + MisP_Ub4 => AggP; cytosol*Function_for_Aggregation35(MisP_Ub2, MisP_Ub4, cytosol, k72);  // isVersionOf GO:0006461
  Aggregation36: MisP_Ub2 + MisP_Ub5 => AggP; cytosol*Function_for_Aggregation36(MisP_Ub2, MisP_Ub5, cytosol, k72);  // isVersionOf GO:0006461
  Aggregation37: MisP_Ub2 + MisP_Ub6 => AggP; cytosol*Function_for_Aggregation37(MisP_Ub2, MisP_Ub6, cytosol, k72);  // isVersionOf GO:0006461
  Aggregation38: MisP_Ub2 + MisP_Ub7 => AggP; cytosol*Function_for_Aggregation38(MisP_Ub2, MisP_Ub7, cytosol, k72);  // isVersionOf GO:0006461
  Aggregation39: MisP_Ub2 + MisP_Ub8 => AggP; cytosol*Function_for_Aggregation39(MisP_Ub2, MisP_Ub8, cytosol, k72);  // isVersionOf GO:0006461
  Aggregation40: MisP_Ub3 + MisP_Ub4 => AggP; cytosol*Function_for_Aggregation40(MisP_Ub3, MisP_Ub4, cytosol, k72);  // isVersionOf GO:0006461
  Aggregation41: MisP_Ub3 + MisP_Ub5 => AggP; cytosol*Function_for_Aggregation41(MisP_Ub3, MisP_Ub5, cytosol, k72);  // isVersionOf GO:0006461
  Aggregation42: MisP_Ub3 + MisP_Ub6 => AggP; cytosol*Function_for_Aggregation42(MisP_Ub3, MisP_Ub6, cytosol, k72);  // isVersionOf GO:0006461
  Aggregation43: MisP_Ub3 + MisP_Ub7 => AggP; cytosol*Function_for_Aggregation43(MisP_Ub3, MisP_Ub7, cytosol, k72);  // isVersionOf GO:0006461
  Aggregation44: MisP_Ub3 + MisP_Ub8 => AggP; cytosol*Function_for_Aggregation44(MisP_Ub3, MisP_Ub8, cytosol, k72);  // isVersionOf GO:0006461
  Aggregation45: MisP_Ub4 + MisP_Ub5 => AggP; cytosol*Function_for_Aggregation45(MisP_Ub4, MisP_Ub5, cytosol, k72);  // isVersionOf GO:0006461
  Aggregation46: MisP_Ub4 + MisP_Ub6 => AggP; cytosol*Function_for_Aggregation46(MisP_Ub4, MisP_Ub6, cytosol, k72);  // isVersionOf GO:0006461
  Aggregation47: MisP_Ub4 + MisP_Ub7 => AggP; cytosol*Function_for_Aggregation47(MisP_Ub4, MisP_Ub7, cytosol, k72);  // isVersionOf GO:0006461
  Aggregation48: MisP_Ub4 + MisP_Ub8 => AggP; cytosol*Function_for_Aggregation48(MisP_Ub4, MisP_Ub8, cytosol, k72);  // isVersionOf GO:0006461
  Aggregation49: MisP_Ub5 + MisP_Ub6 => AggP; cytosol*Function_for_Aggregation49(MisP_Ub5, MisP_Ub6, cytosol, k72);  // isVersionOf GO:0006461
  Aggregation50: MisP_Ub5 + MisP_Ub7 => AggP; cytosol*Function_for_Aggregation50(MisP_Ub5, MisP_Ub7, cytosol, k72);  // isVersionOf GO:0006461
  Aggregation51: MisP_Ub5 + MisP_Ub8 => AggP; cytosol*Function_for_Aggregation51(MisP_Ub5, MisP_Ub8, cytosol, k72);  // isVersionOf GO:0006461
  Aggregation52: MisP_Ub6 + MisP_Ub7 => AggP; cytosol*Function_for_Aggregation52(MisP_Ub6, MisP_Ub7, cytosol, k72);  // isVersionOf GO:0006461
  Aggregation53: MisP_Ub6 + MisP_Ub8 => AggP; cytosol*Function_for_Aggregation53(MisP_Ub6, MisP_Ub8, cytosol, k72);  // isVersionOf GO:0006461
  Aggregation54: MisP_Ub7 + MisP_Ub8 => AggP; cytosol*Function_for_Aggregation54(MisP_Ub7, MisP_Ub8, cytosol, k72);  // isVersionOf GO:0006461
  SequesteringOfAggregates: AggP => SeqAggP; cytosol*Function_for_SequesteringOfAggregates(AggP, cytosol, k73);  // isVersionOf GO:0051220
  ProteasomeInhibtion: AggP + Proteasome => AggP_Proteasome; cytosol*Function_for_ProteasomeInhibtion(AggP, Proteasome, cytosol, k74);  // isVersionOf GO:0008539

  // Unit definitions:
  unit substance = item;
end
