// SBML level 2 version 1

model Model_generated_by_BIOCHAM()
  // Calzone2007_CellCycle
  // This is the Dynamical model of nuclear division cycles during early embryogenesis of Drosophila, without StringT regulation. so ksstg=kdstg=0. Figure1B has been simulated by MathSBML. Curator changed model from only one compartment into two compartments according to the paper. Detail explaination of the models are in the supplement information of the paper.The author didn't specify which compartment Xm, Stgm, Xp are located, we assume that they locate in cytoplasm.
  // Some of the parameter values for the equations are dimensionless parameters.
  // To the extent possible under law, all copyright and related or neighbouring rights to this encoded model have been dedicated to the public domain worldwide. Please refer to CC0 Public Domain Dedication for more information.
  // In summary, you are entitled to use this encoded model in absolutely any manner you deem suitable, verbatim, or with modification, alone or embedded it in a larger context, redistribute it, commercially or not, in a restricted way or not.
  // To cite BioModels Database, please use: Li C, Donizelli M, Rodriguez N, Dharuri H, Endler L, Chelliah V, Li L, He E, Henry A, Stefan MI, Snoep JL, Hucka M, Le Novère N, Laibe C (2010) BioModels Database: An enhanced, curated and annotated resource for published quantitative kinetic models. BMC Syst Biol., 4:92.
  // biomodels.db:BIOMD0000000144
  // biomodels.db:MODEL1509031628
  // isDescribedBy pubmed:17667953
  // isVersionOf GO:0000278 GO:0051783
  // occursIn taxonomy:7215
  // isDescribedBy doi:10.1038%2Fmsb4100171

  // Compartments:
  compartment nuclei = 1;  // isVersionOf GO:0005634
  compartment cytoplasm = 1;  // isVersionOf GO:0005737

  // Species:
  species MPFc in cytoplasm = 1;  // isVersionOf GO:0031387; hasPart uniprot:P20439 uniprot:P23572
  species preMPFc in cytoplasm = 0;  // isVersionOf GO:0031387
  species StgPc in cytoplasm = 0.8;  // uniprot:P20483
  species Wee1c in cytoplasm = 0;  // isHomologTo uniprot:P30291; uniprot:P54350
  // Wee1Pc has been defined as boundarycondition, only change with the assignment rule.
  species $Wee1Pc in cytoplasm;  // isHomologTo uniprot:P30291; uniprot:P54350
  species Stgm in cytoplasm = 1;  // isVersionOf CHEBI:33699
  species Xp in cytoplasm = 0;
  species Stgc in cytoplasm = 0;  // uniprot:P20483
  species Xm in cytoplasm = 0;  // isVersionOf CHEBI:33699
  species MPFn in nuclei = 0;  // isVersionOf GO:0031387; hasPart uniprot:P23572 uniprot:P20439
  species preMPFn in nuclei = 0;  // isVersionOf GO:0031387
  species Wee1Pn in nuclei = 0;  // isHomologTo uniprot:P30291; uniprot:P54350
  species Wee1n in nuclei = 0;  // isHomologTo uniprot:P30291; uniprot:P54350
  species StgPn in nuclei = 0;  // isVersionOf interpro:IPR000751; uniprot:P20483
  species Stgn in nuclei = 0;  // isVersionOf interpro:IPR000751; uniprot:P20483
  species FZYa in nuclei = 0;  // isVersionOf interpro:IPR000002; uniprot:Q24044
  species IEa_1 in nuclei = 0;
  species N in nuclei = 1;

  // Parameters:
  ksc = 0.01;
  kdc = 0.01; kdc is "kdcp";
  kdnp = 0.01;
  kdn = 1.5; kdn is "kdnpp";
  kaie = 1;
  kiie = 0.4;
  kafzy = 1;
  kifzy = 0.2;
  kweep = 0.005;
  kwee = 1; kwee is "kweepp";
  kstgp = 0.2;
  kstg = 2; kstg is "kstgpp";
  // ksstg=0 for figure1B
  ksstg = 0;
  // kdstg=0 for figure1B
  kdstg = 0;
  kastgp = 0;
  kastg = 1; kastg is "kastgpp";
  kistg = 0.3;
  kawee = 0.3;
  kiweep = 0.01;
  kiwee = 1; kiwee is "kiweepp";
  kt = 0.15; kt is "kin";
  Jaie = 0.01;
  Jiie = 0.01;
  Jafzy = 0.01;
  Jifzy = 0.01;
  Jastg = 0.05;
  Jistg = 0.05;
  Jawee = 0.05;
  Jiwee = 0.05;
  Jm = 0.05;
  kdmp = 0.002;
  kdm = 0.2; kdm is "kdmpp";
  koutw_1 = 0.01;
  kinw_1 = 0.04;
  kouts_1 = 0.02;
  kins_1 = 0.08;
  kez_1 = 0.5;
  factor_1 = 1.95;
  E_1 = 7e-5;
  ksxp_1 = 0.001;
  ksxm_1 = 0.0005;
  kout_1 = 0;
  // Simulation of Figure1, total amounts of String are constant, 0.8.
  StringT = 0.8;
  // Total Wee1 are constant 0.8.
  Wee1T = 0.8;

  // Assignment rules:
  CycBT := (1 - N*E_1)*(MPFc + preMPFc) + N*E_1*(MPFn + preMPFn);
  StgPT := (1 - N*E_1)*StgPc + N*E_1*StgPn;
  Wee1Pc := (Wee1T - N*E_1*(Wee1n + Wee1Pn))/(1 - N*E_1) - Wee1c;

  // Reactions:
  Synthesis_of_MPFc: => MPFc; ksc*cytoplasm;  // isVersionOf GO:0006461
  Activation_of_MPFc: preMPFc => MPFc; cytoplasm*(kstgp + kstg*StgPc)*preMPFc;  // modifiers: StgPc; isVersionOf GO:0043085
  Inactivation_of_MPFc: MPFc => preMPFc; cytoplasm*(kweep + kwee*Wee1c)*MPFc;  // modifiers: Wee1c; isVersionOf GO:0043086
  Degradation_of_cyclin: preMPFc => ; cytoplasm*kdc*preMPFc;  // isVersionOf GO:0030163
  degradation_of_cyclin: MPFc => ; cytoplasm*kdc*MPFc;  // isVersionOf GO:0030163
  Inactivation_of_Wee1c: Wee1c => $Wee1Pc; cytoplasm*((kiweep + kiwee*MPFc)*Wee1c/(Jiwee + Wee1c));  // modifiers: MPFc; isVersionOf GO:0043086
  Activation_of_Wee1c: $Wee1Pc => Wee1c; cytoplasm*(kawee*Wee1Pc/(Jawee + Wee1Pc));  // isVersionOf GO:0043085
  mRNA_of_Stg: Stgm => ; nuclei*(kdmp*Stgm/(Jm + Stgm) + kdm*Xp*Stgm);  // modifiers: Xp; isVersionOf GO:0006402
  Synthesis_of_Stg: => Stgc; cytoplasm*ksstg*Stgm;  // modifiers: Stgm; isVersionOf GO:0006412
  activation_of_Stgc: Stgc => StgPc; cytoplasm*((kastgp + kastg*MPFc)*Stgc/(Jastg + Stgc));  // modifiers: MPFc; isVersionOf GO:0043085
  inactivation_of_Stgc: StgPc => Stgc; cytoplasm*(kistg*StgPc/(Jistg + StgPc));  // isVersionOf GO:0043086
  degradation_of_Stgc: Stgc => ; cytoplasm*kdstg*Stgc;  // isVersionOf GO:0030163
  degradation_of_active_Stgc: StgPc => ; cytoplasm*kdstg*StgPc;  // isVersionOf GO:0030163
  export_of_MPF_from_cytoplasm: MPFc => ; cytoplasm*(kt*MPFc*E_1*N/(1 - N*E_1));  // modifiers: N; isVersionOf GO:0000060
  importofMPFintocytoplasm_1: => MPFc; nuclei*(kout_1*MPFn*E_1*N/(1 - N*E_1)); importofMPFintocytoplasm_1 is "import of MPF into cytoplasm";  // modifiers: N, MPFn; isVersionOf GO:0006611
  _16: => MPFn; cytoplasm*kt*MPFc; _16 is "import of MPF into nucleus";  // modifiers: MPFc; isVersionOf GO:0000060
  exportofMPFfromnucleus_1: MPFn => ; nuclei*kout_1*MPFn; exportofMPFfromnucleus_1 is "export of MPF from nucleus";  // isVersionOf GO:0006611
  importofpreMPFintocytoplaslm_1: => preMPFc; nuclei*(kout_1*preMPFn*N*E_1/(1 - N*E_1)); importofpreMPFintocytoplaslm_1 is "import of preMPF into cytoplasm";  // modifiers: preMPFn, N; isVersionOf GO:0006611
  export_of_preMPF_from_cytoplasm: preMPFc => ; cytoplasm*(kt*preMPFc*E_1*N/(1 - N*E_1));  // modifiers: N; isVersionOf GO:0000060
  _18: => preMPFn; cytoplasm*kt*preMPFc; _18 is "import of preMPF into nucleus";  // modifiers: preMPFc; isVersionOf GO:0000060
  exportofpreMPFnfromnucleus_1: preMPFn => ; nuclei*kout_1*preMPFn; exportofpreMPFnfromnucleus_1 is "export of preMPFn from nucleus";  // isVersionOf GO:0006611
  export_of_Wee1P_from_nucleus: Wee1Pn => ; nuclei*koutw_1*Wee1Pn;  // isVersionOf GO:0006611
  _182_1: => $Wee1Pc; nuclei*(koutw_1*Wee1Pn*N*E_1/(1 - N*E_1)); _182_1 is "import of Wee1P into cytoplasm";  // modifiers: Wee1Pn, N; isVersionOf GO:0006611
  export_of_Wee1P_from_cytoplasm: $Wee1Pc => ; cytoplasm*(kinw_1*Wee1Pc*E_1*N/(1 - N*E_1));  // modifiers: N; isVersionOf GO:0000060
  _20: => Wee1Pn; cytoplasm*kinw_1*Wee1Pc; _20 is "import of Wee1P into nucleus";  // modifiers: Wee1Pc; isVersionOf GO:0000060
  export_of_Wee1_from_nucleus: Wee1n => ; nuclei*koutw_1*Wee1n;  // isVersionOf GO:0006611
  _22: => Wee1c; nuclei*(koutw_1*Wee1n*N*E_1/(1 - N*E_1)); _22 is "import of Wee1 into cytoplasm";  // modifiers: Wee1n, N; isVersionOf GO:0006611
  export_of_Wee1c_from_cytoplasm: Wee1c => ; cytoplasm*(kinw_1*Wee1c*E_1*N/(1 - N*E_1));  // modifiers: N; isVersionOf GO:0000060
  _24: => Wee1n; cytoplasm*kinw_1*Wee1c; _24 is "import of Wee1 into nucleus";  // modifiers: Wee1c; isVersionOf GO:0000060
  export_of_StgP_from_nucleus: StgPn => ; nuclei*kouts_1*StgPn;  // isVersionOf GO:0006611
  _26: => StgPc; nuclei*(kouts_1*StgPn*E_1*N/(1 - N*E_1)); _26 is "import of StgP into cytoplasm";  // modifiers: StgPn, N; isVersionOf GO:0006611
  export_of_StgP_from_cytoplasm: StgPc => ; cytoplasm*(kins_1*StgPc*E_1*N/(1 - N*E_1));  // modifiers: N; isVersionOf GO:0000060
  _28: => StgPn; cytoplasm*kins_1*StgPc; _28 is "import of StgP into nucleus";  // modifiers: StgPc; isVersionOf GO:0000060
  export_of_Stg_from_nucleus: Stgn => ; nuclei*kouts_1*Stgn;  // isVersionOf GO:0006611
  _30: => Stgc; nuclei*(kouts_1*Stgn*E_1*N/(1 - N*E_1)); _30 is "import of Stg into cytoplasm";  // modifiers: Stgn, N; isVersionOf GO:0006611
  export_of_Stg_from_cytoplasm: Stgc => ; cytoplasm*(kins_1*Stgc*E_1*N/(1 - N*E_1));  // modifiers: N; isVersionOf GO:0000060
  _32: => Stgn; cytoplasm*kins_1*Stgc; _32 is "import of Stg into nucleus";  // modifiers: Stgc; isVersionOf GO:0000060
  activation_of_MPFn: preMPFn => MPFn; nuclei*(kstgp + kstg*StgPn)*preMPFn;  // modifiers: StgPn; isVersionOf GO:0043085
  inactivation_of_MPFn: MPFn => preMPFn; nuclei*(kweep + kwee*Wee1n)*MPFn;  // modifiers: Wee1n; isVersionOf GO:0043086
  degradation_of_preMPFn: preMPFn => ; nuclei*(kdnp + kdn*FZYa)*preMPFn;  // modifiers: FZYa; isVersionOf GO:0030163
  degradation_of_MPFn: MPFn => ; nuclei*(kdnp + kdn*FZYa)*MPFn;  // modifiers: FZYa; isVersionOf GO:0030163
  R_37: IEa_1 => ; nuclei*(kiie*IEa_1/(Jiie + IEa_1)); R_37 is "activation of intermediary enzyme";  // isVersionOf GO:0043085
  R_38: => IEa_1; nuclei*(kaie*(1 - IEa_1)*MPFn/(Jaie + 1 - IEa_1)); R_38 is "inactivation of intermediary enzyme";  // modifiers: MPFn; isVersionOf GO:0043086
  activation_of_FZY: => FZYa; nuclei*(kafzy*IEa_1*(1 - FZYa)/(Jafzy + 1 - FZYa));  // modifiers: IEa_1; isVersionOf GO:0043085
  inactivation_of_FZY: FZYa => ; nuclei*(kifzy*FZYa/(Jifzy + FZYa));  // isVersionOf GO:0043086
  inactivation_of_Wee1n: Wee1n => Wee1Pn; nuclei*((kiweep + kiwee*MPFn)*Wee1n/(Jiwee + Wee1n));  // modifiers: MPFn; isVersionOf GO:0043086
  activation_of_Wee1n: Wee1Pn => Wee1n; nuclei*(kawee*Wee1Pn/(Jawee + Wee1Pn));  // isVersionOf GO:0043085
  activation_of_StgPn: Stgn => StgPn; nuclei*((kastgp + kastg*MPFn)*Stgn/(Jastg + Stgn));  // modifiers: MPFn; isVersionOf GO:0043085
  inactivation_of_StgPn: StgPn => Stgn; nuclei*(kistg*StgPn/(Jistg + StgPn));  // isVersionOf GO:0043086
  degradation_of_Stgn: Stgn => ; nuclei*kdstg*Stgn;  // isVersionOf GO:0030163
  degradation_of_StgPn: StgPn => ; nuclei*kdstg*StgPn;  // isVersionOf GO:0030163
  Nuclei_1: => N; 0;
  _50: => Xm; nuclei*ksxm_1*N; _50 is "Zygotic mRNA";  // modifiers: N; isVersionOf GO:0009299
  _51: => Xp; cytoplasm*ksxp_1*Xm; _51 is "Zygotic proteins";  // modifiers: Xm; isVersionOf GO:0006412

  // Events:
  // When Fzy=Kez(increasing), then the following changes are made instantaneously (for X=MPF,preMPF,Wee1,Wee1P, Stg, and StgP) :
  // Xc-> (1-N*E)*Xc/(1-1.95*N*E)
  // Xn->Xn/1.95
  // N->1.95N
  at (FZYa >= kez_1): N = factor_1*N, MPFn = MPFn/1.95, preMPFn = preMPFn/1.95, Wee1n = Wee1n/1.95, Wee1Pn = Wee1Pn/1.95, Wee1c = Wee1c*((1 - N*E_1)/(1 - 1.95*N*E_1)), Stgn = Stgn/1.95, StgPc = StgPc*((1 - N*E_1)/(1 - 1.95*N*E_1)), Stgc = Stgc*((1 - N*E_1)/(1 - 1.95*N*E_1)), StgPn = StgPn/1.95, MPFc = MPFc*((1 - N*E_1)/(1 - 1.95*N*E_1));  // isVersionOf GO:0000093

  // Unit definitions:
  unit time_1 = 60 second; time_1 is "min";
end
