// SBML level 2 version 1

model Xie2007_CircClock()
  // The model reproduces the oscillations for mRNA and protein species as depicted in Fig 3 of the plot. The model differs slightly from that given in the paper and this was made after a communication from the authors. The values of parameters tcvriclkp, tcdvpmt and dccpt are slightly different. Also, although it is not given in the paper, rate laws for reactions re20, re28, re35, re42, re43 and re45 are multiplied by a specie. Model was successfully tested on MathSBML
  // This model originates from BioModels Database: A Database of Annotated Published Models. It is copyright (c) 2005-2009 The BioModels Team.
  // To the extent possible under law, all copyright and related or neighbouring rights to this encoded model have been dedicated to the public domain worldwide. Please refer to CC0 Public Domain Dedication for more information.
  // In summary, you are entitled to use this encoded model in absolutely any manner you deem suitable, verbatim, or with modification, alone or embedded it in a larger context, redistribute it, commercially or not, in a restricted way or not..
  // To cite BioModels Database, please use Le Novère N., Bornstein B., Broicher A., Courtot M., Donizelli M., Dharuri H., Li L., Sauro H., Schilstra M., Shapiro B., Snoep J.L., Hucka M. (2006) BioModels Database: A Free, Centralized Database of Curated, Published, Quantitative Kinetic Models of Biochemical and Cellular Systems Nucleic Acids Res., 34: D689-D691.
  // biomodels.db:BIOMD0000000160
  // biomodels.db:MODEL1029395046
  // isDescribedBy pubmed:17157878
  // GO:0045187 GO:0007623
  // isPartOf kegg.pathway:dme04711
  // occursIn taxonomy:7227

  // Compartments:
  compartment wholeCell = 1;  // GO:0005623

  // Species:
  species CC in wholeCell = 0.5566;  // hasPart uniprot:O61735 uniprot:O61734
  species CCPT in wholeCell = 0.4982;  // hasPart uniprot:O61735 uniprot:O61734 uniprot:P07663 uniprot:Q59E16
  species clkp in wholeCell = 0.003185;
  species perp in wholeCell = 0.003185;
  species clkm in wholeCell = 0.2583;
  species perm in wholeCell = 0.2395;
  species PT in wholeCell = 0.4014;  // hasPart uniprot:P07663 uniprot:Q59E16
  species vrip in wholeCell = 0.003185;
  species vrim in wholeCell = 0.2571;
  species VRI in wholeCell = 3.175;  // uniprot:Q9VMS4
  species pdpp in wholeCell = 0.003185;
  species pdpm in wholeCell = 0.3175;
  species PDP in wholeCell = 4.1953;  // isVersionOf uniprot:Q9TW49
  species CLK in wholeCell = 3.6628;  // isVersionOf uniprot:O61735
  species PER in wholeCell = 2.7527;  // isVersionOf uniprot:P07663
  species timp in wholeCell = 0.003185;
  species timm in wholeCell = 0.2395;
  species TIM in wholeCell = 2.7527;  // isVersionOf uniprot:Q59E16
  species $CYC in wholeCell = 1;  // isVersionOf uniprot:O61734
  species prcper in wholeCell = 0.0431/wholeCell; prcper is "CCbindingPer";
  species prcv in wholeCell = 0.0585/wholeCell; prcv is "CCbindingvri";
  species prcpdp in wholeCell = 0.08/wholeCell; prcpdp is "CCbindingpdp";
  species prvc in wholeCell = 0.489/wholeCell; prvc is "VRIbindingclkp";
  species prpc in wholeCell = 0.426/wholeCell; prpc is "PDPbindingclkp";
  species prct in wholeCell = 0.043/wholeCell; prct is "CCbindingtim";

  // Parameters:
  dccpt = 15.06;
  bccperp = 0.069;
  ubccperp = 0.262;
  bccpt = 51;
  dperm = 0.053;
  tlper = 36;
  tcccperp = 11;
  tcdvpmt = 0.028;
  dvri = 1.226;
  tcclkp = 1.42;
  bcc = 2.349;
  dclk = 0.2;
  ubcc = 0.89;
  bpt = 1.1;
  ubpt = 2.93;
  dper = 0.62;
  tcccvrip = 16.86;
  tcccpdpp = 9.831;
  dvrim = 0.07;
  dpdpm = 0.06;
  ubccpt = 7.89;
  tlvri = 14.68;
  tlpdp = 1.87;
  bccvrip = 0.1;
  bccpdpp = 0.062;
  ubccvrip = 0.276;
  ubccpdpp = 0.145;
  tcpdpclkp = 125.54;
  dclkm = 0.643;
  bvriclkp = 1.858;
  bpdpclkp = 1.155;
  ubvriclkp = 1.043;
  ubpdpclkp = 0.952;
  tcvriclkp = 0.053;
  dpdp = 0.156;
  tlclk = 35;
  dcc = 0.184;
  dpt = 0.279;
  dtim = 0.62;
  dtimm = 0.053;
  tltim = 36;
  bcctimp = 0.069;
  ubcctimp = 0.262;
  tccctimp = 11;
  npt = 5;
  nvri = 4;
  npdp = 6;

  // Reactions:
  CC_PT_association: CC + PT => CCPT; wholeCell*CC*PT*bccpt;  // isVersionOf GO:0046982
  Degradation_of_CLK_CYK_dimer: CC => ; wholeCell*CC*dcc;  // isVersionOf GO:0044257
  Degradation_of_CC_PT_dimer: CCPT => ; wholeCell*CCPT*dccpt;  // isVersionOf GO:0044257
  Degradation_of_PER_TIM_dimer: PT => ; wholeCell*PT*dpt;  // isVersionOf GO:0044257
  Degradation_of_clk_mRNA: clkm => ; wholeCell*clkm*dclkm;  // isVersionOf GO:0006402
  clkm_translation: => CLK; wholeCell*clkm*tlclk;  // modifiers: clkm; isVersionOf GO:0006412
  Degradation_of_per_mRNA: perm => ; wholeCell*perm*dperm;  // isVersionOf GO:0006402
  perm_translation: => PER; wholeCell*perm*tlper;  // modifiers: perm; isVersionOf GO:0006412
  per_transcription: => perm; wholeCell*((1 - (1 - prcper)^npt)*tcccperp + (1 - prcper)^npt*tcdvpmt)*perp;  // modifiers: prcper, perp; isVersionOf GO:0006350
  vri_transcription: => vrim; wholeCell*((1 - (1 - prcv)^nvri)*tcccvrip + (1 - prcv)^nvri*tcdvpmt)*vrip;  // modifiers: prcv, vrip; isVersionOf GO:0006350
  Degradation_of_vri_mRNA: vrim => ; wholeCell*vrim*dvrim;  // isVersionOf GO:0006402
  vrim_translation: => VRI; wholeCell*vrim*tlvri;  // modifiers: vrim; isVersionOf GO:0006412
  VRI_protein_degradation: VRI => ; wholeCell*VRI*dvri;  // isVersionOf GO:0044257
  pdp_transcription: => pdpm; wholeCell*((1 - (1 - prcpdp)^npdp)*tcccpdpp + (1 - prcpdp)^npdp*tcdvpmt)*pdpp;  // modifiers: prcpdp, pdpp; isVersionOf GO:0006350
  Degradation_of_pdp_mRNA: pdpm => ; wholeCell*pdpm*dpdpm;  // isVersionOf GO:0006402
  pdpm_translation: => PDP; wholeCell*pdpm*tlpdp;  // modifiers: pdpm; isVersionOf GO:0006412
  PDP_protein_degradation: PDP => ; wholeCell*PDP*dpdp;  // isVersionOf GO:0044257
  clk_transcription: => clkm; wholeCell*(prvc*tcvriclkp + prpc*tcpdpclkp + (1 - prvc - prpc)*tcclkp)*clkp;  // modifiers: prvc, clkp, prpc; isVersionOf GO:0006350
  CLK_CYC_association: CLK + $CYC => CC; wholeCell*CLK*bcc*CYC;  // isVersionOf GO:0046982
  CLK_protein_degradation: CLK => ; wholeCell*CLK*dclk;  // isVersionOf GO:0044257
  CLK_CYC_dissociation: CC => CLK + $CYC; wholeCell*CC*ubcc;  // isVersionOf GO:0043624
  PER_TIM_association: PER + TIM => PT; wholeCell*PER*TIM*bpt;  // isVersionOf GO:0046982
  PER_TIM_dissociation: PT => PER + TIM; wholeCell*PT*ubpt;  // isVersionOf GO:0043624
  PER_protein_degradation: PER => ; wholeCell*PER*dper;  // isVersionOf GO:0044257
  tim_transcription: => timm; wholeCell*((1 - (1 - prct)^npt)*tccctimp + (1 - prct)^npt*tcdvpmt)*timp;  // modifiers: prct, timp; isVersionOf GO:0006350
  Degradation_of_tim_mRNA: timm => ; wholeCell*timm*dtimm;  // isVersionOf GO:0006402
  timm_translation: => TIM; wholeCell*timm*tltim;  // modifiers: timm; isVersionOf GO:0006412
  TIM_protein_degradation: TIM => ; wholeCell*TIM*dtim;  // isVersionOf GO:0044257
  CC_PT_dimer_dissociation: CCPT => CC + PT; wholeCell*CCPT*ubccpt;  // isVersionOf GO:0046982
  re57: => prcper; wholeCell*(1 - prcper)*bccperp*CC; re57 is "CC binding probability in per promoter";  // modifiers: CC; isVersionOf GO:0006357
  re58: prcper => ; wholeCell*prcper*ubccperp; re58 is "CC Unbinding probability in per promoter";  // isVersionOf GO:0006357
  re59: prcv => ; wholeCell*ubccvrip*prcv; re59 is "CC Unbinding probability in vri promoter";  // isVersionOf GO:0006357
  re60: => prcv; wholeCell*(1 - prcv)*bccvrip*CC; re60 is "CC binding probability in vri promoter";  // modifiers: CC; isVersionOf GO:0006357
  re61: prcpdp => ; wholeCell*ubccpdpp*prcpdp; re61 is "CC Unbinding probability in pdp1 promoter";  // isVersionOf GO:0006357
  re62: => prcpdp; wholeCell*(1 - prcpdp)*bccpdpp*CC; re62 is "CC binding probability in pdp1 promoter";  // modifiers: CC; isVersionOf GO:0006357
  VRI_binding_clk_promoter: => prvc; wholeCell*(1 - prvc - prpc)*bvriclkp*VRI;  // modifiers: prpc, VRI; isVersionOf GO:0030528
  VRI_unbinding_clk_promoter: prvc => ; wholeCell*prvc*ubvriclkp;  // isVersionOf GO:0030528
  PDP_binding_clk_promoter: => prpc; wholeCell*(1 - prvc - prpc)*bpdpclkp*PDP;  // modifiers: prvc, PDP; isVersionOf GO:0003700
  PDP_unbinding_clk_promoter: prpc => ; wholeCell*prpc*ubpdpclkp;  // isVersionOf GO:0043433
  re68: => prct; wholeCell*(1 - prct)*bcctimp*CC; re68 is "CC binding probability in tim promoter";  // modifiers: CC; isVersionOf GO:0006357
  re69: prct => ; wholeCell*prct*ubcctimp; re69 is "CC Unbinding probability in tim promoter";  // isVersionOf GO:0006357

  // Unit definitions:
  unit substance = 1e-9 mole; substance is "nano mole";
  unit time = 3600 second; time is "hour";
end
