// SBML level 2 version 3

function hydrolysis(kh, R)
  kh*R;
end

function sig_act(ke, r, kg, R, kf)
  ke*r/(1 + exp((kg - R)*kf));
end
sig_act is "Sigmoid Activation";

function hill_act(r, ke, R, h, kg)
  r*ke*R^h/(kg + R^h);
end
hill_act is "Hills activation";

function extraction(kminus1, r)
  kminus1*r;
end

function sig_act_t(r, ke, t, kg, R, kf)
  r*(ke*t/(100 + t))/(1 + exp((kg - R)*kf));
end
sig_act_t is "Sigmoid Activation 3 (t)";

model Model_1()
  // Del_Conte_Zerial2008_Rab5_Rab7_cut_out_switch
  // Membrane identity and GTPase cascades regulated by toggle and cut-out switches
  // Perla Del Conte-Zerial, Lutz Brusch, Jochen C Rink, Claudio Collinet, Yannis Kalaidzidis, Marino Zerial, and Andreas Deutsch: Molecular Systems Biology4:206 15 July 2008, doi:10.1038/msb.2008.45
  // This is the cut-out switch model for the Rab5 - Rab7 transition, also referred to as model 2 in the original publication.
  // This model is not completely described in all details in the publication. Thanks go to Barbara Szomolay and Lutz Brusch for finding and clarifying this. According to Dr. Brusch this model represents the mechanism identified by the qualitative analysis in the article in the scenario deemed most useful by the authors. For the time-course simulations it was necessary to add a time dependency to one of the parameters, which is only verbally described in the article.
  // As argued in the publication the switch between early and late endosomes can be triggered by a parameter change. While with fixed parameter values each switch just converges to one steady state from its initial conditions and stays there, endosomes should switch between two different states. These changes would in reality of course depend on many different factors, such as cargo composition and amount in the specific endosome, its location and some additional cellular control mechanisms and encompass many different parameters. To keep the model simple the authors chose to add a time dependency to only one reaction - ke in the activation of RAB5 is multiplied with a term monotonously increasing over time from 0 to 1. They also hard coded a time dependence in this term, 100 minutes, to make the switch occur after several hundred minutes. As long as this modulating term remains monotonic all resulting time courses should look similar, with the switching behavior depending on the initial conditions and whether the term is increasing or decreasing. Monotonic increase is a reasonable assumption for the described mechanism of cargo accumulation.
  // Not explicitly described in the article: activation of Rab5 (time) : r*ke*time/(100+time) /(1+e(kg-R)*kf) instead of r*ke/(1+e(kg-R)*kf)
  // This model originates from BioModels Database: A Database of Annotated Published Models. It is copyright (c) 2005-2009 The BioModels Team.
  // To the extent possible under law, all copyright and related or neighbouring rights to this encoded model have been dedicated to the public domain worldwide. Please refer to CC0 Public Domain Dedication for more information.
  // In summary, you are entitled to use this encoded model in absolutely any manner you deem suitable, verbatim, or with modification, alone or embedded it in a larger context, redistribute it, commercially or not, in a restricted way or not..
  // To cite BioModels Database, please use Le Novère N., Bornstein B., Broicher A., Courtot M., Donizelli M., Dharuri H., Li L., Sauro H., Schilstra M., Shapiro B., Snoep J.L., Hucka M. (2006) BioModels Database: A Free, Centralized Database of Curated, Published, Quantitative Kinetic Models of Biochemical and Cellular Systems Nucleic Acids Res., 34: D689-D691.
  // biomodels.db:BIOMD0000000174
  // biomodels.db:MODEL5937037510
  // isDescribedBy pubmed:18628746
  // isVersionOf GO:0032313
  // occursIn taxonomy:9606

  // Compartments:
  compartment endosome = 1; endosome is "endosomal membrane";  // GO:0010008

  // Species:
  species Rab5_GDP in endosome = 1; Rab5_GDP is "Rab5-GDP";  // hasPart CHEBI:17552 uniprot:P20339; GO:0031225
  species Rab5_GTP in endosome = 0.001; Rab5_GTP is "Rab5-GTP";  // hasPart CHEBI:15996 uniprot:P20339; GO:0031225
  species Rab7_GDP in endosome = 1; Rab7_GDP is "Rab7-GDP";  // hasPart CHEBI:17552 uniprot:P51149; GO:0031225
  species Rab7_GTP in endosome = 0.001; Rab7_GTP is "Rab7-GTP";  // hasPart CHEBI:15996 uniprot:P51149; GO:0031225

  // Reactions:
  recruitment_of_Rab5: => Rab5_GDP; endosome*recruitment_of_Rab5_K1;  // isVersionOf GO:0045184
    recruitment_of_Rab5_K1 = 1 Mps;
  activation_of_Rab5_time: Rab5_GDP => Rab5_GTP; endosome*sig_act_t(Rab5_GDP, activation_of_Rab5_time_ke, time, activation_of_Rab5_time_kg, Rab5_GTP, activation_of_Rab5_time_kf); activation_of_Rab5_time is "activation of Rab5 (time)";  // isVersionOf GO:0032858
    activation_of_Rab5_time_ke = 0.3 ps; activation_of_Rab5_time_kg = 0.1 M; activation_of_Rab5_time_kf = 2.5 lpmole;
  extraction_of_Rab5: Rab5_GDP => ; endosome*extraction(extraction_of_Rab5_kminus1, Rab5_GDP);
    extraction_of_Rab5_kminus1 = 1 ps;
  recruitment_of_Rab7: => Rab7_GDP; endosome*recruitment_of_Rab7_K1;  // isVersionOf GO:0045184
    recruitment_of_Rab7_K1 = 0.483 Mps;
  activation_of_Rab7_by_GEF7: Rab7_GDP => Rab7_GTP; endosome*hill_act(Rab7_GDP, activation_of_Rab7_by_GEF7_ke, Rab7_GTP, h, activation_of_Rab7_by_GEF7_kg);  // isVersionOf GO:0017112 GO:0032858
    activation_of_Rab7_by_GEF7_ke = 0.21 ps; h = 3 dimensionless; activation_of_Rab7_by_GEF7_kg = 0.1;
  activation_of_Rab7_by_GEF5: Rab7_GDP => Rab7_GTP; endosome*sig_act(activation_of_Rab7_by_GEF5_ke, Rab7_GDP, activation_of_Rab7_by_GEF5_kg, Rab5_GTP, activation_of_Rab7_by_GEF5_kf);  // modifiers: Rab5_GTP; isVersionOf GO:0032858 GO:0017112
    activation_of_Rab7_by_GEF5_ke = 0.021 ps; activation_of_Rab7_by_GEF5_kg = 1 M; activation_of_Rab7_by_GEF5_kf = 3 lpmole;
  hydrolysis_of_Rab5_by_Rab7: Rab5_GTP => Rab5_GDP; endosome*sig_act(hydrolysis_of_Rab5_by_Rab7_ke, Rab5_GTP, hydrolysis_of_Rab5_by_Rab7_kg, Rab7_GTP, hydrolysis_of_Rab5_by_Rab7_kf);  // modifiers: Rab7_GTP; isVersionOf GO:0003924 GO:0005097
    hydrolysis_of_Rab5_by_Rab7_ke = 0.31 ps; hydrolysis_of_Rab5_by_Rab7_kg = 0.3 M; hydrolysis_of_Rab5_by_Rab7_kf = 3 lpmole;
  extraction_of_rab7: Rab7_GDP => ; endosome*extraction(extraction_of_rab7_kminus1, Rab7_GDP);
    extraction_of_rab7_kminus1 = 0.483 ps;
  hydrolysis_of_Rab5_intr: Rab5_GTP => Rab5_GDP; endosome*hydrolysis(hydrolysis_of_Rab5_intr_kh, Rab5_GTP); hydrolysis_of_Rab5_intr is "hydrolysis of Rab5 (intr.)";  // isVersionOf GO:0003924
    hydrolysis_of_Rab5_intr_kh = 0.06 ps;
  hydrolysis_of_Rab7_intr: Rab7_GTP => Rab7_GDP; endosome*hydrolysis(hydrolysis_of_Rab7_intr_kh, Rab7_GTP); hydrolysis_of_Rab7_intr is "hydrolysis of Rab7 (intr.)";  // isVersionOf GO:0003924
    hydrolysis_of_Rab7_intr_kh = 0.15 ps;

  // Unit definitions:
  unit time = second; time is "sec";
  unit M = mole / litre;
  unit ps = 1 / second; ps is "persec";
  unit Mps = mole / (second * litre); Mps is "Mpers";
  unit lpmole = litre / mole; lpmole is "lpermole";
end
