// SBML level 2 version 1

model Conant2007_glycolysis_2C()
  // This a model from the article:
  // Increased glycolytic flux as an outcome of whole-genome duplication in yeast.
  // Conant GC, Wolfe KH Mol. Syst. Biol.[2007 ; Volume: 3 (Issue: )]: 129 17667951,
  // Abstract:
  // After whole-genome duplication (WGD), deletions return most loci to single copy. However, duplicate loci may survive through selection for increased dosage. Here, we show how the WGD increased copy number of some glycolytic genes could have conferred an almost immediate selective advantage to an ancestor of Saccharomyces cerevisiae, providing a rationale for the success of the WGD. We propose that the loss of other redundant genes throughout the genome resulted in incremental dosage increases for the surviving duplicated glycolytic genes. This increase gave post-WGD yeasts a growth advantage through rapid glucose fermentation; one of this lineage's many adaptations to glucose-rich environments. Our hypothesis is supported by data from enzyme kinetics and comparative genomics. Because changes in gene dosage follow directly from post-WGD deletions, dosage selection can confer an almost instantaneous benefit after WGD, unlike neofunctionalization or subfunctionalization, which require specific mutations. We also show theoretically that increased fermentative capacity is of greatest advantage when glucose resources are both large and dense, an observation potentially related to the appearance of angiosperms around the time of WGD.
  // This model reproduces fig. 2C from the corrigendum to the publication
  // The parameter Vmax_PDH was corrected by a factor 60 from 6.32 mM/min in the publication to 379.2 mM/min in accordance with the authors.
  // see the corrigendum at msb or its pubmed entry (pmid:18594520)
  // This model comprises the glycolysis model from Pritchard and Kell (2002) with an extension for the metabolisation of pyruvate in the mitochondria by pyruvate dehydrogenase and an additional parameter, WGD_E, to adjust for the differing enzyme concentrations before the whole genome duplication (WGD).
  // To switch off transport of pyruvate to the mitochondria, set the parameter t_m = 0.
  // Figure 2C from the article can be reproduced by manually changing the value of parameter WGD_E in the range between 0.65 and 1.0 and calculating the ratios of ratio of PDC/PDH fluxes in the altered model to the one of the model with WGD_E = 1.
  // This model originates from BioModels Database: A Database of Annotated Published Models (http://www.ebi.ac.uk/biomodels/).
  // To the extent possible under law, all copyright and related or neighbouring rights to this encoded model have been dedicated to the public domain worldwide. Please refer to CC0 Public Domain Dedication for more information.
  // In summary, you are entitled to use this encoded model in absolutely any manner you deem suitable, verbatim, or with modification, alone or embedded it in a larger context, redistribute it, commercially or not, in a restricted way or not..
  // To cite BioModels Database, please use: Li C, Donizelli M, Rodriguez N, Dharuri H, Endler L, Chelliah V, Li L, He E, Henry A, Stefan MI, Snoep JL, Hucka M, Le Novère N, Laibe C (2010) BioModels Database: An enhanced, curated and annotated resource for published quantitative kinetic models. BMC Syst Biol., 4:92.
  // biomodels.db:BIOMD0000000177
  // biomodels.db:MODEL2427135959
  // isDescribedBy pubmed:17667951
  // occursIn taxonomy:4932
  // hasPart kegg.pathway:sce00010 GO:0006096

  // Compartments:
  compartment cyto = 1; cyto is "cytoplasm";  // GO:0005829
  compartment mito = 1; mito is "mitochondrion";  // GO:0031980

  // Species:
  species GLCi in cyto = 0.09765223;  // CHEBI:4167 kegg.compound:C00031
  species ATP in cyto = 2.525127;  // CHEBI:15422 kegg.compound:C00002
  species G6P in cyto = 2.67504;  // CHEBI:17665 kegg.compound:C00668
  species ADP in cyto = 1.281988;  // CHEBI:16761 kegg.compound:C00008
  species F6P in cyto = 0.6249764;  // CHEBI:16084 kegg.compound:C05345
  species F16bP in cyto = 6.221321;  // CHEBI:28013 kegg.compound:C05378
  species $F26bP in cyto = 0.02; F26bP is "Fru2,6-P2";  // CHEBI:28602 kegg.compound:C00665
  species AMP in cyto = 0.2928849;  // CHEBI:16027 kegg.compound:C00020
  species DHAP in cyto = 1.004153;  // CHEBI:16108 kegg.compound:C00111
  species GAP in cyto = 0.04518092;  // CHEBI:29052 kegg.compound:C00118
  species NAD in cyto = 1.50329;  // CHEBI:15846 kegg.compound:C00003
  species BPG in cyto = 0.0007368735;  // CHEBI:16001 kegg.compound:C00236
  species NADH in cyto = 0.0867097;  // CHEBI:16908 kegg.compound:C00004
  species P3G in cyto = 0.8856885;  // CHEBI:17794 kegg.compound:C00197
  species P2G in cyto = 0.1276958;  // CHEBI:17835 kegg.compound:C00631
  species PEP in cyto = 0.06323521;  // CHEBI:18021 kegg.compound:C00074
  species PYR in cyto = 1.815313;  // CHEBI:15361 kegg.compound:C00022
  species PYRmito in mito = 0;  // CHEBI:15361 kegg.compound:C00022
  species AcAld in cyto = 0.1781406;  // CHEBI:15343 kegg.compound:C00084
  species $GLCo in cyto = 50;  // CHEBI:4167 kegg.compound:C00031
  species $CO2 in cyto = 1;  // CHEBI:16526 kegg.compound:C00011
  species $EtOH in cyto = 50;  // CHEBI:16236 kegg.compound:C00469
  species $Glycerol in cyto = 0.15;  // CHEBI:17754 kegg.compound:C00116
  species $Glycogen in cyto = 0;  // CHEBI:28087 kegg.compound:C00182
  species $Trehalose in cyto = 0;  // CHEBI:16551 kegg.compound:C01083
  species $Succinate in cyto = 0;  // CHEBI:30031 kegg.compound:C00042
  species $AcCoA in mito = 1;
  species $CO2mito in mito = 1;  // CHEBI:16526 kegg.compound:C00011

  // Parameters:
  t_m = 1 dimensionless; t_m is "toggle_transport";
  WGD_E = 0.65 dimensionless; WGD_E is "WGD enzyme conc change";

  // Reactions:
  HXT: $GLCo -> GLCi; Vmax_1*WGD_E*(GLCo - GLCi)/Kglc_1/(1 + (GLCo + GLCi)/Kglc_1 + Ki_1*GLCo*GLCi/Kglc_1^2);  // isVersionOf GO:0015758
    Vmax_1 = 97.24 mmpmin; Kglc_1 = 1.1918 mM; Ki_1 = 0.91 dimensionless;
  HXK: GLCi + ATP -> G6P + ADP; cyto*WGD_E*Vmax_2*(GLCi*ATP/(Kglc_2*Katp_2) - G6P*ADP/(Kglc_2*Katp_2*Keq_2))/((1 + GLCi/Kglc_2 + G6P/Kg6p_2)*(1 + ATP/Katp_2 + ADP/Kadp_2));  // isVersionOf ec-code:2.7.1.1 GO:0004396; kegg.reaction:R02848
    Vmax_2 = 236.7 mMpmin; Kglc_2 = 0.08 mM; Katp_2 = 0.15 mM; Keq_2 = 2000 dimensionless; Kg6p_2 = 30 mM; Kadp_2 = 0.23 mM;
  PGI: G6P -> F6P; cyto*Vmax_3*WGD_E*(G6P/Kg6p_3 - F6P/(Kg6p_3*Keq_3))/(1 + G6P/Kg6p_3 + F6P/Kf6p_3);  // isVersionOf ec-code:5.3.1.9 GO:0004347; kegg.reaction:R00771
    Vmax_3 = 1056 mMpmin; Kg6p_3 = 1.4 mM; Keq_3 = 0.29 dimensionless; Kf6p_3 = 0.3 mM;
  PFK: ATP + F6P => ADP + F16bP; cyto*Vmax_4*WGD_E*(gR_4*(F6P/Kf6p_4)*(ATP/Katp_4)*(1 + F6P/Kf6p_4 + ATP/Katp_4 + gR_4*F6P/Kf6p_4*ATP/Katp_4)/((1 + F6P/Kf6p_4 + ATP/Katp_4 + gR_4*F6P/Kf6p_4*ATP/Katp_4)^2 + L0_4*((1 + Ciatp_4*ATP/Kiatp_4)/(1 + ATP/Kiatp_4))^2*((1 + Camp_4*AMP/Kamp_4)/(1 + AMP/Kamp_4))^2*((1 + Cf26_4*F26bP/Kf26_4 + Cf16_4*F16bP/Kf16_4)/(1 + F26bP/Kf26_4 + F16bP/Kf16_4))^2*(1 + Catp_4*ATP/Katp_4)^2));  // modifiers: AMP, F26bP; isVersionOf ec-code:2.7.1.11 GO:0003872; kegg.reaction:R00756
    Vmax_4 = 110 mMpmin; gR_4 = 5.12 dimensionless; Kf6p_4 = 0.1 mM; Katp_4 = 0.71 mM; L0_4 = 0.66 dimensionless; Ciatp_4 = 100 dimensionless; Kiatp_4 = 0.65 mM; Camp_4 = 0.0845 dimensionless; Kamp_4 = 0.0995 mM; Cf26_4 = 0.0174 dimensionless; Kf26_4 = 0.000682 mM; Cf16_4 = 0.397 dimensionless; Kf16_4 = 0.111 mM; Catp_4 = 3 dimensionless;
  FBA: F16bP -> DHAP + GAP; cyto*Vmax_5*WGD_E*(F16bP/Kf16bp_5 - DHAP*GAP/(Kf16bp_5*Keq_5))/(1 + F16bP/Kf16bp_5 + DHAP/Kdhap_5 + GAP/Kgap_5 + F16bP*GAP/(Kf16bp_5*Kigap_5) + DHAP*GAP/(Kdhap_5*Kgap_5));  // isVersionOf ec-code:4.1.2.13 GO:0004332; kegg.reaction:R01068
    Vmax_5 = 94.69 mMpmin; Kf16bp_5 = 0.3 mM; Keq_5 = 0.069 mM; Kdhap_5 = 2 mM; Kgap_5 = 2.4 mM; Kigap_5 = 10 mM;
  TPI: DHAP -> GAP; cyto*(k1_6*DHAP - k2_6*GAP);  // isVersionOf ec-code:5.3.1.1 GO:0004807; kegg.reaction:R01015
    k1_6 = 450000 pmin; k2_6 = 10000000 pmin;
  TDH: GAP + NAD -> BPG + NADH; cyto*C_7*(Vmaxf_7*WGD_E*GAP*NAD/(Kgap_7*Knad_7) - Vmaxr_7*WGD_E*BPG*NADH/(Kbpg_7*Knadh_7))/((1 + GAP/Kgap_7 + BPG/Kbpg_7)*(1 + NAD/Knad_7 + NADH/Knadh_7));  // isVersionOf ec-code:1.2.1.12 GO:0004365; kegg.reaction:R01061
    C_7 = 1 dimensionless; Vmaxf_7 = 1152 mMpmin; Kgap_7 = 0.21 mM; Knad_7 = 0.09 mM; Vmaxr_7 = 6719 mMpmin; Kbpg_7 = 0.0098 mM; Knadh_7 = 0.06 mM;
  PGK: ADP + BPG -> ATP + P3G; cyto*Vmax_8*WGD_E*((Keq_8*BPG*ADP - P3G*ATP)/(Kp3g_8*Katp_8))/((1 + BPG/Kbpg_8 + P3G/Kp3g_8)*(1 + ADP/Kadp_8 + ATP/Katp_8));  // isVersionOf ec-code:2.7.2.3 GO:0004618; kegg.reaction:R01512
    Vmax_8 = 1288 mMpmin; Keq_8 = 3200 dimensionless; Kp3g_8 = 0.53 mM; Katp_8 = 0.3 mM; Kbpg_8 = 0.003 mM; Kadp_8 = 0.2 mM;
  PGM: P3G -> P2G; cyto*Vmax_9*WGD_E*(P3G/Kp3g_9 - P2G/(Kp3g_9*Keq_9))/(1 + P3G/Kp3g_9 + P2G/Kp2g_9);  // isVersionOf ec-code:5.4.2.1 GO:0004619; kegg.reaction:R01518
    Vmax_9 = 2585 mMpmin; Kp3g_9 = 1.2 mM; Keq_9 = 0.19 dimensionless; Kp2g_9 = 0.08 mM;
  ENO: P2G -> PEP; cyto*Vmax_10*WGD_E*(P2G/Kp2g_10 - PEP/(Kp2g_10*Keq_10))/(1 + P2G/Kp2g_10 + PEP/Kpep_10);  // isVersionOf ec-code:4.2.1.11 GO:0004634; kegg.reaction:R00658
    Vmax_10 = 201.6 mMpmin; Kp2g_10 = 0.04 mM; Keq_10 = 6.7 dimensionless; Kpep_10 = 0.5 mM;
  PYK: ADP + PEP -> ATP + PYR; cyto*Vmax_11*WGD_E*(PEP*ADP/(Kpep_11*Kadp_11) - PYR*ATP/(Kpep_11*Kadp_11*Keq_11))/((1 + PEP/Kpep_11 + PYR/Kpyr_11)*(1 + ADP/Kadp_11 + ATP/Katp_11));  // isVersionOf ec-code:2.7.1.40 GO:0004743; kegg.reaction:R00200
    Vmax_11 = 1000 mMpmin; Kpep_11 = 0.14 mM; Kadp_11 = 0.53 mM; Keq_11 = 6500 dimensionless; Kpyr_11 = 21 mM; Katp_11 = 1.5 mM;
  PDC: PYR => AcAld + $CO2; cyto*Vmax_12*WGD_E*(PYR/Kpyr_12)^nH_12/(1 + (PYR/Kpyr_12)^nH_12);  // isVersionOf ec-code:4.1.1.1 GO:0004737; kegg.reaction:R00636
    Vmax_12 = 857.8 mMpmin; Kpyr_12 = 4.33 mM; nH_12 = 1.9 dimensionless;
  ADH: NAD + $EtOH -> NADH + AcAld; cyto*Vmax_13*WGD_E*(EtOH*NAD/(Ketoh_13*Kinad_13) - AcAld*NADH/(Ketoh_13*Kinad_13*Keq_13))/(1 + NAD/Kinad_13 + EtOH*Knad_13/(Kinad_13*Ketoh_13) + AcAld*Knadh_13/(Kinadh_13*Kacald_13) + NADH/Kinadh_13 + EtOH*NAD/(Kinad_13*Ketoh_13) + NAD*AcAld*Knadh_13/(Kinad_13*Kinadh_13*Kacald_13) + EtOH*NADH*Knad_13/(Kinad_13*Kinadh_13*Ketoh_13) + AcAld*NADH/(Kacald_13*Kinadh_13) + EtOH*NAD*AcAld/(Kinad_13*Kiacald_13*Ketoh_13) + EtOH*AcAld*NADH/(Kietoh_13*Kinadh_13*Kacald_13));  // isVersionOf ec-code:1.1.1.1 GO:0004022; kegg.reaction:R00754
    Vmax_13 = 209.5 mMpmin; Ketoh_13 = 17 mM; Kinad_13 = 0.92 mM; Keq_13 = 6.9e-5 dimensionless; Knad_13 = 0.17 mM; Knadh_13 = 0.11 mM; Kinadh_13 = 0.031 mM; Kacald_13 = 1.11 mM; Kiacald_13 = 1.1 mM; Kietoh_13 = 90 mM;
  ATPase: ATP => ADP; cyto*Katpase_14*ATP;  // isVersionOf GO:0016887
    Katpase_14 = 39.5 pmin;
  AK: 2 ADP -> ATP + AMP; cyto*(k1_15*ADP*ADP - k2_15*ATP*AMP); AK is "adenylate_kinase";  // isVersionOf ec-code:2.7.4.3 GO:0004017; kegg.reaction:R00127
    k1_15 = 45 pmMpmin; k2_15 = 100 pmMpmin;
  G3PDH: DHAP + NADH -> NAD + $Glycerol; cyto*Vmax_16*WGD_E*(DHAP/Kdhap_16*(NADH/Knadh_16) - Glycerol/Kdhap_16*(NAD/Knadh_16)*(1/Keq_16))/((1 + DHAP/Kdhap_16 + Glycerol/Kglycerol_16)*(1 + NADH/Knadh_16 + NAD/Knad_16)); G3PDH is "glycerol-3-phosphate_dehydrogenase";  // isVersionOf GO:0006114; hasPart kegg.reaction:R00842 kegg.reaction:R07298; hasVersion ec-code:1.1.1.8 ec-code:3.1.3.21
    Vmax_16 = 47.11 mMpmin; Kdhap_16 = 0.4 mM; Knadh_16 = 0.023 mM; Keq_16 = 4300 dimensionless; Kglycerol_16 = 1 mM; Knad_16 = 0.93 mM;
  glycogen_branch: ATP + G6P => ADP + $Glycogen; cyto*KGLYCOGEN_17; glycogen_branch is "glycogenbranch";  // isVersionOf GO:0005978
    KGLYCOGEN_17 = 6 mMpmin;
  trehalose_synth: ATP + 2 G6P => ADP + $Trehalose; cyto*Ktrehalose_18; trehalose_synth is "trehalose_synthesis";  // isVersionOf GO:0005992
    Ktrehalose_18 = 2.4 mMpmin;
  succinate_syn: 3 NAD + 2 AcAld => 3 NADH + $Succinate; cyto*k_19*AcAld; succinate_syn is "succinate_synthesis";  // isVersionOf GO:0006105
    k_19 = 21.4 pmin;
  PYR_shut: PYR -> PYRmito; t_m*(k1*PYR - k2*PYRmito); PYR_shut is "pyruvate_shuttling";  // isVersionOf GO:0006850
    k1 = 1 lpmin; k2 = 1 lpmin;
  PDH: PYRmito => $AcCoA + $CO2mito; mito*WGD_E*Vmax_PDH*PYRmito*(NADX_tot - NADX_tot/(1 + NAD/NADH))/(NADX_tot*Ki_PYR*K_NAD/Ki_NADH/(1 + NAD/NADH) + K_PYR*(NADX_tot - NADX_tot/(1 + NAD/NADH)) + K_NAD*PYRmito + NADX_tot*K_NAD/Ki_NADH*PYRmito/(1 + NAD/NADH) + (NADX_tot - NADX_tot/(1 + NAD/NADH))*PYRmito); PDH is "pyruvate dehydrogenase";  // modifiers: NAD, NADH; hasPart ec-code:1.2.4.1 ec-code:1.8.1.4 ec-code:2.3.1.12; isVersionOf kegg.reaction:R00209 GO:0034604
    Vmax_PDH = 379.2 mMpmin; NADX_tot = 8.01 mM; K_PYR = 70 mM; K_NAD = 160 mM; Ki_NADH = 50 mM; Ki_PYR = 20 mM;

  // Unit definitions:
  unit time = 60 second; time is "minute";
  unit substance = 1e-3 mole; substance is "mmol";
  unit mM = 1e-3 mole / litre;
  unit mmpmin = 1e-3 mole / (60 second); mmpmin is "mmolepermin";
  unit mMpmin = 1e-3 mole / (60 second * litre); mMpmin is "mMpermin";
  unit pmin = 1 / (60 second); pmin is "permin";
  unit lpmin = litre / (60 second); lpmin is "permin";
  unit pmMpmin = litre / (1e-3 mole * 60 second); pmMpmin is "permMpermin";
end
