// SBML level 2 version 3

model Sriram2007_CellCycle()
  // The model reproduces the time profile of species depicted in Figure 12a and 12 b. The authors communicated to the curator that there is a typo in the paper, the values of kd1 and kd2 are reversed. Model successfully reproduced using MathSBML.
  // To the extent possible under law, all copyright and related or neighbouring rights to this encoded model have been dedicated to the public domain worldwide. Please refer to CC0 Public Domain Dedication for more information.
  // In summary, you are entitled to use this encoded model in absolutely any manner you deem suitable, verbatim, or with modification, alone or embedded it in a larger context, redistribute it, commercially or not, in a restricted way or not.
  // To cite BioModels Database, please use: Li C, Donizelli M, Rodriguez N, Dharuri H, Endler L, Chelliah V, Li L, He E, Henry A, Stefan MI, Snoep JL, Hucka M, Le Novère N, Laibe C (2010) BioModels Database: An enhanced, curated and annotated resource for published quantitative kinetic models. BMC Syst Biol., 4:92.
  // biomodels.db:BIOMD0000000181
  // biomodels.db:MODEL8610478473
  // isDescribedBy pubmed:18203579
  // isPartOf kegg.pathway:sce04111 GO:0000278
  // occursIn taxonomy:33154
  // isHomologTo reactome:REACT_152

  // Compartments:
  compartment compartment = 1;

  // Species:
  species T1 in compartment = 6;  // isVersionOf uniprot:P25302
  species T2 in compartment = 5;  // isVersionOf uniprot:P11746
  species T3 in compartment = 1;  // isVersionOf uniprot:P08153
  species C1 in compartment = 0;  // hasPart uniprot:P20437 uniprot:P00546
  species C2 in compartment = 0;  // hasPart uniprot:P24868 uniprot:P00546
  species C3 in compartment = 0;  // isVersionOf uniprot:P38634

  // Parameters:
  j1 = 0.9 nM_min_1;
  vd1 = 6 nM_min_1;
  n = 2 dimensionless;
  km1 = 5 nM;
  kc1 = 0.2 min_1;
  kd1 = 0.8 min_1;
  j2 = 0.5 nM_min_1;
  vd2 = 1.052 nM_min_1;
  km2 = 5 nM;
  kc2 = 0.22 min_1;
  kd2 = 0.9 min_1;
  j3 = 0.2 nM_min_1;
  vd3 = 3 nM_min_1;
  km3 = 5 nM;
  kc3 = 0.6 min_1;
  kd3 = 0.8 min_1;
  v12 = 15 nM_min_1;
  k120 = 10 nM;
  kd4 = 0.16 min_1;
  v11 = 15 nM_min_1;
  k110 = 10 nM;
  kd5 = 0.16 min_1;
  v10 = 15 nM_min_1;
  k100 = 10 nM;
  kd6 = 0.16 min_1;

  // Reactions:
  R1: => T1; compartment*j1;  // isVersionOf GO:0045727
  R2: => T1; compartment*vd1*T3^n/(km1^n + T3^n);  // modifiers: T3; isVersionOf GO:0045727
  R3: => T1; compartment*kc1*C1;  // modifiers: C1; isVersionOf GO:0045727
  R4: T1 => ; compartment*kd1*T1;  // isVersionOf GO:0044257
  R5: => T2; compartment*j2;  // isVersionOf GO:0045727
  R6: => T2; compartment*vd2*T1^n/(km2^n + T1^n);  // modifiers: T1; isVersionOf GO:0045727
  R7: => T2; compartment*kc2*C2;  // modifiers: C2; isVersionOf GO:0045727
  R8: T2 => ; compartment*kd2*T2;  // isVersionOf GO:0044257
  R9: => T3; compartment*j3;  // isVersionOf GO:0045727
  R10: => T3; compartment*vd3*T2^n/(km3^n + T2^n);  // modifiers: T2; isVersionOf GO:0045727
  R11: => T3; compartment*kc3*C3;  // modifiers: C3; isVersionOf GO:0045727
  R12: T3 => ; compartment*kd3*T3;  // isVersionOf GO:0044257
  R13: => C1; compartment*v12*T1^n/(k120^n + T1^n + C2^n);  // modifiers: T1, C2; isVersionOf GO:0045727
  R14: C1 => ; compartment*kd4*C1;  // isVersionOf GO:0044257
  R15: => C2; compartment*v11*T2^n/(k110^n + T2^n + C3^n);  // modifiers: T2, C3; isVersionOf GO:0045727
  R16: C2 => ; compartment*kd5*C2;  // isVersionOf GO:0044257
  R17: => C3; compartment*v10*T3^n/(k100^n + T3^n + C1^n);  // modifiers: T3, C1; isVersionOf GO:0045727
  R18: C3 => ; compartment*kd6*C3;  // isVersionOf GO:0044257

  // Unit definitions:
  unit substance = 1e-9 mole; substance is "nano mole";
  unit time = 60 second; time is "minutes";
  unit nM_min_1 = 1e-9 mole / (litre * 60 second);
  unit nM = 1e-9 mole / litre;
  unit min_1 = 1 / (60 second);
end
