// SBML level 2 version 3

model Lavrentovich2008_Ca_Oscillations()
  // The model reproduces the time profile of cytoplasmic Calcium as depicted in Fig 3 of the paper. Model successfully reproduced using Jarnac and MathSBML
  // This model originates from BioModels Database: A Database of Annotated Published Models. It is copyright (c) 2005-2009 The BioModels Team.
  // To the extent possible under law, all copyright and related or neighbouring rights to this encoded model have been dedicated to the public domain worldwide. Please refer to CC0 Public Domain Dedication for more information.
  // In summary, you are entitled to use this encoded model in absolutely any manner you deem suitable, verbatim, or with modification, alone or embedded it in a larger context, redistribute it, commercially or not, in a restricted way or not..
  // To cite BioModels Database, please use Le Novère N., Bornstein B., Broicher A., Courtot M., Donizelli M., Dharuri H., Li L., Sauro H., Schilstra M., Shapiro B., Snoep J.L., Hucka M. (2006) BioModels Database: A Free, Centralized Database of Curated, Published, Quantitative Kinetic Models of Biochemical and Cellular Systems Nucleic Acids Res., 34: D689-D691.
  // biomodels.db:BIOMD0000000184
  // biomodels.db:MODEL9223106020
  // isDescribedBy pubmed:18275973
  // occursIn taxonomy:40674
  // hasPart GO:0019722

  // Compartments:
  compartment compartment = 1; compartment is "Cytoplasm";  // GO:0005737
  compartment ER = 1; ER is "Endoplasmic Reticulum";  // GO:0005783

  // Species:
  species X in compartment = 0.1; X is "Cytoplasmic Calcium";  // CHEBI:29108 kegg.compound:C00076
  species Y in ER = 1.5; Y is "Calcium in ER";  // CHEBI:29108 kegg.compound:C00076
  species Z in compartment = 0.1; Z is "IP3";  // CHEBI:16595 kegg.compound:C01245

  // Parameters:
  vin = 0.05 uM_sec_1;
  kout = 0.5 sec_1;
  vM3 = 40 sec_1;
  k_CaA = 0.15 uM;
  n = 2.02 dimensionless;
  k_CaI = 0.15 uM;
  m = 2.2 dimensionless;
  kip3 = 0.1 uM;
  vM2 = 15 uM_sec_1;
  k2 = 0.1 uM;
  kf = 0.5 sec_1;
  vp = 0.05 uM_sec_1;
  kp = 0.3 uM;
  kdeg = 0.08 sec_1;

  // Reactions:
  R1: => X; compartment*vin; R1 is "vin";  // isVersionOf GO:0006816 GO:0007204
  Calcium_export_from_cell: X => ; compartment*kout*X;  // isVersionOf GO:0051481
  CICR: Y => X; ER*4*vM3*k_CaA^n*(X^n/((X^n + k_CaA^n)*(X^n + k_CaI^n)))*(Z^m/(Z^m + kip3^m))*(Y - X);  // modifiers: Z; isVersionOf GO:0048763
  serca: X => Y; compartment*vM2*X^2/(X^2 + k2^2);  // isVersionOf GO:0005388
  Leak_flux: Y => X; ER*kf*(Y - X);  // isVersionOf GO:0007204 GO:0022840
  PLC: => Z; compartment*vp*X^2/(X^2 + kp^2);  // modifiers: X; isPartOf GO:0032957; isVersionOf GO:0004435
  IP3_degradation: Z => ; compartment*kdeg*Z;

  // Unit definitions:
  unit substance = 1e-6 mole; substance is "micro mole";
  unit uM = 1e-6 mole / litre;
  unit uM_sec_1 = 1e-6 mole / (litre * second);
  unit sec_1 = 1 / second;
end
