// SBML level 2 version 3

model MSAC_convey_controlled()
  // Ibrahim2008_Spindle_Assembly_Checkpoint_convey
  // PLoS ONE (2008), p. e1555
  // In-Silicio Modeling of the Mitotic Spindle Assembly Checkpoint
  // Bashar Ibrahim, Stephan Diekmann, Eberhard Schmitt, Peter Dittrich
  // This model describes the controlled dissociation variant of the mitotic spindle assembly checkpoint. If the tool you use has problems with events, you can uncomment the assignment rules for u and u_prime and comment out the list of events.
  // In accordance with the authors due to typos in the original publication some initial conditions and parameters were slightly changed in the model:
  // article model
  // [O-Mad2] 1.5e-7 M 1.3e-7 M
  // [BubR1:Bub3] 1.30e-7 M 1.27e-7 M
  // k -4 0.01 M -1s -1 0.02 M -1s -1
  // k -5 0.1 M -1s -1 0.2 M -1s -1
  // To the extent possible under law, all copyright and related or neighbouring rights to this encoded model have been dedicated to the public domain worldwide. Please refer to CC0 Public Domain Dedication for more information.
  // In summary, you are entitled to use this encoded model in absolutely any manner you deem suitable, verbatim, or with modification, alone or embedded it in a larger context, redistribute it, commercially or not, in a restricted way or not.
  // To cite BioModels Database, please use: Li C, Donizelli M, Rodriguez N, Dharuri H, Endler L, Chelliah V, Li L, He E, Henry A, Stefan MI, Snoep JL, Hucka M, Le Novère N, Laibe C (2010) BioModels Database: An enhanced, curated and annotated resource for published quantitative kinetic models. BMC Syst Biol., 4:92.
  // biomodels.db:BIOMD0000000187
  // biomodels.db:MODEL6655578762
  // isDescribedBy pubmed:18253502
  // occursIn taxonomy:9606
  // isPartOf kegg.pathway:hsa04110
  // isVersionOf reactome:REACT_2137.2 GO:0007094

  // Compartments:
  compartment Cytoplasm = 1;  // GO:0005737

  // Species:
  species Mad1_CMad2 in Cytoplasm = 5e-8; Mad1_CMad2 is "Mad1:C-Mad2";  // substance in mole; GO:0005515; hasPart uniprot:Q9Y6D9 uniprot:Q13257
  // Open conformation of Mad2
  species OMad2 in Cytoplasm = 1.3e-7; OMad2 is "O-Mad2";  // substance in mole; uniprot:Q13257 GO:0005515
  species Mad1_CMad2_OMad2 in Cytoplasm = 0; Mad1_CMad2_OMad2 is "Mad1:C-Mad2:O-Mad2*";  // substance in mole; hasPart uniprot:Q9Y6D9 uniprot:Q13257; isVersionOf GO:0005515
  species Cdc20 in Cytoplasm = 2.2e-7;  // substance in mole; uniprot:Q12834
  species Cdc20_CMad2 in Cytoplasm = 0; Cdc20_CMad2 is "Cdc20:C-Mad2";  // substance in mole; hasPart uniprot:Q12834 uniprot:Q13257
  species Bub3_BubR1 in Cytoplasm = 1.27e-7; Bub3_BubR1 is "Bub3:BubR1";  // substance in mole; hasPart uniprot:O43684 uniprot:Q60566
  species MCC in Cytoplasm = 0;  // substance in mole; GO:0033597; hasPart uniprot:O43684 uniprot:Q60566 uniprot:Q13257 uniprot:Q12834
  species Bub3_BubR1_Cdc20 in Cytoplasm = 0; Bub3_BubR1_Cdc20 is "Bub3:BubR1:Cdc20";  // substance in mole; hasPart uniprot:O43684 uniprot:Q60566 uniprot:Q12834
  species APC in Cytoplasm = 9e-8;  // substance in mole; hasPart uniprot:Q9H1A4 uniprot:Q9UJX6 uniprot:P30260 uniprot:Q9UJX5; isVersionOf GO:0005680
  species MCC_APC in Cytoplasm = 0; MCC_APC is "MCC:APC";  // substance in mole; hasPart GO:0033597 GO:0005680; hasPart uniprot:Q9H1A4 uniprot:Q9UJX6 uniprot:P30260 uniprot:Q9UJX5
  species APC_Cdc20 in Cytoplasm = 0; APC_Cdc20 is "APC:Cdc20";  // substance in mole; hasPart uniprot:Q9H1A4 uniprot:Q9UJX6 uniprot:P30260 uniprot:Q9UJX5

  // Parameters:
  k3f = 0.01 ps;
  kf6 = 1000 pMps;
  k5f = 10000 pMps;
  k5r = 0.2 ps;
  k2f = 100000000 pMps;
  k1f = 200000 pMps;
  k1r = 0.2 ps;
  k4f = 10000000 pMps;
  k4r = 0.02 ps;
  k7f = 100000000 pMps;
  k7bf = 0.08 ps;
  k8f = 5000000 pMps;
  k8r = 0.08 ps;
  // u = 1 : kinetochore unattached
  // u = 0 : kinetochore attached
  u = 1 dimensionless;
  // u = 0 : kinetochore unattached
  // u = 1 : kinetochore attached
  u_prime = 0 dimensionless;
  const_val_0 = 0 dimensionless;
  const_val_1 = 1 dimensionless;

  // Reactions:
  R1: Mad1_CMad2 + OMad2 -> Mad1_CMad2_OMad2; Cytoplasm*(u*k1f*Mad1_CMad2*OMad2 - k1r*Mad1_CMad2_OMad2);  // isVersionOf GO:0006461 GO:0043241 GO:0032092
  R2: Mad1_CMad2_OMad2 + Cdc20 => Mad1_CMad2 + Cdc20_CMad2; u*k2f*Mad1_CMad2_OMad2*Cdc20*Cytoplasm;  // isVersionOf GO:0006461 GO:0032092
  R3: Cdc20_CMad2 => Cdc20 + OMad2; k3f*Cdc20_CMad2*Cytoplasm;  // isVersionOf GO:0043241
  R4: Cdc20_CMad2 + Bub3_BubR1 -> MCC; Cytoplasm*(u*k4f*Cdc20_CMad2*Bub3_BubR1 - k4r*MCC);  // isVersionOf reactome:REACT_36.2 GO:0006461 GO:0043241
  R5: Bub3_BubR1 + Cdc20 -> Bub3_BubR1_Cdc20; Cytoplasm*(u*k5f*Bub3_BubR1*Cdc20 - k5r*Bub3_BubR1_Cdc20);  // isVersionOf GO:0006461 GO:0043241
  R6: OMad2 + Cdc20 => Cdc20_CMad2; kf6*OMad2*Cdc20*Cytoplasm;  // isVersionOf GO:0006461
  R7: MCC + APC => MCC_APC; u*k7f*MCC*APC*Cytoplasm;  // isVersionOf GO:0043623 GO:0051436
  R7b: MCC_APC => OMad2 + Bub3_BubR1 + APC_Cdc20; u_prime*k7bf*MCC_APC*Cytoplasm;  // isVersionOf GO:0043624 GO:0007092
  R8: APC + Cdc20 -> APC_Cdc20; Cytoplasm*(k8f*APC*Cdc20 - k8r*APC_Cdc20);  // isVersionOf GO:0043623 GO:0007092

  // Events:
  mt_attachment: at (time > 2000): u = const_val_0, u_prime = const_val_1; mt_attachment is "Microtubule attachment";

  // Unit definitions:
  unit ps = 1 / second; ps is "per second";
  unit pMps = litre / (mole * second); pMps is "liter per mole per second";
end
