// SBML level 2 version 3

model p53_Mdm2_System()
  // Proctor2008_p53_Mdm2_ARF
  // To the extent possible under law, all copyright and related or neighbouring rights to this encoded model have been dedicated to the public domain worldwide. Please refer to CC0 Public Domain Dedication for more information.
  // In summary, you are entitled to use this encoded model in absolutely any manner you deem suitable, verbatim, or with modification, alone or embedded it in a larger context, redistribute it, commercially or not, in a restricted way or not.
  // To cite BioModels Database, please use: Li C, Donizelli M, Rodriguez N, Dharuri H, Endler L, Chelliah V, Li L, He E, Henry A, Stefan MI, Snoep JL, Hucka M, Le Novère N, Laibe C (2010) BioModels Database: An enhanced, curated and annotated resource for published quantitative kinetic models. BMC Syst Biol., 4:92.
  // biomodels.db:BIOMD0000000189
  // biomodels.db:MODEL8142536273
  // isDescribedBy pubmed:18706112
  // occursIn taxonomy:9606
  // isPartOf kegg.pathway:hsa04115 reactome:REACT_85.1
  // isVersionOf GO:0030330

  // Compartments:
  compartment cell = 1;  // GO:0005623

  // Species:
  substanceOnly species Mdm2 in cell = 5;  // uniprot:Q00987; isEncodedBy ensembl:ENSG00000135679
  substanceOnly species p53 in cell = 5;  // isEncodedBy ensembl:ENSG00000141510; isVersionOf uniprot:P04637
  substanceOnly species Mdm2_p53 in cell = 95;  // hasPart uniprot:P04637 uniprot:Q00987
  substanceOnly species Mdm2_mRNA in cell = 0;  // isVersionOf CHEBI:33699 kegg.compound:C00046
  substanceOnly species ARF in cell = 0;  // uniprot:Q8N726; isEncodedBy ensembl:ENSG00000147889
  substanceOnly species ARF_Mdm2 in cell = 0;  // hasPart uniprot:Q8N726 uniprot:Q00987
  substanceOnly species damDNA in cell = 0;  // isVersionOf CHEBI:16991 GO:0006974
  substanceOnly species $Sink in cell = 1;
  substanceOnly species $Source in cell = 1;
  substanceOnly species p53deg in cell = 0;  // isVersionOf GO:0043161
  substanceOnly species p53syn in cell = 0;  // isVersionOf GO:0006412
  substanceOnly species mdm2deg in cell = 0;  // isVersionOf GO:0043161
  substanceOnly species mdm2syn in cell = 0;  // isVersionOf GO:0006412
  substanceOnly species Mdm2mRNAdeg in cell = 0;  // isVersionOf GO:0006402
  substanceOnly species Mdm2mRNAsyn in cell = 0;  // isVersionOf GO:0003700
  substanceOnly species totdamDNA in cell = 0;
  substanceOnly species totp53 in cell;
  substanceOnly species totMdm2 in cell;

  // Parameters:
  IR = 0 decagray;
  ksynMdm2 = 0.000495 psec;
  kdegMdm2 = 0.000433 psec;
  ksynp53 = 0.078 psec;
  kdegp53 = 0.000825 psec;
  kbinMdm2p53 = 0.001155 pmolepsec;
  krelMdm2p53 = 1.155e-5 psec;
  ksynMdm2mRNA = 0.0001 psec;
  kdegMdm2mRNA = 0.0001 psec;
  kbinARFMdm2 = 0.01 pmolepsec;
  kdegARFMdm2 = 0.001 psec;
  kdegARF = 0.0001 psec;
  kactARF = 3.3e-5 psec;
  kdam = 0.08 molepsecpdGy;
  krepair = 2e-5 psec;
  kproteff = 1 dimensionless;

  // Assignment rules:
  totp53 := p53 + Mdm2_p53;
  totMdm2 := Mdm2 + Mdm2_p53 + ARF_Mdm2;

  // Reactions:
  Mdm2Synthesis: Mdm2_mRNA => Mdm2_mRNA + Mdm2 + mdm2syn; ksynMdm2*Mdm2_mRNA;  // GO:0006412
  Mdm2mRNASynthesis: p53 => p53 + Mdm2_mRNA + Mdm2mRNAsyn; ksynMdm2mRNA*p53;  // isVersionOf GO:0003700
  Mdm2mRNADegradation: Mdm2_mRNA => $Sink + Mdm2mRNAdeg; kdegMdm2mRNA*Mdm2_mRNA;  // isVersionOf GO:0006402
  Mdm2Degradation: Mdm2 => $Sink + mdm2deg; kdegMdm2*Mdm2*kproteff;  // isVersionOf GO:0043161
  p53Synthesis: $Source => p53 + p53syn; ksynp53*Source;  // GO:0006412
  p53Degradation: Mdm2_p53 => Mdm2 + p53deg; kdegp53*Mdm2_p53*kproteff;  // isVersionOf GO:0043161
  P53_Mdm2Binding: p53 + Mdm2 => Mdm2_p53; kbinMdm2p53*p53*Mdm2;  // isVersionOf GO:0002039
  P53_Mdm2Release: Mdm2_p53 => p53 + Mdm2; krelMdm2p53*Mdm2_p53;  // isVersionOf GO:0043624
  DNAdamage: => damDNA + totdamDNA; kdam*IR;  // isVersionOf GO:0006974
  DNArepair: damDNA => $Sink; krepair*damDNA;  // isVersionOf GO:0006281
  ARFactivation: damDNA => damDNA + ARF; kactARF*damDNA;  // isVersionOf GO:0030330
  ARF_Mdm2Binding: ARF + Mdm2 => ARF_Mdm2; kbinARFMdm2*ARF*Mdm2;  // isVersionOf GO:0005515
  ARF_Mdm2Degradation: ARF_Mdm2 => ARF + mdm2deg; kdegARFMdm2*ARF_Mdm2*kproteff;  // isVersionOf GO:0043161
  ARFDegradation: ARF => $Sink; kdegARF*ARF*kproteff;  // isVersionOf GO:0043161

  // Events:
  stressCell: at (time >= 3600): IR = 25;  // GO:0006950
  stopStress: at (time >= 3660): IR = 0;

  // Unit definitions:
  unit molepsecpdGy = mole / (second * 10 gray);
  unit decagray = 10 gray; decagray is "dGy";
  unit molepsec = mole / second;
  unit pmolepsec = 1 / (mole * second);
  unit psec = 1 / second;
end
