// SBML level 2 version 3

model Model_1()
  // Montañez2008_Arginine_catabolism
  // SBML creators: Armando Reyes-Palomares * , Raul Montañez *, Carlos Rodriguez-Caso +, Francisca Sanchez-Jimenez * , Miguel A. Medina *
  // * ProCel Group, Department of Molecular Biology and Biochemistry, Faculty of Sciences, Campus de Teatinos, University of Malaga and CIBER de Enfermedades Raras (CIBER-ER). + Complex Systems Lab (ICREA-UPF), Barcelona Biomedical Research Park (PRBB-GRIB).
  // http://asp.uma.es
  // In silico analysis of arginine catabolism as a source of nitric oxide or polyamines in endothelial cells.
  // Montañez, R et al.: Amino Acids. 2008 Feb;34(2):223-9.
  // The model reproduces the dynamical behavior of the arginine catabolism and transport in relation to the nitric oxide production. In this model there are some additions and corrections to the publication. All perturbations and analysis have produced results very close to the published experiments. The model was successfully tested on CoPaSi v.4.4 (build 26).
  // Erratum: parameters values modificated respect to the publication to reach the steady-state:
  // Kmodc=90 µM (60 µM in the paper)
  // Kiornhat (is equivalent to the parameter Kmefflhat Eq ) = 360 µM (380 µM in the paper)
  // This model originates from BioModels Database: A Database of Annotated Published Models. It is copyright (c) 2005-2008 The BioModels Team.
  // To the extent possible under law, all copyright and related or neighbouring rights to this encoded model have been dedicated to the public domain worldwide. Please refer to CC0 Public Domain Dedication for more information.
  // In summary, you are entitled to use this encoded model in absolutely any manner you deem suitable, verbatim, or with modification, alone or embedded it in a larger context, redistribute it, commercially or not, in a restricted way or not..
  // To cite BioModels Database, please use Le Novère N., Bornstein B., Broicher A., Courtot M., Donizelli M., Dharuri H., Li L., Sauro H., Schilstra M., Shapiro B., Snoep J.L., Hucka M. (2006) BioModels Database: A Free, Centralized Database of Curated, Published, Quantitative Kinetic Models of Biochemical and Cellular Systems Nucleic Acids Res., 34: D689-D691.
  // biomodels.db:BIOMD0000000191
  // biomodels.db:MODEL7416883636
  // isDescribedBy pubmed:17520329
  // hasVersion GO:0006809 GO:0006591
  // isPartOf kegg.pathway:map00330 GO:0006527
  // occursIn taxonomy:40674

  // Compartments:
  compartment extracellular = 1;  // GO:0005615
  compartment cytosol = 1;  // GO:0005829

  // Species:
  species $ARGex in extracellular = 330; ARGex is "Arginine ex";  // CHEBI:16467 kegg.compound:C00062
  species ORN in cytosol = 1; ORN is "Ornithine";  // CHEBI:15729 kegg.compound:C00077
  species ARGin in cytosol = 1; ARGin is "Arginine in";  // CHEBI:16467 kegg.compound:C00062

  // Reactions:
  Arginase: ARGin => ORN; cytosol*(Vmaxarg*ARGin/(Kmarg*(1 + ORN/Kioarg) + ARGin));  // isVersionOf ec-code:3.5.3.1 kegg.reaction:R00551 reactome:REACT_394.2 GO:0004053
    Vmaxarg = 110 microMpermin; Kmarg = 1500 microM; Kioarg = 1000 microM;
  Arginine_transport: $ARGex => ARGin; extracellular*(ARGex/(Arginine_transport_Kmhat + ARGex)*(Vmaxhat/(1 + ORN/Arginine_transport_Kiornhat + ARGin/Arginine_transport_Kmhat)) + ARGex/(Arginine_transport_Kmlat + ARGex)*(Vmaxlat/(1 + ORN/Arginine_transport_Kiornhat + ARGin/Arginine_transport_Kmlat)));  // modifiers: ORN; GO:0015326
    Arginine_transport_Kmhat = 70 microM; Vmaxhat = 160.5 microM; Arginine_transport_Kmlat = 847 microM; Vmaxlat = 420 microMpermin; Arginine_transport_Kiornhat = 360 microM;
  Ornithine_efflux: ORN => ; cytosol*(Vmaxefflhat/(1 + ARGex/Ornithine_efflux_Kmhat)*(ORN/(Ornithine_efflux_Kiornhat*(1 + ARGin/Ornithine_efflux_Kmhat) + ORN)) + Vmaxeffllat/(1 + ARGex/Ornithine_efflux_Kmlat)*(ORN/(Kmeffllat*(1 + ARGin/Ornithine_efflux_Kmlat) + ORN)));  // modifiers: ARGex, ARGin; GO:0015326
    Ornithine_efflux_Kmhat = 70 microM; Ornithine_efflux_Kmlat = 847 microM; Vmaxefflhat = 160.5 microMpermin; Vmaxeffllat = 420 microMpermin; Kmeffllat = 847 microM; Ornithine_efflux_Kiornhat = 360 microM;
  NOS: ARGin => ; cytosol*(Vmaxnos1*ARGin/(Kmnos1 + ARGin)); NOS is "Nitric oxide synthase";  // isVersionOf ec-code:1.14.13.39 kegg.reaction:R00557 reactome:REACT_12443.1 GO:0004517
    Vmaxnos1 = 1.33 microMpermin; Kmnos1 = 16 microM;
  ODC: ORN => ; cytosol*(Vmaxodc*ORN/(Kmodc + ORN)); ODC is "Ornithine decarboxylase";  // isVersionOf ec-code:4.1.1.17 kegg.reaction:R00670 reactome:REACT_1211.3 GO:0004586
    Vmaxodc = 0.013 microMpermin; Kmodc = 90 microM;

  // Unit definitions:
  unit time = 60 second;
  unit substance = 1e-6 mole;
  unit microM = 1e-6 mole / litre;
  unit microMpermin = 1e-6 mole / (litre * 60 second);
end
