// SBML level 2 version 3

model Ung2008_EGFR_Endocytosis()
  // Model reproduces the various plots in the publication for "Control" concentrations. Model successfully tested on MathSBML.
  // To the extent possible under law, all copyright and related or neighbouring rights to this encoded model have been dedicated to the public domain worldwide. Please refer to CC0 Public Domain Dedication for more information.
  // In summary, you are entitled to use this encoded model in absolutely any manner you deem suitable, verbatim, or with modification, alone or embedded it in a larger context, redistribute it, commercially or not, in a restricted way or not.
  // To cite BioModels Database, please use: Li C, Donizelli M, Rodriguez N, Dharuri H, Endler L, Chelliah V, Li L, He E, Henry A, Stefan MI, Snoep JL, Hucka M, Le Novère N, Laibe C (2010) BioModels Database: An enhanced, curated and annotated resource for published quantitative kinetic models. BMC Syst Biol., 4:92.
  // biomodels.db:BIOMD0000000205
  // biomodels.db:MODEL7802538336
  // isDescribedBy pubmed:18505685
  // GO:0007173 GO:0006897
  // isPartOf kegg.pathway:hsa04010 kegg.pathway:hsa04070
  // occursIn taxonomy:2759

  // Compartments:
  compartment Cell = 1;  // GO:0005623

  // Species:
  species EGF in Cell = 0.0081967;  // isVersionOf uniprot:P07522
  species EGFR in Cell = 0.3;  // isVersionOf uniprot:Q9QX70
  species EGF_EGFR in Cell = 0; EGF_EGFR is "EGF-EGFR";  // hasPart uniprot:Q9QX70 uniprot:P07522
  species EGF_EGFR_2 in Cell = 0; EGF_EGFR_2 is "EGF-EGFR-2";  // hasPart uniprot:Q9QX70 uniprot:P07522
  species EGF_pEGFR_2 in Cell = 0; EGF_pEGFR_2 is "EGF-pEGFR-2";  // hasPart uniprot:Q9QX70 uniprot:P07522
  species SHP in Cell = 0.1;  // isVersionOf uniprot:Q06124
  species EGF_pEGFR_2_SHP in Cell = 0; EGF_pEGFR_2_SHP is "EGF-pEGFR-2-SHP";  // hasPart uniprot:Q9QX70 uniprot:P07522 uniprot:Q06124
  species Shc in Cell = 1;  // isVersionOf uniprot:P98077
  species EGF_pEGFR_2_Shc in Cell = 0; EGF_pEGFR_2_Shc is "EGF-pEGFR-2-Shc";  // hasPart uniprot:Q9QX70 uniprot:P07522 uniprot:P98077
  species EGF_pEGFR_2_pShc in Cell = 0; EGF_pEGFR_2_pShc is "EGF-pEGFR-2-pShc";  // hasPart uniprot:Q9QX70 uniprot:P07522 uniprot:P98077
  species pShc in Cell = 0;  // isVersionOf uniprot:P98077
  species pShc_SHP in Cell = 0; pShc_SHP is "pShc-SHP";  // hasPart uniprot:Q06124 uniprot:P98077
  species Grb2 in Cell = 1;  // isVersionOf uniprot:P62993
  species EGF_pEGFR_2_pShc_Grb2 in Cell = 0; EGF_pEGFR_2_pShc_Grb2 is "EGF-pEGFR-2-pShc-Grb2";  // hasPart uniprot:Q9QX70 uniprot:P07522 uniprot:P98077 uniprot:P62993
  species SOS in Cell = 0.3;  // isVersionOf uniprot:Q07889
  species EGF_pEGFR_2_pShc_Grb2_SOS in Cell = 0; EGF_pEGFR_2_pShc_Grb2_SOS is "EGF-pEGFR-2-pShc-Grb2-SOS";  // hasPart uniprot:Q9QX70 uniprot:P07522 uniprot:P98077 uniprot:P62993
  species Grb2_SOS in Cell = 0; Grb2_SOS is "Grb2-SOS";  // hasPart uniprot:P62993 uniprot:Q07889
  species RasGDP in Cell = 0.15;  // hasPart CHEBI:17552 uniprot:P62070
  species EGF_pEGFR_2_pShc_Grb2_SOS_RasGDP in Cell = 0; EGF_pEGFR_2_pShc_Grb2_SOS_RasGDP is "EGF-pEGFR-2-pShc-Grb2-SOS-RasGDP";  // hasPart CHEBI:17552 uniprot:Q9QX70 uniprot:P07522 uniprot:P98077
  species RasGTP in Cell = 0;  // hasPart CHEBI:15996 uniprot:P62070
  species EGF_pEGFR_2_Grb2 in Cell = 0; EGF_pEGFR_2_Grb2 is "EGF-pEGFR-2-Grb2";  // hasPart uniprot:Q9QX70 uniprot:P07522 uniprot:P62993
  species EGF_pEGFR_2_Grb2_SOS in Cell = 0; EGF_pEGFR_2_Grb2_SOS is "EGF-pEGFR-2-Grb2-SOS";  // hasPart uniprot:Q9QX70 uniprot:P07522 uniprot:P62993 uniprot:Q07889
  species EGF_pEGFR_2_Grb2_SOS_RasGDP in Cell = 0; EGF_pEGFR_2_Grb2_SOS_RasGDP is "EGF-pEGFR-2-Grb2-SOS-RasGDP";  // hasPart CHEBI:17552 uniprot:Q9QX70 uniprot:P07522 uniprot:P62993
  species Raf in Cell = 0.5;  // isVersionOf uniprot:P04049
  species Raf_RasGTP in Cell = 0; Raf_RasGTP is "Raf-RasGTP";  // hasPart CHEBI:15996 uniprot:P62070 uniprot:P04049
  species pRaf in Cell = 0;  // isVersionOf uniprot:P04049
  species MEK in Cell = 0.68;  // isVersionOf uniprot:Q02750
  species pRaf_MEK in Cell = 0; pRaf_MEK is "pRaf-MEK";  // hasPart uniprot:P04049 uniprot:Q02750
  species pMEK in Cell = 0;  // isVersionOf uniprot:Q02750
  species pRaf_pMEK in Cell = 0; pRaf_pMEK is "pRaf-pMEK";  // hasPart uniprot:P04049 uniprot:Q02750
  species ppMEK in Cell = 0;  // isVersionOf uniprot:Q02750
  species ERK in Cell = 0.4;  // isVersionOf uniprot:P28482
  species ppMEK_ERK in Cell = 0; ppMEK_ERK is "ppMEK-ERK";  // hasPart uniprot:Q02750 uniprot:P28482
  species pERK in Cell = 0;  // isVersionOf uniprot:P28482
  species ppMEK_pERK in Cell = 0; ppMEK_pERK is "ppMEK-pERK";  // hasPart uniprot:Q02750 uniprot:P28482
  species ppERK in Cell = 0;  // isVersionOf uniprot:P28482
  species Pase in Cell = 0.5;
  species pRaf_Pase in Cell = 0; pRaf_Pase is "pRaf-Pase";  // hasPart uniprot:P04049
  species PP2A in Cell = 0.02;  // isVersionOf uniprot:P35813
  species ppMEK_PP2A in Cell = 0; ppMEK_PP2A is "ppMEK-PP2A";  // hasPart uniprot:Q02750 uniprot:P35813
  species pMEK_PP2A in Cell = 0; pMEK_PP2A is "pMEK-PP2A";  // hasPart uniprot:Q02750 uniprot:P35813
  species MKP3 in Cell = 0.002;  // isVersionOf uniprot:Q16828
  species ppERK_MKP3 in Cell = 0; ppERK_MKP3 is "ppERK-MKP3";  // hasPart uniprot:P28482 uniprot:Q16828
  species pERK_MKP3 in Cell = 0; pERK_MKP3 is "pERK-MKP3";  // hasPart uniprot:P28482 uniprot:Q16828
  species RasGAP in Cell = 0.1;  // isVersionOf uniprot:P20936
  species RasGTP_RasGAP in Cell = 0; RasGTP_RasGAP is "RasGTP-RasGAP";  // hasPart uniprot:P62070 uniprot:P20936
  species ppERK_EGF_pEGFR_2_pShc_Grb2_SOS in Cell = 0; ppERK_EGF_pEGFR_2_pShc_Grb2_SOS is "ppERK-EGF-pEGFR-2-pShc-Grb2-SOS";  // hasPart uniprot:Q9QX70 uniprot:P07522 uniprot:P98077 uniprot:P62993
  species pSOS in Cell = 0;  // isVersionOf uniprot:Q07889
  species ppERK_EGF_pEGFR_2_Grb2_SOS in Cell = 0; ppERK_EGF_pEGFR_2_Grb2_SOS is "ppERK-EGF-pEGFR-2-Grb2-SOS";  // hasPart uniprot:Q9QX70 uniprot:P07522 uniprot:P62993 uniprot:Q07889
  species PI3K in Cell = 0.01;  // isVersionOf uniprot:Q8WYR1
  species EGF_pEGFR_2_PI3K in Cell = 0; EGF_pEGFR_2_PI3K is "EGF-pEGFR-2-PI3K";  // hasPart uniprot:Q9QX70 uniprot:Q8WYR1
  species EGF_pEGFF_2 in Cell = 0; EGF_pEGFF_2 is "EGF-pEGFF-2";  // hasPart uniprot:P07522
  species pPI3K in Cell = 0;  // isVersionOf uniprot:Q8WYR1
  species TP4 in Cell = 0.2;
  species pPI3K_TP4 in Cell = 0; pPI3K_TP4 is "pPI3K-TP4";  // hasPart uniprot:Q8WYR1
  species PIP2 in Cell = 0.5;  // CHEBI:16152
  species pPI3K_PIP2 in Cell = 0; pPI3K_PIP2 is "pPI3K-PIP2";  // hasPart CHEBI:16152 uniprot:Q8WYR1
  species PIP3 in Cell = 0.5;  // CHEBI:16618
  species Akt in Cell = 0.1;  // isVersionOf uniprot:P31749
  species Akt_PIP3 in Cell = 0; Akt_PIP3 is "Akt-PIP3";  // hasPart CHEBI:16618 uniprot:P31749
  species PDK1 in Cell = 0.1;  // isVersionOf uniprot:O15530
  species Akt_PIP3_PDK1 in Cell = 0; Akt_PIP3_PDK1 is "Akt-PIP3-PDK1";  // hasPart CHEBI:16618 uniprot:P31749 uniprot:O15530
  species pAkt_PIP3 in Cell = 0; pAkt_PIP3 is "pAkt-PIP3";  // hasPart CHEBI:16618 uniprot:P31749
  species pAkt in Cell = 0;  // isVersionOf uniprot:P31749
  species Takt in Cell = 0.1;
  species pAkt_PIP3_Takt in Cell = 0; pAkt_PIP3_Takt is "pAkt-PIP3-Takt";  // hasPart CHEBI:16618 uniprot:P31749
  species pRaf_pAkt_PIP3 in Cell = 0; pRaf_pAkt_PIP3 is "pRaf-pAkt-PIP3";  // hasPart CHEBI:16618 uniprot:P04049 uniprot:P31749
  species ppRaf in Cell = 0;  // isVersionOf uniprot:P04049
  species pROK in Cell = 0;  // isVersionOf uniprot:Q13464
  species PTEN in Cell = 0.1;  // isVersionOf uniprot:P60484
  species pROK_PTEN in Cell = 0; pROK_PTEN is "pROK-PTEN";  // hasPart uniprot:Q13464 uniprot:P60484
  species pPTEN in Cell = 0;  // isVersionOf uniprot:P60484
  species pPTEN_PIP3 in Cell = 0; pPTEN_PIP3 is "pPTEN-PIP3";  // hasPart CHEBI:16618 uniprot:P60484
  species RacGEF in Cell = 0.1;  // isVersionOf uniprot:Q15052
  species PIP3_RacGEF in Cell = 0; PIP3_RacGEF is "PIP3-RacGEF";  // hasPart CHEBI:16618 uniprot:Q15052
  species RacGDP in Cell = 0.2;  // hasPart CHEBI:17552 uniprot:P63000
  species PIP3_RacGEF_RacGDP in Cell = 0; PIP3_RacGEF_RacGDP is "PIP3-RacGEF-RacGDP";  // hasPart CHEBI:17552 CHEBI:16618 uniprot:P63000 uniprot:Q15052
  species RacGTP in Cell = 0;  // hasPart CHEBI:15996 uniprot:P63000
  species RhoGDI in Cell = 0.1;  // isVersionOf uniprot:P52565
  species RhoGDI_RacGDP in Cell = 0; RhoGDI_RacGDP is "RhoGDI-RacGDP";  // hasPart CHEBI:17552 uniprot:P63000 uniprot:P52565
  species RacGAP in Cell = 0.1;
  species RacGTP_RacGAP in Cell = 0; RacGTP_RacGAP is "RacGTP-RacGAP";  // hasPart CHEBI:15996 uniprot:P63000
  species RhoGDP in Cell = 0.15;  // hasPart uniprot:P61586
  species RhoGDP_RhoGDI in Cell = 0; RhoGDP_RhoGDI is "RhoGDP-RhoGDI";  // hasPart uniprot:P61586 uniprot:P52565
  species pRhoGEF in Cell = 0;  // isVersionOf uniprot:Q9NZN5
  species RhoGDP_pRhoGEF in Cell = 0; RhoGDP_pRhoGEF is "RhoGDP-pRhoGEF";  // hasPart uniprot:P61586 uniprot:Q9NZN5
  species RhoGTP in Cell = 0;  // hasPart CHEBI:15996 uniprot:P61586
  species EGF_pEGFR_2_RasGAP in Cell = 0; EGF_pEGFR_2_RasGAP is "EGF-pEGFR-2-RasGAP";  // hasPart uniprot:Q9QX70 uniprot:P07522 uniprot:P20936
  species EGF_pEGFR_2_RasGAP_RasGTP in Cell = 0; EGF_pEGFR_2_RasGAP_RasGTP is "EGF-pEGFR-2-RasGAP-RasGTP";  // hasPart CHEBI:15996 uniprot:Q9QX70 uniprot:P07522 uniprot:P62070
  species EGF_pEGFR2_RasGAP in Cell = 0; EGF_pEGFR2_RasGAP is "EGF-pEGFR2-RasGAP";  // hasPart uniprot:Q9QX70 uniprot:P07522 uniprot:P20936
  species SHP2 in Cell = 0.1;  // isVersionOf uniprot:Q06124
  species EGF_pEGFR_2_pShc_Grb2_SHP2 in Cell = 0; EGF_pEGFR_2_pShc_Grb2_SHP2 is "EGF-pEGFR-2-pShc-Grb2-SHP2";  // hasPart uniprot:Q9QX70 uniprot:P07522 uniprot:Q06124 uniprot:P98077
  species EGF_pEGFR_2_Grb2_SHP2 in Cell = 0; EGF_pEGFR_2_Grb2_SHP2 is "EGF-pEGFR-2-Grb2-SHP2";  // hasPart uniprot:Q9QX70 uniprot:P07522 uniprot:Q06124 uniprot:P62993
  species species_93 in Cell = 0; species_93 is "EGF-pEGFR-2-pShc-Grb2-SHP2-pRhoGEF";  // hasPart uniprot:Q9QX70 uniprot:P07522 uniprot:Q06124 uniprot:P98077
  species RhoGEF in Cell = 0.1;  // isVersionOf uniprot:Q9NZN5
  species pRhoGAP in Cell = 0;
  species species_96 in Cell = 0; species_96 is "EGF-pEGFR-2-pShc-Grb2-SHP2-pRhoGAP";  // hasPart uniprot:Q9QX70 uniprot:P07522 uniprot:Q06124 uniprot:P98077
  species RhoGAP in Cell = 0.5;
  species EGF_pEGFR_2_Grb2_SHP2_pRhoGEF in Cell = 0; EGF_pEGFR_2_Grb2_SHP2_pRhoGEF is "EGF-pEGFR-2-Grb2-SHP2-pRhoGEF";  // hasPart uniprot:Q9QX70 uniprot:P07522 uniprot:Q06124 uniprot:P62993
  species EGF_pEGFR_2_Grb2_SHP2_pRhoGAP in Cell = 0; EGF_pEGFR_2_Grb2_SHP2_pRhoGAP is "EGF-pEGFR-2-Grb2-SHP2-pRhoGAP";  // hasPart uniprot:Q9QX70 uniprot:P07522 uniprot:Q06124 uniprot:P62993
  species EGF_pEGFR_2_RasGAP_SHP2 in Cell = 0; EGF_pEGFR_2_RasGAP_SHP2 is "EGF-pEGFR-2-RasGAP-SHP2";  // hasPart uniprot:Q9QX70 uniprot:P07522 uniprot:Q06124 uniprot:P20936
  species pSrc in Cell = 0;  // isVersionOf uniprot:P12931
  species pSrc_RhoGEF in Cell = 0; pSrc_RhoGEF is "pSrc-RhoGEF";  // hasPart uniprot:Q9NZN5 uniprot:P12931
  species pSrc_RhoGAP in Cell = 0; pSrc_RhoGAP is "pSrc-RhoGAP";  // isVersionOf uniprot:P12931
  species pRhoGAP_RhoGTP in Cell = 0; pRhoGAP_RhoGTP is "pRhoGAP-RhoGTP";  // hasPart uniprot:P61586
  species ROK in Cell = 0.68;  // isVersionOf uniprot:Q13464
  species RhoGTP_ROK in Cell = 0; RhoGTP_ROK is "RhoGTP-ROK";  // hasPart uniprot:P61586 uniprot:Q13464
  species Src in Cell = 0.518;  // isVersionOf uniprot:P12931
  species EGF_pEGFR_2_Src in Cell = 0; EGF_pEGFR_2_Src is "EGF-pEGFR-2-Src";  // hasPart uniprot:Q9QX70 uniprot:P07522 uniprot:P12931
  species EGF_pEGFR_2_pSrc in Cell = 0; EGF_pEGFR_2_pSrc is "EGF-pEGFR-2-pSrc";  // hasPart uniprot:Q9QX70 uniprot:P07522 uniprot:P12931
  species EGF_pEGRF_2 in Cell = 0; EGF_pEGRF_2 is "EGF-pEGRF-2";  // hasPart uniprot:Q9QX70 uniprot:P07522
  species TP7 in Cell = 0.518;
  species pSrc_TP7 in Cell = 0; pSrc_TP7 is "pSrc-TP7";  // hasPart uniprot:P12931
  species Src_TP7 in Cell = 0; Src_TP7 is "Src-TP7";  // hasPart uniprot:P12931
  species Cbl_CIN85 in Cell = 0.8; Cbl_CIN85 is "Cbl-CIN85";  // isVersionOf uniprot:Q96B97
  species species_115 in Cell = 0; species_115 is "EGF-pEGFR-2-pShc-Grb2-SOS-Cbl-CIN85";  // hasPart uniprot:Q96B97 uniprot:Q9QX70 uniprot:P07522 uniprot:P98077
  species EGF_pEGFR_2_Grb2_SOS_Cbl_CIN85 in Cell = 0; EGF_pEGFR_2_Grb2_SOS_Cbl_CIN85 is "EGF-pEGFR-2-Grb2-SOS-Cbl-CIN85";  // hasPart uniprot:Q96B97 uniprot:Q9QX70 uniprot:P07522 uniprot:P62993
  species EPn in Cell = 0.5;  // isVersionOf uniprot:Q99962
  species species_118 in Cell = 0; species_118 is "EGF-pEGFR-2-pShc-Grb2-SOS-Cbl-CIN85-EPn";  // hasPart uniprot:Q96B97 uniprot:Q9QX70 uniprot:P07522 uniprot:P98077
  species species_119 in Cell = 0; species_119 is "EGF-pEGFR-2-Grb2-SOS-Cbl-CIN85-EPn";  // hasPart uniprot:Q96B97 uniprot:Q9QX70 uniprot:P07522 uniprot:P62993
  species EGF_pEGFR_2_degrade in Cell = 0; EGF_pEGFR_2_degrade is "EGF-pEGFR-2-degrade";
  species pShc_Grb2_SOS in Cell = 0; pShc_Grb2_SOS is "pShc-Grb2-SOS";  // hasPart uniprot:P98077 uniprot:P62993 uniprot:Q07889
  species Pro_EGFR in Cell = 3000; Pro_EGFR is "Pro-EGFR";  // hasPart uniprot:Q9QX70
  species pROK_EPn in Cell = 0; pROK_EPn is "pROK-EPn";  // hasPart uniprot:Q13464 uniprot:Q99962
  species pEPn in Cell = 0;  // isVersionOf uniprot:Q99962
  species MPase in Cell = 1;
  species pEPn_MPase in Cell = 0; pEPn_MPase is "pEPn-MPase";  // hasPart uniprot:Q99962
  species pEPn_Mpase in Cell = 0; pEPn_Mpase is "pEPn-Mpase";  // hasPart uniprot:Q99962
  species Ras_GTP_RhoGEF in Cell = 0; Ras_GTP_RhoGEF is "Ras-GTP-RhoGEF";
  species ppERK_pROK in Cell = 0; ppERK_pROK is "ppERK-pROK";  // hasPart uniprot:P28482 uniprot:Q13464
  species MEKK1abcdef in Cell = 0.5;  // isVersionOf uniprot:Q13233
  species Grb2_MEKK1abcdef in Cell = 0; Grb2_MEKK1abcdef is "Grb2-MEKK1abcdef";  // hasPart uniprot:Q13233 uniprot:P62993
  species species_132 in Cell = 0; species_132 is "EGF-pEGFR-2-pShc-Grb2-MEKK1abcdef";  // hasPart uniprot:Q9QX70 uniprot:P98077 uniprot:P62993 uniprot:Q13233
  species EGF_pEGFR_2_Grb2_MEKK1abcdef in Cell = 0; EGF_pEGFR_2_Grb2_MEKK1abcdef is "EGF-pEGFR-2-Grb2-MEKK1abcdef";  // hasPart uniprot:Q9QX70 uniprot:P07522 uniprot:P62993 uniprot:Q13233
  species species_134 in Cell = 0; species_134 is "EGF-pEGFR-2-pShc-Grb2-MEKK1abMEKcdef";  // hasPart uniprot:Q9QX70 uniprot:P07522 uniprot:P98077 uniprot:P62993
  species species_135 in Cell = 0; species_135 is "EGF-pEGFR-2-pShc-Grb2-MEKK1abpMEKcdef";  // hasPart uniprot:Q9QX70 uniprot:P07522 uniprot:P98077 uniprot:P62993
  species species_136 in Cell = 0; species_136 is "EGF-pEGFR-2-pShc-Grb2-MEKK1abppMEKcdef";  // hasPart uniprot:Q9QX70 uniprot:P07522 uniprot:P98077 uniprot:P62993
  species EGF_pEGFR_2_Grb2_MEKK1abMEKcdef in Cell = 0; EGF_pEGFR_2_Grb2_MEKK1abMEKcdef is "EGF-pEGFR-2-Grb2-MEKK1abMEKcdef";  // hasPart uniprot:Q9QX70 uniprot:P07522 uniprot:P62993 uniprot:Q02750
  species EGF_pEGFR_2_Grb2_MEKK1abpMEKcdef in Cell = 0; EGF_pEGFR_2_Grb2_MEKK1abpMEKcdef is "EGF-pEGFR-2-Grb2-MEKK1abpMEKcdef";  // hasPart uniprot:Q9QX70 uniprot:P07522 uniprot:P62993 uniprot:Q02750
  species species_139 in Cell = 0; species_139 is "EGF-pEGFR-2-Grb2-MEKK1abppMEKcdef";  // hasPart uniprot:Q9QX70 uniprot:P07522 uniprot:P62993 uniprot:Q02750
  species species_140 in Cell = 0; species_140 is "EGF-pEGFR-2-pShc-Grb2-MEKK1aRafbcdef";  // hasPart uniprot:Q9QX70 uniprot:P07522 uniprot:P98077 uniprot:P62993
  species species_141 in Cell = 0; species_141 is "EGF-pEGFR-2-pShc-Grb2-MEKK1aRafbMEKcdef";  // hasPart uniprot:Q9QX70 uniprot:P07522 uniprot:P98077 uniprot:P62993
  species species_142 in Cell = 0; species_142 is "EGF-pEGFR-2-pShc-Grb2-MEKK1aRafbpMEKcdef";  // hasPart uniprot:Q9QX70 uniprot:P07522 uniprot:P98077 uniprot:P62993
  species species_143 in Cell = 0; species_143 is "EGF-pEGFR-2-pShc-Grb2-MEKK1aRafbppMEKcdef";  // hasPart uniprot:Q9QX70 uniprot:P07522 uniprot:P98077 uniprot:P62993
  species EGF_pEGFR_2_Grb2_MEKK1aRafbcdef in Cell = 0; EGF_pEGFR_2_Grb2_MEKK1aRafbcdef is "EGF-pEGFR-2-Grb2-MEKK1aRafbcdef";  // hasPart uniprot:Q9QX70 uniprot:P07522 uniprot:P62993 uniprot:P04049
  species species_145 in Cell = 0; species_145 is "EGF-pEGFR-2-Grb2-MEKK1aRafbMEKcdef";  // hasPart uniprot:Q9QX70 uniprot:P07522 uniprot:P62993 uniprot:P04049
  species species_146 in Cell = 0; species_146 is "EGF-pEGFR-2-Grb2-MEKK1aRafbpMEKcdef";  // hasPart uniprot:Q9QX70 uniprot:P07522 uniprot:P62993 uniprot:P04049
  species species_147 in Cell = 0; species_147 is "EGF-pEGFR-2-Grb2-MEKK1aRafbppMEKcdef";  // hasPart uniprot:Q9QX70 uniprot:P07522 uniprot:P62993 uniprot:P04049
  species species_148 in Cell = 0; species_148 is "EGF-pEGFR-2-pShc-Grb2-MEKK1abcdefRasGTP";  // hasPart CHEBI:15996 uniprot:Q9QX70 uniprot:P07522 uniprot:P98077
  species species_149 in Cell = 0; species_149 is "EGF-pEGFR-2-pShc-Grb2-MEKK1abMEKcdefRasGTP";  // hasPart CHEBI:15996 uniprot:Q9QX70 uniprot:P07522 uniprot:P98077
  species species_150 in Cell = 0; species_150 is "EGF-pEGFR-2-pShc-Grb2-MEKK1abpMEKcdefRasGTP";  // hasPart CHEBI:15996 uniprot:Q9QX70 uniprot:P07522 uniprot:P98077
  species species_151 in Cell = 0; species_151 is "EGF-pEGFR-2-pShc-Grb2-MEKK1abppMEKcdefRasGTP";  // hasPart CHEBI:15996 uniprot:Q9QX70 uniprot:P07522 uniprot:P98077
  species species_152 in Cell = 0; species_152 is "EGF-pEGFR-2-Grb2-MEKK1abcdefRasGTP";  // hasPart CHEBI:15996 uniprot:Q9QX70 uniprot:P07522 uniprot:P62993
  species species_153 in Cell = 0; species_153 is "EGF-pEGFR-2-Grb2-MEKK1abMEKcdefRasGTP";  // hasPart CHEBI:15996 uniprot:Q9QX70 uniprot:P07522 uniprot:P62993
  species species_154 in Cell = 0; species_154 is "EGF-pEGFR-2-Grb2-MEKK1abpMEKcdefRasGTP";  // hasPart CHEBI:15996 uniprot:Q9QX70 uniprot:P07522 uniprot:P62993
  species species_155 in Cell = 0; species_155 is "EGF-pEGFR-2-Grb2-MEKK1abppMEKcdefRasGTP";  // hasPart CHEBI:15996 uniprot:Q9QX70 uniprot:P07522 uniprot:P62993
  species species_156 in Cell = 0; species_156 is "EGF-pEGFR-2-pShc-Grb2-MEKK1abppMEKcERKdefRasGTP";  // hasPart CHEBI:15996 uniprot:Q9QX70 uniprot:P07522 uniprot:P98077
  species species_157 in Cell = 0; species_157 is "EGF-pEGFR-2-pShc-Grb2-MEKK1abppMEKcpERKdefRasGTP";  // hasPart CHEBI:15996 uniprot:Q9QX70 uniprot:P07522 uniprot:P98077
  species species_158 in Cell = 0; species_158 is "EGF-pEGFR-2-pShc-Grb2-MEKK1abppMEKcppERKdefRasGTP";  // hasPart CHEBI:15996 uniprot:Q9QX70 uniprot:P07522 uniprot:P98077
  species species_159 in Cell = 0; species_159 is "EGF-pEGFR-2-Grb2-MEKK1abppMEKcERKdefRasGTP";  // hasPart CHEBI:15996 uniprot:Q9QX70 uniprot:P07522 uniprot:P62993
  species species_160 in Cell = 0; species_160 is "EGF-pEGFR-2-Grb2-MEKK1abppMEKcpERKdefRasGTP";  // hasPart CHEBI:15996 uniprot:Q9QX70 uniprot:P07522 uniprot:P62993
  species species_161 in Cell = 0; species_161 is "EGF-pEGFR-2-Grb2-MEKK1abppMEKcppERKdefRasGTP";  // hasPart CHEBI:15996 uniprot:P07522 uniprot:P62993 uniprot:P62070
  species species_162 in Cell = 0; species_162 is "EGF-pEGFR-2-pShc-Grb2-MEKK1apRafbcdef";  // hasPart uniprot:Q9QX70 uniprot:P07522 uniprot:P98077 uniprot:P62993
  species species_163 in Cell = 0; species_163 is "EGF-pEGFR-2-pShc-Grb2-MEKK1apRafbMEKcdef";  // hasPart uniprot:Q9QX70 uniprot:P07522 uniprot:P98077 uniprot:P62993
  species species_164 in Cell = 0; species_164 is "EGF-pEGFR-2-pShc-Grb2-MEKK1apRafbpMEKcdef";  // hasPart uniprot:Q9QX70 uniprot:P07522 uniprot:P98077 uniprot:P62993
  species species_165 in Cell = 0; species_165 is "EGF-pEGFR-2-pShc-Grb2-MEKK1apRafbppMEKcdef";  // hasPart uniprot:Q9QX70 uniprot:P07522 uniprot:P98077 uniprot:P62993
  species EGF_pEGFR_2_Grb2_MEKK1apRafbcdef in Cell = 0; EGF_pEGFR_2_Grb2_MEKK1apRafbcdef is "EGF-pEGFR-2-Grb2-MEKK1apRafbcdef";  // hasPart uniprot:Q9QX70 uniprot:P07522 uniprot:P62993 uniprot:P04049
  species species_167 in Cell = 0; species_167 is "EGF-pEGFR-2-Grb2-MEKK1apRafbMEKcdef";  // uniprot:Q9QX70 uniprot:P07522 uniprot:P62993 uniprot:P04049
  species species_168 in Cell = 0; species_168 is "EGF-pEGFR-2-Grb2-MEKK1apRafbpMEKcdef";  // hasPart uniprot:Q9QX70 uniprot:P07522 uniprot:P62993 uniprot:P04049
  species species_169 in Cell = 0; species_169 is "EGF-pEGFR-2-Grb2-MEKK1apRafbppMEKcdef";  // hasPart uniprot:Q9QX70 uniprot:P07522 uniprot:P62993 uniprot:P04049
  species species_170 in Cell = 0; species_170 is "EGF-pEGFR-2-pShc-Grb2-MEKK1abMEKcdRhoGTPef";  // hasPart uniprot:Q9QX70 uniprot:P07522 uniprot:P98077 uniprot:P62993
  species species_171 in Cell = 0; species_171 is "EGF-pEGFR-2-pShc-Grb2-MEKK1abppMEKcdRhoGTPef";  // hasPart uniprot:Q9QX70 uniprot:P07522 uniprot:P98077 uniprot:P62993
  species species_172 in Cell = 0; species_172 is "EGF-pEGFR-2-Grb2-MEKK1abMEKcdRhoGTPef";  // hasPart uniprot:Q9QX70 uniprot:P07522 uniprot:P62993 uniprot:Q02750
  species species_173 in Cell = 0; species_173 is "EGF-pEGFR-2-Grb2-MEKK1abppMEKcdRhoGTPef";  // hasPart uniprot:Q9QX70 uniprot:P07522 uniprot:P62993 uniprot:Q02750
  species species_174 in Cell = 0; species_174 is "EGF-pEGFR-2-pShc-Grb2-MEKK1aRafbMEKcdRhoGTPef";  // hasPart uniprot:Q9QX70 uniprot:P07522 uniprot:P98077 uniprot:P62993
  species species_175 in Cell = 0; species_175 is "EGF-pEGFR-2-pShc-Grb2-MEKK1aRafbcdRhoGTPef";  // hasPart uniprot:Q9QX70 uniprot:P07522 uniprot:P98077 uniprot:P62993
  species species_176 in Cell = 0; species_176 is "EGF-pEGFR-2-Grb2-MEKK1aRafbMEKcdRhoGTPef";  // hasPart uniprot:Q9QX70 uniprot:P07522 uniprot:P62993 uniprot:P04049
  species species_177 in Cell = 0; species_177 is "EGF-pEGFR-2-Grb2-MEKK1aRafbcdRhoGTPef";  // hasPart uniprot:Q9QX70 uniprot:P07522 uniprot:P62993 uniprot:P04049
  species species_178 in Cell = 0; species_178 is "EGF-pEGFR-2-pShc-Grb2-MEKK1abppMEKcERKdef";  // hasPart uniprot:Q9QX70 uniprot:P07522 uniprot:P98077 uniprot:P62993
  species species_179 in Cell = 0; species_179 is "EGF-pEGFR-2-pShc-Grb2-MEKK1abppMEKcpERKdef";  // hasPart uniprot:Q9QX70 uniprot:P07522 uniprot:P98077 uniprot:P62993
  species species_180 in Cell = 0; species_180 is "EGF-pEGFR-2-pShc-Grb2-MEKK1abppMEKcppERKdef";  // hasPart uniprot:Q9QX70 uniprot:P07522 uniprot:P98077 uniprot:P62993; hasPart uniprot:Q9QX70
  species species_181 in Cell = 0; species_181 is "EGF-pEGFR-2-Grb2-MEKK1abppMEKcERKdef";  // hasPart uniprot:Q9QX70 uniprot:P07522 uniprot:P62993 uniprot:Q02750
  species species_182 in Cell = 0; species_182 is "EGF-pEGFR-2-Grb2-MEKK1abppMEKcpERKdef";  // hasPart uniprot:Q9QX70 uniprot:P07522 uniprot:P62993 uniprot:Q02750
  species species_183 in Cell = 0; species_183 is "EGF-pEGFR-2-Grb2-MEKK1abppMEKcppERKdef";  // uniprot:Q9QX70 uniprot:P07522 uniprot:P62993 uniprot:Q02750
  species species_184 in Cell = 0; species_184 is "EGF-pEGFR-2-pShc-Grb2-MEKK1aRafbppMEKcERKdef";  // hasPart uniprot:Q9QX70 uniprot:P07522 uniprot:P98077 uniprot:P62993
  species species_185 in Cell = 0; species_185 is "EGF-pEGFR-2-pShc-Grb2-MEKK1aRafbppMEKcpERKdef";  // hasPart uniprot:Q9QX70 uniprot:P07522 uniprot:P98077 uniprot:P62993
  species species_186 in Cell = 0; species_186 is "EGF-pEGFR-2-pShc-Grb2-MEKK1aRafbppMEKcppERKdef";  // hasPart uniprot:Q9QX70 uniprot:P07522 uniprot:P98077 uniprot:P62993
  species species_187 in Cell = 0; species_187 is "EGF-pEGFR-2-Grb2-MEKK1aRafbppMEKcERKdef";  // hasPart uniprot:Q9QX70 uniprot:P07522 uniprot:P62993 uniprot:P04049
  species species_188 in Cell = 0; species_188 is "EGF-pEGFR-2-Grb2-MEKK1aRafbppMEKcpERKdef";  // hasPart uniprot:Q9QX70 uniprot:P07522 uniprot:P62993 uniprot:P04049
  species species_189 in Cell = 0; species_189 is "EGF-pEGFR-2-Grb2-MEKK1aRafbppMEKcppERKdef";  // hasPart uniprot:Q9QX70 uniprot:P07522 uniprot:P62993 uniprot:P04049
  species species_190 in Cell = 0; species_190 is "EGF-pEGFR-2-pShc-Grb2-MEKK1aRafbppMEKcdRhoGTPepRhoGAPf";  // hasPart uniprot:Q9QX70 uniprot:P07522 uniprot:P98077 uniprot:P62993
  species species_191 in Cell = 0; species_191 is "EGF-pEGFR-2-Grb2-MEKK1aRafbppMEKcdRhoGTPepRhoGAPf";  // hasPart uniprot:Q9QX70 uniprot:P07522 uniprot:P62993 uniprot:P04049
  species species_192 in Cell = 0; species_192 is "EGF-pEGFR-2-pShc-Grb2-MEKK1aRafbcdRhoGTPepRhoGAPf";  // hasPart uniprot:Q9QX70 uniprot:P07522 uniprot:P61586 uniprot:P98077
  species species_193 in Cell = 0; species_193 is "EGF-pEGFR-2-Grb2-MEKK1aRafbcdRhoGTPepRhoGAPf";  // hasPart uniprot:Q9QX70 uniprot:P07522 uniprot:P61586 uniprot:P62993

  // Reactions:
  R1: EGF + EGFR -> EGF_EGFR; Cell*(R1_k1*EGF*EGFR - R1_k2*EGF_EGFR);  // isVersionOf GO:0005154
    R1_k1 = 100 uM_1_s_1; R1_k2 = 0.0038 sec_1;
  R2: 2 EGF_EGFR -> EGF_EGFR_2; Cell*(R2_k1*EGF_EGFR*EGF_EGFR - R2_k2*EGF_EGFR_2);  // isVersionOf GO:0046983
    R2_k1 = 10 uM_1_s_1; R2_k2 = 0.02 sec_1;
  R3: EGF_EGFR_2 => EGF_pEGFR_2; Cell*R3_k1*EGF_EGFR_2;  // isVersionOf ec-code:2.7.11.1 GO:0006468
    R3_k1 = 2.014 sec_1;
  R4: EGF_pEGFR_2 + SHP -> EGF_pEGFR_2_SHP; Cell*(R4_k1*EGF_pEGFR_2*SHP - R4_k2*EGF_pEGFR_2_SHP);  // isVersionOf GO:0005515
    R4_k1 = 3.14 uM_1_s_1; R4_k2 = 0.2 sec_1;
  R5: EGF_pEGFR_2_SHP => EGF_EGFR_2 + SHP; Cell*R5_k1*EGF_pEGFR_2_SHP;  // isVersionOf ec-code:3.1.3.16 GO:0006470 GO:0004725
    R5_k1 = 0.2661 sec_1;
  R6: EGF_pEGFR_2 + Shc -> EGF_pEGFR_2_Shc; Cell*(R6_k1*EGF_pEGFR_2*Shc - R6_k2*EGF_pEGFR_2_Shc);  // isVersionOf GO:0051425 GO:0042169
    R6_k1 = 90 uM_1_s_1; R6_k2 = 0.6 sec_1;
  R7: EGF_pEGFR_2_Shc => EGF_pEGFR_2_pShc; Cell*R7_k1*EGF_pEGFR_2_Shc;  // isVersionOf ec-code:2.7.11.1 GO:0006468 GO:0004716
    R7_k1 = 0.5838 sec_1;
  R8: EGF_pEGFR_2_pShc -> EGF_pEGFR_2 + pShc; Cell*(R8_k1*EGF_pEGFR_2_pShc - R8_k2*EGF_pEGFR_2*pShc);  // isVersionOf GO:0043241
    R8_k1 = 4.481 sec_1; R8_k2 = 0.3 uM_1_s_1;
  R9: pShc + SHP -> pShc_SHP; Cell*(R9_k1*pShc*SHP - R9_k2*pShc_SHP);  // isVersionOf ec-code:3.1.3.16 GO:0006470
    R9_k1 = 3.114 uM_1_s_1; R9_k2 = 0.2 sec_1;
  R10: pShc_SHP => Shc + SHP; Cell*R10_k1*pShc_SHP;  // isVersionOf ec-code:3.1.3.48 GO:0004725
    R10_k1 = 0.2661 sec_1;
  R11: EGF_pEGFR_2_pShc + Grb2 -> EGF_pEGFR_2_pShc_Grb2; Cell*(R11_k1*EGF_pEGFR_2_pShc*Grb2 - R11_k2*EGF_pEGFR_2_pShc_Grb2);  // isVersionOf GO:0042169 GO:0051425
    R11_k1 = 3 uM_1_s_1; R11_k2 = 0.1 sec_1;
  R12: EGF_pEGFR_2_pShc_Grb2 + SOS -> EGF_pEGFR_2_pShc_Grb2_SOS; Cell*(R12_k1*EGF_pEGFR_2_pShc_Grb2*SOS - R12_k2*EGF_pEGFR_2_pShc_Grb2_SOS);  // isVersionOf GO:0005068 GO:0005070 GO:0017124
    R12_k1 = 10 uM_1_s_1; R12_k2 = 0.0214 sec_1;
  R13: Grb2 + SOS -> Grb2_SOS; Cell*(R13_k1*Grb2*SOS - R13_k2*Grb2_SOS);  // isVersionOf GO:0005515
    R13_k1 = 0.1 uM_1_s_1; R13_k2 = 0.0015 sec_1;
  R14: EGF_pEGFR_2_pShc + Grb2_SOS -> EGF_pEGFR_2_pShc_Grb2_SOS; Cell*(R14_k1*EGF_pEGFR_2_pShc*Grb2_SOS - R14_k2*EGF_pEGFR_2_pShc_Grb2_SOS);  // isVersionOf GO:0042169 GO:0051425
    R14_k1 = 10 uM_1_s_1; R14_k2 = 0.045 sec_1;
  R15: EGF_pEGFR_2_pShc_Grb2_SOS + RasGDP -> EGF_pEGFR_2_pShc_Grb2_SOS_RasGDP; Cell*(R15_k1*EGF_pEGFR_2_pShc_Grb2_SOS*RasGDP - R15_k2*EGF_pEGFR_2_pShc_Grb2_SOS_RasGDP);  // isVersionOf GO:0005515
    R15_k1 = 202.9 uM_1_s_1; R15_k2 = 0.18 sec_1;
  R16: EGF_pEGFR_2_pShc_Grb2_SOS_RasGDP => EGF_pEGFR_2_pShc_Grb2_SOS + RasGTP; Cell*R16_k1*EGF_pEGFR_2_pShc_Grb2_SOS_RasGDP;  // isVersionOf GO:0005525
    R16_k1 = 0.1434 sec_1;
  R17: EGF_pEGFR_2 + Grb2 -> EGF_pEGFR_2_Grb2; Cell*(R17_k1*EGF_pEGFR_2*Grb2 - R17_k2*EGF_pEGFR_2_Grb2);  // isVersionOf GO:0005515
    R17_k1 = 3 uM_1_s_1; R17_k2 = 0.05 sec_1;
  R18: EGF_pEGFR_2_Grb2 + SOS -> EGF_pEGFR_2_Grb2_SOS; Cell*(R18_k1*EGF_pEGFR_2_Grb2*SOS - R18_k2*EGF_pEGFR_2_Grb2_SOS);  // isVersionOf GO:0005515
    R18_k1 = 10 uM_1_s_1; R18_k2 = 0.06 sec_1;
  R19: EGF_pEGFR_2 + Grb2_SOS -> EGF_pEGFR_2_Grb2_SOS; Cell*(R19_k1*EGF_pEGFR_2*Grb2_SOS - R19_k2*EGF_pEGFR_2_Grb2_SOS);  // isVersionOf GO:0042169 GO:0051425
    R19_k1 = 2.734 uM_1_s_1; R19_k2 = 0.025 sec_1;
  R20: EGF_pEGFR_2_Grb2_SOS + RasGDP -> EGF_pEGFR_2_Grb2_SOS_RasGDP; Cell*(R20_k1*EGF_pEGFR_2_Grb2_SOS*RasGDP - R20_k2*EGF_pEGFR_2_Grb2_SOS_RasGDP);  // isVersionOf GO:0005070
    R20_k1 = 202.9 uM_1_s_1; R20_k2 = 0.18 sec_1;
  R21: EGF_pEGFR_2_Grb2_SOS_RasGDP => EGF_pEGFR_2_Grb2_SOS + RasGTP; Cell*R21_k1*EGF_pEGFR_2_Grb2_SOS_RasGDP;  // isVersionOf GO:0046579
    R21_k1 = 0.1434 sec_1;
  R22: Raf + RasGTP -> Raf_RasGTP; Cell*(R22_k1*Raf*RasGTP - R22_k2*Raf_RasGTP);  // isVersionOf GO:0000185
    R22_k1 = 1.754 uM_1_s_1; R22_k2 = 0.05 sec_1;
  R23: Raf_RasGTP => pRaf + RasGTP; Cell*R23_k1*Raf_RasGTP;  // isVersionOf GO:0043241 GO:0006468
    R23_k1 = 0.7624 sec_1;
  R24: pRaf + MEK -> pRaf_MEK; Cell*(R24_k1*pRaf*MEK - R24_k2*pRaf_MEK);  // isVersionOf GO:0005515
    R24_k1 = 4 uM_1_s_1; R24_k2 = 0.01833 sec_1;
  R25: pRaf_MEK => pRaf + pMEK; Cell*R25_k1*pRaf_MEK;  // isVersionOf ec-code:2.7.11.1 GO:0043241 GO:0004674
    R25_k1 = 3.5 sec_1;
  R26: pRaf + pMEK -> pRaf_pMEK; Cell*(R26_k1*pRaf*pMEK - R26_k2*pRaf_pMEK);  // isVersionOf GO:0006461
    R26_k1 = 4 uM_1_s_1; R26_k2 = 0.01833 sec_1;
  R27: pRaf_pMEK => pRaf + ppMEK; Cell*R27_k1*pRaf_pMEK;  // isVersionOf ec-code:2.7.11.1 GO:0043241 GO:0004674
    R27_k1 = 2.9 sec_1;
  R28: ppMEK + ERK -> ppMEK_ERK; Cell*(R28_k1*ppMEK*ERK - R28_k2*ppMEK_ERK);  // isVersionOf GO:0000187 GO:0006461
    R28_k1 = 3 uM_1_s_1; R28_k2 = 0.033 sec_1;
  R29: ppMEK_ERK => ppMEK + pERK; Cell*R29_k1*ppMEK_ERK;  // isVersionOf ec-code:2.7.12.2 GO:0000187 GO:0004708
    R29_k1 = 16 sec_1;
  R30: ppMEK + pERK -> ppMEK_pERK; Cell*(R30_k1*ppMEK*pERK - R30_k2*ppMEK_pERK);  // isVersionOf GO:0006461
    R30_k1 = 3 uM_1_s_1; R30_k2 = 0.033 sec_1;
  R31: ppMEK_pERK => ppMEK + ppERK; Cell*R31_k1*ppMEK_pERK;  // isVersionOf ec-code:2.7.12.2 GO:0043241 GO:0004708
    R31_k1 = 5.7 sec_1;
  R32: pRaf + Pase -> pRaf_Pase; Cell*(R32_k1*pRaf*Pase - R32_k2*pRaf_Pase);  // isVersionOf GO:0019902
    R32_k1 = 71.7 uM_1_s_1; R32_k2 = 0.2 sec_1;
  R33: pRaf_Pase => Raf + Pase; Cell*R33_k1*pRaf_Pase;  // isVersionOf GO:0016791
    R33_k1 = 1 sec_1;
  R34: ppMEK + PP2A -> ppMEK_PP2A; Cell*(R34_k1*ppMEK*PP2A - R34_k2*ppMEK_PP2A);  // isVersionOf GO:0019902
    R34_k1 = 14.3 uM_1_s_1; R34_k2 = 0.8 sec_1;
  R35: ppMEK_PP2A => pMEK + PP2A; Cell*R35_k1*ppMEK_PP2A;  // isVersionOf ec-code:3.1.3.16 GO:0004721
    R35_k1 = 0.058 sec_1;
  R36: pMEK + PP2A -> pMEK_PP2A; Cell*(R36_k1*pMEK*PP2A - R36_k2*pMEK_PP2A);  // isVersionOf GO:0019902
    R36_k1 = 0.25 uM_1_s_1; R36_k2 = 0.5 sec_1;
  R37: pMEK_PP2A => MEK + PP2A; Cell*R37_k1*pMEK_PP2A;  // isVersionOf ec-code:3.1.3.16 GO:0004721
    R37_k1 = 0.058 sec_1;
  R38: ppERK + MKP3 -> ppERK_MKP3; Cell*(R38_k1*ppERK*MKP3 - R38_k2*ppERK_MKP3);  // isVersionOf GO:0019902
    R38_k1 = 7 uM_1_s_1; R38_k2 = 0.6 sec_1;
  R39: ppERK_MKP3 => pERK + MKP3; Cell*R39_k1*ppERK_MKP3;  // isVersionOf ec-code:3.1.3.16 GO:0004721
    R39_k1 = 0.27 sec_1;
  R40: pERK + MKP3 -> pERK_MKP3; Cell*(R40_k1*pERK*MKP3 - R40_k2*pERK_MKP3);  // isVersionOf GO:0006461
    R40_k1 = 5 uM_1_s_1; R40_k2 = 0.5 sec_1;
  R41: pERK_MKP3 => ERK + MKP3; Cell*R41_k1*pERK_MKP3;  // isVersionOf ec-code:3.1.3.16 GO:0004725
    R41_k1 = 0.3 sec_1;
  R42: RasGTP => RasGDP; Cell*R42_k1*RasGTP;  // isPartOf GO:0046580; isVersionOf ec-code:3.1.3.16 GO:0006470
    R42_k1 = 1.667e-5 sec_1;
  R43: RasGTP + RasGAP -> RasGTP_RasGAP; Cell*(R43_k1*RasGTP*RasGAP - R43_k2*RasGTP_RasGAP);  // isVersionOf GO:0017016 GO:0006461
    R43_k1 = 2.854 uM_1_s_1; R43_k2 = 0.96 sec_1;
  R44: RasGTP_RasGAP => RasGDP + RasGAP; Cell*R44_k1*RasGTP_RasGAP;  // isVersionOf GO:0005099
    R44_k1 = 7.6 sec_1;
  R45: ppERK + EGF_pEGFR_2_pShc_Grb2_SOS -> ppERK_EGF_pEGFR_2_pShc_Grb2_SOS; Cell*(R45_k1*ppERK*EGF_pEGFR_2_pShc_Grb2_SOS - R45_k2*ppERK_EGF_pEGFR_2_pShc_Grb2_SOS);  // isVersionOf GO:0006461
    R45_k1 = 8.898 uM_1_s_1; R45_k2 = 0.1 sec_1;
  R46: ppERK_EGF_pEGFR_2_pShc_Grb2_SOS => ppERK + EGF_pEGFR_2 + pShc + Grb2 + pSOS; Cell*R46_k1*ppERK_EGF_pEGFR_2_pShc_Grb2_SOS;  // isVersionOf GO:0043241
    R46_k1 = 0.426 sec_1;
  R47: ppERK + EGF_pEGFR_2_Grb2_SOS -> ppERK_EGF_pEGFR_2_Grb2_SOS; Cell*(R47_k1*ppERK*EGF_pEGFR_2_Grb2_SOS - R47_k2*ppERK_EGF_pEGFR_2_Grb2_SOS);  // isVersionOf GO:0006461
    R47_k1 = 8.898 uM_1_s_1; R47_k2 = 0.1 sec_1;
  R48: ppERK_EGF_pEGFR_2_Grb2_SOS => ppERK + EGF_pEGFR_2 + Grb2 + pSOS; Cell*R48_k1*ppERK_EGF_pEGFR_2_Grb2_SOS;  // isVersionOf GO:0043241
    R48_k1 = 0.426 sec_1;
  R49: pSOS => SOS; Cell*R49_k1*pSOS;  // isVersionOf GO:0006470
    R49_k1 = 0.002 sec_1;
  R50: EGF_pEGFR_2 + PI3K -> EGF_pEGFR_2_PI3K; Cell*(R50_k1*EGF_pEGFR_2*PI3K - R50_k2*EGF_pEGFR_2_PI3K);  // isVersionOf GO:0043548
    R50_k1 = 14 uM_1_s_1; R50_k2 = 0.1743 sec_1;
  R51: EGF_pEGFR_2_PI3K => EGF_pEGFF_2 + pPI3K; Cell*R51_k1*EGF_pEGFR_2_PI3K;  // isVersionOf ec-code:2.7.10.1
    R51_k1 = 33.72 sec_1;
  R52: pPI3K + TP4 -> pPI3K_TP4; Cell*(R52_k1*pPI3K*TP4 - R52_k2*pPI3K_TP4);  // isVersionOf GO:0006461
    R52_k1 = 1 uM_1_s_1; R52_k2 = 0.038 sec_1;
  R53: pPI3K_TP4 => PI3K + TP4; Cell*R53_k1*pPI3K_TP4;  // isVersionOf GO:0006470
    R53_k1 = 0.595 sec_1;
  R54: pPI3K + PIP2 -> pPI3K_PIP2; Cell*(R54_k1*pPI3K*PIP2 - R54_k2*pPI3K_PIP2);  // isVersionOf GO:0005515
    R54_k1 = 25 uM_1_s_1; R54_k2 = 3.5 sec_1;
  R55: pPI3K_PIP2 => pPI3K + PIP3; Cell*R55_k1*pPI3K_PIP2;  // isVersionOf GO:0043241
    R55_k1 = 25 sec_1;
  R56: Akt + PIP3 -> Akt_PIP3; Cell*(R56_k1*Akt*PIP3 - R56_k2*Akt_PIP3);  // isVersionOf GO:0006461
    R56_k1 = 3 uM_1_s_1; R56_k2 = 1 sec_1;
  R57: Akt_PIP3 + PDK1 -> Akt_PIP3_PDK1; Cell*(R57_k1*Akt_PIP3*PDK1 - R57_k2*Akt_PIP3_PDK1);  // isVersionOf GO:0006461
    R57_k1 = 3 uM_1_s_1; R57_k2 = 1 sec_1;
  R58: Akt_PIP3_PDK1 => pAkt_PIP3 + PDK1; Cell*R58_k1*Akt_PIP3_PDK1;  // isVersionOf ec-code:2.7.11.1 GO:0006468
    R58_k1 = 3 sec_1;
  R59: pAkt_PIP3 -> pAkt + PIP3; Cell*(R59_k1*pAkt_PIP3 - R59_k2*pAkt*PIP3);  // isVersionOf GO:0043241
    R59_k1 = 0.001 sec_1; R59_k2 = 10 uM_1_s_1;
  R60: pAkt_PIP3 + Takt -> pAkt_PIP3_Takt; Cell*(R60_k1*pAkt_PIP3*Takt - R60_k2*pAkt_PIP3_Takt);  // isVersionOf GO:0006461
    R60_k1 = 1 uM_1_s_1; R60_k2 = 0.9 sec_1;
  R61: pAkt_PIP3_Takt => Akt_PIP3 + Takt; Cell*R61_k1*pAkt_PIP3_Takt;  // isVersionOf GO:0043241
    R61_k1 = 0.001 sec_1;
  R62: pRaf + pAkt_PIP3 -> pRaf_pAkt_PIP3; Cell*(R62_k1*pRaf*pAkt_PIP3 - R62_k2*pRaf_pAkt_PIP3);  // isVersionOf GO:0006461
    R62_k1 = 3 uM_1_s_1; R62_k2 = 0.5 sec_1;
  R63: pRaf_pAkt_PIP3 => ppRaf + pAkt_PIP3; Cell*R63_k1*pRaf_pAkt_PIP3;  // isVersionOf GO:0043241
    R63_k1 = 3 sec_1;
  R64: ppRaf => pRaf; Cell*R64_k1*ppRaf;  // isVersionOf GO:0006470
    R64_k1 = 0.001 sec_1;
  R65: pROK + PTEN -> pROK_PTEN; Cell*(R65_k1*pROK*PTEN - R65_k2*pROK_PTEN);  // isVersionOf GO:0005515
    R65_k1 = 1.1 uM_1_s_1; R65_k2 = 0.033 sec_1;
  R66: pROK_PTEN => pROK + pPTEN; Cell*R66_k1*pROK_PTEN;  // isVersionOf ec-code:2.7.11.1 GO:0004674
    R66_k1 = 16 sec_1;
  R67: pPTEN + PIP3 -> pPTEN_PIP3; Cell*(R67_k1*pPTEN*PIP3 - R67_k2*pPTEN_PIP3);  // isVersionOf GO:0005515
    R67_k1 = 5 uM_1_s_1; R67_k2 = 0.5 sec_1;
  R68: pPTEN_PIP3 => pPTEN + PIP2; Cell*R68_k1*pPTEN_PIP3;  // isVersionOf ec-code:3.1.3.67
    R68_k1 = 5 sec_1;
  R69: pPTEN => PTEN; Cell*R69_k1*pPTEN;  // isVersionOf GO:0006470
    R69_k1 = 0.1298 sec_1;
  R70: PIP3 => PIP2; Cell*R70_k1*PIP3;  // isVersionOf GO:0004445
    R70_k1 = 17 sec_1;
  R71: PIP3 + RacGEF -> PIP3_RacGEF; Cell*(R71_k1*PIP3*RacGEF - R71_k2*PIP3_RacGEF);  // isVersionOf GO:0005089
    R71_k1 = 10 uM_1_s_1; R71_k2 = 0.0214 sec_1;
  R72: PIP3_RacGEF + RacGDP -> PIP3_RacGEF_RacGDP; Cell*(R72_k1*PIP3_RacGEF*RacGDP - R72_k2*PIP3_RacGEF_RacGDP);  // isVersionOf GO:0005089
    R72_k1 = 2.029 uM_1_s_1; R72_k2 = 0.18 sec_1;
  R73: PIP3_RacGEF_RacGDP => PIP3_RacGEF + RacGTP; Cell*R73_k1*PIP3_RacGEF_RacGDP;  // isVersionOf GO:0005089
    R73_k1 = 0.1434 sec_1;
  R74: RhoGDI + RacGDP -> RhoGDI_RacGDP; Cell*(R74_k1*RhoGDI*RacGDP - R74_k2*RhoGDI_RacGDP);  // isVersionOf GO:0006461
    R74_k1 = 2.845 uM_1_s_1; R74_k2 = 0.96 sec_1;
  R75: RacGTP => RacGDP; Cell*R75_k1*RacGTP;  // isVersionOf GO:0005096
    R75_k1 = 0.262 sec_1;
  R76: RacGTP + RacGAP -> RacGTP_RacGAP; Cell*(R76_k1*RacGTP*RacGAP - R76_k2*RacGTP_RacGAP);  // isVersionOf GO:0005096
    R76_k1 = 2.845 uM_1_s_1; R76_k2 = 0.96 sec_1;
  R77: RacGTP_RacGAP => RacGDP + RacGAP; Cell*R77_k1*RacGTP_RacGAP;  // isVersionOf GO:0005096
    R77_k1 = 1.205 sec_1;
  R78: RhoGDP + RhoGDI -> RhoGDP_RhoGDI; Cell*(R78_k1*RhoGDP*RhoGDI - R78_k2*RhoGDP_RhoGDI);  // isVersionOf GO:0006461
    R78_k1 = 20.29 uM_1_s_1; R78_k2 = 0.18 sec_1;
  R79: RhoGDP + pRhoGEF -> RhoGDP_pRhoGEF; Cell*(R79_k1*RhoGDP*pRhoGEF - R79_k2*RhoGDP_pRhoGEF);  // isVersionOf GO:0005089
    R79_k1 = 20.29 uM_1_s_1; R79_k2 = 0.18 sec_1;
  R80: RhoGDP_pRhoGEF => RhoGTP + pRhoGEF; Cell*R80_k1*RhoGDP_pRhoGEF;  // isVersionOf GO:0005089
    R80_k1 = 4.98 sec_1;
  R81: RhoGTP => RhoGDP; Cell*R81_k1*RhoGTP;  // isVersionOf GO:0005096
    R81_k1 = 0.262 sec_1;
  R82: EGF_pEGFR_2 + RasGAP -> EGF_pEGFR_2_RasGAP; Cell*(R82_k1*EGF_pEGFR_2*RasGAP - R82_k2*EGF_pEGFR_2_RasGAP);  // isVersionOf GO:0006461
    R82_k1 = 0.1 uM_1_s_1; R82_k2 = 0.01 sec_1;
  R83: EGF_pEGFR_2_RasGAP + RasGTP -> EGF_pEGFR_2_RasGAP_RasGTP; Cell*(R83_k1*EGF_pEGFR_2_RasGAP*RasGTP - R83_k2*EGF_pEGFR_2_RasGAP_RasGTP);  // isVersionOf GO:0006461
    R83_k1 = 2.854 uM_1_s_1; R83_k2 = 0.96 sec_1;
  R84: EGF_pEGFR_2_RasGAP_RasGTP => EGF_pEGFR2_RasGAP + RasGDP; Cell*R84_k1*EGF_pEGFR_2_RasGAP_RasGTP;  // isVersionOf GO:0005085 GO:0005099
    R84_k1 = 7.76 sec_1;
  R85: EGF_pEGFR_2_pShc_Grb2 + SHP2 -> EGF_pEGFR_2_pShc_Grb2_SHP2; Cell*(R85_k1*EGF_pEGFR_2_pShc_Grb2*SHP2 - R85_k2*EGF_pEGFR_2_pShc_Grb2_SHP2);  // isVersionOf GO:0006461
    R85_k1 = 10 uM_1_s_1; R85_k2 = 1 sec_1;
  R86: EGF_pEGFR_2_Grb2 + SHP2 -> EGF_pEGFR_2_Grb2_SHP2; Cell*(R86_k1*EGF_pEGFR_2_Grb2*SHP2 - R86_k2*EGF_pEGFR_2_Grb2_SHP2);  // isVersionOf GO:0006461
    R86_k1 = 10 uM_1_s_1; R86_k2 = 1 sec_1;
  R87: EGF_pEGFR_2_pShc_Grb2_SHP2 => EGF_EGFR_2 + pShc + Grb2 + SHP2; Cell*R87_k1*EGF_pEGFR_2_pShc_Grb2_SHP2;  // isVersionOf GO:0043241
    R87_k1 = 2.661 sec_1;
  R88: EGF_pEGFR_2_Grb2_SHP2 => EGF_EGFR_2 + Grb2 + SHP2; Cell*R88_k1*EGF_pEGFR_2_Grb2_SHP2;  // isVersionOf ec-code:3.1.3.48 GO:0004725
    R88_k1 = 2.661 sec_1;
  R89: EGF_pEGFR_2_pShc_Grb2_SHP2 + pRhoGEF -> species_93; Cell*(R89_k1*EGF_pEGFR_2_pShc_Grb2_SHP2*pRhoGEF - R89_k2*species_93);  // isVersionOf GO:0006461
    R89_k1 = 3.114 uM_1_s_1; R89_k2 = 0.2 sec_1;
  R90: species_93 => EGF_pEGFR_2_pShc_Grb2_SHP2 + RhoGEF; Cell*R90_k1*species_93;  // isVersionOf ec-code:3.1.3.48 GO:0004725
    R90_k1 = 2.661 sec_1;
  R91: EGF_pEGFR_2_pShc_Grb2_SHP2 + pRhoGAP -> species_96; Cell*(R91_k1*EGF_pEGFR_2_pShc_Grb2_SHP2*pRhoGAP - R91_k2*species_96);
    R91_k1 = 3.114 uM_1_s_1; R91_k2 = 0.2 sec_1;
  R92: species_96 => EGF_pEGFR_2_pShc_Grb2_SHP2 + RhoGAP; Cell*R92_k1*species_96;  // isVersionOf ec-code:3.1.3.48 GO:0004725
    R92_k1 = 2.661 sec_1;
  R93: EGF_pEGFR_2_Grb2_SHP2 + pRhoGEF -> EGF_pEGFR_2_Grb2_SHP2_pRhoGEF; Cell*(R93_k1*EGF_pEGFR_2_Grb2_SHP2*pRhoGEF - R93_k2*EGF_pEGFR_2_Grb2_SHP2_pRhoGEF);
    R93_k1 = 3.114 uM_1_s_1; R93_k2 = 0.2 sec_1;
  R94: EGF_pEGFR_2_Grb2_SHP2_pRhoGEF => EGF_pEGFR_2_Grb2_SHP2 + RhoGEF; Cell*R94_k1*EGF_pEGFR_2_Grb2_SHP2_pRhoGEF;  // isVersionOf ec-code:3.1.3.48 GO:0004725
    R94_k1 = 2.661 sec_1;
  R95: EGF_pEGFR_2_Grb2_SHP2 + pRhoGAP -> EGF_pEGFR_2_Grb2_SHP2_pRhoGAP; Cell*(R95_k1*EGF_pEGFR_2_Grb2_SHP2*pRhoGAP - R95_k2*EGF_pEGFR_2_Grb2_SHP2_pRhoGAP);
    R95_k1 = 3.114 uM_1_s_1; R95_k2 = 0.2 sec_1;
  R96: EGF_pEGFR_2_Grb2_SHP2_pRhoGAP => EGF_pEGFR_2_Grb2_SHP2 + RhoGAP; Cell*R96_k1*EGF_pEGFR_2_Grb2_SHP2_pRhoGAP;  // isVersionOf ec-code:3.1.3.48 GO:0004725
    R96_k1 = 2.661 sec_1;
  R97: EGF_pEGFR_2_RasGAP + SHP2 -> EGF_pEGFR_2_RasGAP_SHP2; Cell*(R97_k1*EGF_pEGFR_2_RasGAP*SHP2 - R97_k2*EGF_pEGFR_2_RasGAP_SHP2);
    R97_k1 = 3.114 uM_1_s_1; R97_k2 = 0.2 sec_1;
  R98: EGF_pEGFR_2_RasGAP_SHP2 => EGF_EGFR_2 + RasGAP + SHP2; Cell*R98_k1*EGF_pEGFR_2_RasGAP_SHP2;  // isVersionOf ec-code:3.1.3.48 GO:0004725
    R98_k1 = 2.661 sec_1;
  R99: pSrc + RhoGEF -> pSrc_RhoGEF; Cell*(R99_k1*pSrc*RhoGEF - R99_k2*pSrc_RhoGEF);
    R99_k1 = 40 uM_1_s_1; R99_k2 = 0.9356 sec_1;
  R100: pSrc_RhoGEF => pSrc + pRhoGEF; Cell*R100_k1*pSrc_RhoGEF;  // isVersionOf ec-code:2.7.10.2 GO:0004715
    R100_k1 = 10 sec_1;
  R101: pRhoGEF => RhoGEF; Cell*R101_k1*pRhoGEF;
    R101_k1 = 0.1298 sec_1;
  R102: pSrc + RhoGAP -> pSrc_RhoGAP; Cell*(R102_k1*pSrc*RhoGAP - R102_k2*pSrc_RhoGAP);
    R102_k1 = 40 uM_1_s_1; R102_k2 = 0.9356 sec_1;
  R103: pSrc_RhoGAP => pSrc + pRhoGAP; Cell*R103_k1*pSrc_RhoGAP;  // isVersionOf ec-code:2.7.10.2 GO:0004715
    R103_k1 = 10 sec_1;
  R104: pRhoGAP + RhoGTP -> pRhoGAP_RhoGTP; Cell*(R104_k1*pRhoGAP*RhoGTP - R104_k2*pRhoGAP_RhoGTP);
    R104_k1 = 2.845 uM_1_s_1; R104_k2 = 0.96 sec_1;
  R105: pRhoGAP_RhoGTP => pRhoGAP + RhoGDP; Cell*R105_k1*pRhoGAP_RhoGTP;  // isVersionOf GO:0005096
    R105_k1 = 1.205 sec_1;
  R106: RhoGTP + ROK -> RhoGTP_ROK; Cell*(R106_k1*RhoGTP*ROK - R106_k2*RhoGTP_ROK);
    R106_k1 = 1.754 uM_1_s_1; R106_k2 = 0.5 sec_1;
  R107: RhoGTP_ROK => RhoGTP + pROK; Cell*R107_k1*RhoGTP_ROK;
    R107_k1 = 7.624 sec_1;
  R108: EGF_pEGFR_2 + Src -> EGF_pEGFR_2_Src; Cell*(R108_k1*EGF_pEGFR_2*Src - R108_k2*EGF_pEGFR_2_Src);  // isVersionOf GO:0006461
    R108_k1 = 40 uM_1_s_1; R108_k2 = 0.9356 sec_1;
  R109: EGF_pEGFR_2_Src => EGF_pEGFR_2_pSrc; Cell*R109_k1*EGF_pEGFR_2_Src;  // isVersionOf ec-code:2.7.10.1
    R109_k1 = 40 sec_1;
  R110: EGF_pEGFR_2 -> EGF_pEGRF_2 + pSrc; Cell*(R110_k1*EGF_pEGFR_2 - R110_k2*EGF_pEGRF_2*pSrc);
    R110_k1 = 0.001 sec_1; R110_k2 = 0.0003302 uM_1_s_1;
  R111: pSrc + TP7 -> pSrc_TP7; Cell*(R111_k1*pSrc*TP7 - R111_k2*pSrc_TP7);
    R111_k1 = 1 uM_1_s_1; R111_k2 = 1 sec_1;
  R112: pSrc_TP7 => Src_TP7; Cell*R112_k1*pSrc_TP7;
    R112_k1 = 0.01 sec_1;
  R113: Src_TP7 -> Src + TP7; Cell*(R113_k1*Src_TP7 - R113_k2*Src*TP7);
    R113_k1 = 0.1 sec_1; R113_k2 = 1.2987 uM_1_s_1;
  R114: EGF_pEGFR_2_pShc_Grb2_SOS + Cbl_CIN85 -> species_115; Cell*(R114_k1*EGF_pEGFR_2_pShc_Grb2_SOS*Cbl_CIN85 - R114_k2*species_115);
    R114_k1 = 0.5 uM_1_s_1; R114_k2 = 0.005 sec_1;
  R115: EGF_pEGFR_2_Grb2_SOS + Cbl_CIN85 -> EGF_pEGFR_2_Grb2_SOS_Cbl_CIN85; Cell*(R115_k1*EGF_pEGFR_2_Grb2_SOS*Cbl_CIN85 - R115_k2*EGF_pEGFR_2_Grb2_SOS_Cbl_CIN85);
    R115_k1 = 0.5 uM_1_s_1; R115_k2 = 0.005 sec_1;
  R116: species_115 + EPn -> species_118; Cell*(R116_k1*species_115*EPn - R116_k2*species_118);
    R116_k1 = 5 uM_1_s_1; R116_k2 = 0.01 sec_1;
  R117: EGF_pEGFR_2_Grb2_SOS_Cbl_CIN85 + EPn -> species_119; Cell*(R117_k1*EGF_pEGFR_2_Grb2_SOS_Cbl_CIN85*EPn - R117_k2*species_119);
    R117_k1 = 5 uM_1_s_1; R117_k2 = 0.01 sec_1;
  R118: species_118 => EGF_pEGFR_2_degrade + Cbl_CIN85 + EPn + pShc_Grb2_SOS; Cell*R118_k1*species_118;
    R118_k1 = 0.001 sec_1;
  R119: species_119 => EGF_pEGFR_2_degrade + Cbl_CIN85 + EPn + Grb2_SOS; Cell*R119_k1*species_119;
    R119_k1 = 0.001 sec_1;
  R120: Pro_EGFR => EGFR; Cell*R120_k1*Pro_EGFR;
    R120_k1 = 0.005 sec_1;
  R121: pROK + EPn -> pROK_EPn; Cell*(R121_k1*pROK*EPn - R121_k2*pROK_EPn);
    R121_k1 = 1.1 uM_1_s_1; R121_k2 = 0.033 sec_1;
  R122: pROK_EPn => pROK + pEPn; Cell*R122_k1*pROK_EPn;  // isVersionOf ec-code:2.7.11.1
    R122_k1 = 16 sec_1;
  R123: pEPn + MPase -> pEPn_MPase; Cell*(R123_k1*pEPn*MPase - R123_k2*pEPn_MPase);
    R123_k1 = 10 uM_1_s_1; R123_k2 = 0.005 sec_1;
  R124: pEPn_Mpase => EPn + MPase; Cell*R124_k1*pEPn_Mpase;
    R124_k1 = 129.8 sec_1;
  R125: RasGTP + RhoGEF -> Ras_GTP_RhoGEF; Cell*(R125_k1*RasGTP*RhoGEF - R125_k2*Ras_GTP_RhoGEF);
    R125_k1 = 1.754 uM_1_s_1; R125_k2 = 0.05 sec_1;
  R126: Ras_GTP_RhoGEF => RasGTP + pRhoGEF; Cell*R126_k1*Ras_GTP_RhoGEF;
    R126_k1 = 0.07624 sec_1;
  R127: ppERK + pROK -> ppERK_pROK; Cell*(R127_k1*ppERK*pROK - R127_k2*ppERK_pROK);
    R127_k1 = 8.898 uM_1_s_1; R127_k2 = 1 sec_1;
  R128: ppERK_pROK => ppERK + ROK; Cell*R128_k1*ppERK_pROK;
    R128_k1 = 0.426 sec_1;
  R129: Grb2 + MEKK1abcdef -> Grb2_MEKK1abcdef; Cell*(R129_k1*Grb2*MEKK1abcdef - R129_k2*Grb2_MEKK1abcdef);
    R129_k1 = 3 uM_1_s_1; R129_k2 = 0.05 sec_1;
  R130: EGF_pEGFR_2_pShc + Grb2_MEKK1abcdef -> species_132; Cell*(R130_k1*EGF_pEGFR_2_pShc*Grb2_MEKK1abcdef - R130_k2*species_132);
    R130_k1 = 3 uM_1_s_1; R130_k2 = 0.1 sec_1;
  R131: EGF_pEGFR_2 + Grb2_MEKK1abcdef -> EGF_pEGFR_2_Grb2_MEKK1abcdef; Cell*(R131_k1*EGF_pEGFR_2*Grb2_MEKK1abcdef - R131_k2*EGF_pEGFR_2_Grb2_MEKK1abcdef);
    R131_k1 = 3 uM_1_s_1; R131_k2 = 0.5 sec_1;
  R132: species_132 + MEK -> species_134; Cell*(R132_k1*species_132*MEK - R132_k2*species_134);
    R132_k1 = 5 uM_1_s_1; R132_k2 = 1.67 sec_1;
  R133: species_134 => species_135; Cell*R133_k1*species_134;
    R133_k1 = 1.693 sec_1;
  R134: species_135 => species_136; Cell*R134_k1*species_135;
    R134_k1 = 1.693 sec_1;
  R135: species_136 -> species_132 + ppMEK; Cell*(R135_k1*species_136 - R135_k2*species_132*ppMEK);
    R135_k1 = 1.67 sec_1; R135_k2 = 5 uM_1_s_1;
  R136: EGF_pEGFR_2_Grb2_MEKK1abcdef + MEK -> EGF_pEGFR_2_Grb2_MEKK1abMEKcdef; Cell*(R136_k1*EGF_pEGFR_2_Grb2_MEKK1abcdef*MEK - R136_k2*EGF_pEGFR_2_Grb2_MEKK1abMEKcdef);
    R136_k1 = 5 uM_1_s_1; R136_k2 = 1.67 sec_1;
  R137: EGF_pEGFR_2_Grb2_MEKK1abMEKcdef => EGF_pEGFR_2_Grb2_MEKK1abpMEKcdef; Cell*R137_k1*EGF_pEGFR_2_Grb2_MEKK1abMEKcdef;
    R137_k1 = 1.693 sec_1;
  R138: EGF_pEGFR_2_Grb2_MEKK1abpMEKcdef => species_139; Cell*R138_k1*EGF_pEGFR_2_Grb2_MEKK1abpMEKcdef;
    R138_k1 = 1.693 sec_1;
  R139: species_139 -> EGF_pEGFR_2_Grb2_MEKK1abcdef + ppMEK; Cell*(R139_k1*species_139 - R139_k2*EGF_pEGFR_2_Grb2_MEKK1abcdef*ppMEK);
    R139_k1 = 1.67 sec_1; R139_k2 = 5 uM_1_s_1;
  R140: species_132 + Raf -> species_140; Cell*(R140_k1*species_132*Raf - R140_k2*species_140);
    R140_k1 = 1.667 uM_1_s_1; R140_k2 = 0.5 sec_1;
  R141: species_140 + MEK -> species_141; Cell*(R141_k1*species_140*MEK - R141_k2*species_141);
    R141_k1 = 5 uM_1_s_1; R141_k2 = 1.67 sec_1;
  R142: species_141 => species_142; Cell*R142_k1*species_141;
    R142_k1 = 1.693 sec_1;
  R143: species_142 => species_143; Cell*R143_k1*species_142;
    R143_k1 = 1.693 sec_1;
  R144: species_143 -> species_140 + ppMEK; Cell*(R144_k1*species_143 - R144_k2*species_140*ppMEK);
    R144_k1 = 1.67 sec_1; R144_k2 = 5 uM_1_s_1;
  R145: EGF_pEGFR_2_Grb2_MEKK1abcdef + Raf -> EGF_pEGFR_2_Grb2_MEKK1aRafbcdef; Cell*(R145_k1*EGF_pEGFR_2_Grb2_MEKK1abcdef*Raf - R145_k2*EGF_pEGFR_2_Grb2_MEKK1aRafbcdef);
    R145_k1 = 1.667 uM_1_s_1; R145_k2 = 0.5 sec_1;
  R146: EGF_pEGFR_2_Grb2_MEKK1aRafbcdef + MEK -> species_145; Cell*(R146_k1*EGF_pEGFR_2_Grb2_MEKK1aRafbcdef*MEK - R146_k2*species_145);
    R146_k1 = 5 uM_1_s_1; R146_k2 = 1.67 sec_1;
  R147: species_145 => species_146; Cell*R147_k1*species_145;
    R147_k1 = 1.693 sec_1;
  R148: species_146 => species_147; Cell*R148_k1*species_146;
    R148_k1 = 1.693 sec_1;
  R149: species_147 -> EGF_pEGFR_2_Grb2_MEKK1aRafbcdef + ppMEK; Cell*(R149_k1*species_147 - R149_k2*EGF_pEGFR_2_Grb2_MEKK1aRafbcdef*ppMEK);
    R149_k1 = 1.67 sec_1; R149_k2 = 5 uM_1_s_1;
  R150: species_132 + RasGTP -> species_148; Cell*(R150_k1*species_132*RasGTP - R150_k2*species_148);
    R150_k1 = 1.667 uM_1_s_1; R150_k2 = 0.5 sec_1;
  R151: species_148 + MEK -> species_149; Cell*(R151_k1*species_148*MEK - R151_k2*species_149);
    R151_k1 = 5 uM_1_s_1; R151_k2 = 1.67 sec_1;
  R152: species_149 => species_150; Cell*R152_k1*species_149;
    R152_k1 = 1.693 sec_1;
  R153: species_150 => species_151; Cell*R153_k1*species_150;
    R153_k1 = 1.693 sec_1;
  R154: species_151 -> species_148 + ppMEK; Cell*(R154_k1*species_151 - R154_k2*species_148*ppMEK);
    R154_k1 = 1.67 sec_1; R154_k2 = 5 uM_1_s_1;
  R155: EGF_pEGFR_2_Grb2_MEKK1abcdef + RasGTP -> species_152; Cell*(R155_k1*EGF_pEGFR_2_Grb2_MEKK1abcdef*RasGTP - R155_k2*species_152);
    R155_k1 = 1.667 uM_1_s_1; R155_k2 = 0.5 sec_1;
  R156: species_152 + MEK -> species_153; Cell*(R156_k1*species_152*MEK - R156_k2*species_153);
    R156_k1 = 5 uM_1_s_1; R156_k2 = 1.67 sec_1;
  R157: species_153 => species_154; Cell*R157_k1*species_153;
    R157_k1 = 1.693 sec_1;
  R158: species_154 => species_155; Cell*R158_k1*species_154;
    R158_k1 = 1.693 sec_1;
  R159: species_155 -> species_152 + ppMEK; Cell*(R159_k1*species_155 - R159_k2*species_152*ppMEK);
    R159_k1 = 1.67 sec_1; R159_k2 = 5 uM_1_s_1;
  R160: species_151 + ERK -> species_156; Cell*(R160_k1*species_151*ERK - R160_k2*species_156);
    R160_k1 = 5 uM_1_s_1; R160_k2 = 1.67 sec_1;
  R161: species_156 => species_157; Cell*R161_k1*species_156;
    R161_k1 = 0.1002 sec_1;
  R162: species_157 => species_158; Cell*R162_k1*species_157;
    R162_k1 = 0.1002 sec_1;
  R163: species_158 => species_151 + ppERK; Cell*R163_k1*species_158;
    R163_k1 = 1.67 sec_1;
  R164: species_155 + ERK -> species_159; Cell*(R164_k1*species_155*ERK - R164_k2*species_159);
    R164_k1 = 5 uM_1_s_1; R164_k2 = 1.67 sec_1;
  R165: species_159 => species_160; Cell*R165_k1*species_159;
    R165_k1 = 0.1002 sec_1;
  R166: species_160 => species_161; Cell*R166_k1*species_160;
    R166_k1 = 0.1002 sec_1;
  R167: species_161 => species_155 + ppERK; Cell*R167_k1*species_161;
    R167_k1 = 1.67 sec_1;
  R168: species_132 + pRaf -> species_162; Cell*(R168_k1*species_132*pRaf - R168_k2*species_162);
    R168_k1 = 1.667 uM_1_s_1; R168_k2 = 0.5 sec_1;
  R169: species_162 + MEK -> species_163; Cell*(R169_k1*species_162*MEK - R169_k2*species_163);
    R169_k1 = 5 uM_1_s_1; R169_k2 = 1.67 sec_1;
  R170: species_163 => species_164; Cell*R170_k1*species_163;
    R170_k1 = 1.693 sec_1;
  R171: species_164 => species_165; Cell*R171_k1*species_164;
    R171_k1 = 1.693 sec_1;
  R172: species_165 -> species_162 + ppMEK; Cell*(R172_k1*species_165 - R172_k2*species_162*ppMEK);
    R172_k1 = 1.67 sec_1; R172_k2 = 5 uM_1_s_1;
  R173: EGF_pEGFR_2_Grb2_MEKK1abcdef + pRaf -> EGF_pEGFR_2_Grb2_MEKK1apRafbcdef; Cell*(R173_k1*EGF_pEGFR_2_Grb2_MEKK1abcdef*pRaf - R173_k2*EGF_pEGFR_2_Grb2_MEKK1apRafbcdef);
    R173_k1 = 1.667 uM_1_s_1; R173_k2 = 0.5 sec_1;
  R174: EGF_pEGFR_2_Grb2_MEKK1apRafbcdef + MEK -> species_167; Cell*(R174_k1*EGF_pEGFR_2_Grb2_MEKK1apRafbcdef*MEK - R174_k2*species_167);
    R174_k1 = 5 uM_1_s_1; R174_k2 = 1.67 sec_1;
  R175: species_167 => species_168; Cell*R175_k1*species_167;
    R175_k1 = 1.693 sec_1;
  R176: species_168 => species_169; Cell*R176_k1*species_168;
    R176_k1 = 1.693 sec_1;
  R177: species_169 -> EGF_pEGFR_2_Grb2_MEKK1apRafbcdef + ppMEK; Cell*(R177_k1*species_169 - R177_k2*EGF_pEGFR_2_Grb2_MEKK1apRafbcdef*ppMEK);
    R177_k1 = 1.67 sec_1; R177_k2 = 5 uM_1_s_1;
  R178: species_134 + RhoGTP -> species_170; Cell*(R178_k1*species_134*RhoGTP - R178_k2*species_170);
    R178_k1 = 16.67 uM_1_s_1; R178_k2 = 0.05 sec_1;
  R179: EGF_pEGFR_2_Grb2_MEKK1abMEKcdef + RhoGTP -> species_172; Cell*(R179_k1*EGF_pEGFR_2_Grb2_MEKK1abMEKcdef*RhoGTP - R179_k2*species_172);
    R179_k1 = 16.67 uM_1_s_1; R179_k2 = 0.05 sec_1;
  R180: species_141 + RhoGTP -> species_174; Cell*(R180_k1*species_141*RhoGTP - R180_k2*species_174);
    R180_k1 = 16.67 uM_1_s_1; R180_k2 = 0.05 sec_1;
  R181: species_145 + RhoGTP -> species_176; Cell*(R181_k1*species_145*RhoGTP - R181_k2*species_176);
    R181_k1 = 16.67 uM_1_s_1; R181_k2 = 0.05 sec_1;
  R182: species_136 + ERK -> species_178; Cell*(R182_k1*species_136*ERK - R182_k2*species_178);
    R182_k1 = 5 uM_1_s_1; R182_k2 = 1.67 sec_1;
  R183: species_178 => species_179; Cell*R183_k1*species_178;
    R183_k1 = 0.1002 sec_1;
  R184: species_179 => species_180; Cell*R184_k1*species_179;
    R184_k1 = 0.1002 sec_1;
  R185: species_180 => species_136 + ppERK; Cell*R185_k1*species_180;
    R185_k1 = 1.67 sec_1;
  R186: species_139 + ERK -> species_181; Cell*(R186_k1*species_139*ERK - R186_k2*species_181);
    R186_k1 = 5 uM_1_s_1; R186_k2 = 1.67 sec_1;
  R187: species_181 => species_182; Cell*R187_k1*species_181;
    R187_k1 = 0.1002 sec_1;
  R188: species_182 => species_183; Cell*R188_k1*species_182;
    R188_k1 = 0.1002 sec_1;
  R189: species_183 => species_139 + ppERK; Cell*R189_k1*species_183;
    R189_k1 = 1.67 sec_1;
  R190: species_143 + ERK -> species_184; Cell*(R190_k1*species_143*ERK - R190_k2*species_184);
    R190_k1 = 5 uM_1_s_1; R190_k2 = 1.67 sec_1;
  R191: species_184 => species_185; Cell*R191_k1*species_184;
    R191_k1 = 0.1002 sec_1;
  R192: species_185 => species_186; Cell*R192_k1*species_185;
    R192_k1 = 0.1002 sec_1;
  R193: species_186 => species_143 + ppERK; Cell*R193_k1*species_186;
    R193_k1 = 1.67 sec_1;
  R194: species_147 + ERK -> species_187; Cell*(R194_k1*species_147*ERK - R194_k2*species_187);
    R194_k1 = 5 uM_1_s_1; R194_k2 = 1.67 sec_1;
  R195: species_187 => species_188; Cell*R195_k1*species_187;
    R195_k1 = 0.1002 sec_1;
  R196: species_188 => species_189; Cell*R196_k1*species_188;
    R196_k1 = 0.1002 sec_1;
  R197: species_189 => species_147 + ppERK; Cell*R197_k1*species_189;
    R197_k1 = 1.67 sec_1;
  R198: species_171 + pRhoGAP -> species_190; Cell*(R198_k1*species_171*pRhoGAP - R198_k2*species_190);
    R198_k1 = 1.667 uM_1_s_1; R198_k2 = 0.5 sec_1;
  R199: species_190 => species_143 + RhoGDP + pRhoGAP; Cell*R199_k1*species_190;  // isVersionOf GO:0005096
    R199_k1 = 1.205 sec_1;
  R200: species_173 + pRhoGAP -> species_191; Cell*(R200_k1*species_173*pRhoGAP - R200_k2*species_191);
    R200_k1 = 1.667 uM_1_s_1; R200_k2 = 0.5 sec_1;
  R201: species_191 => species_147 + RhoGDP + pRhoGAP; Cell*R201_k1*species_191;  // isVersionOf GO:0005096
    R201_k1 = 1.205 sec_1;
  R202: species_175 + pRhoGAP -> species_192; Cell*(R202_k1*species_175*pRhoGAP - R202_k2*species_192);
    R202_k1 = 1.667 uM_1_s_1; R202_k2 = 0.5 sec_1;
  R203: species_192 => species_140 + RhoGDP + pRhoGAP; Cell*R203_k1*species_192;  // isVersionOf GO:0005096
    R203_k1 = 1.205 sec_1;
  R204: species_177 + pRhoGAP -> species_193; Cell*(R204_k1*species_177*pRhoGAP - R204_k2*species_193);  // isVersionOf GO:0005096
    R204_k1 = 1.667 uM_1_s_1; R204_k2 = 0.5 sec_1;
  R205: species_193 => EGF_pEGFR_2_Grb2_MEKK1aRafbcdef + RhoGDP + pRhoGAP; Cell*R205_k1*species_193;  // isVersionOf GO:0005096
    R205_k1 = 1.205 sec_1;

  // Unit definitions:
  unit substance = 1e-6 mole;
  unit uM_1_s_1 = litre / (1e-6 mole * second);
  unit sec_1 = 1 / second;
end
