// SBML level 2 version 3

model model_0000001()
  // Chickarmane2008_StemCell_NANOG_GATA6switch
  // To the extent possible under law, all copyright and related or neighbouring rights to this encoded model have been dedicated to the public domain worldwide. Please refer to CC0 Public Domain Dedication for more information.
  // In summary, you are entitled to use this encoded model in absolutely any manner you deem suitable, verbatim, or with modification, alone or embedded it in a larger context, redistribute it, commercially or not, in a restricted way or not.
  // To cite BioModels Database, please use: Li C, Donizelli M, Rodriguez N, Dharuri H, Endler L, Chelliah V, Li L, He E, Henry A, Stefan MI, Snoep JL, Hucka M, Le Novère N, Laibe C (2010) BioModels Database: An enhanced, curated and annotated resource for published quantitative kinetic models. BMC Syst Biol., 4:92.
  // biomodels.db:BIOMD0000000210
  // biomodels.db:MODEL8389825246
  // isDescribedBy pubmed:18941526
  // occursIn taxonomy:9606
  // isVersionOf GO:0042663 GO:0001830 GO:0048863
  // isDerivedFrom biomodels.db:BIOMD0000000203 biomodels.db:BIOMD0000000204

  // Compartments:
  compartment cell = 1;

  // Species:
  species $OCT4_Gene in cell = 0;  // encodes uniprot:Q01860; isVersionOf ensembl:ENSG00000204531
  species $NANOG_Gene in cell = 0;  // encodes uniprot:Q8N7R0; isVersionOf ensembl:ENSG00000176654
  species $SOX2_Gene in cell = 0;  // encodes uniprot:Q6ZRP7; isVersionOf ensembl:ENSG00000165661
  species $GATA6_Gene in cell = 0;  // encodes uniprot:Q92908; isVersionOf ensembl:ENSG00000141448
  species $CDX2_Gene in cell = 0;  // encodes uniprot:Q99626; isVersionOf ensembl:ENSG00000165556
  species $GCNF_Gene in cell = 0;  // encodes uniprot:Q15406; isVersionOf ensembl:ENSG00000148200
  species $targetGene in cell = 0.01;
  species $degradation in cell = 0;
  species $p53 in cell = 0;  // isVersionOf uniprot:P04637
  species $A in cell = 10;  // isVersionOf GO:0042813
  species OCT4 in cell = 0.01;  // isVersionOf uniprot:Q01860
  species SOX2 in cell = 0.01;  // isVersionOf uniprot:Q6ZRP7
  species NANOG in cell = 0.01;  // isVersionOf uniprot:Q8N7R0
  species GATA6 in cell = 0.01;  // isVersionOf uniprot:Q92908
  species CDX2 in cell = 0.01;  // isVersionOf uniprot:Q99626
  species GCNF in cell = 0.01;  // isVersionOf uniprot:Q15406
  species OCT4_SOX2 in cell = 0.1;  // hasPart uniprot:Q01860; hasPart uniprot:Q6ZRP7
  species Protein in cell = 0;

  // Parameters:
  a0 = 0.001;
  a1 = 0.02;
  a2 = 0.0125;
  a3 = 0.025;
  b0 = 1;
  b1 = 0.02;
  b2 = 0.0125;
  b3 = 0.03;
  b4 = 10;
  b5 = 10;
  gamma1 = 0.1;
  c0 = 0.001;
  c1 = 0.05;
  c2 = 0.0125;
  d0 = 0.001;
  d1 = 0.05;
  d2 = 0.0125;
  d3 = 0.05;
  gamma2 = 0.1;
  e0 = 0.001;
  e1 = 0.1;
  e2 = 0.1;
  f0 = 0.001;
  f1 = 0.1;
  f2 = 0.1;
  f3 = 10;
  gamma3 = 0.1;
  g0 = 0.001;
  g1 = 2;
  h0 = 2;
  h1 = 5;
  gamma4 = 0.1;
  i0 = 0.001;
  i1 = 0.1;
  i2 = 0.1;
  j0 = 0.1;
  j1 = 0.1;
  gamma5 = 0.1;
  p0 = 0.1;
  p1 = 1;
  p2 = 0.00025;
  q0 = 1;
  q1 = 0.00025;
  q2 = 15;
  gammag = 0.01;
  gamman = 0.01;

  // Reactions:
  R1: $OCT4_Gene => OCT4; (a0 + a1*A + a2*OCT4*SOX2 + a3*OCT4*SOX2*NANOG)/(1 + b0*A + b1*OCT4 + b2*OCT4*SOX2 + b3*OCT4*SOX2*NANOG + b4*CDX2*OCT4 + b5*GCNF);  // modifiers: A, SOX2, NANOG, CDX2, GCNF; isVersionOf GO:0010467
  R2: OCT4 => $degradation; gamma1*OCT4;  // isVersionOf GO:0030163
  R3: $SOX2_Gene => SOX2; (c0 + c1*OCT4*SOX2 + c2*OCT4*SOX2*NANOG)/(1 + d0*OCT4 + d1*OCT4*SOX2 + d2*OCT4*SOX2*NANOG);  // modifiers: OCT4, NANOG; isVersionOf GO:0010467
  R4: SOX2 => $degradation; gamma2*SOX2;  // isVersionOf GO:0030163
  R5: $NANOG_Gene => NANOG; (a1*OCT4_SOX2 + a2*OCT4_SOX2*NANOG)/(1 + b1*OCT4_SOX2 + b2*OCT4_SOX2*NANOG + b3*OCT4_SOX2*GATA6);  // modifiers: OCT4_SOX2, GATA6; isVersionOf GO:0010467
  R6: NANOG => $degradation; gamman*NANOG;  // isVersionOf GO:0030163
  R7: $CDX2_Gene => CDX2; (g0 + g1*CDX2)/(1 + h0*CDX2 + h1*CDX2*OCT4);  // modifiers: OCT4; isVersionOf GO:0010467
  R8: CDX2 => $degradation; gamma4*CDX2;  // isVersionOf GO:0030163
  R9: $GCNF_Gene => GCNF; (i0 + i1*CDX2 + i2*GATA6)/(1 + j0*CDX2 + j1*GATA6);  // modifiers: CDX2, GATA6; isVersionOf GO:0010467
  R10: GCNF => $degradation; gamma5*GCNF;  // isVersionOf GO:0030163
  R11: $GATA6_Gene => GATA6; (c1*OCT4_SOX2 + c2*GATA6)/(1 + d1*OCT4_SOX2 + d2*GATA6 + d3*NANOG);  // modifiers: OCT4_SOX2, NANOG; isVersionOf GO:0010467
  R12: GATA6 => $degradation; gammag*GATA6;  // isVersionOf GO:0030163
end
