// SBML level 2 version 3

model Folate2004()
  // Nijhout2004_Folate_Cycle
  // This is an SBML version of the folate cycle model model from:
  // A mathematical model of the folate cycle: new insights into folate homeostasis.
  // Nijhout HF, Reed MC, Budu P, Ulrich CM J. Biol. Chem.,2004, 279(53),55008-16
  // pubmedID: 15496403
  // Abstract:
  // A mathematical model is developed for the folate cycle based on standard biochemical kinetics. We use the model to provide new insights into several different mechanisms of folate homeostasis. The model reproduces the known pool sizes of folate substrates and the fluxes through each of the loops of the folate cycle and has the qualitative behavior observed in a variety of experimental studies. Vitamin B(12) deficiency, modeled as a reduction in the V(max) of the methionine synthase reaction, results in a secondary folate deficiency via the accumulation of folate as 5-methyltetrahydrofolate (the "methyl trap"). One form of homeostasis is revealed by the fact that a 100-fold up-regulation of thymidylate synthase and dihydrofolate reductase (known to occur at the G(1)/S transition) dramatically increases pyrimidine production without affecting the other reactions of the folate cycle. The model also predicts that an almost total inhibition of dihydrofolate reductase is required to significantly inhibit the thymidylate synthase reaction, consistent with experimental and clinical studies on the effects of methotrexate. Sensitivity to variation in enzymatic parameters tends to be local in the cycle and inversely proportional to the number of reactions that interconvert two folate substrates. Another form of homeostasis is a consequence of the nonenzymatic binding of folate substrates to folate enzymes. Without folate binding, the velocities of the reactions decrease approximately linearly as total folate is decreased. In the presence of folate binding and allosteric inhibition, the velocities show a remarkable constancy as total folate is decreased.
  // This model was encoded by Michal Galdzicki from a MatLab file send to him by Prof. Michael Reed. There some differences in this model compared to the one described in the article, possible due to typos in the publication:
  // 1) reaction NE (THF + H2CO <=> 5,10-CH2-THF) in the article has H2C=O as a reactant and is mentioned to display pseudo first order mass action kinetics, while in the matlab file formic acid, also used in reaction FTS, is included in the rate law for the forward reaction.
  // 2) the reaction MS is modeled after Reed et al. 2004, which is not explicitly mentioned in the article, although Kd and the parameters from Reed et al. 2004 are given.
  // 3) in the kinetic law of the SHTM reaction (THF + Ser <=> 5,10-CH2-THF + Gly), there are separate values given for Km,Gly and Km,5,10-CH2-THF in the article. in the matlab file and the SBML model Km,Ser and Km,THF are used instead of Km,Gly and Km,5,10-CH2-THF for the backwards reaction.
  // This model originates from BioModels Database: A Database of Annotated Published Models. It is copyright (c) 2005-2009 The BioModels Team.
  // To the extent possible under law, all copyright and related or neighbouring rights to this encoded model have been dedicated to the public domain worldwide. Please refer to CC0 Public Domain Dedication for more information.
  // In summary, you are entitled to use this encoded model in absolutely any manner you deem suitable, verbatim, or with modification, alone or embedded it in a larger context, redistribute it, commercially or not, in a restricted way or not..
  // To cite BioModels Database, please use Le Novère N., Bornstein B., Broicher A., Courtot M., Donizelli M., Dharuri H., Li L., Sauro H., Schilstra M., Shapiro B., Snoep J.L., Hucka M. (2006) BioModels Database: A Free, Centralized Database of Curated, Published, Quantitative Kinetic Models of Biochemical and Cellular Systems Nucleic Acids Res., 34: D689-D691.
  // biomodels.db:BIOMD0000000213
  // biomodels.db:MODEL4336555445
  // isDescribedBy pubmed:15496403
  // occursIn taxonomy:40674
  // isVersionOf GO:0046655

  // Compartments:
  compartment compartment = 1;  // isVersionOf GO:0005623

  // Species:
  species _5mTHF in compartment = 5.16;  // CHEBI:15641 kegg.compound:C00440
  species THF in compartment = 6.73;  // CHEBI:15635 kegg.compound:C00101
  species DHF in compartment = 0.027;  // CHEBI:15633 kegg.compound:C00415
  species _5_10_CH2THF in compartment = 0.94;  // CHEBI:1989 kegg.compound:C00143
  species _5_10_CHTHF in compartment = 1.153;  // CHEBI:15638 kegg.compound:C00445
  species _10fTHF in compartment = 5.99;  // CHEBI:15637 kegg.compound:C00234
  species $Ser in compartment = 468;  // isVersionOf CHEBI:17822 kegg.compound:C00716
  species $Gly in compartment = 1850;  // CHEBI:15428 kegg.compound:C00037
  species $dUMP in compartment = 20;  // CHEBI:17622 kegg.compound:C00365
  species $GAR in compartment = 10;  // isVersionOf CHEBI:24367; CHEBI:18272 kegg.compound:C04376
  species $AICAR in compartment = 2.1;  // isVersionOf CHEBI:18406 kegg.compound:C04677
  species $HCOOH in compartment = 900;  // isVersionOf CHEBI:30751 kegg.compound:C00058
  species $NADPH in compartment = 50;  // CHEBI:16474 kegg.compound:C00005
  species $Hcy in compartment = 1;  // CHEBI:17230 kegg.compound:C05330

  // Parameters:
  NE_k1 = 0.15;
  NE_k2 = 12;
  MS_Vmax = 500;
  MS_Km_5mTHF = 25;
  MS_Km_Hcy = 0.1;
  MS_Kd = 1;
  MTHFR_Vmax = 6000;
  MTHFR_Km_NADPH = 16;
  MTHFR_Km_5_10_CH2THF = 50;
  FTD_Vmax = 14000;
  FTD_Km_10fTHF = 20;
  FTS_Vmax = 2000;
  FTS_Km_HCOOH = 43;
  FTS_Km_THF = 3;
  AICART_Vmax = 45000;
  AICART_Km_AICAR = 100;
  AICART_Km_10fTHF = 5.9;
  PGT_Vmax = 16200;
  PGT_Km_GAR = 520;
  PGT_Km_10fTHF = 4.9;
  TS_Vmax = 50;
  TS_Km_dUMP = 6.3;
  TS_Km_5_10_CH2THF = 14;
  DHFR_Vmax = 50;
  DHFR_Km_NADPH = 4;
  DHFR_Km_DHF = 0.5;
  MTCH_VmaxF = 800000;
  MTCH_Km_5_10_CHTHF = 250;
  MTCH_VmaxR = 20000;
  MTCH_Km_10fTHF = 100;
  SHMT_VmaxF = 40000;
  SHMT_Km_Ser = 600;
  SHMT_Km_THF = 50;
  SHMT_VmaxR = 25000;
  MTD_VmaxF = 200000;
  MTD_Km_5_10_CH2THF = 2;
  MTD_VmaxR = 594000;
  MTD_Km_5_10_CHTHF = 10;

  // Reactions:
  V_NE: THF => _5_10_CH2THF; HCOOH*NE_k1*THF - NE_k2*_5_10_CH2THF;  // modifiers: HCOOH; isVersionOf GO:0046653
  V_MS: _5mTHF => THF; MS_Vmax*(_5mTHF/MS_Km_5mTHF)*(Hcy/MS_Km_Hcy)/(MS_Kd/MS_Km_5mTHF + _5mTHF/MS_Km_5mTHF + Hcy/MS_Km_Hcy + _5mTHF*Hcy/(MS_Km_5mTHF*MS_Km_Hcy));  // modifiers: Hcy; isHomologTo reactome:REACT_6739; isVersionOf ec-code:2.1.1.13 kegg.reaction:R00946 GO:0008705
  V_MTHFR: _5_10_CH2THF => _5mTHF; MTHFR_Vmax*(NADPH/(MTHFR_Km_NADPH + NADPH))*(_5_10_CH2THF/(MTHFR_Km_5_10_CH2THF + _5_10_CH2THF));  // modifiers: NADPH; isHomologTo reactome:REACT_11102; isVersionOf ec-code:1.5.1.20 kegg.reaction:R01224 GO:0004489
  V_FTD: _10fTHF => THF; FTD_Vmax*(_10fTHF/(FTD_Km_10fTHF + _10fTHF));  // isHomologTo reactome:REACT_11170; isVersionOf ec-code:1.5.1.6 kegg.reaction:R00941 GO:0016155
  V_FTS: THF => _10fTHF; FTS_Vmax*(HCOOH/(FTS_Km_HCOOH + HCOOH))*(THF/(FTS_Km_THF + THF));  // modifiers: HCOOH; isHomologTo reactome:REACT_11109; isVersionOf ec-code:6.3.4.3 kegg.reaction:R00943 GO:0004329
  V_AICART: _10fTHF => THF; AICART_Vmax*(AICAR/(AICART_Km_AICAR + AICAR))*(_10fTHF/(AICART_Km_10fTHF + _10fTHF));  // modifiers: AICAR; isHomologTo reactome:REACT_812; isVersionOf ec-code:2.1.2.3 kegg.reaction:R04560 GO:0004643
  V_PGT: _10fTHF => THF; PGT_Vmax*(GAR/(PGT_Km_GAR + GAR))*(_10fTHF/(PGT_Km_10fTHF + _10fTHF));  // modifiers: GAR; isVersionOf ec-code:2.1.2.2 kegg.reaction:R04325 GO:0004644; isHomologTo reactome:REACT_1509
  V_TS: _5_10_CH2THF => DHF; TS_Vmax*(dUMP/(TS_Km_dUMP + dUMP))*(_5_10_CH2THF/(TS_Km_5_10_CH2THF + _5_10_CH2THF));  // modifiers: dUMP; isHomologTo reactome:REACT_1679; isVersionOf ec-code:2.1.1.45 kegg.reaction:R02101 GO:0004799
  V_DHFR: DHF => THF; DHFR_Vmax*(NADPH/(DHFR_Km_NADPH + NADPH))*(DHF/(DHFR_Km_DHF + DHF));  // modifiers: NADPH; isHomologTo reactome:REACT_11170; isVersionOf ec-code:1.5.1.3 kegg.reaction:R00939 GO:0004146
  V_MTCH: _5_10_CHTHF => _10fTHF; MTCH_VmaxF*(_5_10_CHTHF/(MTCH_Km_5_10_CHTHF + _5_10_CHTHF)) - MTCH_VmaxR*(_10fTHF/(MTCH_Km_10fTHF + _10fTHF));  // isHomologTo reactome:REACT_11074; isVersionOf ec-code:3.5.4.9 kegg.reaction:R01655 GO:0004477
  V_SHMT: THF => _5_10_CH2THF; SHMT_VmaxF*(Ser/(SHMT_Km_Ser + Ser))*(THF/(SHMT_Km_THF + THF)) - SHMT_VmaxR*(Gly/(SHMT_Km_Ser + Gly))*(_5_10_CH2THF/(SHMT_Km_THF + _5_10_CH2THF));  // modifiers: Ser, Gly; isVersionOf ec-code:2.1.2.1 kegg.reaction:R00945 GO:0004372; isHomologTo reactome:REACT_11159
  V_MTD: _5_10_CH2THF => _5_10_CHTHF; MTD_VmaxF*(_5_10_CH2THF/(MTD_Km_5_10_CH2THF + _5_10_CH2THF)) - MTD_VmaxR*(_5_10_CHTHF/(MTD_Km_5_10_CHTHF + _5_10_CHTHF));  // isHomologTo reactome:REACT_11187; isVersionOf ec-code:1.5.1.5 kegg.reaction:R01220 GO:0004488
end
