// SBML level 2 version 4

model Singh2006_TCA_Ecoli_glucose()
  // This a model from the article:
  // Kinetic modeling of tricarboxylic acid cycle and glyoxylate bypass in Mycobacterium tuberculosis, and its application to assessment of drugtargets.
  // Singh VK , Ghosh I Theor Biol Med Model 2006 Aug 3;3:27 16887020,
  // Abstract:
  // BACKGROUND: Targeting persistent tubercule bacilli has become an important challenge in the development of anti-tuberculous drugs. As the glyoxylate bypass is essential for persistent bacilli, interference with it holds the potential for designing new antibacterial drugs. We have developed kinetic models of the tricarboxylic acid cycle and glyoxylate bypass in Escherichia coli and Mycobacterium tuberculosis, and studied the effects of inhibition of various enzymes in the M. tuberculosis model. RESULTS: We used E. coli to validate the pathway-modeling protocol and showed that changes in metabolic flux can be estimated from gene expression data. The M. tuberculosis model reproduced the observation that deletion of one of the two isocitrate lyase genes has little effect on bacterial growth in macrophages, but deletion of both genes leads to the elimination of the bacilli from the lungs. It also substantiated the inhibition of isocitrate lyases by 3-nitropropionate. On the basis of our simulation studies, we propose that: (i) fractional inactivation of both isocitrate dehydrogenase 1 and isocitrate dehydrogenase 2 is required for a flux through the glyoxylate bypass in persistent mycobacteria; and (ii) increasing the amountof active isocitrate dehydrogenases can stop the flux through the glyoxylate bypass, so the kinase that inactivates isocitrate dehydrogenase 1 and/or the proposed inactivator of isocitrate dehydrogenase 2 is a potential target for drugs against persistent mycobacteria. In addition, competitive inhibition of isocitrate lyases along with a reduction in the inactivation of isocitrate dehydrogenases appears to be a feasible strategy for targeting persistent mycobacteria. CONCLUSION: We used kinetic modeling of biochemical pathways to assess various potential anti-tuberculous drug targets that interfere with the glyoxylate bypass flux, and indicated the type of inhibition needed to eliminate the pathogen. The advantage of such an approach to the assessment of drug targets is that it facilitates the study of systemic effect(s) of the modulation of the target enzyme(s) in the cellular environment.
  // This model originates from BioModels Database: A Database of Annotated Published Models (http://www.ebi.ac.uk/biomodels/). It is copyright (c) 2005-2010 The BioModels.net Team.
  // To the extent possible under law, all copyright and related or neighbouring rights to this encoded model have been dedicated to the public domain worldwide. Please refer to CC0 Public Domain Dedication for more information.
  // In summary, you are entitled to use this encoded model in absolutely any manner you deem suitable, verbatim, or with modification, alone or embedded it in a larger context, redistribute it, commercially or not, in a restricted way or not..
  // To cite BioModels Database, please use: Li C, Donizelli M, Rodriguez N, Dharuri H, Endler L, Chelliah V, Li L, He E, Henry A, Stefan MI, Snoep JL, Hucka M, Le Novère N, Laibe C (2010) BioModels Database: An enhanced, curated and annotated resource for published quantitative kinetic models. BMC Syst Biol., 4:92.
  // biomodels.db:BIOMD0000000222
  // biomodels.db:MODEL8583955822
  // isDescribedBy pubmed:16887020
  // occursIn taxonomy:562
  // isHomologTo reactome:REACT_1785
  // hasVersion GO:0006097 GO:0006099

  // Compartments:
  compartment cell = 1;

  // Species:
  species $aca in cell = 0.5;  // isVersionOf CHEBI:15351 kegg.compound:C00024
  species $oaa in cell = 0.004;  // isVersionOf CHEBI:30744 kegg.compound:C00036
  species $coa in cell = 0.0001;  // isVersionOf CHEBI:15346 kegg.compound:C000010
  species cit in cell = 3;  // isVersionOf CHEBI:30769 kegg.compound:C00158
  species icit in cell = 0.018;  // isVersionOf CHEBI:30887 kegg.compound:C00311
  species akg in cell = 0.2;  // isVersionOf CHEBI:30915 kegg.compound:C00026
  species sca in cell = 0.04;  // isVersionOf CHEBI:15380 kegg.compound:C00091
  species suc in cell = 0.6;  // isVersionOf CHEBI:15741 kegg.compound:C00042
  species fa in cell = 0.3;  // isVersionOf CHEBI:18012 kegg.compound:C00122
  species mal in cell = 1.8;  // isVersionOf CHEBI:6650 kegg.compound:C00711
  species gly in cell = 4;  // isVersionOf CHEBI:16891 kegg.compound:C00048
  species $biosyn in cell = 0.1;

  // Reactions:
  CS: $aca + $oaa -> $coa + cit; cell*((Vf_cs*(aca/Kaca_cs)*(oaa/Koaa_cs) - Vr_cs*(coa/Kcoa_cs)*(cit/Kcit_cs))/((1 + aca/Kaca_cs + coa/Kcoa_cs)*(1 + oaa/Koaa_cs + cit/Kcit_cs)));  // isVersionOf kegg.reaction:R00351
    Vf_cs = 91.2 mmlmin; Kaca_cs = 0.03 mml; Koaa_cs = 0.07 mml; Vr_cs = 0.912 mmlmin; Kcoa_cs = 0.3 mml; Kcit_cs = 0.7 mml;
  ACN: cit -> icit; cell*((Vf_acn*(cit/Kcit_acn) - Vr_acn*(icit/Kicit_acn))/(1 + cit/Kcit_acn + icit/Kicit_acn));  // isVersionOf kegg.reaction:R01324
    Vf_acn = 91.2 mmlmin; Kcit_acn = 1.7 mml; Vr_acn = 0.912 mmlmin; Kicit_acn = 3.33 mml;
  ICD: icit -> akg; cell*((ICD_Vf_icd*(icit/ICD_Kicit_icd) - ICD_Vr_icd*(akg/ICD_Kakg_icd))/(1 + icit/ICD_Kicit_icd + akg/ICD_Kakg_icd));  // isVersionOf kegg.reaction:R00709
    ICD_Vf_icd = 14.72 mmlmin; ICD_Kicit_icd = 0.008 mml; ICD_Vr_icd = 0.1472 mmlmin; ICD_Kakg_icd = 0.13 mml;
  KDH: akg -> sca; cell*((Vf_kdh*(akg/Kakg_kdh) - Vr_kdh*(sca/Ksca_kdh))/(1 + akg/Kakg_kdh + sca/Ksca_kdh));  // isVersionOf kegg.reaction:R08549
    Vf_kdh = 35.84 mmlmin; Kakg_kdh = 0.1 mml; Vr_kdh = 0.3584 mmlmin; Ksca_kdh = 1 mml;
  ScAS: sca -> suc; cell*((Vf_scas*(sca/Ksca_scas) - Vr_scas*(suc/Ksuc_scas))/(1 + sca/Ksca_scas + suc/Ksuc_scas));  // isVersionOf kegg.reaction:R00407
    Vf_scas = 3.5 mmlmin; Ksca_scas = 0.02 mml; Vr_scas = 0.035 mmlmin; Ksuc_scas = 5 mml;
  SDH: suc -> fa; cell*((Vf_sdh*(suc/Ksuc_sdh) - Vr_sdh*(fa/Kfa_sdh))/(1 + suc/Ksuc_sdh + fa/Kfa_sdh));  // isVersionOf kegg.reaction:R00402
    Vf_sdh = 7.38 mmlmin; Ksuc_sdh = 0.02 mml; Vr_sdh = 7.31 mmlmin; Kfa_sdh = 0.4 mml;
  FUM: fa -> mal; cell*((Vf_fum*(fa/Kfa_fum) - Vr_fum*(mal/Kmal_fum))/(1 + fa/Kfa_fum + mal/Kmal_fum));  // isVersionOf kegg.reaction:R01082
    Vf_fum = 44.64 mmlmin; Kfa_fum = 0.15 mml; Vr_fum = 37.2 mmlmin; Kmal_fum = 0.04 mml;
  MDH: mal -> $oaa; cell*((Vf_mdh*(mal/Kmal_mdh) - Vr_mdh*(oaa/Koaa_mdh))/(1 + mal/Kmal_mdh + oaa/Koaa_mdh));  // isVersionOf kegg.reaction:R00342
    Vf_mdh = 356.64 mmlmin; Kmal_mdh = 2.6 mml; Vr_mdh = 353.11 mmlmin; Koaa_mdh = 0.04 mml;
  ICL: icit -> suc + gly; cell*((Vf_icl*(icit/Kicit_icl) - Vr_icl*(suc/Ksuc_icl)*(gly/Kgly_icl))/(1 + icit/Kicit_icl + suc/Ksuc_icl + gly/Kgly_icl + icit/Kicit_icl*(suc/Ksuc_icl) + suc/Ksuc_icl*(gly/Kgly_icl)));  // isVersionOf kegg.reaction:R00479
    Vf_icl = 1.9 mmlmin; Kicit_icl = 0.604 mml; Vr_icl = 0.019 mmlmin; Ksuc_icl = 0.59 mml; Kgly_icl = 0.13 mml;
  MS: gly + $aca -> mal + $coa; cell*((Vf_ms*(gly/Kgly_ms)*(aca/Kaca_ms) - Vr_ms*(mal/Kmal_ms)*(coa/Kcoa_ms))/((1 + gly/Kgly_ms + mal/Kmal_ms)*(1 + aca/Kaca_ms + coa/Kcoa_ms)));  // isVersionOf kegg.reaction:R00472
    Vf_ms = 1.9 mmlmin; Kgly_ms = 2 mml; Kaca_ms = 0.01 mml; Vr_ms = 0.019 mmlmin; Kmal_ms = 1 mml; Kcoa_ms = 0.1 mml;
  SYN: akg -> $biosyn; cell*0.188*((SYN_Vf_icd*(icit/SYN_Kicit_icd) - SYN_Vr_icd*(akg/SYN_Kakg_icd))/(1 + icit/SYN_Kicit_icd + akg/SYN_Kakg_icd));  // modifiers: icit; isVersionOf GO:0006103
    SYN_Vf_icd = 14.72 mmlmin; SYN_Kicit_icd = 0.008 mml; SYN_Vr_icd = 0.1472 mmlmin; SYN_Kakg_icd = 0.13 mml;

  // Unit definitions:
  unit time = 60 second; time is "min";
  unit substance = 1e-3 mole; substance is "mmole";
  unit mmlmin = 1e-3 mole / (litre * 60 second); mmlmin is "mM_per_min";
  unit mml = 1e-3 mole / litre; mml is "mM";
end
