// SBML level 2 version 4

model Meyer1991_CalciumSpike_ICC()
  // This a model from the article:
  // Calcium spiking.
  // Meyer T, Stryer L Annu Rev Biophys Biophys Chem1991:20:153-74 1867714,
  // Abstract:
  // No Abstract Available
  // The IP3-Ca2+ Crosscoupling Model (ICC) is reviewed by Meyer and Stryer in 1991, originally from Meyer and Stryer, 1988. PMID - 2455890 Parameters refer to figures 5 and 6 of the article which were reproduced by using Copasi 4.5 (Build 30). Species CaI and IP3 are buffered to 1% and 50% percent, respectively.
  // This model originates from BioModels Database: A Database of Annotated Published Models. It is copyright (c) 2005-2009 The BioModels Team.
  // To the extent possible under law, all copyright and related or neighbouring rights to this encoded model have been dedicated to the public domain worldwide. Please refer to CC0 Public Domain Dedication for more information.
  // In summary, you are entitled to use this encoded model in absolutely any manner you deem suitable, verbatim, or with modification, alone or embedded it in a larger context, redistribute it, commercially or not, in a restricted way or not..
  // To cite BioModels Database, please use Le Novère N., Bornstein B., Broicher A., Courtot M., Donizelli M., Dharuri H., Li L., Sauro H., Schilstra M., Shapiro B., Snoep J.L., Hucka M. (2006) BioModels Database: A Free, Centralized Database of Curated, Published, Quantitative Kinetic Models of Biochemical and Cellular Systems Nucleic Acids Res., 34: D689-D691.
  // biomodels.db:BIOMD0000000224
  // biomodels.db:MODEL9412103933
  // isDescribedBy pubmed:1867714
  // isVersionOf GO:0051279
  // occursIn taxonomy:10117

  // Compartments:
  compartment cytosol = 1;  // isVersionOf GO:0005829
  compartment ER_store in cytosol = 1;  // isVersionOf GO:0005783

  // Species:
  species CaI in cytosol = 0.1;  // isVersionOf CHEBI:29108 kegg.compound:C00076
  species IP3 in cytosol = 0.05;  // isVersionOf CHEBI:16595 kegg.compound:C01255
  species CaS in ER_store = 1100;  // isVersionOf CHEBI:29108 kegg.compound:C00076
  species g in cytosol = 0;  // isVersionOf GO:0019855

  // Parameters:
  A = 20 psec;
  B = 40 microMpsec;
  C = 1.1 microMpsec;
  D = 2 psec;
  E = 1 microM4;
  F = 0.02 psec;
  k1 = 0.5 microM;
  k2 = 0.15 microM;
  k3 = 1 microM;
  L = 0.01 psec;
  R = 0.09;

  // Reactions:
  JChannel: CaS => CaI; (1 - g)*(A*(IP3*0.5)^4/(IP3*0.5 + k1)^4 + L)*CaS;  // modifiers: IP3, g; isVersionOf GO:0051209
  JPump: CaI => CaS; B*(CaI*0.01)^2/((CaI*0.01)^2 + k2^2);  // isVersionOf GO:0060401
  kPLC: => IP3; C*(1 - k3/(CaI*0.01 + k3)*(1/(1 + R)));  // modifiers: CaI; isVersionOf GO:0032959
  kPhosphatase: IP3 => ; D*IP3*0.5;  // isVersionOf GO:0032961
  inhibition_parameter1: => g; E*(CaI*0.01)^4*(1 - g);  // modifiers: CaI
  inhibition_parameter2: g => ; F;  // modifiers: CaI

  // Unit definitions:
  unit microM = 1e-6 mole / litre;
  unit microMpsec = 1e-6 mole / (second * litre);
  unit microM4 = 1 / ((1e-6 mole)^4 * second * litre);
  unit psec = 1 / second;
end
