// SBML level 2 version 4

model Ma2002_cAMP_oscillations()
  // This a model from the article:
  // Quantifying robustness of biochemical network models.
  // Ma L, Iglesias PA. BMC Bioinformatics.2002 Dec 13;3:38. 12482327,
  // Abstract:
  // BACKGROUND: Robustness of mathematical models of biochemical networks is important for validation purposes and can be used as a means of selecting between different competing models. Tools for quantifying parametric robustness are needed. RESULTS: Two techniques for describing quantitatively the robustness of an oscillatory model were presented and contrasted. Single-parameter bifurcation analysis was used to evaluate the stability robustness of the limit cycle oscillation as well as the frequency and amplitude of oscillations. A tool from control engineering--the structural singular value (SSV)--was used to quantify robust stability of the limit cycle. Using SSV analysis, we find very poor robustness when the model's parameters are allowed to vary. CONCLUSION: The results show the usefulness of incorporating SSV analysis to single parameter sensitivity analysis to quantify robustness.
  // This model is originally proposed by Laub and Loomis (1998).[Laub MT, Loomis WF (1998). A molecular network that produces spontaneous oscillations in excitable cells of Dictyostelium. Mol Biol Cell. 9(12):3521-32. PubMED: 12482327.
  // The parameters used in this model (Ma and Iglesias, 2002), are different from that used in the original model (Laub and Loomis, 1998), because of the typographical errors in the original paper. The parameters used in the model presented by Ma and Iglesias, are obtained directly from the authors of original publication (Laub and Loomis, 1998). These parameters are also used in the website for the Laub-Loomis model, http://www-biology.ucsd.edu/labs/loomis/network/laubloomis.html.
  // By using this model, Kim et al., 2006 [Kim J, Bates DG, Postlethwaite I, Ma L, Iglesias PA. (2006) Robustness analysis of biochemical network models. Syst Biol (Stevenage). 153(3):96-104. PubMED: 16984084], validate and extend the analysis approach proposed by Ma and Iglesias (2002), by showing how hybrid optimisation can be used to compute worst-case parameter combinations in the model.
  // This model originates from BioModels Database: A Database of Annotated Published Models. It is copyright (c) 2005-2010 The BioModels Team.
  // To the extent possible under law, all copyright and related or neighbouring rights to this encoded model have been dedicated to the public domain worldwide. Please refer to CC0 Public Domain Dedication for more information.
  // In summary, you are entitled to use this encoded model in absolutely any manner you deem suitable, verbatim, or with modification, alone or embedded it in a larger context, redistribute it, commercially or not, in a restricted way or not..
  // To cite BioModels Database, please use Le Novère N., Bornstein B., Broicher A., Courtot M., Donizelli M., Dharuri H., Li L., Sauro H., Schilstra M., Shapiro B., Snoep J.L., Hucka M. (2006) BioModels Database: A Free, Centralized Database of Curated, Published, Quantitative Kinetic Models of Biochemical and Cellular Systems Nucleic Acids Res., 34: D689-D691.
  // biomodels.db:BIOMD0000000229
  // biomodels.db:MODEL0606755064
  // isDescribedBy pubmed:12482327
  // occursIn taxonomy:44689
  // isVersionOf GO:0006935
  // hasPart kegg.pathway:xcc02030

  // Compartments:
  compartment compartment = 1;

  // Species:
  species ACA in compartment = 3.39;  // isVersionOf interpro:IPR008172
  species CAR1 in compartment = 2.45;  // isVersionOf uniprot:P13773
  species PKA in compartment = 1.6;  // isHomologTo uniprot:Q01386; isVersionOf interpro:IPR002373
  species incAMP in compartment = 1.2;  // isVersionOf CHEBI:17489 kegg.compound:C000575
  species ERK2 in compartment = 1.13;  // isVersionOf uniprot:Q54QB1 interpro:IPR008349
  species REGA in compartment = 0.9;  // isVersionOf uniprot:Q23917
  species excAMP in compartment = 0.48;  // CHEBI:17489 kegg.compound:C000575

  // Parameters:
  k1 = 2;
  k2 = 0.9;
  k3 = 2.5;
  k4 = 1.5;
  k5 = 0.6;
  k6 = 0.8;
  k7 = 1;
  k8 = 1.3;
  k9 = 0.3;
  k10 = 0.8;
  k11 = 0.7;
  k12 = 4.9;
  k13 = 23;
  k14 = 4.5;

  // Reactions:
  v1: -> ACA; k1*CAR1;  // modifiers: CAR1; isVersionOf GO:0045858
  v2: ACA -> ; k2*ACA*PKA;  // modifiers: PKA; isVersionOf GO:0045857
  v3: -> PKA; k3*incAMP;  // modifiers: incAMP; isVersionOf GO:0045858
  v4: PKA -> ; k4*PKA;  // isVersionOf GO:0045857
  v5: -> ERK2; k5*CAR1;  // modifiers: CAR1; isVersionOf GO:0045858
  v6: ERK2 -> ; k6*PKA*ERK2;  // modifiers: PKA; isVersionOf GO:0045857
  v7: -> REGA; k7;  // isVersionOf GO:0045858
  v8: REGA -> ; k8*ERK2*REGA;  // modifiers: ERK2; isVersionOf GO:0045857
  v9: -> incAMP; k9*ACA;  // modifiers: ACA; isVersionOf GO:0006171
  v10: incAMP -> ; k10*REGA*incAMP;  // modifiers: REGA; isVersionOf GO:0006198
  v11: -> excAMP; k11*ACA;  // modifiers: ACA; isVersionOf GO:0006171
  v12: excAMP -> ; k12*excAMP;  // isVersionOf GO:0006198
  v13: -> CAR1; k13*excAMP;  // modifiers: excAMP; isVersionOf GO:0045858
  v14: CAR1 -> ; k14*CAR1;  // isVersionOf GO:0045857
end
