// SBML level 2 version 4

model Valero2006_Adenine_TernaryCycle()
  // This a model from the article:
  // A kinetic study of a ternary cycle between adenine nucleotides.
  // Valero E, Varón R, García-Carmona F FEBS J.[2006 Aug;273(15):3598-613 16884499,
  // Abstract:
  // In the present paper, a kinetic study is made of the behavior of a moiety-conserved ternary cycle between the adenine nucleotides. The system contains the enzymes S-acetyl coenzyme A synthetase, adenylate kinase and pyruvate kinase, and converts ATP into AMP, then into ADP and finally back to ATP. L-Lactate dehydrogenase is added to the system to enable continuous monitoring of the progress of the reaction. The cycle cannot work when the only recycling substrate in the reaction medium is AMP. A mathematical model is proposed whose kinetic behavior has been analyzed both numerically by integration of the nonlinear differential equations describing the kinetics of the reactions involved, and analytically under steady-state conditions, with good agreement with the experimental results being obtained. The data obtained showed that there is a threshold value of the S-acetyl coenzyme A synthetase/adenylate kinase ratio, above which the cycle stops because all the recycling substrate has been accumulated as AMP, never reaching the steady state. In addition, the concept of adenylate energy charge has been applied to the system, obtaining the enabled values of the rate constants for a fixed adenylate energy charge value and vice versa.
  // To the extent possible under law, all copyright and related or neighbouring rights to this encoded model have been dedicated to the public domain worldwide. Please refer to CC0 Public Domain Dedication for more information.
  // In summary, you are entitled to use this encoded model in absolutely any manner you deem suitable, verbatim, or with modification, alone or embedded it in a larger context, redistribute it, commercially or not, in a restricted way or not.
  // To cite BioModels Database, please use: Li C, Donizelli M, Rodriguez N, Dharuri H, Endler L, Chelliah V, Li L, He E, Henry A, Stefan MI, Snoep JL, Hucka M, Le Novère N, Laibe C (2010) BioModels Database: An enhanced, curated and annotated resource for published quantitative kinetic models. BMC Syst Biol., 4:92.
  // biomodels.db:BIOMD0000000231
  // biomodels.db:MODEL5952687775
  // isDescribedBy pubmed:16884499
  // occursIn taxonomy:9913
  // isVersionOf reactome:REACT_2124
  // isVersionOf GO:0046085

  // Compartments:
  compartment compartment = 1;

  // Species:
  species ATP in compartment = 16.3;  // isVersionOf CHEBI:15422 kegg.compound:C00002
  species AMP in compartment = 0;  // isVersionOf CHEBI:16027 kegg.compound:C00020
  species ADP in compartment = 0;  // isVersionOf CHEBI:16761 kegg.compound:C00008
  species Pyr in compartment = 0;  // isVersionOf interpro:IPR001697; isHomologTo uniprot:O62619
  species NADH in compartment = 256;  // isVersionOf CHEBI:16908 kegg.compound:C00004
  species $Lac in compartment = 0;  // isVersionOf uniprot:Q2KJG0 interpro:IPR011304

  // Parameters:
  Vmapp1 = 2.3;
  Kmapp1 = 700;
  Vm2 = 170;
  Km2ATP = 25;
  Km2AMP = 110;
  K = 71000;
  Vmapp3 = 65;
  Kmapp3 = 260;
  k4 = 5;

  // Reactions:
  v1: ATP -> AMP; Vmapp1*ATP/(Kmapp1 + ATP);  // isVersionOf kegg.reaction:R00086
  v2: ATP + AMP -> 2 ADP; Vm2*ATP*AMP/(K + Km2ATP*AMP + Km2AMP*ATP + ATP*AMP);  // isVersionOf kegg.reaction:R00127
  v3: ADP -> ATP + Pyr; Vmapp3*ADP/(Kmapp3 + ADP);  // isVersionOf kegg.reaction:R00200
  v4: Pyr + NADH -> $Lac; k4*Pyr;  // isVersionOf kegg.reaction:R00703
end
