// SBML level 2 version 4

model Neumann2010_CD95Stimulation_NFkB_Apoptosis()
  // This is the reduced model (model 8) described in: Dynamics within the CD95 death-inducing signaling complex decide life and death of cells.
  // Leo Neumann, Carina Pforr, Joel Beaudouin, Alexander Golks, Peter H. Krammer, Inna N. Lavrik and Roland Eils (German Cancer Research Center (DKFZ), http://www.dkfz.de);Mol Sys Biol2010;6:352. doi:10.1038/msb.2010.6;
  // Abstract:
  // This study explores the dilemma in cellular signaling that triggering of CD95 (Fas/APO-1) in some situations results in cell death and in others leads to the activation of NF-κB. We established an integrated kinetic mathematical model for CD95-mediated apoptotic and NF-κB signaling. Systematic model reduction resulted in a surprisingly simple model well approximating experimentally observed dynamics. The model postulates a new link between c-FLIPL cleavage in the death-inducing signaling complex (DISC) and the NF-κB pathway. We validated experimentally that CD95 stimulation resulted in an interaction of p43-FLIP with the IKK complex followed by its activation. Furthermore, we showed that the apoptotic and NF-κB pathways diverge already at the DISC. Model and experimental analysis of DISC formation showed that a subtle balance of c-FLIPL and procaspase-8 determines life/death decisions in a nonlinear manner. We present an integrated model describing the complex dynamics of CD95-mediated apoptosis and NF-κB signaling.
  // The original was taken from the MSB article supplementary material site msb20106-s2.xml. All the species ids were changed since the model was not a valid SBML with its original ids - Lukas.
  // Notes added to the species [L] (the initial concentration of Anti-CD95), regarding changes to be made in the initial concentration of [L], to obtain figure 5D.
  // This model originates from BioModels Database: A Database of Annotated Published Models. It is copyright (c) 2005-2010 The BioModels Team.
  // To the extent possible under law, all copyright and related or neighbouring rights to this encoded model have been dedicated to the public domain worldwide. Please refer to CC0 Public Domain Dedication for more information.
  // In summary, you are entitled to use this encoded model in absolutely any manner you deem suitable, verbatim, or with modification, alone or embedded it in a larger context, redistribute it, commercially or not, in a restricted way or not..
  // To cite BioModels Database, please use Le Novère N., Bornstein B., Broicher A., Courtot M., Donizelli M., Dharuri H., Li L., Sauro H., Schilstra M., Shapiro B., Snoep J.L., Hucka M. (2006) BioModels Database: A Free, Centralized Database of Curated, Published, Quantitative Kinetic Models of Biochemical and Cellular Systems Nucleic Acids Res., 34: D689-D691.
  // biomodels.db:BIOMD0000000243
  // biomodels.db:MODEL1003100001
  // isDescribedBy pubmed:20212524
  // occursIn taxonomy:9606
  // isPartOf reactome:REACT_21281 reactome:REACT_1619
  // isPartOf GO:0008624 GO:0051092

  // Compartments:
  compartment default = 1;  // GO:0005623

  // Species:
  // Initial concentration of anti-CD95 = 113.22nM is equivalent to 1500ng/ml. The model as such reproduces the figure 5D (black plot: i.e. anti-CD95=1500ng/ml).
  // To obtain the blue (anti-CD95=500ng/ml) and red (250ng/ml) plot of figure 5D, the model parameter [L] (initial concentration of anti-CD95 [L]) should be set as 37.74nM and 18.87nM respectively.
  species L in default = 113.22;  // isVersionOf uniprot:Q0VHD7
  species L_RF in default = 0; L_RF is "L:RF";  // isPartOf uniprot:Q13158 uniprot:P25445 uniprot:Q0VHD7
  species L_RF_C8 in default = 0; L_RF_C8 is "L:RF:C8";  // hasPart uniprot:Q0VHD7 uniprot:Q14790 uniprot:P25445 uniprot:Q13158
  species L_RF_FL in default = 0; L_RF_FL is "L:RF:FL";  // hasPart uniprot:Q0VHD7 uniprot:O15519 uniprot:Q13158 uniprot:P25445
  species L_RF_FS in default = 0; L_RF_FS is "L:RF:FS";  // hasPart uniprot:Q0VHD7 uniprot:O15519 uniprot:Q13158 uniprot:P25445
  species p43_p41 in default = 0; p43_p41 is "p43/p41";  // hasPart uniprot:Q14790
  species C3 in default = 1.443404;  // isVersionOf uniprot:P42574
  species C8 in default = 64.47652;  // isVersionOf uniprot:Q14790
  species C8_star in default = 0; C8_star is "C8*";  // isVersionOf uniprot:Q14790
  species C3_star in default = 0; C3_star is "C3*";  // isVersionOf uniprot:P42574
  species p43_FLIP in default = 0; p43_FLIP is "p43-FLIP";  // hasPart uniprot:O15519
  species NF_kB_IkB in default = 4.739546; NF_kB_IkB is "NF-kB:IkB";  // isVersionOf reactome:REACT_7272; hasPart uniprot:P25963 uniprot:P19838
  species NF_kB_IkB_P in default = 0; NF_kB_IkB_P is "NF-kB:IkB:P";  // hasVersion reactome:REACT_7108 reactome:REACT_7645; hasPart uniprot:P25963 uniprot:P19838
  species p43_FLIP_IKK_star in default = 0; p43_FLIP_IKK_star is "p43-FLIP:IKK*";
  species NF_kB_star in default = 0; NF_kB_star is "NF-kB*";  // isVersionOf GO:0071159; isVersionOf uniprot:P19838
  species RF in default = 91.26592;  // hasPart uniprot:Q13158 uniprot:P25445
  species FL in default = 7.398562;  // isVersionOf uniprot:O15519
  species FS in default = 5.083923;  // isVersionOf uniprot:O15519
  species IKK in default = 5.772825;  // isVersionOf uniprot:Q9Y6K9 uniprot:O14920 uniprot:O15111
  species L_RF_C8_FS in default = 0; L_RF_C8_FS is "L:RF:C8:FS";  // hasPart uniprot:Q0VHD7 uniprot:O15519 uniprot:Q14790 uniprot:Q13158
  species L_RF_FL_FL in default = 0; L_RF_FL_FL is "L:RF:FL:FL";  // hasPart uniprot:Q0VHD7 uniprot:O15519 uniprot:Q13158 uniprot:P25445
  species L_RF_FL_FS in default = 0; L_RF_FL_FS is "L:RF:FL:FS";  // hasPart uniprot:Q0VHD7 uniprot:O15519 uniprot:Q13158 uniprot:P25445
  species L_RF_FS_FS in default = 0; L_RF_FS_FS is "L:RF:FS:FS";  // hasPart uniprot:Q0VHD7 uniprot:O15519 uniprot:Q13158 uniprot:P25445

  // Parameters:
  k1 = 1;
  k2 = 0.0001277248;
  k3 = 0.6693316;
  k4 = 1e-5;
  k5 = 0.0005946569;
  k6 = 0.9999999;
  k7 = 0.8875063;
  k8 = 0.0008044378;
  k9 = 0.002249759;
  k10 = 0.1205258;
  k11 = 0.02891451;
  k12 = 0.1502914;
  k13 = 0.0007204261;
  k14 = 0.3588224;
  k15 = 3.684162;
  k16 = 0.02229912;
  k17 = 0.0064182;

  // Reactions:
  reaction_1: L + RF => L_RF; default*k1*L*RF;  // isVersionOf GO:0006461
  reaction_2: L_RF + C8 => L_RF_C8; default*k2*L_RF*C8;  // isVersionOf GO:0006461
  reaction_3: L_RF + FL => L_RF_FL; default*k3*L_RF*FL;  // isVersionOf GO:0006461
  reaction_4: L_RF + FS => L_RF_FS; default*k4*L_RF*FS;  // isVersionOf GO:0006461
  reaction_5: L_RF_C8 + C8 => p43_p41 + p43_p41; default*k5*L_RF_C8*C8;
  reaction_6: L_RF_C8 + FL => p43_FLIP; default*k6*L_RF_C8*FL;
  reaction_7: L_RF_C8 + FS => L_RF_C8_FS; default*k7*L_RF_C8*FS;  // isVersionOf GO:0006461
  reaction_8: L_RF_FL + C8 => p43_FLIP; default*k5*L_RF_FL*C8;
  reaction_9: L_RF_FL + FL => L_RF_FL_FL; default*k6*L_RF_FL*FL;  // isVersionOf GO:0006461
  reaction_10: L_RF_FL + FS => L_RF_FL_FS; default*k7*L_RF_FL*FS;  // isVersionOf GO:0006461
  reaction_11: L_RF_FS + C8 => L_RF_C8_FS; default*k5*L_RF_FS*C8;  // isVersionOf GO:0006461
  reaction_12: L_RF_FS + FL => L_RF_FL_FS; default*k6*L_RF_FS*FL;  // isVersionOf GO:0006461
  reaction_13: L_RF_FS + FS => L_RF_FS_FS; default*k7*L_RF_FS*FS;  // isVersionOf GO:0006461
  reaction_14: p43_p41 + p43_p41 => C8_star; default*k8*p43_p41*p43_p41;
  reaction_15: C3 + C8_star => C3_star + C8_star; default*k9*C3*C8_star;
  reaction_16: C8 + C3_star => p43_p41 + C3_star; default*k10*C8*C3_star;
  reaction_17: C8_star => ; default*k11*C8_star;  // isVersionOf GO:0030163
  reaction_18: C3_star => ; default*k12*C3_star;  // isVersionOf GO:0030163
  reaction_19: p43_FLIP + IKK => p43_FLIP_IKK_star; default*k13*p43_FLIP*IKK;  // isVersionOf GO:0006461
  reaction_20: NF_kB_IkB + p43_FLIP_IKK_star => NF_kB_IkB_P + p43_FLIP_IKK_star; default*k14*NF_kB_IkB*p43_FLIP_IKK_star;  // isVersionOf ec-code:2.7.11.10; isVersionOf GO:0008384; isVersionOf GO:0006468
  reaction_21: NF_kB_IkB_P => NF_kB_star; default*k15*NF_kB_IkB_P;
  reaction_22: p43_FLIP_IKK_star => ; default*k16*p43_FLIP_IKK_star;  // isVersionOf GO:0030163
  reaction_23: NF_kB_star => ; default*k17*NF_kB_star;  // isVersionOf GO:0030163

  // Unit definitions:
  unit time = 60 second;
  unit substance = 1e-9 mole;
end
