// SBML level 2 version 1

model Tiago2010_FeMetabolism_FeAdequate()
  // This a model from the article:
  // Systems analysis of iron metabolism: the network of iron pools and fluxes
  // Tiago JS Lopes, Tatyana Luganskaja, Maja Vujic-Spasic, Matthias W Hentze, Martina U Muckenthaler, K laus Schumann and Jens G Reich BMC Systems Biology2010, Aug 13;4(1):112. 20704761,
  // Abstract:
  // Background
  // Every cell of the mammalian organism needs iron in numerous oxido-reductive processes as well as fo r transport and storage of oxygen. The versatility of ionic iron makes it a toxic entity which can catalyze the production of radicals that damage vital membranous and macromolecular assemblies in t he cell. The mammalian organism maintains therefore a complex regulatory network of iron uptake, ex cretion and intra-body distribution. Intracellular regulation in different cell types is intertwine d with a global hormonal signaling structure. Iron deficiency as well as excess of iron are frequen t and serious human disorders. They can affect every cell, but also the organism as a whole.
  // Results
  // Here, we present a kinematic model of the dynamic system of iron pools and fluxes. It is based on f errokinetic data and chemical measurements in C57BL6 wild-type mice maintained on iron-deficient, i ron-adequate, or iron-loaded diet. The tracer iron levels in major tissues and organs (16 compartme nt) were followed for 28 days. The evaluation resulted in a whole-body model of fractional clearanc e rates. The analysis permits calculation of absolute flux rates in the steady-state, of iron distr ibution into different organs, of tracer-accessible pool sizes and of residence times of iron in th e different compartments in response to three states of iron-repletion induced by the dietary regim e.
  // Conclusions
  // This mathematical model presents a comprehensive physiological picture of mice under three differen t diets with varying iron contents. The quantitative results reflect systemic properties of iron me tabolism: dynamic closedness, hierarchy of time scales, switch-over response and dynamics of iron s torage in parenchymal organs. Therefore, we could assess which parameters will change under dietary perturbations and study in quantitative terms when those changes take place.
  // This model corresponds to the Iron Adequate condition - Mice
  // This model originates from BioModels Database: A Database of Annotated Published Models. It is copyright (c) 2005-2010 The BioModels Team.
  // To the extent possible under law, all copyright and related or neighbouring rights to this encoded model have been dedicated to the public domain worldwide. Please refer to CC0 Public Domain Dedication for more information.
  // In summary, you are entitled to use this encoded model in absolutely any manner you deem suitable, verbatim, or with modification, alone or embedded it in a larger context, redistribute it, commercially or not, in a restricted way or not..
  // To cite BioModels Database, please use Le Novère N., Bornstein B., Broicher A., Courtot M., Donizelli M., Dharuri H., Li L., Sauro H., Schilstra M., Shapiro B., Snoep J.L., Hucka M. (2006) BioModels Database: A Free, Centralized Database of Curated, Published, Quantitative Kinetic Models of Biochemical and Cellular Systems Nucleic Acids Res., 34: D689-D691.
  // biomodels.db:BIOMD0000000260
  // biomodels.db:MODEL4152760573
  // isDescribedBy pubmed:20704761
  // isVersionOf GO:0006826 GO:0008152
  // occursIn taxonomy:10090

  // Compartments:
  compartment default = 1; default is "Environment";  // isVersionOf GO:0043245
  compartment Organism in default = 1;  // isVersionOf FMA:20394

  // Species:
  species iron_in_Plasma in Organism = 100/Organism;  // occursIn BTO:0000131; isVersionOf CHEBI:24875 kegg.compound:C00023
  species iron_in_Bone_Marrow in Organism = 0;  // occursIn BTO:0000141; isVersionOf CHEBI:24875 kegg.compound:C00023
  species iron_in_RBC in Organism = 0;  // occursIn BTO:0000424; isVersionOf CHEBI:24875 kegg.compound:C00023
  species iron_in_Spleen in Organism = 0;  // occursIn BTO:0001281; isVersionOf CHEBI:24875 kegg.compound:C00023
  species iron_in_Liver in Organism = 0;  // occursIn BTO:0000759; isVersionOf CHEBI:24875 kegg.compound:C00023
  species iron_in_Muscle in Organism = 0;  // occursIn BTO:0001103; isVersionOf CHEBI:24875 kegg.compound:C00023
  species iron_in_Duodenum in Organism = 0;  // occursIn BTO:0000365; isVersionOf CHEBI:24875 kegg.compound:C00023
  species iron_in_Integument in Organism = 0;  // occursIn BTO:0000634; isVersionOf CHEBI:24875 kegg.compound:C00023
  species iron_in_Intestine in Organism = 0;  // occursIn BTO:0000648; isVersionOf CHEBI:24875 kegg.compound:C00023
  species iron_ions_Outside in default = 0;  // occursIn GO:0043245; isVersionOf CHEBI:24875; isVersionOf kegg.compound:C00023
  species iron_in_Heart in Organism = 0;  // occursIn BTO:0000562; isVersionOf CHEBI:24875 kegg.compound:C00023
  species iron_in_Lungs in Organism = 0;  // occursIn BTO:0000763; isVersionOf CHEBI:24875 kegg.compound:C00023
  species iron_in_Kidneys in Organism = 0;  // occursIn BTO:0000671; isVersionOf CHEBI:24875 kegg.compound:C00023
  species iron_in_Testes in Organism = 0;  // occursIn BTO:0001363; isVersionOf CHEBI:24875 kegg.compound:C00023
  species iron_in_Stomach in Organism = 0;  // occursIn BTO:0001307; isVersionOf CHEBI:24875 kegg.compound:C00023
  species iron_in_Fat in Organism = 0;  // occursIn BTO:0001487; isVersionOf CHEBI:24875 kegg.compound:C00023
  species iron_in_Brain in Organism = 0;  // occursIn BTO:0000142; isVersionOf CHEBI:24875 kegg.compound:C00023

  // Reactions:
  re1: iron_in_Plasma => iron_in_Bone_Marrow; iron_in_Plasma*re1_k1;  // isVersionOf GO:0006826
    re1_k1 = 12.67032;
  re2: iron_in_Bone_Marrow => iron_in_RBC; iron_in_Bone_Marrow*re2_k1;  // isVersionOf GO:0006826
    re2_k1 = 1.067151;
  re3: iron_in_RBC => iron_in_Spleen; iron_in_RBC*re3_k1;  // isVersionOf GO:0006826
    re3_k1 = 0.061112865;
  re4: iron_in_Spleen => iron_in_Plasma; iron_in_Spleen*re4_k1;  // isVersionOf GO:0006826
    re4_k1 = 7.27706671;
  re5: iron_in_Bone_Marrow => iron_in_Spleen; iron_in_Bone_Marrow*re5_k1;  // isVersionOf GO:0006826
    re5_k1 = 0.100527605;
  re6: iron_in_Plasma => iron_in_Liver; iron_in_Plasma*re6_k1;  // isVersionOf GO:0006826
    re6_k1 = 2.613229;
  re7: iron_in_Liver => iron_in_Plasma; iron_in_Liver*re7_k1;  // isVersionOf GO:0006826
    re7_k1 = 0.137763703;
  re8: iron_in_Plasma => iron_in_Muscle; iron_in_Plasma*re8_k1;  // isVersionOf GO:0006826
    re8_k1 = 1.493333;
  re9: iron_in_Muscle => iron_in_Plasma; iron_in_Muscle*re9_k1;  // isVersionOf GO:0006826
    re9_k1 = 0.154446568;
  re10: iron_in_Plasma => iron_in_Duodenum; iron_in_Plasma*re10_k1;  // isVersionOf GO:0006826
    re10_k1 = 0.042900396;
  re11: iron_in_Plasma => iron_in_Intestine; iron_in_Plasma*re11_k1;  // isVersionOf GO:0006826
    re11_k1 = 0.899045295;
  re12: iron_in_Plasma => iron_in_Integument; iron_in_Plasma*re12_k1;  // isVersionOf GO:0006826
    re12_k1 = 1.144131;
  re14: iron_in_Intestine => iron_ions_Outside; iron_in_Intestine*re14_k1;  // isVersionOf GO:0006826
    re14_k1 = 0.355490081;
  re15: iron_in_Integument => iron_ions_Outside; iron_in_Integument*re15_k1;  // isVersionOf GO:0006826
    re15_k1 = 0.043759386;
  re16: iron_in_Plasma => iron_in_Heart; iron_in_Plasma*re16_k1;  // isVersionOf GO:0006826
    re16_k1 = 0.134371419;
  re17: iron_in_Heart => iron_in_Plasma; iron_in_Heart*re17_k1;  // isVersionOf GO:0006826
    re17_k1 = 0.076683565;
  re18: iron_in_Plasma => iron_in_Lungs; iron_in_Plasma*re18_k1;  // isVersionOf GO:0006826
    re18_k1 = 0.304695409;
  re19: iron_in_Lungs => iron_in_Plasma; iron_in_Lungs*re19_k1;  // isVersionOf GO:0006826
    re19_k1 = 0.192119917;
  re22: iron_in_Plasma => iron_in_Kidneys; iron_in_Plasma*re22_k1;  // isVersionOf GO:0006826
    re22_k1 = 0.445547231;
  re23: iron_in_Kidneys => iron_in_Plasma; iron_in_Kidneys*re23_k1;  // isVersionOf GO:0006826
    re23_k1 = 0.201360515;
  re24: iron_in_Plasma => iron_in_Testes; iron_in_Plasma*re24_k1;  // isVersionOf GO:0006826
    re24_k1 = 0.054570911;
  re25: iron_in_Testes => iron_in_Plasma; iron_in_Testes*re25_k1;  // isVersionOf GO:0006826
    re25_k1 = 0.093227796;
  re26: iron_in_Plasma => iron_in_Stomach; iron_in_Plasma*re26_k1;  // isVersionOf GO:0006826
    re26_k1 = 0.121370929;
  re28: iron_in_Plasma => iron_in_Fat; iron_in_Plasma*re28_k1;  // isVersionOf GO:0006826
    re28_k1 = 0.044747636;
  re29: iron_in_Fat => iron_in_Plasma; iron_in_Fat*re29_k1;  // isVersionOf GO:0006826
    re29_k1 = 0.125873837;
  re30: iron_in_Plasma => iron_in_Brain; iron_in_Plasma*re30_k1;  // isVersionOf GO:0006826
    re30_k1 = 0.031742475;
  re31: iron_in_Brain => iron_in_Plasma; iron_in_Brain*re31_k1;  // isVersionOf GO:0006826
    re31_k1 = 0.060942602;
  re32: iron_in_Duodenum => iron_in_Plasma; re32_k1*iron_in_Duodenum;  // isVersionOf GO:0006826
    re32_k1 = 0.42;
  re33: iron_in_Stomach => iron_ions_Outside; re33_k1*iron_in_Stomach;  // isVersionOf GO:0006826
    re33_k1 = 0.37;
end
