// SBML level 2 version 4

model chance()
  // Chance1952_Catalase_Mechanism
  // This model is described in the article:
  // The mechanism of catalase action. II. Electric analog computer studies.
  // Britton Chance, David S Greenstein, Joseph Higgins, CC Yang, Arch Biochem. 1952 37:322-39. PubmedID:14953444
  // Summary:
  // An electric analog computer has been constructed for a study of the kinetics of catalase action. This computer gives results for the formation and disappearance of the catalase-hydrogen peroxide complex that are in good agreement with the experimental data. The computer study verifies an approximate method for the computation of the velocity constant for the combination of hydrogen peroxide and catalase and justifies the simple formula used previously to compute the velocity constant for the reaction of the catalase-hydrogen peroxide complex with donor molecules. Finally, the computer data show that the binding of peroxide to catalase is a practically irreversible reaction.
  // The reaction of the enzyme-substrate complex, p, with the electron donor, a, is bimolecular, although in the article, as a is assumed to be constant, it is modelled using an apparent rate constant consisting of the product of the rate constant, k4, and the concentration of a. In this implementation, the concentration of a is set to 1 and the value of k4 just adapted so that the product equals the values given for k4*a in the article. The specific parameter values are taken from Fig 3. The graphs do not exactly match those in the paper, this may be due to the different simulators used.
  // To the extent possible under law, all copyright and related or neighbouring rights to this encoded model have been dedicated to the public domain worldwide. Please refer to CC0 Public Domain Dedication for more information.
  // In summary, you are entitled to use this encoded model in absolutely any manner you deem suitable, verbatim, or with modification, alone or embedded it in a larger context, redistribute it, commercially or not, in a restricted way or not.
  // To cite BioModels Database, please use: Li C, Donizelli M, Rodriguez N, Dharuri H, Endler L, Chelliah V, Li L, He E, Henry A, Stefan MI, Snoep JL, Hucka M, Le Novère N, Laibe C (2010) BioModels Database: An enhanced, curated and annotated resource for published quantitative kinetic models. BMC Syst Biol., 4:92.
  // biomodels.db:BIOMD0000000282
  // biomodels.db:MODEL1010190001
  // isDescribedBy pubmed:14953444
  // occursIn taxonomy:9796 BTO:0000424
  // hasVersion GO:0004096

  // Compartments:
  compartment cell = 1;  // GO:0005623

  // Species:
  species e in cell = 1.36; e is "enzyme E (catalase)";  // hasProperty GO:0004096; isHomologTo uniprot:P04040; isVersionOf interpro:IPR002226; isVersionOf uniprot:Q65YZ0
  species x in cell = 2; x is "substrate S (hydrogen peroxide)";  // CHEBI:16240; kegg.compound:C00027
  species p in cell = 0; p is "enzyme-substrate complex ES (catalase - hydrogen peroxide)";  // hasVersion CHEBI:16240 interpro:IPR002226
  species product_1 in cell = 0;  // hasVersion CHEBI:15377 CHEBI:15379
  species $a in cell = 0; a is "donor AH2";  // isVersionOf CHEBI:15734 CHEBI:35681
  species product_2 in cell = 0;  // hasVersion CHEBI:15377 CHEBI:36586

  // Parameters:
  k1 = 11 per_uM_per_s;
  k2 = 0 per_s;
  k4_prime = 16.6 per_uM_per_s;
  k4 = 0.72 per_uM_per_s;

  // Reactions:
  r1: e + x -> p; cell*(k1*e*x - k2*p);  // isPartOf ec-code:1.11.1.6
  r2: p + x => e + product_1; cell*k4_prime*p*x;  // isVersionOf GO:0016491; isPartOf ec-code:1.11.1.6
  r3: p + $a => e + product_2; cell*k4*p*a;  // isVersionOf GO:0016614; isPartOf ec-code:1.11.1.6

  // Unit definitions:
  unit substance = 1e-6 mole; substance is "micromole";
  unit per_uM_per_s = 10 litre / (1e-6 mole * 10 second); per_uM_per_s is "per micromolar per second";
  unit per_s = 1 / (10 second); per_s is "per second";
end
