// SBML level 2 version 4
// dcterms:bibliographicCitation: http://identifiers.org/pubmed/14691135

function Function_for_XClb2_degradation_4(Cdc20_a, Cdh1_a, PTrim, kd_clb_1, kd_clb_2, kd_clb_3)
  (kd_clb_1 + kd_clb_2*Cdh1_a + kd_clb_3*Cdc20_a)*PTrim;
end

function Function_for_variation_positive_2(Cln, ks_bud)
  ks_bud*Cln;
end

function Function_for_regulation_mono_and_positive_3(Ja_wee, PSwe1, Va_wee)
  Va_wee*PSwe1/(Ja_wee + PSwe1);
end

function Function_for_modification_v1_3(Cdc20, IE_a, Ja_cdc20, ka_cdc20)
  ka_cdc20*Cdc20*IE_a/(Ja_cdc20 + Cdc20);
end

function Function_for_modification_v2_positive_1(Cdc20_a, Cdh1, Ja_cdh, ka_cdh_1, ka_cdh_2)
  Cdh1*(ka_cdh_1 + ka_cdh_2*Cdc20_a)/(Ja_cdh + Cdh1);
end

function Function_for_modification_v2_negative_1(Clb2, Ji_sbf, SBF_a, ki_sbf_1, ki_sbf_2)
  -SBF_a*(ki_sbf_1 + ki_sbf_2*Clb2)/(Ji_sbf + SBF_a);
end

function Function_for_regulation_mono_and_negative_2(Ji_mih, Mih1_a, Vi_mih)
  -Vi_mih*Mih1_a/(Ji_mih + Mih1_a);
end

function Function_for_modification_v3_negative_1(Cdh1_a, Clb2, Cln, Ji_cdh, ki_cdh, ki_cdh_1)
  -Cdh1_a*(ki_cdh*Clb2 + ki_cdh_1*Cln)/(Ji_cdh + Cdh1_a);
end

function Function_for_variation_positive_3(SBF_a, ks_swe)
  ks_swe*SBF_a;
end

function Function_for_regulation_mono_and_positive_1(Cdc20_a, Ji_cdc20, ki_cdc20)
  ki_cdc20*Cdc20_a/(Ji_cdc20 + Cdc20_a);
end

function Function_for_XClb2_degradation_1(Cdc20_a, Cdh1_a, Clb2, kd_clb_1, kd_clb_2, kd_clb_3)
  (kd_clb_1 + kd_clb_2*Cdh1_a + kd_clb_3*Cdc20_a)*Clb2;
end

function Function_for_activation_of_Cdc20_by_Clb2_1(Clb2, Js_cdc20, ks_cdc20_2)
  ks_cdc20_2*Clb2^4/(Js_cdc20^4 + Clb2^4);
end

function Function_for_regulation_mono_and_positive_2(Ja_wee, PSwe1M, Va_wee)
  Va_wee*PSwe1M/(Ja_wee + PSwe1M);
end

function Function_for__Trim_to__Clb2_1(Clb2, Cln, Trim, kd_sic, kd_sic_1, kd_sic_2)
  (kd_sic + kd_sic_1*Cln + kd_sic_2*Clb2)*Trim;
end

function Function_for__Trim_to__Clb2_2(Clb2, Cln, PTrim, kd_sic, kd_sic_1, kd_sic_2)
  (kd_sic + kd_sic_1*Cln + kd_sic_2*Clb2)*PTrim;
end

function Function_for_regulation_mono_and_negative_3(Ji_mcm, Mcm_a, ki_mcm)
  -ki_mcm*Mcm_a/(Ji_mcm + Mcm_a);
end

function Function_for_modification_v1_6(Clb2, Ji_wee, Swe1, Vi_wee)
  Vi_wee*Swe1*Clb2/(Ji_wee + Swe1);
end

function Function_for_XClb2_degradation_2(Cdc20_a, Cdh1_a, PClb2, kd_clb_1, kd_clb_2, kd_clb_3)
  (kd_clb_1 + kd_clb_2*Cdh1_a + kd_clb_3*Cdc20_a)*PClb2;
end

function Function_for_modification_v1_1(Clb2, Ja_mcm, Mcm, ka_mcm)
  ka_mcm*Mcm*Clb2/(Ja_mcm + Mcm);
end

function Function_for_modification_v1_2(Clb2, Ja_mih, Mih1, Va_mih)
  Va_mih*Mih1*Clb2/(Ja_mih + Mih1);
end

function Function_for_variation_positive_1(SBF_a, ks_cln)
  ks_cln*SBF_a;
end

function Function_for_XClb2_degradation_3(Cdc20_a, Cdh1_a, Trim, kd_clb_1, kd_clb_2, kd_clb_3)
  (kd_clb_1 + kd_clb_2*Cdh1_a + kd_clb_3*Cdc20_a)*Trim;
end

function Function_for_Clb2_synthesis_1(Jm, M_0, Mcm_a, epsilon, ks_clb)
  ks_clb*(epsilon + Mcm_a)*M_0/(1 + M_0/Jm);
end

function Function_for_degradatio_of_Sic1_1(Clb2, Cln, Sic1, kd_sic, kd_sic_1, kd_sic_2)
  (kd_sic + kd_sic_1*Cln + kd_sic_2*Clb2)*Sic1;
end

function Function_for_regulation_mono_and_negative_1(IE_a, Ji_ie, ki_ie)
  -ki_ie*IE_a/(Ji_ie + IE_a);
end

function Function_for_modification_v1_4(Clb2, Ji_wee, Swe1M, Vi_wee)
  Vi_wee*Swe1M*Clb2/(Ji_wee + Swe1M);
end

function Function_for_modification_v1_5(Clb2, IE, Ja_ie, ka_ie)
  ka_ie*IE*Clb2/(Ja_ie + IE);
end

function Function_for_SBF_activation_by_Cln_2_1(Cln, Ja_sbf, M_0, SBF, ka_sbf_1, ka_sbf_2)
  SBF*(ka_sbf_1*M_0 + ka_sbf_2*Cln)/(Ja_sbf + SBF);
end

function Constant_flux__irreversible(v)
  v;
end
Constant_flux__irreversible is "Constant flux (irreversible)";

model Ciliberto2003_Swe1___CDK_network_model_for_morphogenesis_checkpoint()
  // Ciliberto2003 - Swe1 / CDK network model for morphogenesis checkpoint
  // This a model from the article:
  // Mathematical model of the morphogenesis checkpoint in budding yeast.
  // Ciliberto A, Novak B, Tyson JJ. J Cell Biol 2003 Dec 22;163(6):1243-54 14691135 ,
  // Abstract:
  // The morphogenesis checkpoint in budding yeast delays progression through the cell cycle in response to stimuli that prevent bud formation. Central to the checkpoint mechanism is Swe1 kinase: normally inactive, its activation halts cell cycle progression in G2. We propose a molecular network for Swe1 control, based on published observations of budding yeast and analogous control signals in fission yeast. The proposed Swe1 network is merged with a model of cyclin-dependent kinase regulation, converted into a set of differential equations and studied by numerical simulation. The simulations accurately reproduce the phenotypes of a dozen checkpoint mutants. Among other predictions, the model attributes a new role to Hsl1, a kinase known to play a role in Swe1 degradation: Hsl1 must also be indirectly responsible for potent inhibition of Swe1 activity. The model supports the idea that the morphogenesis checkpoint, like other checkpoints, raises the cell size threshold for progression from one phase of the cell cycle to the next.
  // This model was taken from the CellML repository and automatically converted to SBML.
  // The original model was: Ciliberto A, Novak B, Tyson JJ. (2003) - version03
  // The original CellML model was created by:
  // Lloyd, Catherine, May
  // c.lloyd@aukland.ac.nz
  // The University of Auckland
  // The Bioengineering Institute
  // This model originates from BioModels Database: A Database of Annotated Published Models (http://www.ebi.ac.uk/biomodels/). It is copyright (c) 2005-2011 The BioModels.net Team.
  // To the extent possible under law, all copyright and related or neighbouring rights to this encoded model have been dedicated to the public domain worldwide. Please refer to CC0 Public Domain Dedication for more information.
  // In summary, you are entitled to use this encoded model in absolutely any manner you deem suitable, verbatim, or with modification, alone or embedded it in a larger context, redistribute it, commercially or not, in a restricted way or not..
  // To cite BioModels Database, please use: Li C, Donizelli M, Rodriguez N, Dharuri H, Endler L, Chelliah V, Li L, He E, Henry A, Stefan MI, Snoep JL, Hucka M, Le Novère N, Laibe C (2010) BioModels Database: An enhanced, curated and annotated resource for published quantitative kinetic models. BMC Syst Biol., 4:92.
  // biomodels.db:MODEL2504064544
  // biomodels.db:BIOMD0000000297
  // isDescribedBy pubmed:14691135
  // isDescribedBy pubmed:14691135
  // hasTaxon taxonomy:4932
  // hasProperty GO:0044879

  // Compartments:
  compartment Compartment = 1; Compartment is "cytoplasm";  // GO:0005737

  // Species:
  species Clb2 in Compartment = 0.184; Clb2 is "Clb2_Cdc28";  // hasProperty GO:0032991; hasPart uniprot:P00546; hasPart uniprot:P24869; hasProperty GO:0032991
  species PClb2 in Compartment = 0; PClb2 is "PClb2_Cdc28";  // hasProperty PATO:0002220; hasPart uniprot:P00546; hasProperty GO:0032991; hasPart uniprot:P24869
  species Trim in Compartment = 0.084;  // hasProperty GO:0032991; hasPart uniprot:P24869; hasPart uniprot:P38634; hasPart uniprot:P00546
  species PTrim in Compartment = 0;  // hasProperty GO:0032991; hasProperty PATO:0002220; hasPart uniprot:P38634; hasPart uniprot:P24869
  species Mcm_a in Compartment = 0.933;  // hasProperty ncit:C45329; isVersionOf uniprot:P11746; hasProperty ncit:C45329
  species Sic1 in Compartment = 0.003;  // isVersionOf uniprot:P38634
  species Mih1_a in Compartment = 0.808;  // hasProperty ncit:C45329; isVersionOf uniprot:P23748; hasProperty ncit:C45329
  species IE_a in Compartment = 0.522;  // hasProperty ncit:C45329; isVersionOf ncit:C28597; hasProperty ncit:C45329
  species Cdc20_a in Compartment = 1.438;  // hasProperty ncit:C45329; isVersionOf uniprot:P26309; hasProperty ncit:C45329
  species Cdc20 in Compartment = 1.172;  // isVersionOf uniprot:P26309
  species Cdh1_a in Compartment = 0.993;  // hasProperty ncit:C45329; isVersionOf uniprot:P53197; hasProperty ncit:C45329
  species Cln in Compartment = 0.054; Cln is "Cln_Cdc28";  // hasProperty GO:0032991; hasPart uniprot:P24869; hasPart uniprot:P20438; hasProperty GO:0032991
  species SBF_a in Compartment = 0.124;  // hasProperty ncit:C45329; isVersionOf uniprot:P14164; hasProperty ncit:C45329
  species Swe1 in Compartment = 0;  // isVersionOf uniprot:P32944
  species PSwe1 in Compartment = 0;  // hasProperty PATO:0002220; isVersionOf uniprot:P32944; hasProperty PATO:0002220
  species Swe1M in Compartment = 0.018;  // isVersionOf uniprot:P32944
  species PSwe1M in Compartment = 0.013;  // hasProperty PATO:0002220; isVersionOf uniprot:P32944; hasProperty PATO:0002220
  // BE represents the exten of phosphorylation of proteins targeted by Cdc28-Cln
  species BE in Compartment = 0;
  species $BUD in Compartment;  // isVersionOf BTO:0001639
  species $Cdh1 in Compartment;  // isVersionOf uniprot:P53197
  species $Cdh1_total in Compartment = 1;  // isVersionOf uniprot:P53197
  species $IE in Compartment;  // isVersionOf ncit:C28597
  species $IE_total in Compartment = 1;  // isVersionOf ncit:C28597
  species $Mcm in Compartment;  // isVersionOf uniprot:P11746
  species $Mcm_total in Compartment = 1;  // isVersionOf uniprot:P11746
  species $Mih1 in Compartment;  // isVersionOf uniprot:P23748
  species $Mih1_total in Compartment = 1;  // isVersionOf uniprot:P23748
  species $SBF in Compartment;  // isVersionOf uniprot:P14164
  species $SBF_total in Compartment = 1;  // isVersionOf uniprot:P14164
  species $Swe1_total in Compartment;  // isVersionOf uniprot:P32944
  species $M_0 in Compartment = 0.802;

  // Parameters:
  epsilon = 0.5 unit_0;
  Jm = 10 unit_0;
  ks_clb = 0.015 unit_1;
  Ji_mcm = 0.1 unit_0;
  Ja_mcm = 0.1 unit_0;
  ki_mcm = 0.15 unit_1;
  ka_mcm = 1 unit_1;
  ks_sic = 0.1 unit_1;
  Ji_mih = 0.1 unit_0;
  Ja_mih = 0.1 unit_0;
  Vi_mih = 0.3 unit_1;
  Va_mih = 1 unit_1;
  Ji_ie = 0.01 unit_0;
  Ja_ie = 0.01 unit_0;
  ki_ie = 0.04 unit_1;
  ka_ie = 0.1 unit_1;
  ks_cdc20_1 = 0.005 unit_1;
  ks_cdc20_2 = 0.3 unit_1;
  Js_cdc20 = 0.3 unit_0;
  Ji_cdh = 0.01 unit_0;
  Ja_cdh = 0.01 unit_0;
  ki_cdh = 35 unit_1;
  ka_cdh_1 = 1 unit_1;
  ki_cdh_1 = 2 unit_1;
  ka_cdh_2 = 10 unit_1;
  ks_cln = 0.1 unit_1;
  kd_cln = 0.1 unit_1;
  Ji_sbf = 0.01 unit_0;
  Ja_sbf = 0.01 unit_0;
  ki_sbf_1 = 1 unit_1;
  ka_sbf_1 = 1 unit_1;
  ki_sbf_2 = 2 unit_1;
  ka_sbf_2 = 0 unit_1;
  ks_swe = 0.0025 unit_1;
  ks_sweC = 0 unit_1;
  kd_swe_2 = 0.05 unit_1;
  ks_bud = 0.1 unit_1;
  kd_bud = 0.1 unit_1;
  M = 0.802 unit_0;
  mu = 0.005 unit_1;
  Ji_cdc20 = 0.001 unit_0;
  Ja_cdc20 = 0.001 unit_0;
  ki_cdc20 = 0.25 unit_1;
  kd_cdc20 = 0.1 unit_1;
  ka_cdc20 = 1 unit_1;
  khsl1 = 1 unit_1;
  khsl1r = 0.01 unit_1;
  kd_swe_1 = 0.007 unit_1;
  Ji_wee = 0.05 unit_0;
  Ja_wee = 0.05 unit_0;
  Vi_wee = 1 unit_1;
  Va_wee = 0.3 unit_1;
  kd_clb_1 = 0.015 unit_1;
  kd_clb_2 = 1 unit_1;
  kd_clb_3 = 0.1 unit_1;
  kass = 300 unit_1;
  kdiss = 0.1 unit_1;
  kd_sic = 0.01 unit_1;
  kd_sic_1 = 1 unit_1;
  kd_sic_2 = 3 unit_1;
  kswe_1 = 2 unit_1;
  kswe_2 = 0.01 unit_1;
  kswe_3 = 0.2 unit_1;
  kmih_1 = 5 unit_1;
  kmih_2 = 0.5 unit_1;
  kmih has unit_1;
  kswe has unit_1;

  // Assignment rules:
  Swe1_total := PSwe1M + PSwe1 + Swe1M + Swe1;
  BUD := piecewise(0, (BE <= 0.6) && (Clb2 < 0.2), 1);
  Cdh1 := Cdh1_total - Cdh1_a;
  IE := IE_total - IE_a;
  Mcm := Mcm_total - Mcm_a;
  Mih1 := Mih1_total - Mih1_a;
  SBF := SBF_total - SBF_a;
  kmih := kmih_1*Mih1_a + kmih_2*Mih1;
  kswe := kswe_1*Swe1 + kswe_2*Swe1M + kswe_3*PSwe1;

  // Rate rules:
  M_0' = mu*M_0;
  M' = mu*M;

  // Reactions:
  Clb2_synth: => Clb2; Compartment*Function_for_Clb2_synthesis_1(Jm, M_0, Mcm_a, epsilon, ks_clb); Clb2_synth is "Clb2_synthesis";  // modifiers: Mcm_a, M_0; isVersionOf ncit:C18103
  Modification_of_Swe1_by_Hsl1: Swe1 + $BUD => Swe1M; Compartment*khsl1*Swe1*BUD;  // isVersionOf GO:0036211
  Modification_of_PSwe1_by_Hsl1_1: PSwe1 + $BUD => PSwe1M; Compartment*khsl1*PSwe1*BUD;  // isVersionOf GO:0036211
  Restoration_of_Swe1: Swe1M => Swe1; Compartment*khsl1r*Swe1M;  // isVersionOf GO:0036211
  Restoration_of_PSwe1: PSwe1M => PSwe1; Compartment*khsl1r*PSwe1M;  // isVersionOf GO:0036211
  Clb2_phosphorylation: Clb2 => PClb2; Compartment*kswe*Clb2;  // isVersionOf GO:0006468
  PClb2_dephosphorylation: PClb2 => Clb2; Compartment*kmih*PClb2;  // isVersionOf GO:0006470
  Trim_phosphorylation: Trim => PTrim; Compartment*kswe*Trim;  // isVersionOf GO:0006468
  PTrim_dephosphorylation: PTrim => Trim; Compartment*kmih*PTrim;  // isVersionOf GO:0006470
  Sic1_Degradation: Sic1 => ; Compartment*Function_for_degradatio_of_Sic1_1(Clb2, Cln, Sic1, kd_sic, kd_sic_1, kd_sic_2);  // modifiers: Cln, Clb2
  Trim_to_Clb2: Trim => Clb2; Compartment*Function_for__Trim_to__Clb2_1(Clb2, Cln, Trim, kd_sic, kd_sic_1, kd_sic_2); Trim_to_Clb2 is "Sic1 degradation from Trim complex";  // modifiers: Cln
  PTrim_to_PClb2: PTrim => PClb2; Compartment*Function_for__Trim_to__Clb2_2(Clb2, Cln, PTrim, kd_sic, kd_sic_1, kd_sic_2); PTrim_to_PClb2 is "PTrim_to_PClb2_Cdc28";  // modifiers: Cln, Clb2; isVersionOf ncit:C54572
  Swe1_synth: => Swe1; Compartment*Constant_flux__irreversible(ks_sweC);  // isVersionOf ncit:C18103
  PSwe1_deg: PSwe1 => ; Compartment*kd_swe_1*PSwe1;
  Swe1M_deg: Swe1M => ; Compartment*kd_swe_1*Swe1M;
  PSwe1M_deg: PSwe1M => ; Compartment*kd_swe_2*PSwe1M;
  Sic1_synthesis: => Sic1; Compartment*Constant_flux__irreversible(ks_sic);  // isVersionOf ncit:C18103
  Clb2_deg: Clb2 => ; Compartment*Function_for_XClb2_degradation_1(Cdc20_a, Cdh1_a, Clb2, kd_clb_1, kd_clb_2, kd_clb_3);  // modifiers: Cdh1_a, Cdc20_a
  PClb2_deg: PClb2 => ; Compartment*Function_for_XClb2_degradation_2(Cdc20_a, Cdh1_a, PClb2, kd_clb_1, kd_clb_2, kd_clb_3);  // modifiers: Cdh1_a, Cdc20_a
  Trim_deg: Trim => Sic1; Compartment*Function_for_XClb2_degradation_3(Cdc20_a, Cdh1_a, Trim, kd_clb_1, kd_clb_2, kd_clb_3);  // modifiers: Cdh1_a, Cdc20_a
  PTrim_deg: PTrim => Sic1; Compartment*Function_for_XClb2_degradation_4(Cdc20_a, Cdh1_a, PTrim, kd_clb_1, kd_clb_2, kd_clb_3);  // modifiers: Cdh1_a, Cdc20_a
  Trim_diss: Trim => Sic1 + Clb2; Compartment*kdiss*Trim;
  PTrim_diss: PTrim => Sic1 + PClb2; Compartment*kdiss*PTrim;
  Clb2_Sic1_asso: Sic1 + Clb2 => Trim; Compartment*kass*Sic1*Clb2;  // isVersionOf GO:0005515
  Plb2_Sic1_asso: Sic1 + PClb2 => PTrim; Compartment*kass*Sic1*PClb2;  // isVersionOf GO:0005515
  Cdc20_synth: => Cdc20; Compartment*Constant_flux__irreversible(ks_cdc20_1);  // isVersionOf ncit:C18103
  Cdc20_deg: Cdc20 => ; Compartment*kd_cdc20*Cdc20;
  Cdc20_a_deg: Cdc20_a => ; Compartment*kd_cdc20*Cdc20_a; Cdc20_a_deg is "Cdc20 degradation";
  Cln_synthesis: => Cln; Compartment*Function_for_variation_positive_1(SBF_a, ks_cln);  // modifiers: SBF_a
  Cln_degradation: Cln => ; Compartment*kd_cln*Cln;
  BE_synth: => BE; Compartment*Function_for_variation_positive_2(Cln, ks_bud);  // modifiers: Cln; isVersionOf GO:0006468
  BE_deg: BE => ; Compartment*kd_bud*BE;  // isVersionOf GO:0006470
  IE_a_degradation: => IE_a; Compartment*Function_for_regulation_mono_and_negative_1(IE_a, Ji_ie, ki_ie);
  Mih1_a_regulation_negative: => Mih1_a; Compartment*Function_for_regulation_mono_and_negative_2(Ji_mih, Mih1_a, Vi_mih); Mih1_a_regulation_negative is "Mih1_a to Mih _inactivation";  // isVersionOf PATO:0002355
  // This reaction is Inactivation. As no SBO term for inactivation was available, protein modification process (GO:0036211), a much broader term was chosen instead.
  Cdc20_a_to_Cdc20: Cdc20_a => Cdc20; Compartment*Function_for_regulation_mono_and_positive_1(Cdc20_a, Ji_cdc20, ki_cdc20); Cdc20_a_to_Cdc20 is "Cdc20 inactivation";  // isVersionOf GO:0036211
  Mcm_a_regulation_negative: => Mcm_a; Compartment*Function_for_regulation_mono_and_negative_3(Ji_mcm, Mcm_a, ki_mcm); Mcm_a_regulation_negative is "Mcm_a to Mih _disactivation";  // isVersionOf PATO:0002355
  Mcm_a_regulation_positive: => Mcm_a; Compartment*Function_for_modification_v1_1(Clb2, Ja_mcm, Mcm, ka_mcm); Mcm_a_regulation_positive is "Mcm_a from Mcm _activation";  // modifiers: Mcm, Clb2
  Mih1_a_regulation_positive: => Mih1_a; Compartment*Function_for_modification_v1_2(Clb2, Ja_mih, Mih1, Va_mih); Mih1_a_regulation_positive is "Mih1_a from Mih_activation";  // modifiers: Mih1, Clb2
  Cdc20_to_Cdc20_a: Cdc20 => Cdc20_a; Compartment*Function_for_modification_v1_3(Cdc20, IE_a, Ja_cdc20, ka_cdc20); Cdc20_to_Cdc20_a is "Cdc20 activation";  // modifiers: IE_a
  Cdc20_synthesis_enhanced_by_Clb2: => Cdc20; Compartment*Function_for_activation_of_Cdc20_by_Clb2_1(Clb2, Js_cdc20, ks_cdc20_2);  // modifiers: Clb2; isVersionOf ncit:C18103
  Swe1M_dephos: PSwe1M => Swe1M; Compartment*Function_for_regulation_mono_and_positive_2(Ja_wee, PSwe1M, Va_wee);  // isVersionOf GO:0006470
  Swe1M_phos: Swe1M => PSwe1M; Compartment*Function_for_modification_v1_4(Clb2, Ji_wee, Swe1M, Vi_wee);  // modifiers: Clb2; isVersionOf GO:0006468
  Swe1_dephos: PSwe1 => Swe1; Compartment*Function_for_regulation_mono_and_positive_3(Ja_wee, PSwe1, Va_wee);  // modifiers: Clb2; isVersionOf GO:0006470
  Swe1_activation_by_transcriptionnal_factor_SBF_a: => Swe1; Compartment*Function_for_variation_positive_3(SBF_a, ks_swe);  // modifiers: SBF_a
  Swe1_degradation: Swe1 => ; Compartment*kd_swe_1*Swe1;
  Cdh1_a_degradation: => Cdh1_a; Compartment*Function_for_modification_v3_negative_1(Cdh1_a, Clb2, Cln, Ji_cdh, ki_cdh, ki_cdh_1);  // modifiers: Clb2, Cln
  Cdh1_a_synth_activation: => Cdh1_a; Compartment*Function_for_modification_v2_positive_1(Cdc20_a, Cdh1, Ja_cdh, ka_cdh_1, ka_cdh_2); Cdh1_a_synth_activation is "Cdh1 activation";  // modifiers: Cdh1, Cdc20_a; isVersionOf ncit:C18103
  SBF_a_synth: => SBF_a; Compartment*Function_for_SBF_activation_by_Cln_2_1(Cln, Ja_sbf, M_0, SBF, ka_sbf_1, ka_sbf_2); SBF_a_synth is "SBF_a activation";  // modifiers: SBF, M_0, Cln
  SBF_a_degradation: => SBF_a; Compartment*Function_for_modification_v2_negative_1(Clb2, Ji_sbf, SBF_a, ki_sbf_1, ki_sbf_2); SBF_a_degradation is "SBF_a inactivation";  // modifiers: Clb2; isVersionOf PATO:0002355
  IE_activation_by_Clb2: => IE_a; Compartment*Function_for_modification_v1_5(Clb2, IE, Ja_ie, ka_ie);  // modifiers: IE, Clb2; isVersionOf ncit:C18103
  Swe1_phos: Swe1 => PSwe1; Compartment*Function_for_modification_v1_6(Clb2, Ji_wee, Swe1, Vi_wee);  // modifiers: Clb2; isVersionOf GO:0006468

  // Unit definitions:
  unit time = 60 second;
  unit unit_0 = dimensionless^0; unit_0 is "1";
  unit unit_1 = 1 / second; unit_1 is "1/s";
end
