// SBML level 2 version 3

model Leloup1999_CircadianRhythms_Drosophila()
  // This a model from the article:
  // Limit cycle models for circadian rhythms based on transcriptional regulation in Drosophila and Neurospora.
  // Leloup JC, Gonze D, Goldbeter A. J Biol Rhythms.1999 Dec;14(6):433-48. 10643740,
  // Abstract:
  // We examine theoretical models for circadian oscillations based on transcriptional regulation in Drosophila and Neurospora. For Drosophila, the molecular model is based on the negative feedback exerted on the expression of the per and tim genes by the complex formed between the PER and TIM proteins. For Neurospora, similarly, the model relies on the feedback exerted on the expression of the frq gene by its protein product FRQ. In both models, sustained rhythmic variations in protein and mRNA levels occur in continuous darkness, in the form of limit cycle oscillations. The effect of light on circadian rhythms is taken into account in the models by considering that it triggers degradation of the TIM protein in Drosophila, and frq transcription in Neurospora. When incorporating the control exerted by light at the molecular level, we show that the models can account for the entrainment of circadian rhythms by light-dark cycles and for the damping of the oscillations in constant light, though such damping occurs more readily in the Drosophila model. The models account for the phase shifts induced by light pulses and allow the construction of phase response curves. These compare well with experimental results obtained in Drosophila. The model for Drosophila shows that when applied at the appropriate phase, light pulses of appropriate duration and magnitude can permanently or transiently suppress circadian rhythmicity. We investigate the effects of the magnitude of light-induced changes on oscillatory behavior. Finally, we discuss the common and distinctive features of circadian oscillations in the two organisms.
  // This particular version of the model has been translated from equations 1a-1j (Drosophila).
  // This model was taken from the CellML repository and automatically converted to SBML.
  // The original model was: Leloup JC, Gonze D, Goldbeter A. (1999) - version02
  // The original CellML model was created by:
  // Lloyd, Catherine, May
  // c.lloyd@aukland.ac.nz
  // The University of Auckland
  // The Bioengineering Institute
  // This model originates from BioModels Database: A Database of Annotated Published Models (http://www.ebi.ac.uk/biomodels/). It is copyright (c) 2005-2011 The BioModels.net Team.
  // For more information see the terms of use.
  // To cite BioModels Database, please use: Li C, Donizelli M, Rodriguez N, Dharuri H, Endler L, Chelliah V, Li L, He E, Henry A, Stefan MI, Snoep JL, Hucka M, Le Novère N, Laibe C (2010) BioModels Database: An enhanced, curated and annotated resource for published quantitative kinetic models. BMC Syst Biol., 4:92.
  // biomodels.db:MODEL0478965170
  // biomodels.db:BIOMD0000000298
  // isDescribedBy pubmed:10643740
  // isDerivedFrom biomodels.db:BIOMD0000000171
  // isVersionOf GO:0042752
  // hasTaxon taxonomy:7227

  // Compartments:
  compartment Compartment = 1;

  // Species:
  species MP in Compartment = 0.0614368;  // encodes uniprot:P07663; isVersionOf CHEBI:33699 kegg.compound:C02100
  species CN in Compartment = 1.34728;  // hasPart uniprot:P07663 uniprot:P49021
  species C in Compartment = 0.207614;  // hasPart uniprot:P49021 uniprot:P07663
  species T2 in Compartment = 0.0145428;  // isVersionOf uniprot:P49021; isVersionOf kegg.compound:C00562
  species T1 in Compartment = 0.0213384;  // isVersionOf uniprot:P49021; isVersionOf kegg.compound:C00562
  species T0 in Compartment = 0.0217261;  // isVersionOf uniprot:P49021
  species MT in Compartment = 0.0860342;  // encodes uniprot:P49021; isVersionOf CHEBI:33699 kegg.compound:C02100
  species P0 in Compartment = 0.0169928;  // isVersionOf uniprot:P07663
  species P1 in Compartment = 0.0141356;  // isVersionOf uniprot:P07663; isVersionOf kegg.compound:C00562
  species P2 in Compartment = 0.0614368;  // isVersionOf uniprot:P07663; isVersionOf kegg.compound:C00562

  // Parameters:
  vsP = 1.1;
  vmP = 1;
  KmP = 0.2;
  KIP = 1;
  ksP = 0.9;
  vdP = 2.2;
  KdP = 0.2;
  vsT = 1;
  vmT = 0.7;
  KmT = 0.2;
  KIT = 1;
  ksT = 0.9;
  vdT = 3;
  KdT = 0.2;
  kdC = 0.01;
  kdN = 0.01;
  k1 = 0.8;
  k2 = 0.2;
  k3 = 1.2;
  k4 = 0.6;
  kd = 0.01;
  V1P = 8;
  V1T = 8;
  V2P = 1;
  V2T = 1;
  V3P = 8;
  V3T = 8;
  V4P = 1;
  V4T = 1;
  K1P = 2;
  K1T = 2;
  K2P = 2;
  K2T = 2;
  K3P = 2;
  K3T = 2;
  K4P = 2;
  K4T = 2;
  n = 4;

  // Assignment rules:
  Pt := P0 + P1 + P2 + C + CN;

  // Rate rules:
  MP' = vsP*(KIP^n/(KIP^n + CN^n)) - (vmP*(MP/(KmP + MP)) + kd*MP);
  P0' = ksP*MP + V2P*(P1/(K2P + P1)) - (V1P*(P0/(K1P + P0)) + kd*P0);
  P1' = V1P*(P0/(K1P + P0)) + V4P*(P2/(K4P + P2)) - (V2P*(P1/(K2P + P1)) + V3P*(P1/(K3P + P1)) + kd*P1);
  P2' = V3P*(P1/(K3P + P1)) + k4*C - (V4P*(P2/(K4P + P2)) + k3*P2*T2 + vdP*(P2/(KdP + P2)) + kd*P2);
  MT' = vsT*(KIT^n/(KIT^n + CN^n)) - (vmT*(MT/(KmT + MT)) + kd*MT);
  T0' = ksT*MT + V2T*(T1/(K2T + T1)) - (V1T*(T0/(K1T + T0)) + kd*T0);
  T1' = V1T*(T0/(K1T + T0)) + V4T*(T2/(K4T + T2)) - (V2T*(T1/(K2T + T1)) + V3T*(T1/(K3T + T1)) + kd*T1);
  T2' = V3T*(T1/(K3T + T1)) + k4*C - (V4T*(T2/(K4T + T2)) + k3*P2*T2 + vdT*(T2/(KdT + T2)) + kd*T2);
  C' = k3*P2*T2 + k2*CN - (k4*C + k1*C + kdC*C);
  CN' = k1*C - (k2*CN + kdN*CN);
end
