// SBML level 2 version 4

function Hill_Cooperativity(substrate, Shalve, V, h)
  V*substrate^h/(Shalve^h + substrate^h);
end

function Hill_inhibition(V, Shalve, h, substrate)
  V/(Shalve^h + substrate^h);
end

model Kim2011_Oscillator_SimpleI()
  // This a model from the article:
  // Synthetic in vitro transcriptional oscillators.
  // Kim J, Winfree E Mol. Syst. Biol.2011 Feb 1;7:465. 21283141,
  // Abstract:
  // The construction of synthetic biochemical circuits from simple components illuminates how complex beha viors can arise in chemistry and builds a foundation for future biological technologies. A simplified analog of genetic regulatory networks, in vitro transcriptional circuits, provides a modular platform for the systematic construction of arbitrary circuits and requires only two essential enzymes, bacteri ophage T7 RNA polymerase and Escherichia coli ribonuclease H, to produce and degrade RNA signals. In t his study, we design and experimentally demonstrate three transcriptional oscillators in vitro. First, a negative feedback oscillator comprising two switches, regulated by excitatory and inhibitory RNA si gnals, showed up to five complete cycles. To demonstrate modularity and to explore the design space fu rther, a positive-feedback loop was added that modulates and extends the oscillatory regime. Finally, a three-switch ring oscillator was constructed and analyzed. Mathematical modeling guided the design p rocess, identified experimental conditions likely to yield oscillations, and explained the system's ro bust response to interference by short degradation products. Synthetic transcriptional oscillators cou ld prove valuable for systematic exploration of biochemical circuit design principles and for controll ing nanoscale devices and orchestrating processes within artificial cells.
  // The paper describes 7 models (MODEL1012090000-6) and all these are submitted by the authors. This model (MODEL1012090000) corresponds to the Simple model for both mode I and II (Design I and II). The model reproduces timecourse figure plotted in the supplementary material (page 10 of Supplementary material) of the reference publication.
  // This model originates from BioModels Database: A Database of Annotated Published Models (ht tp://www.ebi.ac.uk/biomodels/). It is copyright (c) 2005-2011 The BioModels.net Team.
  // For more information see the terms of use.
  // To cite BioModels Database, please use: Li C, Donizelli M, Rodriguez N, Dharuri H, Endler L, Chelliah V, Li L, He E, Henry A, Stefan MI, Snoep JL, Hucka M, Le Novère N, Laibe C (2010) BioModels Database: An enhanced, curated and annotated resource for published quantitative kinetic models. BMC Syst Biol., 4:92.
  // To the extent possible under law, all copyright and related or neighbouring rights to this encoded model have been dedicated to the public domain worldwide. Please refer to CC0 Public Domain Dedication for more information.
  // In summary, you are entitled to use this encoded model in absolutely any manner you deem suitable, verbatim, or with modification, alone or embedded it in a larger context, redistribute it, commercially or not, in a restricted way or not.
  // biomodels.db:BIOMD0000000322
  // biomodels.db:MODEL1012090000
  // isDescribedBy pubmed:21283141
  // isVersionOf GO:0010468
  // occursIn taxonomy:131567

  // Compartments:
  compartment compartment_1 = 1;  // isVersionOf GO:0005623

  // Species:
  species x in compartment_1 = 0.1;  // isVersionOf CHEBI:33697
  species y in compartment_1 = 0.1;  // isVersionOf CHEBI:33697 CHEBI:35222
  species u in compartment_1 = 0.1;
  species v in compartment_1 = 0.1;

  // Parameters:
  alpha = 0.57;
  beta = 2.5;
  gamma = 1;
  n = 6.5;
  m = 6.5;
  delta = 1.5;

  // Reactions:
  reaction1: x => ; compartment_1*reaction1_k1*x;
    reaction1_k1 = 1;
  reaction2: y => ; compartment_1*reaction2_k1*y;
    reaction2_k1 = 1;
  reaction3: u => ; compartment_1*reaction3_k1*u;
    reaction3_k1 = 1;
  reaction4: v => ; compartment_1*reaction4_k1*v;
    reaction4_k1 = 1;
  reaction5: u => u + x; compartment_1*alpha*u;
  reaction6: v => v + y; compartment_1*beta*v;
  reaction7: y => y + u; compartment_1*Hill_inhibition(reaction7_V, reaction7_Shalve, n, y);
    reaction7_V = 1; reaction7_Shalve = 1;
  reaction8: x => x + v; compartment_1*Hill_Cooperativity(x, reaction8_Shalve, reaction8_V, m);
    reaction8_Shalve = 1; reaction8_V = 1;
  reaction9: v => v + x; compartment_1*delta*v;

  // Unit definitions:
  unit volume = dimensionless;
  unit time = dimensionless;
  unit substance = dimensionless;
end
