// SBML level 2 version 4

function Hill_inhibition(V, Shalve, h, substrate)
  V/(Shalve^h + substrate^h);
end

function Simple_inhibition(x, beta)
  x/beta/(1 + x/beta);
end

model Kim2011_Oscillator_SimpleIII()
  // This a model from the article:
  // Synthetic in vitro transcriptional oscillators.
  // Kim J, Winfree E Mol. Syst. Biol.2011 Feb 1;7:465. 21283141,
  // Abstract:
  // The construction of synthetic biochemical circuits from simple components illuminates how complex behaviors can arise in chemistry and builds a foundation for future biological technologies. A simplified analog of genetic regulatory networks, in vitro transcriptional circuits, provides a modular platform for the systematic construction of arbitrary circuits and requires only two essential enzymes, bacteriophage T7 RNA polymerase and Escherichia coli ribonuclease H, to produce and degrade RNA signals. In this study, we design and experimentally demonstrate three transcriptional oscillators in vitro. First, a negative feedback oscillator comprising two switches, regulated by excitatory and inhibitory RNA signals, showed up to five complete cycles. To demonstrate modularity and to explore the design space further, a positive-feedback loop was added that modulates and extends the oscillatory regime. Finally, a three-switch ring oscillator was constructed and analyzed. Mathematical modeling guided the design process, identified experimental conditions likely to yield oscillations, and explained the system's robust response to interference by short degradation products. Synthetic transcriptional oscillators could prove valuable for systematic exploration of biochemical circuit design principles and for controlling nanoscale devices and orchestrating processes within artificial cells.
  // The paper describes 7 models (MODEL1012090000-6) and all these are submitted by the authors. This model (MODEL1012090001) corresponds to the Simple model of the three-switch ring oscillator (Design III). The model reproduces figure 6 (central figures) of the reference publication. The time is rescaled by s=v_d/K_I*t where K_I=0.333 and v_d=1 (for alpha = 1) and v_d=0.5 (for alpha = 0.5). i.e. For alpha = 1, s = 0.003 * t (roughly 10 unitless time = 1hr; the time-course should be run for 60 timeunits (6hrs) to get figure 6a). For alpha = 2, s= 0.0015 * t (roughly 5 unitless time = 1hr; the time-course shoue be run for 100 timesunits (20hrs) to get figure 6b).
  // This model originates from BioModels Database: A Database of Annotated Published Models (http://www.ebi.ac.uk/biomodels/). It is copyright (c) 2005-2011 The BioModels.net Team.
  // To the extent possible under law, all copyright and related or neighbouring rights to this encoded model have been dedicated to the public domain worldwide. Please refer to CC0 Public Domain Dedication for more information.
  // In summary, you are entitled to use this encoded model in absolutely any manner you deem suitable, verbatim, or with modification, alone or embedded it in a larger context, redistribute it, commercially or not, in a restricted way or not..
  // To cite BioModels Database, please use: Li C, Donizelli M, Rodriguez N, Dharuri H, Endler L, Chelliah V, Li L, He E, Henry A, Stefan MI, Snoep JL, Hucka M, Le Novère N, Laibe C (2010) BioModels Database: An enhanced, curated and annotated resource for published quantitative kinetic models. BMC Syst Biol., 4:92.
  // biomodels.db:BIOMD0000000323
  // biomodels.db:MODEL1012090001
  // isDescribedBy pubmed:21283141
  // isVersionOf GO:0010468
  // occursIn taxonomy:131567

  // Compartments:
  compartment compartment_1 = 1;  // isVersionOf GO:0005623

  // Species:
  species x1 in compartment_1 = 0;  // isVersionOf CHEBI:35222 CHEBI:33697
  species x2 in compartment_1 = 0;  // isVersionOf CHEBI:35222 CHEBI:33697
  species x3 in compartment_1 = 0.33;  // isVersionOf CHEBI:35222 CHEBI:33697

  // Parameters:
  alpha = 1;
  beta = 0.3;
  n = 5;

  // Reactions:
  reaction1: x1 => x1 + x3; compartment_1*Hill_inhibition(alpha, reaction1_Shalve, n, x1);
    reaction1_Shalve = 1;
  reaction2: x2 => x2 + x1; compartment_1*Hill_inhibition(alpha, reaction2_Shalve, n, x2);
    reaction2_Shalve = 1;
  reaction3: x3 => x3 + x2; compartment_1*Hill_inhibition(alpha, reaction3_Shalve, n, x3);
    reaction3_Shalve = 1;
  reaction4: x1 => ; compartment_1*Simple_inhibition(x1, beta);
  reaction5: x2 => ; compartment_1*Simple_inhibition(x2, beta);
  reaction6: x3 => ; compartment_1*Simple_inhibition(x3, beta);

  // Unit definitions:
  unit volume = dimensionless;
  unit time = dimensionless;
  unit substance = dimensionless;
end
