// SBML level 2 version 4

model minfb()
  // Palini2011_Minimal_2_Feedback_Model
  // This is the model of the minmal 2 feedback switch described in the article:
  // Synthetic conversion of a graded receptor signal into a tunable, reversible switch.
  // Santhosh Palani and Casim A. Sarkar, 2011, Molecular Systems Biology 7:480; doi:10.1038/msb.2011.13
  // The ability to engineer an all-or-none cellular response to a given signaling ligand is important in applications ranging from biosensing to tissue engineering. However, synthetic gene network switches have been limited in their applicability and tunability due to their reliance on specific components to function. Here, we present a strategy for reversible switch design that instead relies only on a robust, easily constructed network topology with two positive feedback loops and we apply the method to create highly ultrasensitive (nH420), bistable cellular responses to a synthetic ligand/receptor complex. Independent modulation of the two feedback strengths enables rational tuning and some decoupling of steady-state (ultrasensitivity, signal amplitude, switching threshold, and bistability) and kinetic (rates of system activation and deactivation) response properties. Our integrated computational and synthetic biology approach elucidates design rules for building cellular switches with desired properties, which may be of utility in engineering signal-transduction pathways.
  // This model is parametrised for a transcription factor and receptor feedback strength of 3, TFs = 3 and Rs = 3. To reproduce figure 1 E, the parameters TFs and Rs have to be varied accordingly.
  // Nomenclature for the model:
  // L : Ligand
  // R : Receptor
  // C : Ligand-Receptor Complex
  // I : Inactive Transcription Factor
  // X : C bound to I
  // A : Active Transcription Factor
  // This model originates from BioModels Database: A Database of Annotated Published Models (http://www.ebi.ac.uk/biomodels/). It is copyright (c) 2005-2011 The BioModels.net Team.
  // To the extent possible under law, all copyright and related or neighbouring rights to this encoded model have been dedicated to the public domain worldwide. Please refer to CC0 Public Domain Dedication for more information.
  // In summary, you are entitled to use this encoded model in absolutely any manner you deem suitable, verbatim, or with modification, alone or embedded it in a larger context, redistribute it, commercially or not, in a restricted way or not..
  // To cite BioModels Database, please use: Li C, Donizelli M, Rodriguez N, Dharuri H, Endler L, Chelliah V, Li L, He E, Henry A, Stefan MI, Snoep JL, Hucka M, Le Novère N, Laibe C (2010) BioModels Database: An enhanced, curated and annotated resource for published quantitative kinetic models. BMC Syst Biol., 4:92.
  // biomodels.db:BIOMD0000000325
  // biomodels.db:MODEL1102160000
  // isDescribedBy pubmed:21451590
  // occursIn taxonomy:4932
  // hasVersion GO:0009885 GO:0000160

  // Compartments:
  compartment cell;  // isVersionOf GO:0005623

  // Species:
  species $L in cell = 0.1;  // isVersionOf CHEBI:23530; CHEBI:60283 chembl.compound:CHEMBL1163500
  species R in cell = 1;  // isVersionOf uniprot:Q9C5U0
  species C in cell = 0;  // hasProperty GO:0009885; isVersionOf uniprot:Q9C5U0; CHEBI:60283
  species I in cell = 1;  // isVersionOf uniprot:P38889
  species X in cell = 0;  // hasProperty GO:0009885; hasVersion uniprot:P38889; isVersionOf uniprot:Q9C5U0; CHEBI:60283
  species A in cell = 0;  // hasProperty GO:0016563; hasVersion MOD:00890; isVersionOf uniprot:P38889

  // Parameters:
  BR = 0.005;
  Rs = 3;
  KD = 200;
  kdegR = 0.005;
  kon = 0.001;
  koff = 0.05;
  kdegC = 0.01;
  k1 = 1;
  k2 = 5;
  k3 = 45;
  kdegX = 0.005;
  kdegA = 0.005;
  BI = 0.005;
  TFs = 3;
  kdegI = 0.005;

  // Reactions:
  R_expression: => R; cell*(BR + Rs*A/(KD + A));  // modifiers: A; isVersionOf GO:0010467
  R_degradation: R => ; cell*kdegR*R;  // isVersionOf GO:0030163
  R_L_binding: R + $L -> C; cell*(kon*L*R - koff*C);  // isVersionOf GO:0023038
  C_degradation: C => ; cell*kdegC*C;  // isVersionOf GO:0030163
  C_I_binding: C + I -> X; cell*(k1*C*I - k2*X);  // isVersionOf GO:0006461
  I_activation: X => C + A; cell*k3*X;  // isVersionOf ec-code:2.7.13.3 GO:0006468; hasProperty GO:0009885
  X_degradation: X => ; cell*kdegX*X;  // isVersionOf GO:0030163
  A_degradation: A => ; cell*kdegA*A;  // isVersionOf GO:0030163
  I_expression: => I; cell*(BI + TFs*A/(KD + A));  // modifiers: A; isVersionOf GO:0010467
  I_degradation: I => ; cell*kdegI*I;  // isVersionOf GO:0030163
end
