// SBML level 2 version 4

model Atorvastatin_Metabolism()
  // Bucher2011_Atorvastatin_Metabolism
  // This is the model of atorvastatin metabolism in hepaitc cells described in the article:
  // A systems biology approach to dynamic modeling and inter-subject variability of statin pharmacokinetics in human hepatocytes
  // Joachim Bucher , Stephan Riedmaier , Anke Schnabel , Katrin Marcus , Gabriele Vacun , Thomas S Weiss , Wolfgang E Thasler , Andreas K Nussler , Ulrich M Zanger and Matthias Reuss. BMC Systems Biology 2011, 5:66. DOI:10.1186/1752-0509-5-66
  // Abstract:
  // Background:
  // The individual character of pharmacokinetics is of great importance in the risk assessment of new drug leads in pharmacological research. Amongst others, it is severely influenced by the properties and inter-individual variability of the enzymes and transporters of the drug detoxification system of the liver. Predicting individual drug biotransformation capacity requires quantitative and detailed models.
  // Results:
  // In this contribution we present the de novo deterministic modeling of atorvastatin biotransformation based on comprehensive published knowledge on involved metabolic and transport pathways as well as physicochemical properties. The model was evaluated in primary human hepatocytes and parameter identifiability analysis was performed under multiple experimental constraints. Dynamic simulations of atorvastatin biotransformation considering the inter-individual variability of the two major involved enzymes CYP3A4 and UGT1A3 based on quantitative protein expression data in a large human liver bank (n=150) highlighted the variability in the individual biotransformation profiles and therefore also points to the individuality of pharmacokinetics.
  // Conclusions:
  // A dynamic model for the biotransformation of atorvastatin has been developed using quantitative metabolite measurements in primary human hepatocytes. The model comprises kinetics for transport processes and metabolic enzymes as well as population liver expression data allowing us to assess the impact of inter-individual variability of concentrations of key proteins. Application of computational tools for parameter sensitivity analysis enabled us to considerably improve the validity of the model and to create a consistent framework for precise computer-aided simulations in toxicology.
  // The model is parameterized for patient 1 and reproduces the time courses in figure 2 of the article.
  // To the extent possible under law, all copyright and related or neighbouring rights to this encoded model have been dedicated to the public domain worldwide. Please refer to CC0 Public Domain Dedication for more information.
  // In summary, you are entitled to use this encoded model in absolutely any manner you deem suitable, verbatim, or with modification, alone or embedded it in a larger context, redistribute it, commercially or not, in a restricted way or not.
  // To cite BioModels Database, please use: Li C, Donizelli M, Rodriguez N, Dharuri H, Endler L, Chelliah V, Li L, He E, Henry A, Stefan MI, Snoep JL, Hucka M, Le Novère N, Laibe C (2010) BioModels Database: An enhanced, curated and annotated resource for published quantitative kinetic models. BMC Syst Biol., 4:92.
  // biomodels.db:BIOMD0000000328
  // biomodels.db:MODEL1103200000
  // isDescribedBy pubmed:21548957
  // occursIn taxonomy:9606 BTO:0000575
  // isVersionOf GO:0008152

  // Compartments:
  compartment compartment = 1;
  compartment medium = 2;  // BTO:0000316
  compartment cell = 0.0142;  // GO:0005623

  // Species:
  species AS_m in medium = 8797.15;  // isVersionOf CHEBI:39548 pubchem.compound:60823
  species ASL_m in medium = 30.56;  // isVersionOf pubchem.compound:6483036
  species ASoOH_m in medium = 0;  // hasVersion CHEBI:39548
  species ASLpOH_m in medium = 0;  // hasVersion pubchem.compound:6483036
  species ASpOH_m in medium = 0;  // hasVersion CHEBI:39548
  species ASLoOH_m in medium = 0;  // hasVersion pubchem.compound:6483036
  species AS_c in cell = 0;  // isVersionOf CHEBI:39548
  species ASL_c in cell = 0;  // isVersionOf pubchem.compound:6483036
  species ASpOH_c in cell = 0;  // hasVersion CHEBI:39548
  species ASoOH_c in cell = 0;  // hasVersion CHEBI:39548
  species ASLpOH_c in cell = 0;  // hasVersion pubchem.compound:6483036
  species ASLoOH_c in cell = 0;  // hasVersion pubchem.compound:6483036
  species ASpOH_b in cell = 0;  // hasVersion CHEBI:39548
  species ASoOH_b in cell = 0;  // hasVersion CHEBI:39548
  species ASLpOH_b in cell = 0;  // hasVersion pubchem.compound:6483036
  species ASLoOH_b in cell = 0;  // hasVersion pubchem.compound:6483036
  species AS_b in cell = 0;  // hasVersion CHEBI:39548
  species ASL_b in cell = 0;  // hasVersion pubchem.compound:6483036

  // Parameters:
  CYP3A4_ASLpOH_Km1 = 1400 nM;
  CYP3A4_ASLoOH_Km1 = 3900 nM;
  CYP3A4_ASpOH_Km1 = 25600 nM;
  CYP3A4_ASoOH_Km1 = 29700 nM;
  Import_ASLpOH_k = 0.033729 ml_per_min;
  Import_ASLoOH_k = 0.026122 ml_per_min;
  Import_ASL_k = 0.2754 ml_per_min;
  fu_ASL = 0.22 dimensionless;
  fu_AS = 0.22 dimensionless;
  Import_ASpOH_k = 0.0039614 ml_per_min;
  Export_ASLpOH_k = 0.0011319 ml_per_min;
  Export_ASLoOH_k = 0.0026674 ml_per_min;
  k_CR_ASL_c = 3.55e-5 ml_per_min;
  k_CR_ASL_m = 0.005 ml_per_min;
  k_PON_OH_c = 0.0039829 ml_per_min;
  Export_ASoOH_k = 0.0015983 ml_per_min;
  Prot_k1 = 8.52 ml_per_min;
  CYP3A4_ASoOH_Vmax = 47.4985 pmole_per_min;
  CYP3A4_ASLpOH_Vmax = 17.4446 pmole_per_min;
  CYP3A4_ASLoOH_Vmax = 39.1342 pmole_per_min;
  UGT1A3_AS_Vmax = 13.5862 pmole_per_min;
  UGT1A3_AS_Km1 = 12000 nM;
  UGT1A3_AS_KI1 = 75000 nM;
  k_PON_ASL_c = 0.0043734 ml_per_min;
  Export_AS_k = 0.002166 ml_per_min;
  Export_ASL_k = 0.021822 ml_per_min;
  Import_AS_k = 0.020335 ml_per_min;
  Import_ASoOH_k = 0.00038875 ml_per_min;
  Export_ASpOH_k = 0.00079526 ml_per_min;
  CYP3A4_ASpOH_Vmax = 15.7336 pmole_per_min;

  // Reactions:
  Import_AS: AS_m => AS_c; Import_AS_k*AS_m;
  Import_ASL: ASL_m => ASL_c; Import_ASL_k*ASL_m;
  CYP3A4_ASpOH: AS_c => ASpOH_c; CYP3A4_ASpOH_Vmax/CYP3A4_ASpOH_Km1*AS_c/(1 + AS_c/CYP3A4_ASpOH_Km1 + AS_c/CYP3A4_ASoOH_Km1 + ASL_c/CYP3A4_ASLpOH_Km1 + ASL_c/CYP3A4_ASLoOH_Km1);  // modifiers: ASL_c
  CYP3A4_ASoOH: AS_c => ASoOH_c; CYP3A4_ASoOH_Vmax/CYP3A4_ASoOH_Km1*AS_c/(1 + AS_c/CYP3A4_ASpOH_Km1 + AS_c/CYP3A4_ASoOH_Km1 + ASL_c/CYP3A4_ASLpOH_Km1 + ASL_c/CYP3A4_ASLoOH_Km1);  // modifiers: ASL_c
  CYP3A4_ASLpOH: ASL_c => ASLpOH_c; CYP3A4_ASLpOH_Vmax/CYP3A4_ASLpOH_Km1*ASL_c/(1 + AS_c/CYP3A4_ASpOH_Km1 + AS_c/CYP3A4_ASoOH_Km1 + ASL_c/CYP3A4_ASLpOH_Km1 + ASL_c/CYP3A4_ASLoOH_Km1);  // modifiers: AS_c
  CYP3A4_ASLoOH: ASL_c => ASLoOH_c; CYP3A4_ASLoOH_Vmax/CYP3A4_ASLoOH_Km1*ASL_c/(1 + AS_c/CYP3A4_ASpOH_Km1 + AS_c/CYP3A4_ASoOH_Km1 + ASL_c/CYP3A4_ASLpOH_Km1 + ASL_c/CYP3A4_ASLoOH_Km1);  // modifiers: AS_c
  Export_ASoOH: ASoOH_c => ASoOH_m; Export_ASoOH_k*ASoOH_c;
  UGT1A3_AS: AS_c => ASL_c; UGT1A3_AS_Vmax*AS_c/(UGT1A3_AS_Km1 + AS_c + AS_c*AS_c/UGT1A3_AS_KI1);
  R_ASASL_c: ASL_c => AS_c; (k_CR_ASL_c + k_PON_ASL_c)*ASL_c;
  CR_oOH: ASLoOH_c => ASoOH_c; (k_CR_ASL_c + k_PON_OH_c)*ASLoOH_c;
  CR_pOH: ASLpOH_c => ASpOH_c; (k_CR_ASL_c + k_PON_OH_c)*ASLpOH_c;
  Export_AS: AS_c => AS_m; Export_AS_k*AS_c;
  Export_ASL: ASL_c => ASL_m; Export_ASL_k*ASL_c;
  Import_ASLpOH: ASLpOH_m => ASLpOH_c; Import_ASLpOH_k*ASLpOH_m;
  Import_ASLoOH: ASLoOH_m => ASLoOH_c; Import_ASLoOH_k*ASLoOH_m;
  ASpOH_Prot: ASpOH_c => ASpOH_b; Prot_k1*((1 - fu_AS)/fu_AS*ASpOH_c - ASpOH_b);
  ASoOH_Prot: ASoOH_c => ASoOH_b; Prot_k1*((1 - fu_AS)/fu_AS*ASoOH_c - ASoOH_b);
  ASLpOH_Prot: ASLpOH_c => ASLpOH_b; Prot_k1*((1 - fu_ASL)/fu_ASL*ASLpOH_c - ASLpOH_b);
  ASLoOH_Prot: ASLoOH_c => ASLoOH_b; Prot_k1*((1 - fu_ASL)/fu_ASL*ASLoOH_c - ASLoOH_b);
  AS_Prot: AS_c => AS_b; Prot_k1*((1 - fu_AS)/fu_AS*AS_c - AS_b);
  ASL_Prot: ASL_c => ASL_b; Prot_k1*((1 - fu_ASL)/fu_ASL*ASL_c - ASL_b);
  Import_ASpOH: ASpOH_m => ASpOH_c; Import_ASpOH_k*ASpOH_m;
  R_ASASL_m: ASL_m => AS_m; k_CR_ASL_m*ASL_m;
  R_pOH_m: ASLpOH_m => ASpOH_m; k_CR_ASL_m*ASLpOH_m;
  R_oOH_m: ASLoOH_m => ASoOH_m; k_CR_ASL_m*ASLoOH_m;
  Export_ASLpOH: ASLpOH_c => ASLpOH_m; Export_ASLpOH_k*ASLpOH_c;
  Export_ASLoOH: ASLoOH_c => ASLoOH_m; Export_ASLoOH_k*ASLoOH_c;
  Export_ASpOH: ASpOH_c => ASpOH_m; Export_ASpOH_k*ASpOH_c;
  Import_ASoOH: ASoOH_m => ASoOH_c; Import_ASoOH_k*ASoOH_m;

  // Unit definitions:
  unit time = 60 second; time is "min";
  unit substance = 1e-12 mole; substance is "pmole";
  unit volume = 1e-3 litre; volume is "ml";
  unit nM = 1e-12 mole / (1e-3 litre); nM is "pmole per ml";
  unit pmole_per_min = 1e-12 mole / (60 second); pmole_per_min is "pmole per minute";
  unit ml_per_min = 1e-3 litre / (60 second); ml_per_min is "ml per minute";
end
