// SBML level 2 version 4

model Abell2011_CalciumSignaling_WithAdaptation()
  // This model is from the article:
  // Parallel adaptive feedback enhances reliability of the Ca2+ signaling system.
  // Abell E, Ahrends R, Bandara S, Park BO, Teruel MN. Proc Natl Acad Sci U S A.2011 Aug 15. 21844332,
  // Abstract:
  // Despite large cell-to-cell variations in the concentrations of individual signaling proteins, cells transmit signals correctly. This phenomenon raises the question of what signaling systems do to prevent a predicted high failure rate. Here we combine quantitative modeling, RNA interference, and targeted selective reaction monitoring (SRM) mass spectrometry, and we show for the ubiquitous and fundamental calcium signaling system that cells monitor cytosolic and endoplasmic reticulum (ER) Ca(2+) levels and adjust in parallel the concentrations of the store-operated Ca(2+) influx mediator stromal interaction molecule (STIM), the plasma membrane Ca(2+) pump plasma membrane Ca-ATPase (PMCA), and the ER Ca(2+) pump sarco/ER Ca(2+)-ATPase (SERCA). Model calculations show that this combined parallel regulation in protein expression levels effectively stabilizes basal cytosolic and ER Ca(2+) levels and preserves receptor signaling. Our results demonstrate that, rather than directly controlling the relative level of signaling proteins in a forward regulation strategy, cells prevent transmission failure by sensing the state of the signaling pathway and using multiple parallel adaptive feedbacks.
  // There are two models described in the paper to simulate basal and receptor stimulated Ca2+ signaling. 1) No adaptive feedback (MODEL1108050000) and 2) with three slow adaptive feedback loops (this model: MODEL1108050001).
  // To the extent possible under law, all copyright and related or neighbouring rights to this encoded model have been dedicated to the public domain worldwide. Please refer to CC0 Public Domain Dedication for more information.
  // In summary, you are entitled to use this encoded model in absolutely any manner you deem suitable, verbatim, or with modification, alone or embedded it in a larger context, redistribute it, commercially or not, in a restricted way or not.
  // To cite BioModels Database, please use: Li C, Donizelli M, Rodriguez N, Dharuri H, Endler L, Chelliah V, Li L, He E, Henry A, Stefan MI, Snoep JL, Hucka M, Le Novère N, Laibe C (2010) BioModels Database: An enhanced, curated and annotated resource for published quantitative kinetic models. BMC Syst Biol., 4:92.
  // biomodels.db:BIOMD0000000355
  // biomodels.db:MODEL1108050001
  // isDescribedBy pubmed:21844332
  // occursIn taxonomy:7215
  // isVersionOf GO:0019722

  // Compartments:
  compartment cytosol = 1;  // isVersionOf GO:0005829
  compartment outside = 1; outside is "Outside";  // isVersionOf GO:0005576
  compartment mitochondria = 1;  // isVersionOf GO:0005739
  compartment ER_store in cytosol = 1;  // isVersionOf GO:0005783

  // Species:
  species CaI in cytosol = 0.05/cytosol;  // isVersionOf CHEBI:29108 kegg.compound:C00076
  species IP3 in cytosol = 0;  // isVersionOf CHEBI:16595 kegg.compound:C01255
  species g in cytosol = 0.002/cytosol;  // isVersionOf GO:0019855
  species PMCA in cytosol = 0.013/cytosol;  // isVersionOf uniprot:Q9V4C7
  species SERCA in cytosol = 0.266/cytosol;  // isVersionOf uniprot:P22700
  species STIM in cytosol = 0.02/cytosol;  // isVersionOf uniprot:P83094
  species CaO in outside = 1000/outside;  // isVersionOf CHEBI:29108 kegg.compound:C00076
  species CaM in mitochondria = 0;  // isVersionOf CHEBI:29108 kegg.compound:C00076
  species CaS in ER_store = 2/ER_store;  // isVersionOf CHEBI:29108 kegg.compound:C00076

  // Parameters:
  A = 3; A is "IP3R";
  B = 0.266; B is "SERCA0";
  D = 2; D is "IP3degradation";
  E = 5; E is "IP3Rinhibition";
  F = 0.018; F is "IP3Rrecovery";
  k2 = 0.175; k2 is "kSERCA";
  L = 0.01; L is "ERleak";
  R = 1;
  kIP3R = 0.175;
  PMleak = 0.0346;
  kSTIM = 1;
  STIM0 = 0.02;
  kIP3Rca = 0.13;
  kPMCA = 0.2;
  PMCA0 = 0.013;
  kG = 1;
  ProtDeg = 1e-6;
  DirTransf = 0.03;
  kUnip = 0.6;
  MitNaCaEx = 0.005;
  Uniport = 0.03;
  cr = 8;

  // Reactions:
  kPLC: => IP3; R*CaI; kPLC is "PLC: Receptor and Ca2+ regulated IP3 production";  // modifiers: CaI; isVersionOf GO:0032959
  JPump: CaI => CaS; SERCA*CaI^2/(CaI^2 + k2^2); JPump is "SERCA: Pumps Ca2+ into ER Ca2+ stores";  // modifiers: SERCA; isVersionOf GO:0060401
  JChannel: CaS => CaI; (1 - DirTransf)*(L + (1 - g)*A*IP3^2/(IP3^2 + kIP3R^2)*CaI^2/(CaI^2 + kIP3Rca^2))*CaS; JChannel is "IP3R: IP3 and Ca2+ regulated Ca2+ channel, plus leak";  // modifiers: g, IP3; isVersionOf GO:0051209
  kPhosphatase: IP3 => ; D*IP3; kPhosphatase is "IP3 phosphatase: Degradation of IP3";  // isVersionOf GO:0032961
  inhibition_parameter1: => g; E*CaI^4/(CaI^4 + kG^4)*(1 - g); inhibition_parameter1 is "Inhibition of IP3R (mechanism not well understood)";  // modifiers: CaI; isVersionOf GO:0031586
  inhibition_parameter2: g => ; F*g; inhibition_parameter2 is "Recovery of IP3R from Ca2+ iinhibition when Ca2+ drops";  // isVersionOf GO:0031587
  Regulation_of_Orai_by_STIM_plus_leak: => CaI; STIM*(PMleak + kSTIM^8/(CaS^8 + kSTIM^8)); Regulation_of_Orai_by_STIM_plus_leak is "Regulation of Orai by STIM, plus leak";  // modifiers: STIM, CaS; isVersionOf GO:0032234
  PMCA_Pumps_Ca2_across_PM_out_of_cell: CaI => ; PMCA*CaI^2/(CaI^2 + kPMCA^2); PMCA_Pumps_Ca2_across_PM_out_of_cell is "PMCA: Pumps Ca2+ across PM out of cell";  // modifiers: PMCA; isVersionOf GO:0006816
  PMCA_synthesis: => PMCA; cr*ProtDeg*PMCA0*CaI^4/((cr - 1)*0.05^4 + CaI^4);  // modifiers: CaI; isVersionOf GO:0009058
  PMCA_degradation: PMCA => ; PMCA*ProtDeg;  // isVersionOf GO:0009056
  SERCA_synthesis: => SERCA; 1/cr*B*ProtDeg*((cr - 1)*2^4 + CaS^4)/CaS^4;  // modifiers: CaS; isVersionOf GO:0009058
  STIM_Orai_synthesis: => STIM; 1/(cr*cr)*STIM0*ProtDeg*((cr - 1)*2^2 + CaS^2)/CaS^2*((cr - 1)*0.05^2 + CaI^2)/CaI^2; STIM_Orai_synthesis is "STIM/Orai synthesis";  // modifiers: CaS, CaI; isVersionOf GO:0009058
  STIM_Orai_degradation: STIM => ; STIM*ProtDeg; STIM_Orai_degradation is "STIM/Orai degradation";  // isVersionOf GO:0009056
  SERCA_degradation: SERCA => ; SERCA*ProtDeg;  // isVersionOf GO:0009056
  CytToMito: CaI => CaM; Uniport*CaI^4/(CaI^4 + kUnip^4);  // isVersionOf GO:0006851
  ERtoMito: CaS => CaM; DirTransf*(L + (1 - g)*A*IP3^2/(IP3^2 + kIP3R^2)*CaI^2/(CaI^2 + kIP3Rca^2))*CaS;  // modifiers: g, IP3, CaI; isVersionOf GO:0006889 GO:0006851
  MitoToCytosol: CaM => CaI; MitNaCaEx*CaM/(CaM + 0.01);  // isVersionOf GO:0006851
end
