// SBML level 2 version 4

model Model_1()
  // Lee2010_ThrombinActivation_OneForm_reduced
  // To the extent possible under law, all copyright and related or neighbouring rights to this encoded model have been dedicated to the public domain worldwide. Please refer to CC0 Public Domain Dedication for more information.
  // In summary, you are entitled to use this encoded model in absolutely any manner you deem suitable, verbatim, or with modification, alone or embedded it in a larger context, redistribute it, commercially or not, in a restricted way or not.
  // To cite BioModels Database, please use: Li C, Donizelli M, Rodriguez N, Dharuri H, Endler L, Chelliah V, Li L, He E, Henry A, Stefan MI, Snoep JL, Hucka M, Le Novère N, Laibe C (2010) BioModels Database: An enhanced, curated and annotated resource for published quantitative kinetic models. BMC Syst Biol., 4:92.
  // biomodels.db:BIOMD0000000357
  // biomodels.db:MODEL1108260003
  // isDescribedBy pubmed:20435402
  // isVersionOf GO:0003804 GO:0007596
  // occursIn taxonomy:2759

  // Compartments:
  compartment compartment = 1;

  // Species:
  species E in compartment = 0.00015;
  species E_P_1 in compartment = 0;
  species P in compartment = 1;
  species M in compartment = 0;
  species E_M in compartment = 0;
  species T in compartment = 0;
  species E_P_2 in compartment = 0;
  species P2 in compartment = 0;
  species E_P2 in compartment = 0;

  // Parameters:
  k1 = 91.8;
  k2 = 82.4;
  k3a = 151.5;
  k4a = 209.9;
  k5 = 5.16;
  k6 = 32.3;
  k7a = 4.7;
  k8a = 42.6;
  j1 = 33.4;
  j3a = 0.185;
  j5 = 21.8;
  j7a = 2.66e-5;

  // Reactions:
  r1: E + P -> E_P_1; compartment*(k1*E*P - j1*E_P_1);
  r2: E_P_1 => E + M; compartment*k2*E_P_1;
  r5: E + M -> E_M; compartment*(k3a*E*M - j3a*E_M);
  r7: E_M => E + T; compartment*k4a*E_M;
  r8: E + P -> E_P_2; compartment*(k5*E*P - j5*E_P_2);
  r9: E_P_2 => E + P2; compartment*k6*E_P_2;
  r12: E + P2 -> E_P2; compartment*(k7a*E*P2 - j7a*E_P2);
  r14: E_P2 => E + T; compartment*k8a*E_P2;

  // Unit definitions:
  unit substance = 1e-6 mole;
end
