// SBML level 2 version 4

model Model_1()
  // Panteleev2002_TFPImechanism_schmema3
  // This model originates from BioModels Database: A Database of Annotated Published Models (http://www.ebi.ac.uk/biomodels/). It is copyright (c) 2005-2011 The BioModels.net Team.
  // To the extent possible under law, all copyright and related or neighbouring rights to this encoded model have been dedicated to the public domain worldwide. Please refer to CC0 Public Domain Dedication for more information.
  // In summary, you are entitled to use this encoded model in absolutely any manner you deem suitable, verbatim, or with modification, alone or embedded it in a larger context, redistribute it, commercially or not, in a restricted way or not..
  // To cite BioModels Database, please use: Li C, Donizelli M, Rodriguez N, Dharuri H, Endler L, Chelliah V, Li L, He E, Henry A, Stefan MI, Snoep JL, Hucka M, Le Novère N, Laibe C (2010) BioModels Database: An enhanced, curated and annotated resource for published quantitative kinetic models. BMC Syst Biol., 4:92.
  // biomodels.db:BIOMD0000000359
  // biomodels.db:MODEL1108260008
  // isDescribedBy pubmed:11985578
  // GO:0007596
  // occursIn taxonomy:2759

  // Compartments:
  compartment compartment = 1;

  // Species:
  species VIIa_TF in compartment = 1;  // hasPart uniprot:P13726 uniprot:P08709
  species X in compartment = 170;  // uniprot:P00742
  species VIIa_TF_X in compartment = 0;  // hasPart uniprot:P00742 uniprot:P13726 uniprot:P08709
  species VIIa_TF_Xa in compartment = 0;  // hasPart uniprot:P00742 uniprot:P13726 uniprot:P08709
  species Xa in compartment = 0;  // uniprot:P00742
  species TFPI in compartment = 2.4;  // uniprot:P10646
  species Xa_TFPI in compartment = 0;  // hasPart uniprot:P10646 uniprot:P00742
  species Xa_TFPI_VIIa_TF in compartment = 0;  // hasPart uniprot:P13726 uniprot:P08709 uniprot:P10646 uniprot:P00742
  species VIIa_TF_Xa_TFPI in compartment = 0;  // hasPart uniprot:P13726 uniprot:P08709 uniprot:P00742 uniprot:P10646

  // Reactions:
  reaction_1: X + VIIa_TF -> VIIa_TF_X; compartment*(reaction_1_k1*X*VIIa_TF - reaction_1_k2*VIIa_TF_X);
    reaction_1_k1 = 5; reaction_1_k2 = 770;
  reaction_2: VIIa_TF_X => VIIa_TF_Xa; compartment*reaction_2_k1*VIIa_TF_X;
    reaction_2_k1 = 420;
  reaction_3: VIIa_TF_Xa -> Xa + VIIa_TF; compartment*(reaction_3_k1*VIIa_TF_Xa - reaction_3_k2*Xa*VIIa_TF);
    reaction_3_k1 = 770; reaction_3_k2 = 5;
  reaction_4: Xa + TFPI -> Xa_TFPI; compartment*(reaction_4_k1*Xa*TFPI - reaction_4_k2*Xa_TFPI);
    reaction_4_k1 = 0.054; reaction_4_k2 = 0.02;
  reaction_5: VIIa_TF + Xa_TFPI -> Xa_TFPI_VIIa_TF; compartment*(reaction_5_k1*VIIa_TF*Xa_TFPI - reaction_5_k2*Xa_TFPI_VIIa_TF);
    reaction_5_k1 = 0.44; reaction_5_k2 = 0;
  reaction_6: VIIa_TF_Xa + TFPI -> VIIa_TF_Xa_TFPI; compartment*(reaction_6_k1*VIIa_TF_Xa*TFPI - reaction_6_k2*VIIa_TF_Xa_TFPI);
    reaction_6_k1 = 6; reaction_6_k2 = 0.02;
  reaction_9: VIIa_TF_Xa_TFPI -> Xa_TFPI_VIIa_TF; compartment*(reaction_9_k1*VIIa_TF_Xa_TFPI - reaction_9_k2*Xa_TFPI_VIIa_TF); reaction_9 is "reaction_8";
    reaction_9_k1 = 0; reaction_9_k2 = 0;
  reaction_8: VIIa_TF_X + Xa_TFPI -> X + VIIa_TF_Xa_TFPI; compartment*(reaction_8_k1*VIIa_TF_X*Xa_TFPI - reaction_8_k2*X*VIIa_TF_Xa_TFPI); reaction_8 is "reaction_9";
    reaction_8_k1 = 20; reaction_8_k2 = 0;

  // Unit definitions:
  unit time = 60 second;
  unit substance = 1e-9 mole;
end
