// SBML level 2 version 4

model Model_1()
  // Lee2010_ThrombinActivation_OneForm_minimal
  // To the extent possible under law, all copyright and related or neighbouring rights to this encoded model have been dedicated to the public domain worldwide. Please refer to CC0 Public Domain Dedication for more information.
  // In summary, you are entitled to use this encoded model in absolutely any manner you deem suitable, verbatim, or with modification, alone or embedded it in a larger context, redistribute it, commercially or not, in a restricted way or not.
  // To cite BioModels Database, please use: Li C, Donizelli M, Rodriguez N, Dharuri H, Endler L, Chelliah V, Li L, He E, Henry A, Stefan MI, Snoep JL, Hucka M, Le Novère N, Laibe C (2010) BioModels Database: An enhanced, curated and annotated resource for published quantitative kinetic models. BMC Syst Biol., 4:92.
  // biomodels.db:BIOMD0000000363
  // biomodels.db:MODEL1108260004
  // isDescribedBy pubmed:20435402
  // GO:0007596
  // occursIn taxonomy:2759

  // Compartments:
  compartment compartment = 1;

  // Species:
  species II in compartment = 1;  // uniprot:P00734
  species M in compartment = 0;
  species IIa in compartment = 0;  // uniprot:P00734
  species P2 in compartment = 0;

  // Reactions:
  r1: II => M; compartment*r1_k1*II;
    r1_k1 = 0.005;
  r2: M => IIa; compartment*r2_k1*M;
    r2_k1 = 0.01;
  r3: II => P2; compartment*r3_k1*II;
    r3_k1 = 1e-5;
  r4: P2 => IIa; compartment*r4_k1*P2;
    r4_k1 = 2.5e-5;

  // Unit definitions:
  unit substance = 1e-6 mole;
end
