// SBML level 2 version 4

model Model_1()
  // Hockin1999_BloodCoagulation_VaInactivation
  // To the extent possible under law, all copyright and related or neighbouring rights to this encoded model have been dedicated to the public domain worldwide. Please refer to CC0 Public Domain Dedication for more information.
  // In summary, you are entitled to use this encoded model in absolutely any manner you deem suitable, verbatim, or with modification, alone or embedded it in a larger context, redistribute it, commercially or not, in a restricted way or not.
  // To cite BioModels Database, please use: Li C, Donizelli M, Rodriguez N, Dharuri H, Endler L, Chelliah V, Li L, He E, Henry A, Stefan MI, Snoep JL, Hucka M, Le Novère N, Laibe C (2010) BioModels Database: An enhanced, curated and annotated resource for published quantitative kinetic models. BMC Syst Biol., 4:92.
  // biomodels.db:BIOMD0000000365
  // biomodels.db:MODEL1108260001
  // isDescribedBy pubmed:10346914
  // GO:0007596
  // occursIn taxonomy:2759

  // Compartments:
  compartment compartment_1 = 1;

  // Species:
  species APC in compartment_1 = 1e-8;  // uniprot:P04070
  species Va in compartment_1 = 2e-7;  // uniprot:P12259
  species Va_APC in compartment_1 = 0;  // hasPart uniprot:P12259 uniprot:P04070
  species Va3 in compartment_1 = 0;
  species Va3_APC in compartment_1 = 0;  // hasPart uniprot:P04070
  species Va5 in compartment_1 = 0;
  species Va5_APC in compartment_1 = 0;  // hasPart uniprot:P04070
  species Va53 in compartment_1 = 0;
  species Va53_APC in compartment_1 = 0;  // hasPart uniprot:P04070
  species Va56 in compartment_1 = 0;
  species Va56_APC in compartment_1 = 0;  // hasPart uniprot:P04070
  species Va36 in compartment_1 = 0;
  species Va36_APC in compartment_1 = 0;  // hasPart uniprot:P04070
  species Va536 in compartment_1 = 0;
  species Va536_APC in compartment_1 = 0;  // hasPart uniprot:P04070
  species HC in compartment_1 = 0;
  species LC in compartment_1 = 0;
  species HC5 in compartment_1 = 0;
  species HC3 in compartment_1 = 0;
  species HC56 in compartment_1 = 0;
  species HC36 in compartment_1 = 0;
  species HC536 in compartment_1 = 0;
  species LC_APC in compartment_1 = 0;  // hasPart uniprot:P04070
  species HC53 in compartment_1 = 0;
  species VaA3 in compartment_1 = 0;
  species VaA53 in compartment_1 = 0;
  species VaA36 in compartment_1 = 0;
  species VaA536 in compartment_1 = 0;
  species VaLCA1 in compartment_1 = 0;
  species VaLCA1_APC in compartment_1 = 0;  // hasPart uniprot:P04070

  // Parameters:
  k1 = 100000000;
  k2 = 0.7;
  k3 = 0.064;
  k5 = 1;
  k6 = 0.00052;
  k7 = 0.028;
  k8 = 2570;
  k9 = 1.72e-5;
  k10 = 2630;

  // Reactions:
  r1: Va + APC -> Va_APC; compartment_1*(k1*Va*APC - k2*Va_APC);
  r2: Va3 + APC -> Va3_APC; compartment_1*(k1*Va3*APC - k2*Va3_APC);
  r3: Va5 + APC -> Va5_APC; compartment_1*(k1*Va5*APC - k2*Va5_APC);
  r4: Va53 + APC -> Va53_APC; compartment_1*(k1*Va53*APC - k2*Va53_APC);
  r5: Va56 + APC -> Va56_APC; compartment_1*(k1*Va56*APC - k2*Va56_APC);
  r6: Va36 + APC -> Va36_APC; compartment_1*(k1*Va36*APC - k2*Va36_APC);
  r7: Va536 + APC -> Va536_APC; compartment_1*(k1*Va536*APC - k2*Va536_APC);
  r8: Va_APC => Va5_APC; compartment_1*k5*Va_APC;
  r9: Va5_APC => Va56_APC; compartment_1*k6*Va5_APC;
  r10: Va56_APC => Va536_APC; compartment_1*k3*Va56_APC;
  r11: Va5_APC => Va53_APC; compartment_1*k3*Va5_APC;
  r12: Va53_APC => Va536_APC; compartment_1*k6*Va53_APC;
  r13: Va_APC => Va3_APC; compartment_1*k3*Va_APC;
  r14: Va3_APC => Va36_APC; compartment_1*k6*Va3_APC;
  r15: Va36_APC => Va536_APC; compartment_1*k5*Va36_APC;
  r16: Va3_APC => Va53_APC; compartment_1*k5*Va3_APC;
  r17: Va -> HC + LC; compartment_1*(k9*Va - k10*HC*LC);
  r18: Va5 -> HC5 + LC; compartment_1*(k9*Va5 - k10*HC5*LC);
  r19: Va3 -> HC3 + LC; compartment_1*(k9*Va3 - k10*HC3*LC);
  r20: Va56 -> HC56 + LC; compartment_1*(k9*Va56 - k10*HC56*LC);
  r21: Va53 -> HC53 + LC; compartment_1*(k9*Va53 - k10*HC53*LC);
  r22: Va36 -> HC36 + LC; compartment_1*(k9*Va36 - k10*HC36*LC);
  r23: Va536 -> HC536 + LC; compartment_1*(k9*Va536 - k10*HC536*LC);
  r24: LC + APC -> LC_APC; compartment_1*(k1*LC*APC - k2*LC_APC);
  r25: Va3 -> VaA3 + VaLCA1; compartment_1*(k7*Va3 - k8*VaA3*VaLCA1);
  r26: Va53 -> VaA53 + VaLCA1; compartment_1*(k7*Va53 - k8*VaA53*VaLCA1);
  r27: Va36 -> VaA36 + VaLCA1; compartment_1*(k7*Va36 - k8*VaA36*VaLCA1);
  r28: Va536 -> VaA536 + VaLCA1; compartment_1*(k7*Va536 - k8*VaA536*VaLCA1);
  r29: Va3_APC -> VaA3 + VaLCA1_APC; compartment_1*(k7*Va3_APC - k8*VaA3*VaLCA1_APC);
  r30: Va53_APC -> VaA53 + VaLCA1_APC; compartment_1*(k7*Va53_APC - k8*VaA53*VaLCA1_APC);
  r31: Va36_APC -> VaA36 + VaLCA1_APC; compartment_1*(k7*Va36_APC - k8*VaA36*VaLCA1_APC);
  r32: Va536_APC -> VaA536 + VaLCA1_APC; compartment_1*(k7*Va536_APC - k7*VaA536*VaLCA1_APC);
  r33: VaLCA1 + APC -> VaLCA1_APC; compartment_1*(k1*VaLCA1*APC - k2*VaLCA1_APC);
end
