// SBML level 2 version 4

model Model_1()
  // Mueller2008_ThrombinGeneration_minimal
  // This model originates from BioModels Database: A Database of Annotated Published Models (http://www.ebi.ac.uk/biomodels/). It is copyright (c) 2005-2011 The BioModels.net Team.
  // For more information see the terms of use.
  // To cite BioModels Database, please use: Li C, Donizelli M, Rodriguez N, Dharuri H, Endler L, Chelliah V, Li L, He E, Henry A, Stefan MI, Snoep JL, Hucka M, Le Novère N, Laibe C (2010) BioModels Database: An enhanced, curated and annotated resource for published quantitative kinetic models. BMC Syst Biol., 4:92.
  // biomodels.db:MODEL1108260013
  // biomodels.db:BIOMD0000000367
  // isDescribedBy pubmed:17936855
  // GO:0007596
  // hasTaxon taxonomy:2759
  // hasProperty DOID:3393

  // Compartments:
  compartment compartment_1 = 1;

  // Species:
  species $x in compartment_1 = 4;
  species $y in compartment_1 = 0.2;
  species $z in compartment_1 = 0.4;

  // Parameters:
  r = 0.2;
  mu_x = 4;
  zeta = 0.5;
  b = 1.5;
  mu_z = 0.4;
  epsilon = 0.002;
  k = 0.4;
  mu_z_star = 0.4;

  // Rate rules:
  x' = -r*x*y + zeta*mu_x - zeta*x;
  y' = r*x*y - b*y*z - zeta*y;
  z' = -b*y*z + zeta*mu_z - zeta*z;
  mu_z' = epsilon*(y - k*(mu_z - mu_z_star));
end
