// SBML level 2 version 4

model Vinod2011_MitoticExit()
  // This model is from the article:
  // Computational modelling of mitotic exit in budding yeast: the role of separase and Cdc14 endocycles
  // Vinod PK, Freire P, Rattani A, Ciliberto A, Uhlmann F, Novak B. J R Soc Interface. 2011 Aug 7;8(61):1128-41. Epub 2011 Feb 2. 21288956 ,
  // Abstract:
  // The operating principles of complex regulatory networks are best understood with the help of mathematical modelling rather than by intuitive reasoning. Hereby, we study the dynamics of the mitotic exit (ME) control system in budding yeast by further developing the Queralt's model. A comprehensive systems view of the network regulating ME is provided based on classical experiments in the literature. In this picture, Cdc20-APC is a critical node controlling both cyclin (Clb2 and Clb5) and phosphatase (Cdc14) branches of the regulatory network. On the basis of experimental situations ranging from single to quintuple mutants, the kinetic parameters of the network are estimated. Numerical analysis of the model quantifies the dependence of ME control on the proteolytic and non-proteolytic functions of separase. We show that the requirement of the non-proteolytic function of separase for ME depends on cyclin-dependent kinase activity. The model is also used for the systematic analysis of the recently discovered Cdc14 endocycles. The significance of Cdc14 endocycles in eukaryotic cell cycle control is discussed as well.
  // This model originates from BioModels Database: A Database of Annotated Published Models (http://www.ebi.ac.uk/biomodels/). It is copyright (c) 2005-2012 The BioModels.net Team.
  // For more information see the terms of use .
  // To cite BioModels Database, please use: Li C, Donizelli M, Rodriguez N, Dharuri H, Endler L, Chelliah V, Li L, He E, Henry A, Stefan MI, Snoep JL, Hucka M, Le Novère N, Laibe C (2010) BioModels Database: An enhanced, curated and annotated resource for published quantitative kinetic models. BMC Syst Biol., 4:92.
  // biomodels.db:MODEL1111030000
  // biomodels.db:BIOMD0000000370
  // isDescribedBy pubmed:21288956
  // isDerivedFrom biomodels.db:BIOMD0000000409
  // hasTaxon taxonomy:4932
  // isVersionOf GO:0000278 CCO:P0000038

  // Compartments:
  compartment cell_1 = 1;  // isVersionOf GO:0005623

  // Species:
  species Clb2T_1 in cell_1 = 0.999107;  // isVersionOf uniprot:P24869
  species Clb5T_1 in cell_1 = 0.201977;  // isVersionOf uniprot:P30283
  species Cln_1 in cell_1 = 0.04079;  // isVersionOf uniprot:P20438
  species Cdc20_1 in cell_1 = 0;  // isVersionOf uniprot:P26309
  species Cdh1_1 in cell_1 = 0;  // isVersionOf uniprot:P53197
  species Sic1T_1 in cell_1 = 0.001683;  // isVersionOf uniprot:P38634
  species Trim2_1 in cell_1 = 0.00145;  // hasPart uniprot:P00546 uniprot:P24869 uniprot:P38634
  species Trim5_1 in cell_1 = 0;  // hasPart uniprot:P00546 uniprot:P30283 uniprot:P38634
  species Swi5_1 in cell_1 = 0;  // isVersionOf uniprot:P08153
  species Mcm_1 in cell_1 = 0.996743;  // hasPart uniprot:Q08887 uniprot:P41813 uniprot:P11746
  species MBF_1 in cell_1 = 0.001977;  // isVersionOf uniprot:O14467
  species Pds1T_1 in cell_1 = 0.601977;  // isVersionOf uniprot:P40316
  species Esp1T_1 in cell_1 = 0.25;  // isVersionOf uniprot:Q03018
  species PoloT_1 in cell_1 = 1;  // isVersionOf uniprot:P32562
  species Polo_1 in cell_1 = 1;  // isVersionOf uniprot:P32562
  species Net1dep_1 in cell_1 = 0.0119;  // isVersionOf uniprot:P47035
  species Net1pp_1 in cell_1 = 0.0119;  // isVersionOf uniprot:P47035 kegg.compound:C00562
  species RENT_1 in cell_1 = 0.483;  // hasPart uniprot:Q00684 uniprot:P47035
  species RENTp_1 in cell_1 = 0.014;  // isVersionOf kegg.compound:C00562; hasPart uniprot:Q00684 uniprot:P47035
  species Cdc14n_1 in cell_1 = 0.00214;  // isVersionOf uniprot:Q00684
  species Tem1_1 in cell_1 = 1;  // isVersionOf uniprot:P38987
  species Cdc15_1 in cell_1 = 0.933;  // isVersionOf uniprot:P27636
  species MEN_1 in cell_1 = 0;  // hasPart uniprot:P27636 uniprot:P38987
  species Clb2_2 in cell_1;  // isVersionOf uniprot:P24869
  species Clb5_1 in cell_1;  // isVersionOf uniprot:P30283
  species Sic1_1 in cell_1;  // isVersionOf uniprot:P38634
  species Pds1_1 in cell_1;  // isVersionOf uniprot:P40316
  species Esp1b_1 in cell_1 = 0.24857;  // isVersionOf uniprot:Q03018
  species Esp1_1 in cell_1;  // isVersionOf uniprot:Q03018
  species Net1p_1 in cell_1 = 0.013;  // isVersionOf uniprot:P47035
  species Net1_2 in cell_1;  // isVersionOf uniprot:P47035
  species Cdc14c_1 in cell_1;  // isVersionOf uniprot:Q00684

  // Parameters:
  var PP_1;
  PPT_1 = 1;
  kpp_1 = 0.1;
  ki_1 = 40;
  var V2_1;
  kdclb2_1 = 0.02;
  kdclb2_2 = 0.1; kdclb2_2 is "kdclb2'";
  kdclb2_3 = 0.4; kdclb2_3 is "kdclb2''";
  var V6_1;
  kdclb5_1 = 0.01;
  kdclb5_2 = 1; kdclb5_2 is "kdclb5'";
  var Vdsic_1;
  kdsic_1 = 2; kdsic_1 is "kdsic'";
  kdsic_2 = 2; kdsic_2 is "kdsic"";
  kdsic_3 = 0.04;
  kdsic_4 = 1.5; kdsic_4 is "kdsic'''";
  var Vacdh_1;
  kdcdh_1 = 0.03;
  kdcdh_2 = 0.3; kdcdh_2 is "kdcdh'";
  var Vicdh_1;
  kpcdh_1 = 0.001;
  kpcdh_2 = 0.04; kpcdh_2 is "kpcdh'";
  kpcdh_3 = 0.75; kpcdh_3 is "kpcdh''";
  var Vaswi_1;
  kaswi_1 = 0.2;
  kaswi_2 = 1; kaswi_2 is "kaswi'";
  var Viswi_1;
  kiswi_1 = 0.01;
  kiswi_2 = 0.5; kiswi_2 is "kiswi'";
  kiswi_3 = 0.75; kiswi_3 is "kiswi''";
  var Vd_1;
  kd_1 = 0.1; kd_1 is "kd'";
  kd_2 = 0.45;
  Jnet_1 = 0.05;
  Net1T_1 = 1;
  var Vp_1;
  kp_3 = 0.2; kp_3 is "kp''";
  kp_4 = 3; kp_4 is "kp'''";
  var Vexp_1;
  kexp_1 = 0.01;
  kexp_2 = 20; kexp_2 is "kexp'";
  ksclb2_1 = 0.015;
  ksclb2_2 = 0.005; ksclb2_2 is "ksclb2'";
  ksclb5_1 = 0.01; ksclb5_1 is "ksclb5'";
  ksclb5_2 = 0.002;
  kscln_1 = 0.1; kscln_1 is "kscln'";
  kscln_2 = 0.01;
  kdcln_1 = 0.25;
  ks20_1 = 0.05; ks20_1 is "ks20'";
  ks20_2 = 0.001;
  kd20_1 = 0.1;
  kd20_2 = 1; kd20_2 is "kd20'";
  Jcdh_1 = 0.01;
  kssic_1 = 0.2; kssic_1 is "kssic'";
  kssic_2 = 0.004;
  kasic2_1 = 40;
  kdsic2_1 = 0.1;
  kasic5_1 = 10;
  kdsic5_1 = 0.1;
  Jswi_1 = 0.1;
  ksmcm_1 = 1; ksmcm_1 is "ksmcm'";
  ksmcm_3 = 0.01;
  kdmcm_1 = 0.25;
  Jmcm_1 = 0.01;
  Jmbf_1 = 0.01;
  kambf_1 = 0.1;
  kimbf_1 = 0.5; kimbf_1 is "kimbf'";
  kimbf_2 = 0;
  kimbf_3 = 0.5; kimbf_3 is "kimbf''";
  kspds_1 = 0.01; kspds_1 is "kspds'";
  kspds_2 = 0.006;
  kdpds_1 = 0.01;
  kdpds_2 = 2; kdpds_2 is "kdpds'";
  ksesp_1 = 0.001;
  kdesp_1 = 0.004;
  lapds_1 = 500;
  ldpds_1 = 1;
  kspolo_1 = 0.05; kspolo_1 is "kspolo'";
  kspolo_2 = 0.001;
  kdpolo_1 = 0.05;
  kdpolo_2 = 0.5; kdpolo_2 is "kdpolo'";
  Jpolo_1 = 0.1;
  kapolo_1 = 0;
  kapolo_2 = 1; kapolo_2 is "kapolo'";
  kipolo_1 = 0.1;
  kp_1 = 2; kp_1 is "kp'";
  lanet_1 = 500;
  ldnet_1 = 1;
  kimp_1 = 1;
  Jtem1_1 = 0.005;
  katem_1 = 0;
  katem_2 = 0.6; katem_2 is "katem'";
  kitem_1 = 20; kitem_1 is "kitem''";
  kitem_2 = 1; kitem_2 is "kitem'";
  kitem_3 = 0.1;
  Jcdc15_1 = 1;
  kac15_1 = 0.03;
  kac15_2 = 0.5; kac15_2 is "kac15'";
  kic15_1 = 0.03;
  kic15_2 = 0.2; kic15_2 is "kic15'";
  lamen_1 = 100;
  ldmen_1 = 0.1;
  Cdc14T_1 = 0.5;
  Clb2nd_1 = 0;
  Swi5T_1 = 1;

  // Assignment rules:
  Clb2_2 := Clb2T_1 + Clb2nd_1 - Trim2_1;
  Clb5_1 := Clb5T_1 - Trim5_1;
  Sic1_1 := Sic1T_1 - Trim2_1 - Trim5_1;
  Pds1_1 := Pds1T_1 - Esp1b_1;
  Esp1_1 := Esp1T_1 - Esp1b_1;
  Net1_2 := Net1T_1 - Net1p_1 - RENT_1 - Net1pp_1;
  Cdc14c_1 := Cdc14T_1 - Cdc14n_1 - RENT_1;
  PP_1 := PPT_1*((1 + kpp_1*ki_1*Esp1_1)/(1 + ki_1 + Esp1_1));
  V2_1 := kdclb2_1 + kdclb2_2*Cdc20_1 + kdclb2_3*Cdh1_1;
  V6_1 := kdclb5_1 + kdclb5_2*Cdc20_1;
  Vdsic_1 := kdsic_3 + kdsic_1*Clb5_1 + kdsic_2*Clb2_2 + kdsic_4*Cln_1;
  Vacdh_1 := kdcdh_1*Cdc14n_1 + kdcdh_2*Cdc14c_1;
  Vicdh_1 := kpcdh_1 + kpcdh_2*Clb2_2 + kpcdh_3*Clb5_1;
  Vaswi_1 := kaswi_1*Cdc14n_1 + kaswi_2*Cdc14c_1;
  Viswi_1 := kiswi_1 + kiswi_2*Clb2_2 + kiswi_3*Clb5_1;
  Vd_1 := (kd_2*PP_1 + kd_1*Cdc14n_1)/(Jnet_1 + Net1T_1 - Net1dep_1);
  Vp_1 := (kp_3*Clb2_2 + kp_4*MEN_1)/(Jnet_1 + Net1dep_1);
  Vexp_1 := kexp_1 + kexp_2*MEN_1;

  // Rate rules:
  Clb2T_1' = ksclb2_1 + ksclb2_2*Mcm_1 - V2_1*Clb2T_1;
  Clb5T_1' = ksclb5_2 + ksclb5_1*MBF_1 - V6_1*Clb5T_1;
  Cln_1' = kscln_2 + kscln_1*MBF_1 - kdcln_1*Cln_1;
  Cdc20_1' = ks20_2 + ks20_1*Mcm_1 - (kd20_1 + kd20_2*Cdh1_1)*Cdc20_1;
  Cdh1_1' = Vacdh_1*(1 - Cdh1_1)/(Jcdh_1 + 1 - Cdh1_1) - Vicdh_1*Cdh1_1/(Jcdh_1 + Cdh1_1);
  Sic1T_1' = kssic_2 + kssic_1*Swi5_1 - Vdsic_1*Sic1T_1;
  Trim2_1' = kasic2_1*Clb2_2*Sic1_1 - (kdsic2_1 + V2_1 + Vdsic_1)*Trim2_1;
  Trim5_1' = kasic5_1*Clb5_1*Sic1_1 - (kdsic5_1 + V6_1 + Vdsic_1)*Trim5_1;
  Swi5_1' = Vaswi_1*(Swi5T_1 - Swi5_1)/(Jswi_1 + Swi5T_1 - Swi5_1) - Viswi_1*Swi5_1/(Jswi_1 + Swi5_1);
  Mcm_1' = (ksmcm_3 + ksmcm_1*Clb2_2)*(1 - Mcm_1)/(Jmcm_1 + 1 - Mcm_1) - kdmcm_1*Mcm_1/(Jmcm_1 + Mcm_1);
  MBF_1' = kambf_1*(1 - MBF_1)/(Jmbf_1 + 1 - MBF_1) - (kimbf_1*Clb2_2 + kimbf_3*Clb5_1)*MBF_1/(Jmbf_1 + MBF_1);
  Pds1T_1' = kspds_2 + kspds_1*MBF_1 - (kdpds_1 + kdpds_2*Cdc20_1)*Pds1T_1;
  Esp1T_1' = ksesp_1 - kdesp_1*Esp1T_1;
  Esp1b_1' = lapds_1*Pds1_1*Esp1_1 - (ldpds_1 + kdesp_1 + kdpds_1 + kdpds_2*Cdc20_1)*Esp1b_1;
  PoloT_1' = kspolo_2 + kspolo_1*Mcm_1 - (kdpolo_1 + kdpolo_2*Cdh1_1)*PoloT_1;
  Polo_1' = (kapolo_1 + kapolo_2*Clb2_2)*(PoloT_1 - Polo_1)/(Jpolo_1 + PoloT_1 - Polo_1) - kipolo_1*Polo_1/(Jpolo_1 + Polo_1) - (kdpolo_1 + kdpolo_2*Cdh1_1)*Polo_1;
  Net1dep_1' = Vd_1*(Net1T_1 - Net1dep_1) - Vp_1*Net1dep_1;
  Net1pp_1' = kp_1*Polo_1*(Net1T_1 - Net1dep_1 - Net1pp_1) - Vd_1*Net1pp_1;
  RENT_1' = lanet_1*(Net1T_1 - Net1pp_1 - RENT_1)*Cdc14n_1 - ldnet_1*RENT_1 - kp_1*Polo_1*RENTp_1;
  RENTp_1' = Vp_1*(RENT_1 - RENTp_1) - Vd_1*RENTp_1 + lanet_1*(Net1T_1 - Net1dep_1 - Net1pp_1 - RENTp_1)*Cdc14n_1 - ldnet_1*RENTp_1 - kp_1*Polo_1*RENTp_1;
  Cdc14n_1' = kp_1*Polo_1*RENTp_1 - lanet_1*(Net1T_1 - Net1pp_1 - RENT_1)*Cdc14n_1 + ldnet_1*RENT_1 - Vexp_1*Cdc14n_1 + kimp_1*Cdc14c_1;
  Tem1_1' = (katem_1 + katem_2*Polo_1)*(1 - Tem1_1)/(Jtem1_1 + 1 - Tem1_1) - (kitem_3 + kitem_2/(1 + kitem_1*Esp1_1))/(Jtem1_1 + Tem1_1)*Tem1_1;
  Cdc15_1' = (kac15_1 + kac15_2*Cdc14c_1)*(1 - Cdc15_1)/(Jcdc15_1 + 1 - Cdc15_1) - (kic15_1 + kic15_2*Clb2_2)*Cdc15_1/(Jcdc15_1 + Cdc15_1);
  MEN_1' = lamen_1*(Tem1_1 - MEN_1)*(Cdc15_1 - MEN_1) - ldmen_1*MEN_1 - (kitem_3 + kitem_2/(1 + kitem_3*Esp1_1))/(Jtem1_1 + Tem1_1)*MEN_1 - (kic15_1 + kic15_2*Clb2_2)/(Jcdc15_1 + Cdc15_1)*MEN_1;

  // Unit definitions:
  unit area_1 = metre^2;
  unit length_1 = metre;
  unit substance_1 = mole;
  unit time_1 = second;
  unit volume_1 = litre;
end
