// SBML level 2 version 4

model Smallbone2011_TrehaloseBiosynthesis()
  // This model is from the article:
  // Building a Kinetic Model of Trehalose Biosynthesis in Saccharomyces cerevisiae.
  // Smallbone K, Malys N, Messiha HL, Wishart JA, Simeonidis E. Methods Enzymol.2011;500:355-70. 21943906,
  // Abstract:
  // In this chapter, we describe the steps needed to create a kinetic model of a metabolic pathway based on kinetic data from experimental measurements and literature review. Our methodology is presented by utilizing the example of trehalose metabolism in yeast. The biology of the trehalose cycle is briefly reviewed and discussed.
  // This SBML model is made available under the Creative Commons Attribution-Share Alike 3.0 Unported Licence (see www.creativecommons.org).
  // This model originates from BioModels Database: A Database of Annotated Published Models (http://www.ebi.ac.uk/biomodels/).
  // To the extent possible under law, all copyright and related or neighbouring rights to this encoded model have been dedicated to the public domain worldwide. Please refer to CC0 Public Domain Dedication for more information.
  // In summary, you are entitled to use this encoded model in absolutely any manner you deem suitable, verbatim, or with modification, alone or embedded it in a larger context, redistribute it, commercially or not, in a restricted way or not..
  // To cite BioModels Database, please use: Li C, Donizelli M, Rodriguez N, Dharuri H, Endler L, Chelliah V, Li L, He E, Henry A, Stefan MI, Snoep JL, Hucka M, Le Novère N, Laibe C (2010) BioModels Database: An enhanced, curated and annotated resource for published quantitative kinetic models. BMC Syst Biol., 4:92.
  // biomodels.db:BIOMD0000000380
  // biomodels.db:MODEL1010010000
  // isDescribedBy pubmed:21943906
  // occursIn taxonomy:4932
  // isVersionOf GO:0005992

  // Compartments:
  compartment cell in medium = 1;  // GO:0005622
  compartment medium = 1;  // GO:0005576

  // Species:
  species glc in cell = glc_0; glc is "glucose";  // CHEBI:17925
  species g1p in cell = g1p_0; g1p is "glucose 1-phosphate";  // CHEBI:16077
  species g6p in cell = g6p_0; g6p is "glucose 6-phosphate";  // CHEBI:17665
  species trh in cell = trh_0; trh is "trehalose";  // CHEBI:16551
  species t6p in cell = t6p_0; t6p is "trehalose 6-phosphate";  // CHEBI:18283
  species udg in cell = udg_0; udg is "UDP glucose";  // CHEBI:18066
  species $adp in cell = 1.282; adp is "ADP";  // CHEBI:16761
  species $atp in cell = 2.525; atp is "ATP";  // CHEBI:15422
  species $ppi in cell; ppi is "diphosphate";  // CHEBI:18361
  species $f6p in cell = 0.625; f6p is "fructose 6-phosphate";  // CHEBI:16084
  species $h in cell; h is "H+";  // CHEBI:24636
  species $pho in cell; pho is "phosphate";  // CHEBI:43474
  species $udp in cell = 0.2815; udp is "UDP";  // CHEBI:17659
  species $utp in cell = 0.6491; utp is "UTP";  // CHEBI:46398
  species $h2o in cell; h2o is "water";  // CHEBI:15377
  species $glx in medium = 100; glx is "glucose";  // CHEBI:17925

  // Parameters:
  heat = 0 dimensionless;
  glc_0 = 0.09765 mM;
  glc_change has dimensionless; glc_change is "log10 change in glucose";
  g1p_0 = 0.1 mM;
  g1p_change has dimensionless; g1p_change is "log10 change in glucose 1-phosphate";
  g6p_0 = 2.675 mM;
  g6p_change has dimensionless; g6p_change is "log10 change in glucose 6-phosphate";
  trh_0 = 0.05 mM;
  trh_change has dimensionless; trh_change is "log10 change in trehalose";
  t6p_0 = 0.02 mM;
  t6p_change has dimensionless; t6p_change is "log10 change in trehalose 6-phosphate";
  udg_0 = 0.7 mM;
  udg_change has dimensionless; udg_change is "log10 change in UDP glucose";

  // Assignment rules:
  glc_change := log10(glc/glc_0);
  g1p_change := log10(g1p/g1p_0);
  g6p_change := log10(g6p/g6p_0);
  trh_change := log10(trh/trh_0);
  t6p_change := log10(t6p/t6p_0);
  udg_change := log10(udg/udg_0);

  // Reactions:
  pgi: g6p -> $f6p; cell*pgi_shock^heat*pgi_Vmax/pgi_Kg6p*(g6p - f6p/pgi_Keq)/(1 + g6p/pgi_Kg6p + f6p/Kf6p); pgi is "G6P isomerase";  // isVersionOf ec-code:5.3.1.9
    pgi_Vmax = 1071 mM_per_min; pgi_Kg6p = 1.4 mM; Kf6p = 0.29 mM; pgi_Keq = 0.3 dimensionless; pgi_shock = 1 dimensionless;
  hxt: $glx -> glc; cell*hxt_shock^heat*hxt_Vmax*(glx - glc)/hxt_Kglc/(1 + (glx + glc)/hxt_Kglc + Ki*glx*glc/hxt_Kglc^2); hxt is "glucose transport";
    hxt_Vmax = 97.24 mM_per_min; hxt_Kglc = 1.1918 mM; Ki = 0.91 dimensionless; hxt_shock = 8 dimensionless;
  hxk: glc + $atp => g6p + $adp + $h; cell*hxk_shock^heat*hxk_Vmax/(hxk_Kglc*Katp)*(glc*atp - g6p*adp/hxk_Keq)/((1 + glc/hxk_Kglc + g6p/hxk_Kg6p + t6p/Kit6p)*(1 + atp/Katp + adp/Kadp)); hxk is "hexokinase";  // modifiers: t6p; isVersionOf ec-code:2.7.1.1
    hxk_Vmax = 289.6 mM_per_min; hxk_Kglc = 0.08 mM; Katp = 0.15 mM; hxk_Kg6p = 30 mM; Kadp = 0.23 mM; hxk_Keq = 2000 dimensionless; Kit6p = 0.04 mM; hxk_shock = 8 dimensionless;
  pgm: g6p -> g1p; cell*pgm_shock^heat*pgm_Vmax/pgm_Kg6p*(g6p - g1p/pgm_Keq)/(1 + g6p/pgm_Kg6p + g1p/pgm_Kg1p); pgm is "phosphoglucomutase";  // isVersionOf ec-code:5.4.2.2
    pgm_Vmax = 0.3545 mM_per_min; pgm_Kg6p = 0.05 mM; pgm_Kg1p = 0.023 mM; pgm_Keq = 0.1667 dimensionless; pgm_shock = 16 dimensionless;
  tpp: t6p + $h2o => trh + $pho; cell*tpp_shock^heat*tpp_Vmax*t6p/Kt6p/(1 + t6p/Kt6p); tpp is "T6P phosphatase";  // isVersionOf ec-code:3.1.3.12
    tpp_Vmax = 6.5 mM_per_min; Kt6p = 0.5 mM; tpp_shock = 18 dimensionless;
  tps: g6p + udg => t6p + $udp + $h; cell*activity*tps_shock^heat*tps_Vmax*g6p*udg/(tps_Kg6p*Kudg)/((1 + g6p/tps_Kg6p)*(1 + udg/Kudg)); tps is "T6P synthase";  // isVersionOf ec-code:2.4.1.15
    tps_Vmax = 1.371 mM_per_min; tps_Kg6p = 3.8 mM; Kudg = 0.886 mM; tps_shock = 12 dimensionless; activity = 1 dimensionless;
  nth: trh + $h2o => 2 glc; cell*nth_shock^heat*nth_Vmax*trh/Ktrh/(1 + trh/Ktrh); nth is "trehalase";  // isVersionOf ec-code:3.2.1.28
    nth_Vmax = 15.2 mM_per_min; Ktrh = 2.99 mM; nth_shock = 6 dimensionless;
  ugp: g1p + $utp + $h => udg + $ppi; cell*ugp_shock^heat*ugp_Vmax*utp*g1p/(Kutp*ugp_Kg1p)/(Kiutp/Kutp + utp/Kutp + g1p/ugp_Kg1p + utp*g1p/(Kutp*ugp_Kg1p) + Kiutp/Kutp*udg/Kiudg + g1p*udg/(ugp_Kg1p*Kiudg)); ugp is "UDP glucose phosphorylase";  // isVersionOf ec-code:2.7.7.9
    ugp_Vmax = 36.82 mM_per_min; Kutp = 0.11 mM; Kiutp = 0.11 mM; ugp_Kg1p = 0.32 mM; Kiudg = 0.0035 mM; ugp_shock = 16 dimensionless;

  // Unit definitions:
  unit substance = 1e-3 mole; substance is "mmol";
  unit time = 60 second; time is "min";
  unit mM = 1e-3 mole / litre;
  unit per_min = 1 / (60 second);
  unit mM_per_min = 1e-3 mole / (litre * 60 second);
end
