// SBML level 2 version 1

model Sivakumar2011_EGFReceptorSignalingPathway()
  // This model is from the article:
  // A systems biology approach to model neural stem cell regulation by notch, shh, wnt, and EGF signaling pathways.
  // Sivakumar KC, Dhanesh SB, Shobana S, James J, Mundayoor S. OMICS2011 Oct;15(10):729-37. 21978399,
  // Abstract:
  // The Notch, Sonic Hedgehog (Shh), Wnt, and EGF pathways have long been known to in fluence cell fate specification in the developing nervous system. Here we attempt ed to evaluate the contemporary knowledge about neural stem cell differentiation promoted by various drug-based regulations through a systems biology approach. Ou r model showed the phenomenon of DAPT-mediated antagonism of Enhancer of split [E (spl)] genes and enhancement of Shh target genes by a SAG agonist that were effec tively demonstrated computationally and were consistent with experimental studies . However, in the case of model simulation of Wnt and EGF pathways, the model net work did not supply any concurrent results with experimental data despite the fac t that drugs were added at the appropriate positions. This paves insight into the potential of crosstalks between pathways considered in our study. Therefore, we manually developed a map of signaling crosstalk, which included the species conne cted by representatives from Notch, Shh, Wnt, and EGF pathways and highlighted th e regulation of a single target gene, Hes-1, based on drug-induced simulations. T hese simulations provided results that matched with experimental studies. Therefo re, these signaling crosstalk models complement as a tool toward the discovery of novel regulatory processes involved in neural stem cell maintenance, proliferati on, and differentiation during mammalian central nervous system development. To o ur knowledge, this is the first report of a simple crosstalk map that highlights the differential regulation of neural stem cell differentiation and underscores t he flow of positive and negative regulatory signals modulated by drugs.
  // Note:EGFR belongs to the human epidermal receptor (HER) family of receptor tyrosine kinases, which consists of four closely related receptors (EGFR (HER1, erbB1), HER2 (neu, erbB2), HER3 (erbB3), and HER4 (erbB4)) that mediate cellular signaling pathways involved in growth and proliferation in response to the binding of a variety of growth factor ligands. There are currently six known endogenous ligands for EGFR: EGF, transforming growth factor- (TGF-), amphiregulin, betacellulin, heparin-binding EGF (HB-EGF), and epiregulin.Upon ligand binding, the EGFR forms homo- or heterodimeric complexes (usually with HER2), which leads to activation of the receptor tyrosine kinase, via autophosphorylation. References: 12813928 14527402 14561424 14766123
  // This model originates from BioModels Database: A Database of Annotated Published Models (http://www.ebi.ac.uk/biomodels/). It is copyright (c) 2005-2011 The BioModels.net Team.
  // To the extent possible under law, all copyright and related or neighbouring rights to this encoded model have been dedicated to the public domain worldwide. Please refer to CC0 Public Domain Dedication for more information.
  // In summary, you are entitled to use this encoded model in absolutely any manner you deem suitable, verbatim, or with modification, alone or embedded it in a larger context, redistribute it, commercially or not, in a restricted way or not..
  // To cite BioModels Database, please use: Li C, Donizelli M, Rodriguez N, Dharuri H, Endler L, Chelliah V, Li L, He E, Henry A, Stefan MI, Snoep JL, Hucka M, Le Novère N, Laibe C (2010) BioModels Database: An enhanced, curated and annotated resource for published quantitative kinetic models. BMC Syst Biol., 4:92.
  // biomodels.db:BIOMD0000000394
  // biomodels.db:MODEL1101270003
  // isDescribedBy pubmed:21978399
  // occursIn CL:0000047
  // isVersionOf GO:0007173
  // occursIn taxonomy:40674

  // Compartments:
  compartment default = 1;
  compartment Cytosol in default = 1;

  // Species:
  // Long Name: Thymoma viral proto-oncogene Synonym: PKB,RAC protein kinase,protein kinase B Accession: P00551
  species s21 in Cytosol = 5/Cytosol; s21 is "Akt";  // isVersionOf uniprot:P31749
  // Long Name: Thymoma viral proto-oncogene Synonym: PKB,RAC protein kinase,protein kinase B Accession: P00551
  species s22 in Cytosol = 0; s22 is "Akt";  // isVersionOf uniprot:P31749
  // Long Name: MAP/ERK kinase Synonym: Dual specificity mitogen-activated protein kinase kinase Accession: P00559
  species s25 in Cytosol = 5/Cytosol; s25 is "MEK1_minus_2";  // isVersionOf uniprot:Q02750
  // Long Name: MAP/ERK kinase Synonym: Dual specificity mitogen-activated protein kinase kinase Accession: P00559
  species s26 in Cytosol = 0; s26 is "MEK1_minus_2";  // isVersionOf uniprot:Q02750
  // Long Name: Extracellular signal-regulated kinase Synonym: MAPK,Mitogen-activated protein kinase,pp42/44 Accession: P00543
  species s27 in Cytosol = 5/Cytosol; s27 is "ERK1_minus_2";  // isVersionOf GO:0004707
  // Long Name: Extracellular signal-regulated kinase Synonym: MAPK,Mitogen-activated protein kinase,pp42/44 Accession: P00543
  species s28 in Cytosol = 0; s28 is "ERK1_minus_2";  // isVersionOf GO:0004707
  // Long Name: Raf-1 kinase inhibitor protein Synonym: Hippocampal cholinergic stimulatory peptide precursor,PEBP,Phosphatidylethanolamine-binding protein,Terminal flower 1,neuropolypeptide h3,prostastic binding protein Accession: P00548
  species s29 in Cytosol = 5/Cytosol; s29 is "RKIP";  // isVersionOf uniprot:P30086
  // Long Name: Raf-1 kinase inhibitor protein Synonym: Hippocampal cholinergic stimulatory peptide precursor,PEBP,Phosphatidylethanolamine-binding protein,Terminal flower 1,neuropolypeptide h3,prostastic binding protein Accession: P00548
  species s30 in Cytosol = 0; s30 is "RKIP";  // isVersionOf uniprot:P30086
  // Long Name: protein phosphatase 2A Synonym: Serine/threonine protein phosphatase 2A Accession: P00547
  species PP2A in Cytosol = 5/Cytosol;  // hasPart uniprot:P62714
  // Long Name: 14-3-3 Synonym: PAR-5,Stratifin,protein kinase C inhibitor protein-1 (KCIP-1) Accession: P00539
  species _14_minus_3_minus_3 in Cytosol = 5/Cytosol;  // isVersionOf uniprot:P61981
  // Long Name: Mitogenesis Differentiation Synonym: Synonym not specified Accession: U02228
  species Mitogenesis_br_Differentiation in Cytosol = 1/Cytosol;
  // Long Name: RAF proto-oncogene serine/threonine-protein kinase Synonym: C-Raf,MAP kinase kinase kinase,Raf-1 Accession: P00560
  species s23 in Cytosol = 5/Cytosol; s23 is "Raf_minus_1";  // isVersionOf uniprot:P04049
  // Long Name: RAF proto-oncogene serine/threonine-protein kinase Synonym: C-Raf,MAP kinase kinase kinase,Raf-1 Accession: P00560
  species s24 in Cytosol = 0; s24 is "Raf_minus_1";  // isVersionOf uniprot:P04049
  // Long Name: Epidermal growth factor Synonym: gurken,transforming growth factor alpha Accession: P00549
  species EGF in default = 5/default;  // isVersionOf uniprot:P01133
  // Long Name: EGFR Synonym: Gurken receptor, Erb, Neu, neuregulin Accession: P00542
  species s123 in Cytosol = 5/Cytosol; s123 is "EGFR";  // isVersionOf uniprot:Q504U8
  // Long Name: Ras Synonym: Synonym not specified Accession: P00552
  species Ras in Cytosol = 5/Cytosol;  // isHomologTo uniprot:P08646
  // Long Name: GDP Synonym: Synonym not specified Accession: S01652
  species GDP in Cytosol = 0.5/Cytosol;  // CHEBI:17552
  // Long Name: GTP Synonym: Synonym not specified Accession: S01653
  species GTP in Cytosol = 0;  // CHEBI:15996
  // Long Name: PKC Synonym: Synonym not specified Accession: P00565
  species PKC in Cytosol = 2/Cytosol;  // isVersionOf uniprot:P17252
  // Long Name: EGFR Synonym: Gurken receptor, Erb, Neu, neuregulin Accession: P00542
  species s129 in Cytosol = 0; s129 is "EGFR";  // isVersionOf uniprot:Q504U8
  species erlotinib in default = 0.5/default;  // isVersionOf CHEBI:114785
  species Complex_br__EGFR__br_GAP in Cytosol = 0; Complex_br__EGFR__br_GAP is "Complex_br_(EGFR/../_br_GAP)";  // isVersionOf GO:0043234
  species Complex_Grb2_PLC in Cytosol = 5/Cytosol; Complex_Grb2_PLC is "Complex(Grb2/../PLC)";  // isVersionOf GO:0043234

  // Parameters:
  kcatp_r8_s124 = 0.511;
  kM_r8_s124_s23 = 0.47;
  kcatn_r8_s124 = 1.083;
  kM_r8_s124_s24 = 0.786;
  kcatp_r8_s31 = 0.727;
  kM_r8_s31_s23 = 0.614;
  kcatn_r8_s31 = 0.636;
  kM_r8_s31_s24 = 1.367;
  kI_r8_s22 = 0.583;
  kI_r8_s29 = 1.219;
  kI_r8_s33 = 0.293;
  kcatp_r9 = 2;
  kM_r9_s25 = 0.626;
  kcatn_r9 = 0.693;
  kM_r9_s26 = 0.463;
  kcatp_r11 = 0.787;
  kM_r11_s29 = 1.459;
  kcatn_r11 = 0.566;
  kM_r11_s30 = 1.021;
  kcatp_r14 = 0.558;
  kM_r14_s27 = 0.038;
  kcatn_r14 = 0.725;
  kM_r14_s28 = 1.65;
  kass_r15 = 2;
  kdiss_r15 = 0.074;
  kass_r17_s3 = 0.73;
  kdiss_r17_s3 = 1.13;
  kI_re11_s142 = 1;
  kass_r6_s144 = 1;
  kdiss_r6_s144 = 1;
  kass_r7_s144 = 1;
  kdiss_r7_s144 = 1;
  kass_r4_s144 = 1;
  kdiss_r4_s144 = 1;
  Vp_re11 = 1;
  kM_re11_s129 = 1;
  kM_re11_s147 = 1;
  ki_re11_s129 = 1;

  // Reactions:
  // kinetics of unireactant enzymes
  r8: s23 -> s24; kI_r8_s22/(kI_r8_s22 + s22)*(kI_r8_s29/(kI_r8_s29 + s29))*(kI_r8_s33/(kI_r8_s33 + _14_minus_3_minus_3))*(Ras*((kcatp_r8_s124/kM_r8_s124_s23*s23 - kcatn_r8_s124/kM_r8_s124_s24*s24)/(1 + s23/kM_r8_s124_s23 + s24/kM_r8_s124_s24)) + PP2A*((kcatp_r8_s31/kM_r8_s31_s23*s23 - kcatn_r8_s31/kM_r8_s31_s24*s24)/(1 + s23/kM_r8_s31_s23 + s24/kM_r8_s31_s24)));  // modifiers: s22, s29, Ras, _14_minus_3_minus_3, PP2A
  // kinetics of non-modulated unireactant enzymes
  r9: s25 -> s26; s24*((kcatp_r9/kM_r9_s25*s25 - kcatn_r9/kM_r9_s26*s26)/(1 + s25/kM_r9_s25 + s26/kM_r9_s26));  // modifiers: s24
  // kinetics of non-modulated unireactant enzymes
  r11: s29 -> s30; PKC*((kcatp_r11/kM_r11_s29*s29 - kcatn_r11/kM_r11_s30*s30)/(1 + s29/kM_r11_s29 + s30/kM_r11_s30));  // modifiers: PKC
  // kinetics of non-modulated unireactant enzymes
  r14: s27 -> s28; s26*((kcatp_r14/kM_r14_s27*s27 - kcatn_r14/kM_r14_s28*s28)/(1 + s27/kM_r14_s27 + s28/kM_r14_s28));  // modifiers: s26
  // mass action rate law for first order forward, first order reverse, reversible reactions, continuous scheme
  r15: s28 -> Mitogenesis_br_Differentiation; kass_r15*s28 - kdiss_r15*Mitogenesis_br_Differentiation;
  // reversible rapid-equilibrium random order ternary-complex mechanism with one product
  r17: 2 s123 -> s129; EGF*(kass_r17_s3*s123^2 - kdiss_r17_s3*s129);  // modifiers: EGF
  // kinetics of non-modulated unireactant enzymes
  r6: PKC -> PKC; Complex_br__EGFR__br_GAP*(kass_r6_s144*PKC - kdiss_r6_s144*PKC);  // modifiers: Complex_br__EGFR__br_GAP
  // kinetics of non-modulated unireactant enzymes
  r7: s21 -> s22; Complex_br__EGFR__br_GAP*(kass_r7_s144*s21 - kdiss_r7_s144*s22);  // modifiers: Complex_br__EGFR__br_GAP
  // reversible rapid-equilibrium random order ternary-complex mechanism with two products
  r4: Ras + GDP -> Ras + GTP; Complex_br__EGFR__br_GAP*(kass_r4_s144*Ras*GDP - kdiss_r4_s144*Ras*GTP);  // modifiers: Complex_br__EGFR__br_GAP
  // mass action rate law for second order irreversible reactions, two reactants, continuous scheme
  re11: s129 + Complex_Grb2_PLC => Complex_br__EGFR__br_GAP; kI_re11_s142/(kI_re11_s142 + erlotinib)*(Vp_re11*s129*Complex_Grb2_PLC/(ki_re11_s129*kM_re11_s147 + kM_re11_s147*s129 + kM_re11_s129*Complex_Grb2_PLC + s129*Complex_Grb2_PLC));  // modifiers: erlotinib
end
