// SBML level 2 version 1

model Sivakumar2011_WntSignalingPathway()
  // This model is from the article:
  // A systems biology approach to model neural stem cell regulation by notch, shh, wnt, and EGF signaling pathways.
  // Sivakumar KC, Dhanesh SB, Shobana S, James J, Mundayoor S. OMICS2011 Oct;15(10):729-37. 21978399,
  // Abstract:
  // The Notch, Sonic Hedgehog (Shh), Wnt, and EGF pathways have long been known to in fluence cell fate specification in the developing nervous system. Here we attempt ed to evaluate the contemporary knowledge about neural stem cell differentiation promoted by various drug-based regulations through a systems biology approach. Ou r model showed the phenomenon of DAPT-mediated antagonism of Enhancer of split [E (spl)] genes and enhancement of Shh target genes by a SAG agonist that were effec tively demonstrated computationally and were consistent with experimental studies . However, in the case of model simulation of Wnt and EGF pathways, the model net work did not supply any concurrent results with experimental data despite the fac t that drugs were added at the appropriate positions. This paves insight into the potential of crosstalks between pathways considered in our study. Therefore, we manually developed a map of signaling crosstalk, which included the species conne cted by representatives from Notch, Shh, Wnt, and EGF pathways and highlighted th e regulation of a single target gene, Hes-1, based on drug-induced simulations. T hese simulations provided results that matched with experimental studies. Therefo re, these signaling crosstalk models complement as a tool toward the discovery of novel regulatory processes involved in neural stem cell maintenance, proliferati on, and differentiation during mammalian central nervous system development. To o ur knowledge, this is the first report of a simple crosstalk map that highlights the differential regulation of neural stem cell differentiation and underscores t he flow of positive and negative regulatory signals modulated by drugs.
  // Note:The secreted protein Wnt activates the heptahelical receptor Frizzled on nieghboring cells. Activation of Frizzled causes the recruitment of additional membrane proteins which in turn result in 1) the activation of the protein Dishevelled via phosphorylation and 2) the activation of a heterotrimeric G protein of unknown type. Activation of Dishevelled results in the down-regulation of the Beta-Catenin destruction complex which causes ubiquitination of Beta-Catenin and its ultimate degradation via the proteasome. Inhibition of the Beta-Catenin destruction complex yields a higher cytosolic concentration of Beta-Catenin, which enters the nucleus, binds various transcriptional regulatory molecules including the TCF/LEF class of proteins, and results in the transcription of TCF/LEF target genes. Activation of the heterotrimeric G-protein pathway in turn activates Phospholipase C which in turn catalyzes the catalysis of PI(4,5)P2 into DAG and IP3. References: 12356903, 12573432 & Wnt signaling pathway
  // To the extent possible under law, all copyright and related or neighbouring rights to this encoded model have been dedicated to the public domain worldwide. Please refer to CC0 Public Domain Dedication for more information.
  // In summary, you are entitled to use this encoded model in absolutely any manner you deem suitable, verbatim, or with modification, alone or embedded it in a larger context, redistribute it, commercially or not, in a restricted way or not.
  // To cite BioModels Database, please use: Li C, Donizelli M, Rodriguez N, Dharuri H, Endler L, Chelliah V, Li L, He E, Henry A, Stefan MI, Snoep JL, Hucka M, Le Novère N, Laibe C (2010) BioModels Database: An enhanced, curated and annotated resource for published quantitative kinetic models. BMC Syst Biol., 4:92.
  // biomodels.db:BIOMD0000000397
  // biomodels.db:MODEL1101270002
  // isDescribedBy pubmed:21978399
  // occursIn CL:0000047
  // isVersionOf GO:0060070
  // occursIn taxonomy:40674

  // Compartments:
  compartment default = 1;
  compartment Plasma_Membrane in default = 1;
  compartment Nucleus in Plasma_Membrane = 1;
  compartment Cell_Membrane in default = 1;

  // Species:
  // Long Name: Wingless-type MMTV integration site family member Synonym: Wingless Accession: P01444
  species Wnt_default in default = 0;  // isVersionOf uniprot:P56704
  // Long Name: Long Name: Long name not specified Synonym: Synonym not specified Accession: U05624 Heterodimer Member Info: Frizzled#PROTEIN#Frizzled#P01428##;Wnt#PROTEIN#Wingless-type MMTV integration site family member#P01444#Wingless#
  species Complex_br__Wnt_Frizzled in Plasma_Membrane = 0; Complex_br__Wnt_Frizzled is "Complex_br_(Wnt/Frizzled)";
  // Long Name: Frizzled Synonym: Synonym not specified Accession: P01428
  species Frizzled in Plasma_Membrane = 3/Plasma_Membrane;  // isVersionOf uniprot:P18537
  // Long Name: Long Name: Long name not specified Synonym: Synonym not specified Accession: U05626 Heterodimer Member Info: Frizzled#PROTEIN#Frizzled#P01428##;LRP5/6#PROTEIN#Low density lipoprotein receptor related protein#P01431#Arrow#;Wnt#PROTEIN#Wingless-type MMTV integration site family member#P01444#Wingless#
  species s27 in Plasma_Membrane = 0; s27 is "Complex_br_(Frizzled/Wnt/_br_LRP5/6)";
  // Long Name: Low density lipoprotein receptor related protein Synonym: Arrow Accession: P01431
  species LRP5_6 in Plasma_Membrane = 3/Plasma_Membrane; LRP5_6 is "LRP5/6";  // isVersionOf uniprot:O75197 uniprot:O75581
  // Long Name: Casein Kinase 1 Synonym: CK1 Accession: P01460
  species Casein_Kinase_1 in Plasma_Membrane = 1/Plasma_Membrane;  // isVersionOf uniprot:P54367
  // Long Name: Casein Kinase 2 Synonym: Casein Kinase II,Protein Kinase CK2 Accession: P01459
  species Casein_Kinase_2 in Plasma_Membrane = 3/Plasma_Membrane;  // hasPart uniprot:P68400 uniprot:P67870
  // Long Name: ATP Synonym: Synonym not specified Accession: S01878
  species ATP in Plasma_Membrane = 1/Plasma_Membrane;  // isVersionOf CHEBI:15422
  // Long Name: ADP Synonym: Synonym not specified Accession: S01880
  species ADP in Plasma_Membrane = 0;  // isVersionOf CHEBI:16761
  // Long Name: Glycogen Synthase Kinase-3Beta Synonym: GSK3B,GSK3Beta,Sgg,Shaggy,Zeste White 3,Zw3 Accession: P01441
  species Glycogen_Synthase_Kinase_3_Beta in Plasma_Membrane = 0; Glycogen_Synthase_Kinase_3_Beta is "Glycogen Synthase Kinase-3_Beta_";  // isVersionOf uniprot:P49841
  // Long Name: Diversin Synonym: Ankrd6 Accession: P01466
  species Diversin in Plasma_Membrane = 1/Plasma_Membrane;  // isHomologTo uniprot:Q8UVT6
  // Long Name: Long Name: Long name not specified Synonym: Synonym not specified Accession: U05622 Heterodimer Member Info: Siah-1#PROTEIN#Seven in absentia homolog 1#P01433#seven in absentia|seven in absentia homolog|siah|sina#;Ebi#PROTEIN#Ebi#P01453#IRA1#
  species Complex_br__Ebi_Siah_1 in Plasma_Membrane = 3/Plasma_Membrane; Complex_br__Ebi_Siah_1 is "Complex_br_(Ebi/Siah-1)";
  // Long Name: Long Name: Long name not specified Synonym: Synonym not specified Accession: U05612 Heterodimer Member Info: Siah-1#PROTEIN#Seven in absentia homolog 1#P01433#seven in absentia|seven in absentia homolog|siah|sina#;Ebi#PROTEIN#Ebi#P01453#IRA1#
  species Complex_br__Siah_1_Ebi in Plasma_Membrane = 0; Complex_br__Siah_1_Ebi is "Complex_br_(Siah-1/Ebi)";
  // Long Name: Frequently rearranged in advanced T-cell lymphomas Synonym: Frequently rearranged in advanced T-cell lymphomas Accession: P01467
  species FRAT in Plasma_Membrane = 3/Plasma_Membrane;  // isVersionOf uniprot:Q92837
  // Long Name: Long Name: Long name not specified Synonym: Synonym not specified Accession: U05637 Heterodimer Member Info: Dishevelled#PROTEIN#Dishevelled#P01447#Dvl#;Beta-Arrestin#PROTEIN#Beta-Arrestin#P01456#BetaArr1|BetaArr2#;Frodo#PROTEIN#Frodo#P01470#frd#
  species s107 in Plasma_Membrane = 3/Plasma_Membrane; s107 is "Complex_br_(Dishevelled/Beta-Arrestin/_br_Frodo)";
  // Long Name: Long Name: Long name not specified Synonym: Synonym not specified Accession: U05614 Heterodimer Member Info: Axin#PROTEIN#Axin#P01429#Axis Inhibitor Protein|Conductin#;PP2A#PROTEIN#Protein phosphatase 2A#P01438#PP2A|PP2A B56 subunit|Protein Phosphatase 2A#;Adenomatous Polyposis Coli#PROTEIN#Adenomatous Polyposis Coli#P01468#APC#
  species s121 in Plasma_Membrane = 4/Plasma_Membrane; s121 is "Complex_br_(Axin/PP2A/_br_Adenomatous Polyposis Coli)";
  // Long Name: Long Name: Long name not specified Synonym: Synonym not specified Accession: U05615 Heterodimer Member Info: Axin#PROTEIN#Axin#P01429#Axis Inhibitor Protein|Conductin#;PP2A#PROTEIN#Protein phosphatase 2A#P01438#PP2A|PP2A B56 subunit|Protein Phosphatase 2A#;Glycogen Synthase Kinase-3Beta#PROTEIN#Glycogen Synthase Kinase-3Beta#P01441#GSK3B|GSK3Beta|Sgg|Shaggy|Zeste White 3|Zw3#;Casein Kinase 1#PROTEIN#Casein Kinase 1#P01460#CK1#;Diversin#PROTEIN#Diversin#P01466#Ankrd6#;Adenomatous Polyposis Coli#PROTEIN#Adenomatous Polyposis Coli#P01468#APC#
  species s155 in Plasma_Membrane = 0; s155 is "Complex_br_(Adenomatous Polyposis Coli/Axin/_br_Diversin/Casein Kinase 1/_br_Glycogen Synthase Kinase-3_Beta_/PP2A)";
  // Long Name: Long Name: Long name not specified Synonym: Synonym not specified Accession: U05611 Heterodimer Member Info: Axin#PROTEIN#Axin#P01429#Axis Inhibitor Protein|Conductin#;PP2A#PROTEIN#Protein phosphatase 2A#P01438#PP2A|PP2A B56 subunit|Protein Phosphatase 2A#;Adenomatous Polyposis Coli#PROTEIN#Adenomatous Polyposis Coli#P01468#APC#
  species s164 in Plasma_Membrane = 0; s164 is "Complex_br_(Adenomatous Polyposis Coli/Axin/_br_PP2A)";
  // Long Name: Pygopus Synonym: Pygopus Accession: P01464
  species Pygo in Nucleus = 2/Nucleus;  // isVersionOf uniprot:Q9V9W8
  // Long Name: CREB binding protein Synonym: CREB binding protein Accession: P01448
  species CBP in Nucleus = 2/Nucleus;  // isVersionOf uniprot:P45481
  // Long Name: Switched/Sucrose Non Fermentation Synonym: Switched/Sucrose Non Fermentation Accession: P01435
  species SWI_SNF in Nucleus = 2/Nucleus; SWI_SNF is "SWI/SNF";  // isVersionOf uniprot:O60264
  // Long Name: B-cell lymphoma 9 Synonym: B-cell lymphoma 9,Legless,Lgs Accession: P01450
  species Bcl9 in Nucleus = 2/Nucleus;  // isVersionOf uniprot:O00512
  // Long Name: Wnt Target Genes Synonym: Axin,Conductin,CyclinD1,En-2,ID2,MMP7,Myc,Naked,Nkd,PPAR Delta,Siamois,TCF-1,Twin,Ubx,Xbra,Xnr3 Accession: G01558
  species Wnt_Target_Genes in Nucleus = 0;
  // Long Name: Long Name: Long name not specified Synonym: Synonym not specified Accession: U05613 Heterodimer Member Info: TCF#PROTEIN#T cell factor#P01437#LEF|Lymphocyte Enhance Binding Factor|Pangolin|T Cell Factor#;Smad4#PROTEIN#Mothers against decapentaplegic homolog 4#P01455#MAD homolog 1|MAD homolog 4|Mothers against decapentaplegic homolog 1|Mothers against decapentaplegic homolog 4|Smad1#
  species Complex_br__TCF_Smad4 in Nucleus = 4/Nucleus; Complex_br__TCF_Smad4 is "Complex_br_(TCF/Smad4)";
  // Long Name: Wingless-type MMTV integration site family member Synonym: Wingless Accession: P01444
  species Wnt_Cell_Membrane in Cell_Membrane = 5/Cell_Membrane;  // isHomologTo uniprot:A4F2Q1
  // Long Name: Beta-Catenin Synonym: Armadillo Accession: P01432
  species s36 in Plasma_Membrane = 5/Plasma_Membrane; s36 is "_Beta_-Catenin";  // isVersionOf uniprot:P35222
  // Long Name: Long Name: Long name not specified Synonym: Synonym not specified Accession: U05633 Heterodimer Member Info: Axin#PROTEIN#Axin#P01429#Axis Inhibitor Protein|Conductin#;Beta-Catenin#PROTEIN#Beta-Catenin#P01432#Armadillo#;PP2A#PROTEIN#Protein phosphatase 2A#P01438#PP2A|PP2A B56 subunit|Protein Phosphatase 2A#;Adenomatous Polyposis Coli#PROTEIN#Adenomatous Polyposis Coli#P01468#APC#
  species s123 in Plasma_Membrane = 0; s123 is "Complex_br_(Adenomatous Polyposis Coli/Axin/_br__Beta_-Catenin/PP2A)";
  // Long Name: Long Name: Long name not specified Synonym: Synonym not specified Accession: U05625 Heterodimer Member Info: Axin#PROTEIN#Axin#P01429#Axis Inhibitor Protein|Conductin#;Beta-Catenin#PROTEIN#Beta-Catenin#P01432#Armadillo#;PP2A#PROTEIN#Protein phosphatase 2A#P01438#PP2A|PP2A B56 subunit|Protein Phosphatase 2A#;Diversin#PROTEIN#Diversin#P01466#Ankrd6#;Adenomatous Polyposis Coli#PROTEIN#Adenomatous Polyposis Coli#P01468#APC#
  species s129 in Plasma_Membrane = 0; s129 is "Complex_br_(Adenomatous Polyposis Coli/Axin/_br_Diversin/_Beta_-Catenin/_br_PP2A)";
  // Long Name: Long Name: Long name not specified Synonym: Synonym not specified Accession: U05617 Heterodimer Member Info: Axin#PROTEIN#Axin#P01429#Axis Inhibitor Protein|Conductin#;Beta-Catenin#PROTEIN#Beta-Catenin#P01432#Armadillo#;Siah-1#PROTEIN#Seven in absentia homolog 1#P01433#seven in absentia|seven in absentia homolog|siah|sina#;PP2A#PROTEIN#Protein phosphatase 2A#P01438#PP2A|PP2A B56 subunit|Protein Phosphatase 2A#;Ebi#PROTEIN#Ebi#P01453#IRA1#;Adenomatous Polyposis Coli#PROTEIN#Adenomatous Polyposis Coli#P01468#APC#
  species s159 in Plasma_Membrane = 0; s159 is "Complex_br_(Adenomatous Polyposis Coli/Axin/_br_PP2A/_Beta_-Catenin/_br_Siah-1/Ebi)";
  // Long Name: Beta-Catenin Synonym: Armadillo Accession: P01432
  species Beta__Catenin_Nucleus in Nucleus = 0; Beta__Catenin_Nucleus is "_Beta_-Catenin";  // isVersionOf uniprot:P35222
  // Long Name: Long Name: Long name not specified Synonym: Synonym not specified Accession: U05606 Heterodimer Member Info: Beta-Catenin#PROTEIN#Beta-Catenin#P01432#Armadillo#;TCF#PROTEIN#T cell factor#P01437#LEF|Lymphocyte Enhance Binding Factor|Pangolin|T Cell Factor#;Smad4#PROTEIN#Mothers against decapentaplegic homolog 4#P01455#MAD homolog 1|MAD homolog 4|Mothers against decapentaplegic homolog 1|Mothers against decapentaplegic homolog 4|Smad1#
  species s176 in Nucleus = 0; s176 is "Complex_br_(TCF/Smad4/_br__Beta_-Catenin)";
  // Long Name: Long Name: Long name not specified Synonym: Synonym not specified Accession: U05636 Heterodimer Member Info: Beta-Catenin#PROTEIN#Beta-Catenin#P01432#Armadillo#;TCF#PROTEIN#T cell factor#P01437#LEF|Lymphocyte Enhance Binding Factor|Pangolin|T Cell Factor#;Bcl9#PROTEIN#B-cell lymphoma 9#P01450#B-cell lymphoma 9|Legless|Lgs#;Smad4#PROTEIN#Mothers against decapentaplegic homolog 4#P01455#MAD homolog 1|MAD homolog 4|Mothers against decapentaplegic homolog 1|Mothers against decapentaplegic homolog 4|Smad1#
  species s179 in Nucleus = 0; s179 is "Complex_br_(TCF/_Beta_-Catenin/_br_Smad4/Bcl9)";
  // Long Name: Long Name: Long name not specified Synonym: Synonym not specified Accession: U05619 Heterodimer Member Info: Beta-Catenin#PROTEIN#Beta-Catenin#P01432#Armadillo#;TCF#PROTEIN#T cell factor#P01437#LEF|Lymphocyte Enhance Binding Factor|Pangolin|T Cell Factor#;Bcl9#PROTEIN#B-cell lymphoma 9#P01450#B-cell lymphoma 9|Legless|Lgs#;Smad4#PROTEIN#Mothers against decapentaplegic homolog 4#P01455#MAD homolog 1|MAD homolog 4|Mothers against decapentaplegic homolog 1|Mothers against decapentaplegic homolog 4|Smad1#;Pygo#PROTEIN#Pygopus#P01464#Pygopus#
  species s183 in Nucleus = 0; s183 is "Complex_br_(Bcl9/_Beta_-Catenin/_br_TCF/Smad4/_br_Pygo)";
  // Long Name: Long Name: Long name not specified Synonym: Synonym not specified Accession: U05623 Heterodimer Member Info: Beta-Catenin#PROTEIN#Beta-Catenin#P01432#Armadillo#;SWI/SNF#PROTEIN#Switched/Sucrose Non Fermentation#P01435#Switched/Sucrose Non Fermentation#;TCF#PROTEIN#T cell factor#P01437#LEF|Lymphocyte Enhance Binding Factor|Pangolin|T Cell Factor#;Bcl9#PROTEIN#B-cell lymphoma 9#P01450#B-cell lymphoma 9|Legless|Lgs#;Smad4#PROTEIN#Mothers against decapentaplegic homolog 4#P01455#MAD homolog 1|MAD homolog 4|Mothers against decapentaplegic homolog 1|Mothers against decapentaplegic homolog 4|Smad1#;Pygo#PROTEIN#Pygopus#P01464#Pygopus#
  species s188 in Nucleus = 0; s188 is "Complex_br_(_Beta_-Catenin/TCF/_br_Smad4/Bcl9/_br_Pygo/SWI/_br_SNF)";
  // Long Name: Long Name: Long name not specified Synonym: Synonym not specified Accession: U05616 Heterodimer Member Info: Axin#PROTEIN#Axin#P01429#Axis Inhibitor Protein|Conductin#;Beta-Catenin#PROTEIN#Beta-Catenin#P01432#Armadillo#;PP2A#PROTEIN#Protein phosphatase 2A#P01438#PP2A|PP2A B56 subunit|Protein Phosphatase 2A#;Casein Kinase 1#PROTEIN#Casein Kinase 1#P01460#CK1#;Diversin#PROTEIN#Diversin#P01466#Ankrd6#;Adenomatous Polyposis Coli#PROTEIN#Adenomatous Polyposis Coli#P01468#APC#
  species s245 in Plasma_Membrane = 0; s245 is "Complex_br_(Adenomatous Polyposis Coli/_Beta_-Catenin/_br_Axin/PP2A/_br_Diversin/Casein Kinase 1)";
  // Long Name: Long Name: Long name not specified Synonym: Synonym not specified Accession: U05639 Heterodimer Member Info: Axin#PROTEIN#Axin#P01429#Axis Inhibitor Protein|Conductin#;Beta-Catenin#PROTEIN#Beta-Catenin#P01432#Armadillo#;PP2A#PROTEIN#Protein phosphatase 2A#P01438#PP2A|PP2A B56 subunit|Protein Phosphatase 2A#;Glycogen Synthase Kinase-3Beta#PROTEIN#Glycogen Synthase Kinase-3Beta#P01441#GSK3B|GSK3Beta|Sgg|Shaggy|Zeste White 3|Zw3#;Casein Kinase 1#PROTEIN#Casein Kinase 1#P01460#CK1#;Diversin#PROTEIN#Diversin#P01466#Ankrd6#;Adenomatous Polyposis Coli#PROTEIN#Adenomatous Polyposis Coli#P01468#APC#
  species s252 in Plasma_Membrane = 5/Plasma_Membrane; s252 is "Complex_br_(Adenomatous Polyposis Coli/_Beta_-Catenin/_br_Glycogen Synthase Kinase-3_Beta_/Axin/_br_PP2A/Diversin/_br_Casein Kinase 1)";
  // Long Name: Ubiquitin Synonym: Synonym not specified Accession: S01883
  species Ubiquitin in Plasma_Membrane = 1/Plasma_Membrane;
  // Long Name: Beta-Catenin Synonym: Armadillo Accession: P01432
  species s260 in Plasma_Membrane = 0; s260 is "_Beta_-Catenin";  // isVersionOf uniprot:P35222
  // Long Name: Beta-Catenin Synonym: Armadillo Accession: P01432
  species s270 in Plasma_Membrane = 0; s270 is "_Beta_-Catenin";  // isVersionOf uniprot:P35222
  // Long Name: Long Name: Long name not specified Synonym: Synonym not specified Accession: U05609 Heterodimer Member Info: Axin#PROTEIN#Axin#P01429#Axis Inhibitor Protein|Conductin#;Beta-Catenin#PROTEIN#Beta-Catenin#P01432#Armadillo#;Siah-1#PROTEIN#Seven in absentia homolog 1#P01433#seven in absentia|seven in absentia homolog|siah|sina#;PP2A#PROTEIN#Protein phosphatase 2A#P01438#PP2A|PP2A B56 subunit|Protein Phosphatase 2A#;Ebi#PROTEIN#Ebi#P01453#IRA1#;Adenomatous Polyposis Coli#PROTEIN#Adenomatous Polyposis Coli#P01468#APC#
  species s275 in Plasma_Membrane = 0; s275 is "Complex_br_(Adenomatous Polyposis Coli/_Beta_-Catenin/_br_Siah-1/Ebi/_br_Axin/PP2A)";
  // Long Name: Long Name: Long name not specified Synonym: Synonym not specified Accession: U05635 Heterodimer Member Info: Axin#PROTEIN#Axin#P01429#Axis Inhibitor Protein|Conductin#;Beta-Catenin#PROTEIN#Beta-Catenin#P01432#Armadillo#;PP2A#PROTEIN#Protein phosphatase 2A#P01438#PP2A|PP2A B56 subunit|Protein Phosphatase 2A#;Adenomatous Polyposis Coli#PROTEIN#Adenomatous Polyposis Coli#P01468#APC#
  species s278 in Plasma_Membrane = 0; s278 is "Complex_br_(Adenomatous Polyposis Coli/_Beta_-Catenin/_br_Axin/PP2A)";
  // Long Name: Long Name: Long name not specified Synonym: Synonym not specified Accession: U05629 Heterodimer Member Info: Dishevelled#PROTEIN#Dishevelled#P01447#Dvl#;Beta-Arrestin#PROTEIN#Beta-Arrestin#P01456#BetaArr1|BetaArr2#;Frodo#PROTEIN#Frodo#P01470#frd#
  species s286 in Plasma_Membrane = 0; s286 is "Complex_br_(Dishevelled/Beta-Arrestin/_br_Frodo)";
  // Long Name: Long Name: Long name not specified Synonym: Synonym not specified Accession: U05641 Heterodimer Member Info: Dishevelled#PROTEIN#Dishevelled#P01447#Dvl#;Beta-Arrestin#PROTEIN#Beta-Arrestin#P01456#BetaArr1|BetaArr2#;Casein Kinase 2#PROTEIN#Casein Kinase 2#P01459#Casein Kinase II|Protein Kinase CK2#;Frodo#PROTEIN#Frodo#P01470#frd#
  species s288 in Plasma_Membrane = 0; s288 is "Complex_br_(Dishevelled/Beta-Arrestin/_br_Frodo/Casein Kinase 2)";
  // Long Name: Long Name: Long name not specified Synonym: Synonym not specified Accession: U05620 Heterodimer Member Info: Dishevelled#PROTEIN#Dishevelled#P01447#Dvl#;Beta-Arrestin#PROTEIN#Beta-Arrestin#P01456#BetaArr1|BetaArr2#;Casein Kinase 2#PROTEIN#Casein Kinase 2#P01459#Casein Kinase II|Protein Kinase CK2#;FRAT#PROTEIN#Frequently rearranged in advanced T-cell lymphomas#P01467#Frequently rearranged in advanced T-cell lymphomas#;Frodo#PROTEIN#Frodo#P01470#frd#
  species s292 in Plasma_Membrane = 0; s292 is "Complex_br_(Dishevelled/Casein Kinase 2/_br_Beta-Arrestin/Frodo/_br_FRAT)";
  // Long Name: betaTransducin repeat-containing protein Synonym: BTrCP,Beta Transducin Repeat-Containing Protein,Slimb Accession: P01454
  species beta_TrCP in Plasma_Membrane = 2/Plasma_Membrane; beta_TrCP is "_beta_TrCP";  // isHomologTo uniprot:Q91854
  // Long Name: Long Name: Long name not specified Synonym: Synonym not specified Accession: U05608 Heterodimer Member Info: Axin#PROTEIN#Axin#P01429#Axis Inhibitor Protein|Conductin#;Beta-Catenin#PROTEIN#Beta-Catenin#P01432#Armadillo#;PP2A#PROTEIN#Protein phosphatase 2A#P01438#PP2A|PP2A B56 subunit|Protein Phosphatase 2A#;Glycogen Synthase Kinase-3Beta#PROTEIN#Glycogen Synthase Kinase-3Beta#P01441#GSK3B|GSK3Beta|Sgg|Shaggy|Zeste White 3|Zw3#;betaTrCP#PROTEIN#betaTransducin repeat-containing protein#P01454#BTrCP|Beta Transducin Repeat-Containing Protein|Slimb#;Casein Kinase 1#PROTEIN#Casein Kinase 1#P01460#CK1#;Diversin#PROTEIN#Diversin#P01466#Ankrd6#;Adenomatous Polyposis Coli#PROTEIN#Adenomatous Polyposis Coli#P01468#APC#
  species s259 in Plasma_Membrane = 0; s259 is "Complex_br_(Adenomatous Polyposis Coli/Axin/_br_PP2A/Diversin/_br_Casein Kinase 1/_Beta_-Catenin/_br__beta_TrCP/Glycogen Synthase Kinase-3_Beta_)";
  // Long Name: Long Name: Long name not specified Synonym: Synonym not specified Accession: U05607 Heterodimer Member Info: Axin#PROTEIN#Axin#P01429#Axis Inhibitor Protein|Conductin#;Beta-Catenin#PROTEIN#Beta-Catenin#P01432#Armadillo#;PP2A#PROTEIN#Protein phosphatase 2A#P01438#PP2A|PP2A B56 subunit|Protein Phosphatase 2A#;Glycogen Synthase Kinase-3Beta#PROTEIN#Glycogen Synthase Kinase-3Beta#P01441#GSK3B|GSK3Beta|Sgg|Shaggy|Zeste White 3|Zw3#;betaTrCP#PROTEIN#betaTransducin repeat-containing protein#P01454#BTrCP|Beta Transducin Repeat-Containing Protein|Slimb#;Casein Kinase 1#PROTEIN#Casein Kinase 1#P01460#CK1#;Diversin#PROTEIN#Diversin#P01466#Ankrd6#;Adenomatous Polyposis Coli#PROTEIN#Adenomatous Polyposis Coli#P01468#APC#
  species s266 in Plasma_Membrane = 0; s266 is "Complex_br_(Adenomatous Polyposis Coli/Axin/_br_PP2A/Diversin/_br_Casein Kinase 1/_Beta_-Catenin/_br__beta_TrCP/Glycogen Synthase Kinase-3_Beta_)";
  // Long Name: Long Name: Long name not specified Synonym: Synonym not specified Accession: U05627 Heterodimer Member Info: Beta-Catenin#PROTEIN#Beta-Catenin#P01432#Armadillo#;betaTrCP#PROTEIN#betaTransducin repeat-containing protein#P01454#BTrCP|Beta Transducin Repeat-Containing Protein|Slimb#
  species s267 in Plasma_Membrane = 0; s267 is "Complex_br_(_beta_TrCP/_Beta_-Catenin)";
  species _6_bromoindirubin_3_oxime in Plasma_Membrane = 0.5/Plasma_Membrane; _6_bromoindirubin_3_oxime is "6 bromoindirubin 3'oxime";  // isVersionOf CHEBI:25750
  species Complex_br__Bcl9_Pygo_Smad4 in Nucleus = 0; Complex_br__Bcl9_Pygo_Smad4 is "Complex_br_(Bcl9/Pygo/../Smad4)";

  // Parameters:
  kass_r1 = 0.784;
  kdiss_r1 = 0.82;
  kass_r5 = 1.15;
  kdiss_r5 = 0.92;
  kass_r47 = 1.31;
  kdiss_r47 = 0.81;
  kass_r48 = 0.85;
  kdiss_r48 = 1.36;
  kass_r54 = 0.8;
  kdiss_r54 = 1.7;
  kass_r58 = 1.74;
  kdiss_r58 = 0.25;
  kass_r63 = 1.77;
  kdiss_r63 = 0.61;
  kass_r64 = 1.29;
  kdiss_r64 = 0.72;
  kass_r65 = 1.8;
  kdiss_r65 = 0.004;
  kass_r66 = 1.99;
  kdiss_r66 = 0.036;
  kass_r68 = 2;
  kass_r88 = 0.2;
  kdiss_r88 = 1.09;
  kass_r90 = 0.27;
  kdiss_r90 = 1.028;
  kass_r91 = 0.36;
  kdiss_r91 = 1.16;
  kass_r92 = 0.58;
  kdiss_r92 = 0.92;
  kass_r96 = 1.45;
  kdiss_r96 = 0.183;
  kass_r98 = 1.97;
  kdiss_r98 = 1.09;
  kass_r99 = 0.51;
  kdiss_r99 = 0.854;
  kass_r102 = 0.163;
  kdiss_r102 = 1.65;
  kass_r103 = 0.45;
  kdiss_r103 = 1.277;
  kass_r105 = 0.48;
  kdiss_r105 = 1.62;
  kass_r106 = 0.05;
  kdiss_r106 = 1.13;
  kass_r107 = 0.91;
  kdiss_r107 = 1.056;
  kass_r104_s30 = 0.39;
  kdiss_r104_s30 = 1.278;
  kass_r85_s30 = 0.7;
  kdiss_r85_s30 = 0.649;
  kass_re65 = 1.68;
  kass_re64 = 0.83;
  kass_r86_s37 = 0.87;
  kdiss_r86_s37 = 1.32;
  kass_r67 = 0.86;
  kdiss_r67 = 0.7;
  kI_r86_s304 = 1.43;

  // Reactions:
  r68: Complex_br__Bcl9_Pygo_Smad4 => Wnt_Target_Genes; kass_r68*Complex_br__Bcl9_Pygo_Smad4;
  // mass action rate law for second order forward, first order reverse, reversible reactions, two reactants, continuous scheme
  r1: Wnt_default + Frizzled -> Complex_br__Wnt_Frizzled; kass_r1*Wnt_default*Frizzled - kdiss_r1*Complex_br__Wnt_Frizzled;
  // mass action rate law for second order forward, first order reverse, reversible reactions, two reactants, continuous scheme
  r5: LRP5_6 + Complex_br__Wnt_Frizzled -> s27; kass_r5*LRP5_6*Complex_br__Wnt_Frizzled - kdiss_r5*s27;
  // mass action rate law for second order forward, first order reverse, reversible reactions, two reactants, continuous scheme
  r47: s121 + s36 -> s123; kass_r47*s121*s36 - kdiss_r47*s123;
  // mass action rate law for second order forward, first order reverse, reversible reactions, two reactants, continuous scheme
  r48: s123 + Diversin -> s129; kass_r48*s123*Diversin - kdiss_r48*s129;
  // mass action rate law for second order forward, first order reverse, reversible reactions, two reactants, continuous scheme
  r54: s123 + Complex_br__Ebi_Siah_1 -> s159; kass_r54*s123*Complex_br__Ebi_Siah_1 - kdiss_r54*s159;
  // mass action rate law for first order forward, first order reverse, reversible reactions, continuous scheme
  r58: s36 -> Beta__Catenin_Nucleus; kass_r58*s36 - kdiss_r58*Beta__Catenin_Nucleus;
  // mass action rate law for second order forward, first order reverse, reversible reactions, two reactants, continuous scheme
  r63: Complex_br__TCF_Smad4 + Beta__Catenin_Nucleus -> s176; kass_r63*Complex_br__TCF_Smad4*Beta__Catenin_Nucleus - kdiss_r63*s176;
  // mass action rate law for second order forward, first order reverse, reversible reactions, two reactants, continuous scheme
  r66: s183 + SWI_SNF -> s188; kass_r66*s183*SWI_SNF - kdiss_r66*s188;
  // mass action rate law for second order forward, first order reverse, reversible reactions, two reactants, continuous scheme
  r88: s252 + beta_TrCP -> s259; kass_r88*s252*beta_TrCP - kdiss_r88*s259;
  // mass action rate law for second order forward, first order reverse, reversible reactions, two reactants, continuous scheme
  r90: s259 + Ubiquitin -> s266; kass_r90*s259*Ubiquitin - kdiss_r90*s266;
  // mass action rate law for first order forward, second order reverse, reversible reactions, two products, continuous scheme
  r91: s266 -> s155 + s267; kass_r91*s266 - kdiss_r91*s155*s267;
  // mass action rate law for first order forward, second order reverse, reversible reactions, two products, continuous scheme
  r92: s267 -> beta_TrCP + s260; kass_r92*s267 - kdiss_r92*beta_TrCP*s260;
  // mass action rate law for second order forward, first order reverse, reversible reactions, two reactants, continuous scheme
  r96: s159 + Ubiquitin -> s275; kass_r96*s159*Ubiquitin - kdiss_r96*s275;
  // mass action rate law for first order forward, second order reverse, reversible reactions, two products, continuous scheme
  r98: s275 -> Complex_br__Siah_1_Ebi + s278; kass_r98*s275 - kdiss_r98*Complex_br__Siah_1_Ebi*s278;
  // mass action rate law for first order forward, second order reverse, reversible reactions, two products, continuous scheme
  r99: s278 -> s164 + s270; kass_r99*s278 - kdiss_r99*s164*s270;
  // mass action rate law for second order forward, first order reverse, reversible reactions, two reactants, continuous scheme
  r102: s286 + Casein_Kinase_2 -> s288; kass_r102*s286*Casein_Kinase_2 - kdiss_r102*s288;
  // mass action rate law for second order forward, first order reverse, reversible reactions, two reactants, continuous scheme
  r103: s288 + FRAT -> s292; kass_r103*s288*FRAT - kdiss_r103*s292;
  // mass action rate law for first order forward, first order reverse, reversible reactions, continuous scheme
  r105: s292 -> Glycogen_Synthase_Kinase_3_Beta; kass_r105*s292 - kdiss_r105*Glycogen_Synthase_Kinase_3_Beta;
  // mass action rate law for first order forward, first order reverse, reversible reactions, continuous scheme
  r106: s286 -> Casein_Kinase_1; kass_r106*s286 - kdiss_r106*Casein_Kinase_1;
  // mass action rate law for first order forward, first order reverse, reversible reactions, continuous scheme
  r107: Wnt_Cell_Membrane -> Wnt_default; kass_r107*Wnt_Cell_Membrane - kdiss_r107*Wnt_default;
  // reversible rapid-equilibrium random order ternary-complex mechanism with two products
  r104: s107 + ATP -> s286 + ADP; Casein_Kinase_1*(kass_r104_s30*s107*ATP - kdiss_r104_s30*s286*ADP);  // modifiers: s27, Casein_Kinase_1
  // reversible rapid-equilibrium random order ternary-complex mechanism with two products
  r85: s129 + ATP -> s245 + ADP; Casein_Kinase_1*(kass_r85_s30*s129*ATP - kdiss_r85_s30*s245*ADP);  // modifiers: Casein_Kinase_1
  // mass action rate law for second order forward, first order reverse, reversible reactions, two reactants, continuous scheme
  r65: s179 + Pygo -> s183; kass_r65*s179*Pygo - kdiss_r65*s183;
  // mass action rate law for second order forward, first order reverse, reversible reactions, two reactants, continuous scheme
  r64: s176 + Bcl9 -> s179; kass_r64*s176*Bcl9 - kdiss_r64*s179;
  // mass action rate law for first order irreversible reactions, continuous scheme
  re65: s260 => Beta__Catenin_Nucleus; kass_re65*s260;
  // mass action rate law for first order irreversible reactions, continuous scheme
  re64: s270 => Beta__Catenin_Nucleus; kass_re64*s270;
  // mass action rate law for second order forward, first order reverse, reversible reactions, two reactants, continuous scheme
  r67: s188 + CBP -> Complex_br__Bcl9_Pygo_Smad4; kass_r67*s188*CBP - kdiss_r67*Complex_br__Bcl9_Pygo_Smad4;
  // reversible thermodynamically independent convenience kinetics
  r86: s245 + ATP + ATP + ATP -> s252 + ADP + ADP + ADP; kI_r86_s304/(kI_r86_s304 + _6_bromoindirubin_3_oxime)*Glycogen_Synthase_Kinase_3_Beta*(kass_r86_s37*s245*ATP*ATP*ATP - kdiss_r86_s37*s252*ADP*ADP*ADP);  // modifiers: Glycogen_Synthase_Kinase_3_Beta, _6_bromoindirubin_3_oxime
end
