// SBML level 2 version 4

function Constant_flux_irreversible(v)
  v;
end
Constant_flux_irreversible is "Constant flux (irreversible)";

model Cookson2011_EnzymaticQueueingCoupling()
  // This model is from the article:
  // Queueing up for enzymatic processing: correlated signaling through coupled degradation.
  // Natalie A Cookson, William H Mather, Tal Danino, Octavio Mondragón-Palomino, Ruth J Williams, Lev S Tsimring, & Jeff Hasty Molecular Systems Biology2011; 7:561; DOI:10.1038/msb.2011.94
  // Abstract:
  // High-throughput technologies have led to the generation of complex wiring diagrams as a post-sequencing paradigm for depicting the interactions between vast and diverse cellular species. While these diagrams are useful for analyzing biological systems on a large scale, a detailed understanding of the molecular mechanisms that underlie the observed network connections is critical for the further development of systems and synthetic biology. Here, we use queueing theory to investigate how ‘waiting lines’ can lead to correlations between protein ‘customers’ that are coupled solely through a downstream set of enzymatic ‘servers’. Using the E. coli ClpXP degradation machine as a model processing system, we observe significant cross-talk between two networks that are indirectly coupled through a common set of processors. We further illustrate the implications of enzymatic queueing using a synthetic biology application, in which two independent synthetic networks demonstrate synchronized behavior when common ClpXP machinery is overburdened. Our results demonstrate that such post-translational processes can lead to dynamic connections in cellular networks and may provide a mechanistic understanding of existing but currently inexplicable links.
  // Individual stochastic trajectories for a queueing system in three different conditions, 1) Underloaded, 2) Balanced and 3) Overloaded, demonstrate correlation resonance. The parameter values in this model correspond to the Balanced Condition.
  // This model originates from BioModels Database: A Database of Annotated Published Models (http://www.ebi.ac.uk/biomodels/).
  // To the extent possible under law, all copyright and related or neighbouring rights to this encoded model have been dedicated to the public domain worldwide. Please refer to CC0 Public Domain Dedication for more information.
  // In summary, you are entitled to use this encoded model in absolutely any manner you deem suitable, verbatim, or with modification, alone or embedded it in a larger context, redistribute it, commercially or not, in a restricted way or not..
  // To cite BioModels Database, please use: Li C, Donizelli M, Rodriguez N, Dharuri H, Endler L, Chelliah V, Li L, He E, Henry A, Stefan MI, Snoep JL, Hucka M, Le Novère N, Laibe C (2010) BioModels Database: An enhanced, curated and annotated resource for published quantitative kinetic models. BMC Syst Biol., 4:92.
  // biomodels.db:BIOMD0000000405
  // biomodels.db:MODEL1111150000
  // isDescribedBy pubmed:22186735
  // isVersionOf GO:0019899 CCO:Y0000030
  // occursIn taxonomy:131567

  // Compartments:
  compartment compartment_1 = 1;

  // Species:
  species x1 in compartment_1 = 0;  // isVersionOf CHEBI:36080
  species x2 in compartment_1 = 0;  // isVersionOf CHEBI:36080
  species E1 in compartment_1 = 0;
  species E2 in compartment_1 = 0;
  species E in compartment_1 = 100;
  species E_x1 in compartment_1 = 1; E_x1 is "E+x1";  // isVersionOf GO:0043234

  // Parameters:
  lambda1 = 500;
  lambda2 = 500;
  mu = 10;
  Kp = 1000;
  g = 0.03465736;

  // Reactions:
  binding1: x1 + E => E1; compartment_1*Kp*x1*E;
  binding2: x2 + E => E2; compartment_1*Kp*x2*E;
  production1: => x1; compartment_1*Constant_flux_irreversible(lambda1);
  production2: => x2; compartment_1*Constant_flux_irreversible(lambda2);
  degradation1: E1 => E; compartment_1*mu*E1;
  degradation2: E2 => E; compartment_1*mu*E2;
  dilution1: x1 => ; compartment_1*g*x1;
  dilution2: x2 => ; compartment_1*g*x2;

  // Unit definitions:
  unit volume = dimensionless;
  unit substance = item;
end
