// SBML level 2 version 4

model Moriya2011_CellCycle_FissionYeast()
  // This model is from the article:
  // Overexpression limits of fission yeast cell-cycle regulators in vivo and in silico.
  // Moriya H, Chino A, Kapuy O, Csikász-Nagy A, Novák B. Mol Syst Biol. 2011 Dec 6;7:556. 22146300,
  // Abstract:
  // Cellular systems are generally robust against fluctuations of intracellular parameters such as gene expression level. However, little is known about expression limits of genes required to halt cellular systems. In this study, using the fission yeast Schizosaccharomyces pombe, we developed a genetic 'tug-of-war' (gTOW) method to assess the overexpression limit of certain genes. Using gTOW, we determined copy number limits for 31 cell-cycle regulators; the limits varied from 1 to >100. Comparison with orthologs of the budding yeast Saccharomyces cerevisiae suggested the presence of a conserved fragile core in the eukaryotic cell cycle. Robustness profiles of networks regulating cytokinesis in both yeasts (septation-initiation network (SIN) and mitotic exit network (MEN)) were quite different, probably reflecting differences in their physiologic functions. Fragility in the regulation of GTPase spg1 was due to dosage imbalance against GTPase-activating protein (GAP) byr4. Using the gTOW data, we modified a mathematical model and successfully reproduced the robustness of the S. pombe cell cycle with the model.
  // To the extent possible under law, all copyright and related or neighbouring rights to this encoded model have been dedicated to the public domain worldwide. Please refer to CC0 Public Domain Dedication for more information.
  // In summary, you are entitled to use this encoded model in absolutely any manner you deem suitable, verbatim, or with modification, alone or embedded it in a larger context, redistribute it, commercially or not, in a restricted way or not.
  // To cite BioModels Database, please use: Li C, Donizelli M, Rodriguez N, Dharuri H, Endler L, Chelliah V, Li L, He E, Henry A, Stefan MI, Snoep JL, Hucka M, Le Novère N, Laibe C (2010) BioModels Database: An enhanced, curated and annotated resource for published quantitative kinetic models. BMC Syst Biol., 4:92.
  // biomodels.db:BIOMD0000000406
  // biomodels.db:MODEL1111040000
  // isDescribedBy pubmed:22146300
  // occursIn taxonomy:4896
  // isVersionOf GO:0051726
  // isDerivedFrom biomodels.db:MODEL1011020000 pubmed:16839182

  // Compartments:
  compartment default = 1 volume;  // isVersionOf GO:0005623

  // Species:
  species $s4 in default = 0; s4 is "Vdrum";  // isVersionOf uniprot:P40380
  species $s9 in default = 0; s9 is "Vdcyc";  // isVersionOf uniprot:P25009
  species $sa4_degraded in default = 0;
  species Srw1 in default = 0.00239076/default;  // isVersionOf uniprot:O13286
  species Slp1A in default = 6.33821e-5/default;  // isVersionOf uniprot:P78972
  species s49 in default = 0; s49 is "Puc1";  // isVersionOf uniprot:P25009
  species IE in default = 0.00127807/default;
  species $iIE in default = 0;
  species $rum1 in default = 0; rum1 is "rum1+";  // isVersionOf uniprot:P40380
  species $cig2 in default = 0; cig2 is "cig2+";  // isVersionOf uniprot:P36630
  species Cdc13 in default = 0.0439902/default;  // isVersionOf uniprot:P10815
  species $cdc13 in default = 0; cdc13 is "cdc13+";  // isVersionOf uniprot:P10815
  species pCdc13 in default = 0.1147007/default;  // isVersionOf uniprot:P10815 kegg.compound:C00562
  species $sa161_degraded in default = 0;
  species Cig2p in default = 0;  // isVersionOf uniprot:P36630 kegg.compound:C00562
  species Pyp3 in default = 0;  // isVersionOf uniprot:P32587
  species $iSrw1 in default = 0;  // isVersionOf uniprot:O13286
  species $iSlp1 in default = 0;  // isVersionOf uniprot:P78972
  species Cig2 in default = 0;  // isVersionOf uniprot:P36630
  substanceOnly species $iCdc10 in default = 0;  // isVersionOf uniprot:P01129
  species Cdc10 in default = 0;  // isVersionOf uniprot:P01129
  species Mik1 in default = 0;  // isVersionOf uniprot:P30290
  species $mik1 in default = 0; mik1 is "mik1+";  // isVersionOf uniprot:P30290
  species $sa347_degraded in default = 0;
  species Cig1 in default = 0;  // isVersionOf uniprot:P24865
  species $cig1 in default = 0; cig1 is "cig1+";  // isVersionOf uniprot:P24865
  species $sa353_degraded in default = 0;
  species $s78 in default = 0; s78 is "Clp1+";  // isVersionOf uniprot:Q10299
  species $iWee1 in default = 0;  // isVersionOf uniprot:P07527
  species Wee1 in default = 0;  // isVersionOf uniprot:P07527
  species s81 in default = 0; s81 is "Clp1";  // isVersionOf uniprot:Q10299
  species $iCdc25 in default = 0;  // isVersionOf uniprot:P06652
  species Cdc25 in default = 0;  // isVersionOf uniprot:P06652
  species Cdc18T in default = 0;  // isVersionOf uniprot:P41411
  species $cdc18 in default = 0; cdc18 is "cdc18+";  // isVersionOf uniprot:P41411
  species $sa386_degraded in default = 0;
  species $s89 in default = 0; s89 is "preRC";  // isVersionOf GO:0005656
  species postRC in default = 0;  // isVersionOf GO:0000808
  species repldna in default = 0;  // isVersionOf CHEBI:16991
  species $irepldna in default = 0;  // isVersionOf CHEBI:16991
  species $sa370_degraded in default = 0;
  species $sa44_degraded in default = 0;
  species s130 in default = 0; s130 is "Vdc18";  // isVersionOf uniprot:P41411
  species Cdc13p_Rum1 in default = 0.0432273/default; Cdc13p_Rum1 is "Cdc13p-Rum1";  // hasPart uniprot:P40380 uniprot:P10815
  species Cig2_Rum1 in default = 0; Cig2_Rum1 is "Cig2-Rum1";  // hasPart uniprot:P36630 uniprot:P40380
  species Cig2p_Rum1 in default = 0; Cig2p_Rum1 is "Cig2p-Rum1";  // hasPart uniprot:P40380 uniprot:P36630
  species $s157 in default = 0; s157 is "UDNA";  // isVersionOf CHEBI:16991
  species Cdc13_Rum1 in default = 0.0165018/default; Cdc13_Rum1 is "Cdc13-Rum1";  // hasPart uniprot:P40380 uniprot:P10815
  species Rum1 in default = 0;  // isVersionOf uniprot:P40380

  // Parameters:
  ksc18_dash = 0.075; ksc18_dash is "ksc18'";
  ksc18 = 0.005;
  kdc18 = 0.001;
  kdc18c13 = 0.45;
  kdc18cig = 1;
  kdc18cig_dash = 0; kdc18cig_dash is "kdc18cig'";
  krepl = 2;
  kini_dash = 10;
  kini_dash2 = 10; kini_dash2 is "kini''";
  kini_dash3 = 0; kini_dash3 is "kini'''";
  ko18 = 100;
  ko18r = 1;
  kori = 125;
  kipre = 1;
  kipre_dash = 1; kipre_dash is "kipre'";
  Jipre = 0.01;
  n = 4;
  k = 0.1;
  k_dash = 10; k_dash is "k'";
  kscyc = 0.03;
  kdcyc = 0.018;
  kdcycsrw = 1;
  kdcycsrw_dash = 0.0001; kdcycsrw_dash is "kdcycsrw'";
  kdcycslp = 1;
  kdcycslp_dash = 0.0003; kdcycslp_dash is "kdcycslp'";
  kasrw = 1.25;
  kasrw_dash = 30; kasrw_dash is "kasrw'";
  kisrw = 1.5;
  kisrw_dash = 40; kisrw_dash is "kisrw'";
  kisrw_dash2 = 1; kisrw_dash2 is "kisrw''";
  kisrw_dash3 = 4; kisrw_dash3 is "kisrw'''";
  kisrw_dash4 = 4; kisrw_dash4 is "kisrw''''";
  Jasrw = 0.01;
  Jisrw = 0.01;
  kaslp = 1;
  kislp = 0.2;
  Jaslp = 0.01;
  Jislp = 0.01;
  kaie = 0.0975;
  kiie = 0.04;
  Jaie = 0.01;
  Jiie = 0.01;
  ksrum = 1;
  kdrum = 0.4;
  kdrumpuc = 0.1;
  kdrumci1 = 1;
  kdrumcig = 15;
  kdrumcig_dash = 10;
  kdrumc13 = 50;
  kdrumc13_dash = 5; kdrumc13_dash is "kdrumc13'";
  lp = 500;
  lm = 100;
  kscig_dash = 0.04; kscig_dash is "kscig'";
  kdcig = 0.02;
  kdcig_dash = 1; kdcig_dash is "kdcig'";
  kac10 = 0.125;
  kic10 = 0.01;
  kic10_dash = 3; kic10_dash is "kic10'";
  Jac10 = 0.01;
  Jic10 = 0.01;
  kwee_dash = 0.01; kwee_dash is "kwee'";
  kwee_dash2 = 0.5; kwee_dash2 is "kwee''";
  Vawee_dash = 0.24; Vawee_dash is "Vawee'";
  Vawee_dash2 = 1; Vawee_dash2 is "Vawee''";
  Viwee_dash = 0; Viwee_dash is "Viwee'";
  Viwee_dash2 = 1; Viwee_dash2 is "Viwee''";
  Jawee = 0.04;
  Jiwee = 0.03;
  k25_dash = 0.01; k25_dash is "k25'";
  k25_dash2 = 1; k25_dash2 is "k25''";
  Va25_dash2 = 1; Va25_dash2 is "Va25''";
  Vi25_dash2 = 1; Vi25_dash2 is "Vi25''";
  Vi25_dash = 0.24; Vi25_dash is "Vi25'";
  Vi25 = 0.3;
  Ja25 = 0.03;
  Ji25 = 0.03;
  lcp = 3;
  lcm = 1;
  kmik_dash = 0.01; kmik_dash is "kmik'";
  kmik_dash2 = 4; kmik_dash2 is "kmik''";
  Vamik = 0.25;
  Vimik = 0.75;
  Vimik_dash = 10; Vimik_dash is "Vimik'";
  Vimik_dash2 = 10; Vimik_dash2 is "Vimik''";
  Vimik_dash3 = 0.25; Vimik_dash3 is "Vimik'''";
  kpyp = 0.6;
  ksflp = 0.0015;
  ksflp_dash = 0.015; ksflp_dash is "ksflp'";
  kdflp = 0.1;
  ksci1 = 0.0015;
  kdci1 = 0.1;
  kdci1_dash = 5; kdci1_dash is "kdci1'";
  kdci1_dash2 = 0.2; kdci1_dash2 is "kdci1''";
  k255 = 0.1;
  kpyp2 = 0.01;
  kscig = 0.002;
  oriT = 1;
  kmik = 0;
  Vamik_dash = 0.75; Vamik_dash is "Vamik'";
  Rad3 = 1;
  beta = 10;
  Puc1 = 1;
  Srw1T = 1;
  Slp1T = 1;
  Cdc10T = 1;
  Cdc25T = 1;
  Wee1T = 1;
  kaie_dash = 0.05; kaie_dash is "kaie'";

  // Assignment rules:
  BB := oriT + Cdc18T + (ko18r + Vdc18)/ko18;
  kwee := kwee_dash*Wee1T + (kwee_dash2 - kwee_dash)*Wee1;
  Vdrum := kdrum + kdrumpuc*Puc1 + kdrumci1*Cig1 + kdrumcig*Cig2 + kdrumcig_dash*Cig2p + kdrumc13*Cdc13 + kdrumc13_dash*pCdc13;
  Vdcyc := kdcyc + kdcycsrw*Srw1 + kdcycsrw_dash*Srw1T + kdcycslp*Slp1A + kdcycslp_dash*Slp1T;
  Vdc18 := kdc18 + kdc18c13*Cdc13 + kdc18cig*Cig2 + kdc18cig_dash*Cig2p;
  k25 := k25_dash*Cdc25T + (k25_dash2 - k25_dash)*Cdc25;
  chrom := 2*oriT*Cdc18T/(BB + sqrt(BB^2 - 4*oriT*Cdc18T));
  preRC := (oriT - postRC - repldna)*Cdc18/((ko18r + Vdc18)/ko18 + Cdc18);
  Cdc18 := Cdc18T - chrom;
  UDNA := Rad3*(k*Cdc18T + k_dash*postRC*Cdc18/((ko18r + Vdc18)/ko18 + Cdc18));

  // Reactions:
  re3: $iSrw1 => Srw1; (kasrw + kasrw_dash*Slp1A)*(Srw1T - Srw1)/(Jasrw + (Srw1T - Srw1));  // modifiers: Slp1A
  re4: Srw1 => $iSrw1; (kisrw + kisrw_dash*Cig2 + kisrw_dash2*Cdc13 + kisrw_dash3*Puc1 + kisrw_dash4*Cig1)*Srw1/(Jisrw + Srw1);  // modifiers: Cdc13, s49, Cig1, Cig2
  re5: $iIE => IE; (kaie*Cdc13 + kaie_dash*Cig1)*(1 - IE)/(Jaie + (1 - IE));  // modifiers: Cig1, Cdc13
  re6: IE => $iIE; kiie*IE/(Jiie + IE);
  re7: $iSlp1 => Slp1A; kaslp*IE*(Slp1T - Slp1A)/(Jaslp + (Slp1T - Slp1A));  // modifiers: IE
  re8: Slp1A => $iSlp1; kislp*Slp1A/(Jislp + Slp1A);
  re12: $cdc13 => Cdc13; kscyc; re12 is "Cdc13_Synthesis";
  re14: Cdc13p_Rum1 => pCdc13 + $sa161_degraded; Vdrum*Cdc13p_Rum1; re14 is "Trim_Dissociation_Rum1degradation";  // modifiers: s4
  re15: Cdc13_Rum1 => Rum1 + $sa4_degraded; Vdcyc*Cdc13_Rum1;  // modifiers: s9
  re16: Cdc13_Rum1 => Cdc13 + $sa161_degraded; Vdrum*Cdc13_Rum1; re16 is "Trim_Dissociation_Rum1degradation";  // modifiers: s4
  re17: Cdc13p_Rum1 => Rum1 + $sa4_degraded; Vdcyc*Cdc13p_Rum1;  // modifiers: s9
  re18: Cdc13p_Rum1 => Cdc13_Rum1; (kpyp2 + k25)*Cdc13p_Rum1; re18 is "Cdc13_Dephosphorylation";  // modifiers: Pyp3, Cdc25
  re19: $cig2 => Cig2; kscig*Cdc10T + kscig_dash*Cdc10; re19 is "Cdc13_Synthesis";  // modifiers: Cdc10
  Cdc13_Phosphorylation: Cig2 => Cig2p; kmik_dash2*Mik1*Cig2;  // modifiers: Mik1
  re21: Cig2p => Cig2; k25*k255*Cig2p + kpyp*Cig2p/(1 + beta*UDNA); re21 is "Cdc13_Dephosphorylation";  // modifiers: Pyp3, Cdc25, s157
  re22: Rum1 + Cig2 -> Cig2_Rum1; lcp*Cig2*Rum1 - lcm*Cig2_Rum1; re22 is "Rum1+Cdc13_association";
  re23: Cig2_Rum1 => Rum1 + $sa44_degraded; (kdcig + kdcig_dash*Slp1A)*Cig2_Rum1;  // modifiers: Slp1A
  re24: Rum1 + Cig2p -> Cig2p_Rum1; lcp*Cig2p*Rum1 - lcm*Cig2p_Rum1; re24 is "Rum1+Cdc13_association";
  re25: Cig2p_Rum1 => Rum1 + $sa44_degraded; (kdcig + kdcig_dash*Slp1A)*Cig2p_Rum1;  // modifiers: Slp1A
  re27: Cig2p_Rum1 => Cig2_Rum1; k25*k255*Cig2p_Rum1 + kpyp*Cig2p_Rum1/(1 + beta*UDNA); re27 is "Cdc13_Dephosphorylation";  // modifiers: Pyp3, Cdc25
  re28: Cig2 => $sa44_degraded; (kdcig + kdcig_dash*Slp1A)*Cig2;  // modifiers: Slp1A
  re29: Cig2p_Rum1 => Cig2p; Vdrum*Cig2p_Rum1;  // modifiers: s4
  re30: Cig2_Rum1 => Cig2 + $sa161_degraded; Vdrum*Cig2_Rum1;  // modifiers: s4
  re31: Cig2p => $sa44_degraded; (kdcig + kdcig_dash*Slp1A)*Cig2p;  // modifiers: Slp1A
  re32: Cdc10 => $iCdc10; (kic10 + kic10_dash*Cig2)*Cdc10/(Jic10 + Cdc10);  // modifiers: Cig2
  re33: $iCdc10 => Cdc10; kac10*(Cdc10T - Cdc10)/(Jac10 + (Cdc10T - Cdc10));
  re34: $mik1 => Mik1; Vamik*Cdc10T + Vamik_dash*Cdc10;  // modifiers: Cdc10
  re35: Mik1 => $sa347_degraded; (Vimik + Vimik_dash*Cig2 + Vimik_dash2*Cdc13 + Vimik_dash3*pCdc13)*Mik1;  // modifiers: Cig2, Cdc13, pCdc13
  re36: $cig1 => Cig1; ksci1;
  re37: Cig1 => $sa353_degraded; (kdci1 + kdci1_dash*Slp1A + kdci1_dash2*Srw1)*Cig1;  // modifiers: Slp1A, Srw1
  re38: $s78 => s81; ksflp + ksflp_dash*Slp1A;  // modifiers: Slp1A
  re39: $iWee1 => Wee1; (Vawee_dash + Vawee_dash2*s81)*(Wee1T - Wee1)/(Jawee + (Wee1T - Wee1));  // modifiers: s81
  re40: Wee1 => $iWee1; (Viwee_dash + Viwee_dash2*Cdc13)*Wee1/(Jiwee + Wee1);  // modifiers: Cdc13
  re41: pCdc13 => $sa4_degraded; Vdcyc*pCdc13;  // modifiers: s9
  re42: Cdc13 => $sa4_degraded; Vdcyc*Cdc13;  // modifiers: s9
  re43: Cdc13_Rum1 => Cdc13p_Rum1; (kmik_dash*Mik1 + kwee)*Cdc13_Rum1;  // modifiers: Wee1, Mik1
  re44: Cig2_Rum1 => Cig2p_Rum1; kmik_dash2*Mik1*Cig2_Rum1;  // modifiers: Mik1
  re45: $iCdc25 => Cdc25; Va25_dash2*Cdc13*(Cdc25T - Cdc25)/(Ja25 + (Cdc25T - Cdc25));  // modifiers: Cdc13
  re46: Cdc25 => $iCdc25; (Vi25_dash + Vi25_dash2*s81 + Vi25*UDNA)*Cdc25/(Ji25 + Cdc25);  // modifiers: s81, s157
  re47: $cdc18 => Cdc18T; ksc18*(Cdc10T - Cdc10 + Cdc10) + ksc18_dash*Cdc10;  // modifiers: Cdc10
  re48: Cdc18T => $sa386_degraded; Vdc18*Cdc18T;  // modifiers: s130
  re53: s81 => $sa370_degraded; kdflp*s81;
  re54: Cdc13 + Rum1 -> Cdc13_Rum1; lp*Cdc13*Rum1 - lm*Cdc13_Rum1;
  re56: pCdc13 => Cdc13; (kpyp2 + k25)*pCdc13;  // modifiers: Cdc25, Pyp3
  re57: Cdc13 => pCdc13; (kmik_dash*Mik1 + kwee)*Cdc13;  // modifiers: Wee1, Mik1
  re58: Rum1 + pCdc13 -> Cdc13p_Rum1; lp*pCdc13*Rum1 - lm*Cdc13p_Rum1;
  re60: Rum1 => $sa161_degraded; Vdrum*Rum1;  // modifiers: s4
  re62: $rum1 => Rum1; ksrum;
  re66: $s89 => postRC; (kini_dash*Cdc13 + kini_dash2*Cig2 + kini_dash3*Cig2p)*preRC;  // modifiers: Cig2, Cdc13, Cig2p
  re67: repldna => $irepldna; kori/(1 + ((kipre*Cdc13 + kipre_dash*Cig2)/Jipre)^n)*repldna;  // modifiers: Cig2, Cdc13, Cig2p
  re68: postRC => repldna; krepl*postRC;

  // Unit definitions:
  unit substance = mole;
  unit volume = litre;
  unit area = metre^2;
  unit length = metre;
  unit time = second;
end
