// SBML level 2 version 4

model Schliemann2011_TNF_ProAntiApoptosis()
  // This model is from the article:
  // Heterogeneity Reduces Sensitivity of Cell Death for TNF-Stimuli
  // Schliemann M, Bullinger E, Borchers S, Allgower F, Findeisen R, Scheurich P. BMC Syst Biol.2011 Dec 28;5(1):204. 22204418,
  // Abstract:
  // BACKGROUND: Apoptosis is a form of programmed cell death essential for the maintenance of homeostasis and the removal of potentially damaged cells in multicellular organisms. By binding its cognate membrane receptor, TNF receptor type 1 (TNF-R1), the proinflammatory cytokine Tumor Necrosis Factor (TNF) activates pro-apoptotic signaling via caspase activation, but at the same time also stimulates nuclear factor kappaB (NF-kappaB)-mediated survival pathways. Differential dose-response relationships of these two major TNF signaling pathways have been described experimentally and using mathematical modeling. However, the quantitative analysis of the complex interplay between pro- and anti-apoptotic signaling pathways is an open question as it is challenging for several reasons: the overall signaling network is complex, various time scales are present, and cells respond quantitatively and qualitatively in a heterogeneous manner. RESULTS: This study analyzes the complex interplay of the crosstalk of TNF-R1 induced pro- and anti-apoptotic signaling pathways based on an experimentally validated mathematical model. The mathematical model describes the temporal responses on both the single cell level as well as the level of a heterogeneous cell population, as observed in the respective quantitative experiments using TNF-R1 stimuli of different strengths and durations. Global sensitivity of the heterogeneous population was quantified by measuring the average gradient of time of death versus each population parameter. This global sensitivity analysis uncovers the concentrations of Caspase-8 and Caspase-3, and their respective inhibitors BAR and XIAP, as key elements for deciding the cell's fate. A simulated knockout of the NF-kappaB-mediated anti-apoptotic signaling reveals the importance of this pathway for delaying the time of death, reducing the death rate in the case of pulse stimulation and significantly increasing cell-to-cell variability. CONCLUSIONS: Cell ensemble modeling of a heterogeneous cell population including a global sensitivity analysis presented here allowed us to illuminate the role of the different elements and parameters on apoptotic signaling. The receptors serve to transmit the external stimulus; procaspases and their inhibitors control the switching from life to death, while NF-kappaB enhances the heterogeneity of the cell population. The global sensitivity analysis of the cell population model further revealed an unexpected impact of heterogeneity, i.e. the reduction of parametric sensitivity.
  // Note:SBML model generated from Matlab system description on 12-July-2011 21:08:15 by exportSBML Copyright Eric Bullinger 2007-2011
  // To the extent possible under law, all copyright and related or neighbouring rights to this encoded model have been dedicated to the public domain worldwide. Please refer to CC0 Public Domain Dedication for more information.
  // In summary, you are entitled to use this encoded model in absolutely any manner you deem suitable, verbatim, or with modification, alone or embedded it in a larger context, redistribute it, commercially or not, in a restricted way or not.
  // To cite BioModels Database, please use: Li C, Donizelli M, Rodriguez N, Dharuri H, Endler L, Chelliah V, Li L, He E, Henry A, Stefan MI, Snoep JL, Hucka M, Le Novère N, Laibe C (2010) BioModels Database: An enhanced, curated and annotated resource for published quantitative kinetic models. BMC Syst Biol., 4:92.
  // biomodels.db:BIOMD0000000407
  // biomodels.db:MODEL1112210000
  // isDescribedBy pubmed:22204418
  // occursIn taxonomy:9606 BTO:0002267
  // isPartOf kegg.pathway:map04210
  // isVersionOf GO:0006915

  // Compartments:
  compartment cytoplasm = 3.2 pl;  // isVersionOf GO:0005737
  compartment extracellular = 1344 pl;  // isVersionOf GO:0005576
  compartment nucleus = 1.056 pl;  // isVersionOf GO:0005634

  // Species:
  substanceOnly species TNFR_E in extracellular = 0.005;  // substance in a_mole; isVersionOf uniprot:P19438
  substanceOnly species TNF_E in extracellular = 0.2688;  // substance in a_mole; isVersionOf uniprot:P01375
  substanceOnly species TNF_TNFR_E in extracellular = 0; TNF_TNFR_E is "TNF:TNFR_E";  // substance in a_mole; isVersionOf uniprot:P19438 uniprot:P01375
  substanceOnly species TNFR in cytoplasm = 0.00028;  // substance in a_mole; isVersionOf uniprot:P19438
  substanceOnly species RIP in cytoplasm = 0.20256;  // substance in a_mole; isVersionOf uniprot:Q13546
  substanceOnly species TRADD in cytoplasm = 0.29344;  // substance in a_mole; isVersionOf uniprot:Q15628
  substanceOnly species TRAF2 in cytoplasm = 0.33056;  // substance in a_mole; isVersionOf uniprot:Q12933
  substanceOnly species FADD in cytoplasm = 0.30944;  // substance in a_mole; isVersionOf uniprot:Q13158
  substanceOnly species TNF_TNFR_TRADD in cytoplasm = 0; TNF_TNFR_TRADD is "TNF:TNFR:TRADD";  // substance in a_mole; isVersionOf uniprot:P19438 uniprot:P01375 uniprot:Q15628
  substanceOnly species TNFRC1 in cytoplasm = 0;  // substance in a_mole; isVersionOf uniprot:P19438 uniprot:P01375 uniprot:Q15628 uniprot:Q12933
  substanceOnly species TNFRCint1 in cytoplasm = 0;  // substance in a_mole; isVersionOf uniprot:P19438 uniprot:P01375 uniprot:Q15628 uniprot:Q12933
  substanceOnly species TNFRCint2 in cytoplasm = 0;  // substance in a_mole; isVersionOf uniprot:P19438 uniprot:P01375 uniprot:Q15628
  substanceOnly species TNFRCint3 in cytoplasm = 0;  // substance in a_mole; isVersionOf uniprot:P19438 uniprot:P01375 uniprot:Q15628 uniprot:Q13158
  substanceOnly species TNFRC2 in cytoplasm = 0;  // substance in a_mole; isVersionOf uniprot:P19438 uniprot:P01375 uniprot:Q15628 uniprot:Q13158
  substanceOnly species FLIP in cytoplasm = 0.0320472;  // substance in a_mole; isVersionOf uniprot:O15519
  substanceOnly species TNFRC2_FLIP in cytoplasm = 0; TNFRC2_FLIP is "TNFRC2:FLIP";  // substance in a_mole; isVersionOf uniprot:P19438 uniprot:P01375 uniprot:Q15628 uniprot:Q13158
  substanceOnly species TNFRC2_pCasp8 in cytoplasm = 0; TNFRC2_pCasp8 is "TNFRC2:pCasp8";  // substance in a_mole; isVersionOf uniprot:P19438 uniprot:P01375 uniprot:Q15628 uniprot:Q13158
  substanceOnly species TNFRC2_FLIP_FLIP in cytoplasm = 0; TNFRC2_FLIP_FLIP is "TNFRC2:FLIP:FLIP";  // substance in a_mole; isVersionOf uniprot:P19438 uniprot:P01375 uniprot:Q15628 uniprot:Q13158
  substanceOnly species TNFRC2_pCasp8_pCasp8 in cytoplasm = 0; TNFRC2_pCasp8_pCasp8 is "TNFRC2:pCasp8:pCasp8";  // substance in a_mole; isVersionOf uniprot:P19438 uniprot:P01375 uniprot:Q15628 uniprot:Q13158
  substanceOnly species TNFRC2_FLIP_pCasp8 in cytoplasm = 0; TNFRC2_FLIP_pCasp8 is "TNFRC2:FLIP:pCasp8";  // substance in a_mole; isVersionOf uniprot:P19438 uniprot:P01375 uniprot:Q15628 uniprot:Q13158
  substanceOnly species TNFRC2_FLIP_pCasp8_RIP_TRAF2 in cytoplasm = 0; TNFRC2_FLIP_pCasp8_RIP_TRAF2 is "TNFRC2:FLIP:pCasp8:RIP:TRAF2";  // substance in a_mole; isVersionOf uniprot:P19438 uniprot:P01375 uniprot:Q15628 uniprot:Q13158
  substanceOnly species IKK in cytoplasm = 0.64;  // substance in a_mole; isVersionOf uniprot:O15111
  substanceOnly species IKKa in cytoplasm = 0;  // substance in a_mole; isVersionOf uniprot:O15111
  substanceOnly species A20 in cytoplasm = 0.104434;  // substance in a_mole; isVersionOf uniprot:P21580
  substanceOnly species NFkB in cytoplasm = 0.000115365;  // substance in a_mole; isVersionOf uniprot:P19838
  substanceOnly species IkBa in cytoplasm = 0.00101518;  // substance in a_mole; isVersionOf uniprot:P25963
  substanceOnly species IkBa_NFkB in cytoplasm = 0.0151032; IkBa_NFkB is "IkBa:NFkB";  // substance in a_mole; isVersionOf uniprot:P25963 uniprot:P19838
  substanceOnly species PIkBa in cytoplasm = 0;  // substance in a_mole; isVersionOf uniprot:P25963
  substanceOnly species NFkB_N in nucleus = 0.000691431;  // substance in a_mole; isVersionOf uniprot:P19838
  substanceOnly species IkBa_N in nucleus = 0.0013839;  // substance in a_mole; isVersionOf uniprot:P25963
  substanceOnly species IkBa_NFkB_N in nucleus = 9.00189e-5; IkBa_NFkB_N is "IkBa:NFkB_N";  // substance in a_mole; isVersionOf uniprot:P25963 uniprot:P19838
  substanceOnly species A20_mRNA in nucleus = 5.56657e-5;  // substance in a_mole; isVersionOf ensembl:ENST00000237289
  substanceOnly species IkBa_mRNA in nucleus = 5.31517e-5;  // substance in a_mole; isVersionOf ensembl:ENST00000216797
  substanceOnly species XIAP_mRNA in nucleus = 0.000219646;  // substance in a_mole; isVersionOf ensembl:ENST00000371199
  substanceOnly species FLIP_mRNA in nucleus = 0.000139056;  // substance in a_mole; isVersionOf ensembl:ENST00000309955
  substanceOnly species BAR in cytoplasm = 0.28789;  // substance in a_mole; isVersionOf uniprot:Q9NZS9
  substanceOnly species XIAP in cytoplasm = 7.83371;  // substance in a_mole; isVersionOf uniprot:P98170
  substanceOnly species pCasp8 in cytoplasm = 3.2;  // substance in a_mole; isVersionOf uniprot:Q14790
  substanceOnly species pCasp3 in cytoplasm = 0.8;  // substance in a_mole; isVersionOf uniprot:P42574
  substanceOnly species pCasp6 in cytoplasm = 0.064;  // substance in a_mole; isVersionOf uniprot:P55212
  substanceOnly species Casp8 in cytoplasm = 0;  // substance in a_mole; isVersionOf uniprot:Q14790
  substanceOnly species Casp3 in cytoplasm = 0;  // substance in a_mole; isVersionOf uniprot:P42574
  substanceOnly species Casp6 in cytoplasm = 0;  // substance in a_mole; isVersionOf uniprot:P55212
  substanceOnly species BAR_Casp8 in cytoplasm = 0; BAR_Casp8 is "BAR:Casp8";  // substance in a_mole; isVersionOf uniprot:Q9NZS9 uniprot:Q14790
  substanceOnly species XIAP_Casp3 in cytoplasm = 0; XIAP_Casp3 is "XIAP:Casp3";  // substance in a_mole; isVersionOf uniprot:P98170 uniprot:P42574
  substanceOnly species PARP in cytoplasm = 1.66667;  // substance in a_mole; isVersionOf uniprot:P09874
  substanceOnly species cPARP in cytoplasm = 0;  // substance in a_mole; isVersionOf uniprot:P09874

  // Reactions:
  J1: TNFR => TNFR_E; ka_1*TNFR; J1 is "TNFR transport into membrane";
    ka_1 = 0.001 per_second;
  J2: => TNFR; ka_2; J2 is "TNFR production";
    ka_2 = 2.8e-7 a_mole_per_second;
  J3: TNFR_E => ; ka_3*TNFR_E; J3 is "TNFR degradation";
    ka_3 = 5.6e-5 per_second;
  J4: -> RIP; ka_4 - kd_4*RIP; J4 is "RIP turnover";
    ka_4 = 2.0256e-5 a_mole_per_second; kd_4 = 0.0001 per_second;
  J5: -> TRADD; ka_5 - kd_5*TRADD; J5 is "TRADD turnover";
    ka_5 = 2.9344e-5 a_mole_per_second; kd_5 = 0.0001 per_second;
  J6: -> TRAF2; ka_6 - kd_6*TRAF2; J6 is "TRAF2 turnover";
    ka_6 = 3.3056e-5 a_mole_per_second; kd_6 = 0.0001 per_second;
  J7: -> FADD; ka_7 - kd_7*FADD; J7 is "FADD turnover";
    ka_7 = 3.0944e-5 a_mole_per_second; kd_7 = 0.0001 per_second;
  J8: TNF_TNFR_E => ; ka_8*TNF_TNFR_E; J8 is "TNF~TNFR degradation";
    ka_8 = 5.6e-5 per_second;
  J9: TNF_TNFR_TRADD => ; ka_9*TNF_TNFR_TRADD; J9 is "TNF:TNFR:TRADD degradation";
    ka_9 = 0.02352 per_second;
  J10: TNFRC1 => ; ka_10*TNFRC1; J10 is "TNFR Complex1 degradation";
    ka_10 = 5.6e-5 per_second;
  J11: TNFRC2 => ; ka_11*TNFRC2; J11 is "TNFR Complex2 degradation";
    ka_11 = 5.6e-5 per_second;
  J12: TNFRC2_FLIP => ; ka_12*TNFRC2_FLIP; J12 is "TNFR Complex2~FLIP degradation";
    ka_12 = 5.6e-5 per_second;
  J13: TNFRC2_FLIP_FLIP => ; ka_13*TNFRC2_FLIP_FLIP; J13 is "TNFR Complex2~FLIP~FLIP degradation";
    ka_13 = 5.6e-5 per_second;
  J14: TNFRC2_pCasp8 => ; ka_14*TNFRC2_pCasp8; J14 is "TNFR Complex2~Procaspase-8 degradation";
    ka_14 = 5.6e-5 per_second;
  J15: TNFRC2_pCasp8_pCasp8 => ; ka_15*TNFRC2_pCasp8_pCasp8; J15 is "TNFR Complex2~Procaspase-8~Procaspase-8 degradation";
    ka_15 = 5.6e-5 per_second;
  J16: TNFRC2_FLIP_pCasp8 => ; ka_16*TNFRC2_FLIP_pCasp8; J16 is "TNFR Complex2~FLIP~Procaspase-8 degradation";
    ka_16 = 5.6e-5 per_second;
  J17: TNFRC2_FLIP_pCasp8_RIP_TRAF2 => ; ka_17*TNFRC2_FLIP_pCasp8_RIP_TRAF2; J17 is "TNFR Complex2~FLIP~Procaspase-8~RIP~TRAF2 degradation";
    ka_17 = 5.6e-5 per_second;
  J18: TNFR_E + TNF_E -> TNF_TNFR_E; ka_18*TNFR_E*TNF_E - kd_18*TNF_TNFR_E; J18 is "TNF~TNFR binding and release";
    ka_18 = 0.00953471 per_a_mole_per_second; kd_18 = 6.60377e-5 per_second;
  J19: TNF_TNFR_E + TRADD => TNF_TNFR_TRADD; ka_19*TNF_TNFR_E*TRADD; J19 is "TNF~TNFR~TRADD building";
    ka_19 = 0.00427827 per_a_mole_per_second;
  J20: RIP + TRAF2 + TNF_TNFR_TRADD => TNFRC1; ka_20*RIP*TRAF2*TNF_TNFR_TRADD; J20 is "TNFR Complex1 building";
    ka_20 = 0.0976562 per_a_mole_squared_per_second;
  J21: TNFRC1 => TNFRCint1; ka_21*TNFRC1; J21 is "Receptor internalisation step1";
    ka_21 = 0.001135 per_second;
  J22: TNFRCint1 => RIP + TRAF2 + TNFRCint2; ka_22*TNFRCint1; J22 is "Receptor internalisation step2";
    ka_22 = 0.001135 per_second;
  J23: 2 FADD + TNFRCint2 => TNFRCint3; ka_23*FADD^2*TNFRCint2; J23 is "Receptor internalisation step3";
    ka_23 = 0.0118534 per_a_mole_squared_per_second;
  J24: TNFRCint3 => TNFRC2; ka_24*TNFRCint3; J24 is "Receptor internalisation step4";
    ka_24 = 0.1135 per_second;
  J25: TNFRC2 + FLIP => TNFRC2_FLIP; ka_25*TNFRC2*FLIP; J25 is "FLIP recruitment to TNFR Complex2";
    ka_25 = 0.3125 per_a_mole_per_second;
  J26: FLIP + TNFRC2_FLIP => TNFRC2_FLIP_FLIP; ka_26*FLIP*TNFRC2_FLIP; J26 is "FLIP recruitment to TNFR Complex2~FLIP";
    ka_26 = 0.3125 per_a_mole_per_second;
  J27: TNFRC2 + pCasp8 => TNFRC2_pCasp8; ka_27*TNFRC2*pCasp8; J27 is "Procaspase-8 recruitment to TNFR Complex2";
    ka_27 = 0.03125 per_a_mole_per_second;
  J28: TNFRC2_pCasp8 + pCasp8 => TNFRC2_pCasp8_pCasp8; ka_28*TNFRC2_pCasp8*pCasp8; J28 is "Procaspase-8 recruitment to TNFR Complex2~Procaspase-8";
    ka_28 = 0.03125 per_a_mole_per_second;
  J29: TNFRC2_pCasp8_pCasp8 => TNFRC2 + Casp8; ka_29*TNFRC2_pCasp8_pCasp8; J29 is "Caspase-8 activation by TNFR Complex2";
    ka_29 = 0.45 per_second;
  J30: FLIP + TNFRC2_pCasp8 => TNFRC2_FLIP_pCasp8; ka_30*FLIP*TNFRC2_pCasp8; J30 is "FLIP recruitment to TNFR Complex2~Procaspase-8";
    ka_30 = 0.3125 per_a_mole_per_second;
  J31: TNFRC2_FLIP + pCasp8 => TNFRC2_FLIP_pCasp8; ka_31*TNFRC2_FLIP*pCasp8; J31 is "Procaspase-8 recruitment to TNFR Complex2~FLIP";
    ka_31 = 0.3125 per_a_mole_per_second;
  J32: TNFRC2_FLIP_pCasp8 => TNFRC2 + Casp8; ka_32*TNFRC2_FLIP_pCasp8; J32 is "Caspase-8 activation by TNFR Complex2~FLIP~Procaspase-8";
    ka_32 = 0.3 per_second;
  J33: RIP + TRAF2 + TNFRC2_FLIP_pCasp8 => TNFRC2_FLIP_pCasp8_RIP_TRAF2; ka_33*RIP*TRAF2*TNFRC2_FLIP_pCasp8; J33 is "RIP~TRAF2 recruitment at TNFR Complex2~FLIP~Procaspase-8";
    ka_33 = 0.00976562 per_a_mole_squared_per_second;
  J34: IKK => IKKa; ka_34*TNFRC2_FLIP_pCasp8_RIP_TRAF2*IKK; J34 is "IKK activation by TNFR Complex2~FLIP~Procaspase-8~RIP~TRAF2";  // modifiers: TNFRC2_FLIP_pCasp8_RIP_TRAF2
    ka_34 = 0.03125 per_a_mole_per_second;
  J35: -> IKK; ka_35 - kd_35*IKK; J35 is "IKK turnover";
    ka_35 = 6.4e-5 a_mole_per_second; kd_35 = 0.0001 per_second;
  J36: -> NFkB; ka_36 - kd_36*NFkB; J36 is "NF-kappaB turnover";
    ka_36 = 1.6e-6 a_mole_per_second; kd_36 = 0.0001 per_second;
  J37: -> FLIP; ka_37 - kd_37*FLIP; J37 is "FLIP turnover";
    ka_37 = 2.24902e-6 a_mole_per_second; kd_37 = 0.0001 per_second;
  J38: -> XIAP; ka_38 - kd_38*XIAP; J38 is "XIAP turnover";
    ka_38 = 0.000772256 a_mole_per_second; kd_38 = 0.0001 per_second;
  J39: -> A20; ka_39 - kd_39*A20; J39 is "A20 turnover";
    ka_39 = 9.6e-6 a_mole_per_second; kd_39 = 0.0001 per_second;
  J40: IKKa => ; ka_40*IKKa; J40 is "IKK* degradation";
    ka_40 = 0.0001 per_second;
  J41: IkBa_NFkB => ; ka_41*IkBa_NFkB; J41 is "IkappaBalpha~NF-kappaB complex degradation";
    ka_41 = 0.0001 per_second;
  J42: NFkB_N => ; ka_42*NFkB_N; J42 is "nuclear NF-kappaB degradation";
    ka_42 = 0.0001 per_second;
  J43: IkBa_mRNA => ; ka_43*IkBa_mRNA; J43 is "IkappaBalpha-mRNA degradation";
    ka_43 = 0.000394201 per_second;
  J44: IkBa => ; ka_44*IkBa; J44 is "IkappaBalpha degradation";
    ka_44 = 0.00154022 per_second;
  J45: IkBa_N => ; ka_45*IkBa_N; J45 is "free nuclear IkappaBalpha degradation";
    ka_45 = 0.0001 per_second;
  J46: IkBa_NFkB_N => ; ka_46*IkBa_NFkB_N; J46 is "nuclear IkappaBalpha~NF-kappaB complex degradation";
    ka_46 = 0.0001 per_second;
  J47: PIkBa => ; ka_47*PIkBa; J47 is "P-IkappaBa degradation";
    ka_47 = 0.0115517 per_second;
  J48: A20_mRNA => ; ka_48*A20_mRNA; J48 is "A20-mRNA degradation";
    ka_48 = 0.000470498 per_second;
  J49: XIAP_mRNA => ; ka_49*XIAP_mRNA; J49 is "XIAP-mRNA degradation";
    ka_49 = 0.000104931 per_second;
  J50: FLIP_mRNA => ; ka_50*FLIP_mRNA; J50 is "FLIP-mRNA degradation";
    ka_50 = 0.000165744 per_second;
  J51: IKK => IKKa; ka_51*TNFRC1*IKK; J51 is "IKK activation by TNFR Complex1";  // modifiers: TNFRC1
    ka_51 = 93.75 per_a_mole_per_second;
  J52: IKKa => IKK; ka_52*IKKa; J52 is "IKK* inactivation";
    ka_52 = 0.1 per_second;
  J53: TNFRC1 => TRAF2 + TNF_TNFR_TRADD; ka_53*TNFRC1*A20; J53 is "TNFR Complex1 inactivation by A20";  // modifiers: A20
    ka_53 = 0.00625 per_a_mole_per_second;
  J54: NFkB + IkBa => IkBa_NFkB; ka_54*NFkB*IkBa; J54 is "IkappaBalpha NF-kappaB association";
    ka_54 = 1.25 per_a_mole_per_second;
  J55: IkBa_NFkB => NFkB + PIkBa; ka_55*IKKa*IkBa_NFkB; J55 is "release and degradation of bound IkappaBalpha";  // modifiers: IKKa
    ka_55 = 0.104167 per_a_mole_per_second;
  J56: NFkB => NFkB_N; ka_56*NFkB; J56 is "NF-kappaB nuclear translocation";
    ka_56 = 0.0125 per_second;
  J57: => IkBa_mRNA; ka_57*NFkB_N; J57 is "IkappaBalpha-mRNA transcription";  // modifiers: NFkB_N
    ka_57 = 3.0303e-5 per_second;
  J58: => IkBa; ka_58*IkBa_mRNA; J58 is "IkappaBalpha translation";  // modifiers: IkBa_mRNA
    ka_58 = 0.0606061 per_second;
  J59: IkBa -> IkBa_N; ka_59*IkBa - kd_59*IkBa_N; J59 is "IkappaBalpha nuclear translocation";
    ka_59 = 0.005 per_second; kd_59 = 0.00257576 per_second;
  J60: NFkB_N + IkBa_N => IkBa_NFkB_N; ka_60*NFkB_N*IkBa_N; J60 is "IkappaBalpha binding NF-kappaB in nucleus";
    ka_60 = 1.4348 per_a_mole_per_second;
  J61: IkBa_NFkB_N => IkBa_NFkB; ka_61*IkBa_NFkB_N; J61 is "IkappaBalpha_NF-kappaB N-C export";
    ka_61 = 0.0151515 per_second;
  J62: => A20_mRNA; ka_62*NFkB_N; J62 is "A20-mRNA transcription";  // modifiers: NFkB_N
    ka_62 = 3.78788e-5 per_second;
  J63: => A20; ka_63*A20_mRNA; J63 is "A20 translation";  // modifiers: A20_mRNA
    ka_63 = 0.0151515 per_second;
  J64: => XIAP_mRNA; ka_64*NFkB_N; J64 is "XIAP-mRNA transcription";  // modifiers: NFkB_N
    ka_64 = 3.33333e-5 per_second;
  J65: => XIAP; ka_65*XIAP_mRNA; J65 is "XIAP translation";  // modifiers: XIAP_mRNA
    ka_65 = 0.0506061 per_second;
  J66: => FLIP_mRNA; ka_66*NFkB_N; J66 is "FLIP-mRNA transcription";  // modifiers: NFkB_N
    ka_66 = 3.33333e-5 per_second;
  J67: => FLIP; ka_67*FLIP_mRNA; J67 is "FLIP translation";  // modifiers: FLIP_mRNA
    ka_67 = 0.00687273 per_second;
  J68: -> pCasp8; ka_68 - kd_68*pCasp8; J68 is "Procaspase-8 turnover";
    ka_68 = 0.000197531 a_mole_per_second; kd_68 = 6.17284e-5 per_second;
  J69: -> pCasp3; ka_69 - kd_69*pCasp3; J69 is "Procaspase-3 turnover";
    ka_69 = 4.93827e-5 a_mole_per_second; kd_69 = 6.17284e-5 per_second;
  J70: -> pCasp6; ka_70 - kd_70*pCasp6; J70 is "Procaspase-6 turnover";
    ka_70 = 3.95062e-6 a_mole_per_second; kd_70 = 6.17284e-5 per_second;
  J71: Casp8 => ; ka_71*Casp8; J71 is "Caspase-8 degradation";
    ka_71 = 5.78704e-5 per_second;
  J72: Casp3 => ; ka_72*Casp3; J72 is "Caspase-3 degradation";
    ka_72 = 5.78704e-5 per_second;
  J73: Casp6 => ; ka_73*Casp6; J73 is "Caspase-6 degradation";
    ka_73 = 5.78704e-5 per_second;
  J74: XIAP_Casp3 => ; ka_74*XIAP_Casp3; J74 is "XIAP~Caspase-3 complex degradation";
    ka_74 = 5.78704e-5 per_second;
  J75: -> BAR; ka_75 - kd_75*BAR; J75 is "BAR turnover";
    ka_75 = 1.66603e-6 a_mole_per_second; kd_75 = 5.78704e-6 per_second;
  J76: BAR_Casp8 => ; ka_76*BAR_Casp8; J76 is "BAR~Caspase-8 complex degradation";
    ka_76 = 5.78704e-5 per_second;
  J77: PARP -> ; ka_77*PARP - kd_77; J77 is "PARP turnover";
    ka_77 = 5.78704e-6 per_second; kd_77 = 9.64506e-6 a_mole_per_second;
  J78: cPARP => ; ka_78*cPARP; J78 is "CPARP degradation";
    ka_78 = 5.78704e-6 per_second;
  J79: pCasp3 => Casp3; ka_79*pCasp3*Casp8; J79 is "Caspase-3 activation";  // modifiers: Casp8
    ka_79 = 0.015625 per_a_mole_per_second;
  J80: pCasp6 => Casp6; ka_80*pCasp6*Casp3; J80 is "Caspase-6 activation";  // modifiers: Casp3
    ka_80 = 0.009375 per_a_mole_per_second;
  J81: pCasp8 => Casp8; ka_81*pCasp8*Casp6; J81 is "Caspase-8 activation";  // modifiers: Casp6
    ka_81 = 0.0015625 per_a_mole_per_second;
  J82: XIAP + Casp3 -> XIAP_Casp3; ka_82*XIAP*Casp3 - kd_82*XIAP_Casp3; J82 is "XIAP~Caspase-3 complex formation";
    ka_82 = 0.625 per_a_mole_per_second; kd_82 = 0.001 per_second;
  J83: XIAP => ; ka_83*XIAP*Casp3; J83 is "XIAP degradation due to Caspase-3";  // modifiers: Casp3
    ka_83 = 1.875 per_a_mole_per_second;
  J84: XIAP_Casp3 => XIAP; ka_84*XIAP_Casp3; J84 is "XIAP~Caspase-3 complex breakup";
    ka_84 = 5e-5 per_second;
  J85: RIP => ; ka_85*RIP*Casp3; J85 is "negative feedback loop Caspase-3 on TNFR Complex1";  // modifiers: Casp3
    ka_85 = 0.15625 per_a_mole_per_second;
  J86: FLIP => ; ka_86*FLIP*Casp3; J86 is "FLIP degradation by Caspase-3";  // modifiers: Casp3
    ka_86 = 0.15625 per_a_mole_per_second;
  J87: PARP => cPARP; ka_87*Casp3*PARP; J87 is "PARP cleavage as Casp3 substrate";  // modifiers: Casp3
    ka_87 = 0.1875 per_a_mole_per_second;
  J88: BAR + Casp8 -> BAR_Casp8; ka_88*BAR*Casp8 - kd_88*BAR_Casp8; J88 is "BAR~Caspase-8 complex formation";
    ka_88 = 0.520833 per_a_mole_per_second; kd_88 = 0.001 per_second;

  // Unit definitions:
  unit a_mole = 1e-18 mole;
  unit per_second = 1 / second;
  unit pl = 1e-12 litre;
  unit a_mole_per_second = 1e-18 mole / second;
  unit per_a_mole_per_second = 1 / (1e-18 mole * second);
  unit per_a_mole_squared_per_second = 1 / ((1e-18 mole)^2 * second);
end
