// SBML level 2 version 4

model Hettling2011()
  // Hettling2011_CreatineKinase
  // This model is from the article:
  // Analyzing the functional properties of the creatine kinase system with multiscale 'sloppy' modeling.
  // Hettling H, van Beek JH PLoS Comput Biol.2011 Aug;7(8):e1002130. PMEDID,
  // Abstract:
  // In this study the function of the two isoforms of creatine kinase (CK; EC 2.7.3.2) in myocardium is investigated. The 'phosphocreatine shuttle' hypothesis states that mitochondrial and cytosolic CK plays a pivotal role in the transport of high-energy phosphate (HEP) groups from mitochondria to myofibrils in contracting muscle. Temporal buffering of changes in ATP and ADP is another potential role of CK. With a mathematical model, we analyzed energy transport and damping of high peaks of ATP hydrolysis during the cardiac cycle. The analysis was based on multiscale data measured at the level of isolated enzymes, isolated mitochondria and on dynamic response times of oxidative phosphorylation measured at the whole heart level. Using 'sloppy modeling' ensemble simulations, we derived confidence intervals for predictions of the contributions by phosphocreatine (PCr) and ATP to the transfer of HEP from mitochondria to sites of ATP hydrolysis. Our calculations indicate that only 15±8% (mean±SD) of transcytosolic energy transport is carried by PCr, contradicting the PCr shuttle hypothesis. We also predicted temporal buffering capabilities of the CK isoforms protecting against high peaks of ATP hydrolysis (3750 µM*s(-1)) in myofibrils. CK inhibition by 98% in silico leads to an increase in amplitude of mitochondrial ATP synthesis pulsation from 215±23 to 566±31 µM*s(-1), while amplitudes of oscillations in cytosolic ADP concentration double from 77±11 to 146±1 µM. Our findings indicate that CK acts as a large bandwidth high-capacity temporal energy buffer maintaining cellular ATP homeostasis and reducing oscillations in mitochondrial metabolism. However, the contribution of CK to the transport of high-energy phosphate groups appears limited. Mitochondrial CK activity lowers cytosolic inorganic phosphate levels while cytosolic CK has the opposite effect.
  // This model originates from BioModels Database: A Database of Annotated Published Models (http://www.ebi.ac.uk/biomodels/).
  // To the extent possible under law, all copyright and related or neighbouring rights to this encoded model have been dedicated to the public domain worldwide. Please refer to CC0 Public Domain Dedication for more information.
  // In summary, you are entitled to use this encoded model in absolutely any manner you deem suitable, verbatim, or with modification, alone or embedded it in a larger context, redistribute it, commercially or not, in a restricted way or not..
  // To cite BioModels Database, please use: Li C, Donizelli M, Rodriguez N, Dharuri H, Endler L, Chelliah V, Li L, He E, Henry A, Stefan MI, Snoep JL, Hucka M, Le Novère N, Laibe C (2010) BioModels Database: An enhanced, curated and annotated resource for published quantitative kinetic models. BMC Syst Biol., 4:92.
  // biomodels.db:BIOMD0000000408
  // biomodels.db:MODEL1201250000
  // isDescribedBy pubmed:21912519
  // occursIn taxonomy:9984
  // isVersionOf GO:0046034 GO:0006600 GO:0044237
  // isDerivedFrom biomodels.db:BIOMD0000000041

  // Compartments:
  compartment IMS = 0.0625;  // GO:0005758
  compartment CYT = 0.75;  // GO:0005829
  compartment cell = 1;  // GO:0005623

  // Species:
  species ADPi in IMS = 39;  // substance in micromole; CHEBI:16761 kegg.compound:C00008 pubchem.substance:3310; 3dmet:B01130
  species ATPi in IMS = 5626;  // substance in micromole; CHEBI:15422 kegg.compound:C00002 pubchem.substance:3304; 3dmet:B01125
  species Cri in IMS = 9789;  // substance in micromole; CHEBI:16919 kegg.compound:C00300 pubchem.substance:3594; 3dmet:B00084
  species PCri in IMS = 5711;  // substance in micromole; CHEBI:17287 kegg.compound:C02305 pubchem.substance:5359; 3dmet:B00422
  species PCr in CYT = 5710;  // substance in micromole; CHEBI:17287 kegg.compound:C02305 3dmet:B00422; pubchem.substance:5359
  species ADP in CYT = 64;  // substance in micromole; CHEBI:16761 kegg.compound:C00008 pubchem.substance:3310; 3dmet:B01130
  species ATP in CYT = 5601;  // substance in micromole; CHEBI:15422 kegg.compound:C00002 pubchem.substance:3304; 3dmet:B01125
  species Cr in CYT = 9789;  // substance in micromole; CHEBI:16919 kegg.compound:C00300 pubchem.substance:3594; 3dmet:B00084
  species P_ii in IMS = 910;  // substance in micromole; CHEBI:24838
  species P_i in CYT = 912;  // substance in micromole; CHEBI:24838

  // Parameters:
  // Diffusion of phosphocreatine across the mitochondrial outer membrane
  j_diff_pcr has micromole_per_litre_per_second;
  // Diffusion of ATP across the mitochondrial outer membrane
  j_diff_atp has micromole_per_litre_per_second;
  // Time constant of ATP synthesis time course in response to a step in ATP demand
  tmito = 0 second;
  // ATP synthesis time course
  jsyn has micromole_per_litre_per_second;
  // Flux of mitochondrial creatine kinase reaction
  j_ck_mi has micromole_per_litre_per_second;
  // Flux of cytosolic creatine kinase reaction
  j_ck_mm has micromole_per_litre_per_second;
  // Diffusion of ADP across the mitochondrial outer membrane
  j_diff_adp has micromole_per_litre_per_second;
  // Diffusion of creatine across the mitochondrial outer membrane
  j_diff_cr has micromole_per_litre_per_second;
  // Diffusion of inorganic phosphate across the mitochondrial outer membrane
  j_diff_pi has micromole_per_litre_per_second;
  // stepsize for integration
  stepsize = 0.001 second;
  // Current heart rate
  heartrate_bpm = 135 unitDefinition_0000004;
  // heart rate at base condition (before heart rate gets altered)
  heartrate_basis = 135 unitDefinition_0000004;
  // heart rate at test condition
  heartrate_test = 220 unitDefinition_0000004;
  // fraction of time in the cardiac cycle where systole takes place and where the energy demand is still increasing (before the energy consumption peak)
  fracSysUp = 0.1666667;
  // fraction of time in the cardiac cycle where systole takes place and where the energy demand is decreasing (after the energy consumption peak)
  fracSysDown = 0.1666667;
  // Amplitude of ATP hydrolysis time course at base condition (lower heart rate)
  VhydAmp_basis has micromole_per_litre_per_second;
  // Amplitude of ATP hydrolysis time course at test condition (elevated heart rate)
  VhydAmp_test has micromole_per_litre_per_second;
  // Time point in simulation, where the heart rate is increased (base condition to test condition)
  time_Jhyd_step = 40 second;
  // Average rate of ATP hydrolysis at test condition
  Jhyd_test = 627.6 micromole_per_litre_per_second;
  // Average ATP hydrolysis at base condition
  Jhyd_basis = 486.5 micromole_per_litre_per_second;
  // Last time in simulation where the 'pulsatile' event took place
  last_time_fired = 0 second;
  // Time course of ATP hydrolysis
  Jhyd = 486.5 micromole_per_litre_per_second;
  // Factor of inhibition of creatine kinase reaction when the heart is exposed to iodoacetic acid (IAA)
  ck_factor_iaa = 1;
  // Factor of inhibition of creatine kinase reaction when the heart is exposed to iodoacetamide (IA)
  ck_factor_ia = 0.0286;
  // Internal parameter for tmito calculation. Value is zero in base condition, otherwise one
  tmito_factor = 0;
  // Permeability surface product for the permeability of the outer mitochondrial membrane to ATP and ADP
  PSmomATP = 13.29477 per_second;
  // Equilibrium constant for Mi-CK and MM-CK
  K_CK_eq = 152;
  // Maximum velocity MM-CK (PCr production)
  VmaxMMb has micromole_per_litre_per_second;
  // Maximum velocity Mi-CK (ATP production)
  VmaxMib has micromole_per_litre_per_second;
  // Maximum velocity Mi-CK (PCr production) without any inhibition by IAA of IA
  VmaxMif_full_activity = 882.0756 micromole_per_litre_per_second;
  // Maximum velocity MM-CK (ATP production) without inhibition by IA or IAA
  VmaxMMf_full_activity = 11441.78 micromole_per_litre_per_second;
  // Maximum velocity Mi-CK (PCr production)
  VmaxMif has micromole_per_litre_per_second;
  // Maximum velocity MM-CK (ATP production)
  VmaxMMf has micromole_per_litre_per_second;
  // Binary dissociation constant ATP
  KiaMi = 750 micromole_per_litre;
  // Ternary dissociation constant Cr
  KbMi = 5200 micromole_per_litre;
  // Binary dissociation constant ADP
  KicMi = 204.8 micromole_per_litre;
  // Ternary dissociation constant PCr
  KdMi = 500 micromole_per_litre;
  // Binary dissociation constant Cr
  KibMi = 28800 micromole_per_litre;
  // Binary dissociation constant PCr
  KidMi = 1600 micromole_per_litre;
  // Binary dissociation constant ATP
  KiaMM = 900 micromole_per_litre;
  // Ternary dissociation constant Cr
  KbMM = 15500 micromole_per_litre;
  // Binary dissociation constant ADP
  KicMM = 222.4 micromole_per_litre;
  // Ternary dissociation constant PCr
  KdMM = 1670 micromole_per_litre;
  // Binary dissociation constant Cr
  KibMM = 34900 micromole_per_litre;
  // Binary dissociation constant PCr
  KidMM = 4730 micromole_per_litre;
  // Maximum ATP synthesis velocity
  Vmaxsyn = 1503.74 micromole_per_litre_per_second;
  // Apparent Km mitochondria for ADP
  Kadp = 25 micromole_per_litre;
  // Apparent Km mitochondria for inorganic phosphate
  Kpi = 800 micromole_per_litre;
  // Permeability surface product for the permeability of the outer mitochondrial membrane to inorganic phosphate
  PSmomPi = 194 per_second;
  // Permeability surface product for the permeability of the outer mitochondrial membrane to creatine
  PSmomCr = 155 per_second;
  // Permeability surface product for the permeability of the outer mitochondrial membrane to phosphocreatine
  PSmomPCr = 155 per_second;
  // 1 if simulation with pulsatile ATP hydrolysis function is desired, otherwise 0
  pulsatility = 1;

  // Assignment rules:
  densyn := 1 + ADPi/Kadp + P_ii/Kpi + ADPi*P_ii/(Kadp*Kpi);
  jsyn := Vmaxsyn*(ADPi*P_ii/(Kpi*Kadp*densyn));
  vatpnorm := tmito_factor*((Jhyd_test - jsyn)/(Jhyd_test - Jhyd_basis));
  VmaxMif := VmaxMif_full_activity*ck_factor_iaa;
  VmaxMMf := VmaxMMf_full_activity*ck_factor_iaa;
  VmaxMib := K_CK_eq*KicMi*KdMi*VmaxMif/(KiaMi*KbMi);
  VmaxMMb := K_CK_eq*KicMM*KdMM*VmaxMMf/(KiaMM*KbMM);
  j_diff_pcr := PSmomPCr*(PCri - PCr);
  j_diff_atp := PSmomATP*(ATPi - ATP);
  r_diff_pcr := j_diff_pcr/(j_diff_pcr + j_diff_atp);
  phase := (abs(time - time_Jhyd_step) - floor(abs(time - time_Jhyd_step)/(60/heartrate_bpm))*60/heartrate_bpm)/(60/heartrate_bpm);
  fracDia := 1 - fracSysUp - fracSysDown;
  VhydAmp_basis := 2*Jhyd_basis/(fracSysUp + fracSysDown);
  VhydAmp_test := 2*Jhyd_test/(fracSysUp + fracSysDown);
  j_ck_mi := (VmaxMif*ATPi*Cri/(KiaMi*KbMi) - VmaxMib*ADPi*PCri/(KicMi*KdMi))/(1 + Cri/KibMi + PCri/KidMi + ATPi*(1/KiaMi + Cri/(KiaMi*KbMi)) + ADPi*(1/KicMi + Cri/(KicMi*KibMi) + PCri/(KidMi*(KicMi*KdMi/KidMi))));
  j_ck_mm := (VmaxMMf*ATP*Cr/(KiaMM*KbMM) - VmaxMMb*ADP*PCr/(KicMM*KdMM))/(1 + Cr/KibMM + PCr/KidMM + ATP*(1/KiaMM + Cr/(KiaMM*KbMM)) + ADP*(1/KicMM + Cr/(KicMM*KibMM) + PCr/(KidMM*(KicMM*KdMM/KidMM))));
  j_diff_adp := PSmomATP*(ADPi - ADP);
  j_diff_pi := PSmomPi*(P_ii - P_i);
  j_diff_cr := PSmomCr*(Cri - Cr);

  // Rate rules:
  tmito' = vatpnorm;

  // Reactions:
  Jsyn: P_ii + ADPi -> ATPi; Vmaxsyn*ADPi*P_ii/(Kadp*Kpi*(1 + ADPi/Kadp + P_ii/Kpi + ADPi*P_ii/(Kadp*Kpi)));  // GO:0006759 GO:0006754; GO:0006757
  J_CK_Mi: ATPi + Cri -> PCri + ADPi; j_ck_mi;  // ec-code:2.7.3.2; GO:0004111
  J_CK_MM: Cr + ATP -> PCr + ADP; j_ck_mm;  // ec-code:2.7.3.2; GO:0004111
  Jhyd_reaction: ATP -> ADP + P_i; Jhyd;  // ec-code:3.6.4.1
  J_diff_Pi: P_ii -> P_i; j_diff_pi;  // GO:0006817
  J_diff_Cr: Cri -> Cr; j_diff_cr;  // GO:0015881
  J_diff_ADP: ADPi -> ADP; j_diff_adp;  // GO:0051503; GO:0015866
  J_diff_PCr: PCri -> PCr; j_diff_pcr;  // GO:0006810; GO:0015881
  J_diff_ATP: ATPi -> ATP; j_diff_atp;  // GO:0015867; GO:0051503 GO:0006810

  // Events:
  at (((time >= time_Jhyd_step) && (time - last_time_fired > stepsize)) && (pulsatility == 1)): Jhyd = piecewise((1 - (phase - fracSysUp)/fracSysDown)*VhydAmp_test, (phase > fracSysUp) && (phase <= 1 - fracDia), phase/fracSysUp*VhydAmp_test, phase <= fracSysUp, 0, phase >= 1 - fracDia, Jhyd), last_time_fired = time;  // pulsatile_test; sgd:S000028563
  at (((time < time_Jhyd_step) && (time - last_time_fired >= stepsize)) && (pulsatility == 1)): Jhyd = piecewise(0, phase <= fracDia, (phase - fracDia)/fracSysDown*VhydAmp_basis, (phase > fracDia) && (phase <= 1 - fracSysUp), (1 - phase)*VhydAmp_basis/fracSysUp, phase > 1 - fracSysUp, Jhyd), last_time_fired = time;  // pulsatile_basis
  at (time >= time_Jhyd_step): Jhyd = piecewise(Jhyd_test, pulsatility == 0, Jhyd), heartrate_bpm = heartrate_test, tmito_factor = 1;  // nonpulsatile_step

  // Unit definitions:
  unit micromole = 1e-6 mole;
  unit micromole_per_litre = 1e-6 mole / litre;
  unit micromole_per_litre_per_second = 1e-6 mole / (litre * second);
  unit unitDefinition_0000004 = 1 / (60 second); unitDefinition_0000004 is "per_minute";
  unit per_second = 1 / second;
end
