// SBML level 2 version 4

function Function_for_re1(GnRH_Pit, LH_Pit, default, par35, par36, par37)
  (par37 + par35*(GnRH_Pit*default)^5/((GnRH_Pit*default)^5 + par36^5))*LH_Pit*default/default;
end

function Function_for_re2(E2, FSH_Pit, GnRH_Pit, P4, default, par23, par24, par25, par26, par27, par28, par30)
  (par30 + par23*(P4*default)^2/((P4*default)^2 + par24^2) + par25*par26^2/((E2*default)^2 + par26^2) + par27*GnRH_Pit*default/(par28 + GnRH_Pit*default))*FSH_Pit*default/default;
end

function Function_for_re3(E2, GnRH_Hyp, P4, default, par3, par4, par5, par6, par7)
  (par3*(par5^2/(par5^2 + (P4*default)^2) + par4^2/(par4^2 + (E2*default)^2) - par5^2/(par5^2 + (P4*default)^2)*par4^2/(par4^2 + (E2*default)^2)) + par6*par7^2/((P4*default)^2 + par7^2))*GnRH_Hyp*default/default;
end

function Function_for_re4(CL, Foll, LH_Bld, default, par47, par48, par62, par63, par64)
  (par62*par47*(LH_Bld*default)^2/((LH_Bld*default)^2 + par48^2)*Foll*default + par63*(CL*default)^2/((CL*default)^2 + par64^2))/default;
end

function Function_for_re5(GnRH_Hyp, default, par1, par2)
  par2*(1 - GnRH_Hyp*default/par1)/default;
end

function Function_for_re6(Foll, default, par76)
  par76*(Foll*default)^2/default;
end

function Function_for_re7(CL, default, par71)
  par71*(CL*default)^2/default;
end

function Function_for_re8(Foll, default, par81)
  par81*(Foll*default)^2/default;
end

function Function_for_re9(CL, E2, default, par91, par92)
  par91*(E2*default)^2/((E2*default)^2 + par92^2)*(CL*default)^2/default;
end

function Function_for_re10(P4, default, par86, par87)
  par86*(P4*default)^5/((P4*default)^5 + par87^5)/default;
end

function Function_for_re11(Enz, OT, default, par56, par57, par58)
  par56*Enz^5/(Enz^5 + par57^5)*(OT*default)^2/((OT*default)^2 + par58^2)/default;
end

function Function_for_re12(GnRH_Pit, default, par10)
  par10*GnRH_Pit*default/default;
end

function Function_for_re13(LH_Bld, default, par38)
  par38*LH_Bld*default/default;
end

function Function_for_re14(FSH_Bld, default, par29)
  par29*FSH_Bld*default/default;
end

function Function_for_re15(P4, default, par72)
  par72*P4*default/default;
end

function Function_for_re16(E2, default, par77)
  par77*E2*default/default;
end

function Function_for_re17(Inh, default, par82)
  par82*Inh*default/default;
end

function Function_for_re18(OT, default, par94)
  par94*OT*default/default;
end

function Function_for_re19(Enz, default, par89)
  par89*Enz/default;
end

function Function_for_re20(PGF, default, par59)
  par59*PGF*default/default;
end

function Function_for_re21(IOF, default, par98)
  par98*IOF*default/default;
end

function Function_for_l(Foll, LH_Bld, P4, default, par45, par46, par47, par48)
  (par45*(P4*default)^5/((P4*default)^5 + par46^5) + par47*(LH_Bld*default)^2/((LH_Bld*default)^2 + par48^2))*Foll*default/default;
end

function Function_for_re23(CL, IOF, default, par65, par66)
  par65*(IOF*default)^5/((IOF*default)^5 + par66^5)*CL*default/default;
end

function Function_for_re24(E2, P4, default, par31, par32, par33, par34)
  (par31*(E2*default)^2/((E2*default)^2 + par32^2) + par33*par34^2/(par34^2 + (P4*default)^2))/default;
end

function Function_for_re25(Inh, default, par21, par22)
  par21*par22^5/(par22^5 + (Inh*default)^5)/default;
end

function Function_for_re26(E2, GnRH_Hyp, P4, default, par3, par4, par5, par6, par7, par8, par9)
  par8*(E2*default)^5/((E2*default)^5 + par9^5)*(par3*(par5^2/(par5^2 + (P4*default)^2) + par4^2/(par4^2 + (E2*default)^2) - par5^2/(par5^2 + (P4*default)^2)*par4^2/(par4^2 + (E2*default)^2)) + par6*par7^2/((P4*default)^2 + par7^2))*GnRH_Hyp*default/default;
end

function Function_for_re27(FSH_Bld, Foll, default, par41, par42, par43)
  par41*(FSH_Bld*default)^2/((par42*par43^2/(par43^2 + (Foll*default)^2))^2 + (FSH_Bld*default)^2)/default;
end

function Function_for_re28(CL, PGF, default, par95, par96, par97)
  par95*(PGF*default)^5/((PGF*default)^5 + par96^5)*(CL*default)^10/((CL*default)^10 + par97^10)/default;
end

model MODEL1308100000()
  // Stötzel2012 - Bovine estrous cycle, synchronization with prostaglandin F2α
  // biomodels.db:MODEL1308100000
  // biomodels.db:BIOMD0000000481
  // isDescribedBy pubmed:22980082
  // isDerivedFrom pubmed:21377476 pubmed:22118087
  // hasTaxon taxonomy:9913
  // isVersionOf GO:0042698 GO:0034696

  // Compartments:
  compartment default = 1 volume;  // isVersionOf FMA:70779

  // Species:
  species GnRH_Pit in default = 0.2199924/default;  // isVersionOf uniprot:Q0VBW7; occursIn FMA:13889
  species LH_Pit in default = 2.25001/default;  // occursIn FMA:13889; isVersionOf uniprot:P01217
  species LH_Bld in default = 0.006336828/default;  // occursIn FMA:9670; isVersionOf uniprot:P01217
  species GnRH_Hyp in default = 0.7406388/default;  // isVersionOf uniprot:Q0VBW7; occursIn FMA:62008
  species FSH_Pit in default = 0.005791087/default;  // occursIn FMA:13889; isVersionOf uniprot:P04837
  species FSH_Bld in default = 0.01686046/default;  // occursIn FMA:9670; isVersionOf uniprot:P04837
  species Foll in default = 0.0286571/default;  // isVersionOf FMA:18640
  species CL in default = 0.3143936/default;  // isVersionOf FMA:18619
  species E2 in default = 0.1636907/default;  // isVersionOf CHEBI:23965
  species P4 in default = 0.1201925/default;  // isVersionOf CHEBI:17026
  species Inh in default = 0.4937102/default;  // isVersionOf uniprot:P07994
  species OT in default = 0.1117301/default;  // isVersionOf CHEBI:7872
  species Enz in default = 5.836267e-5/default;
  species PGF in default = 0.0003620641/default;  // isVersionOf CHEBI:15553
  species IOF in default = 0.1334151/default;  // isVersionOf FMA:9669; occursIn FMA:7209
  species $src_GnRH in default = 0;
  species $src_E2 in default = 0;
  species $src_P4 in default = 0;
  species $src_Inh in default = 0;
  species $src_OT in default = 0;
  species $src_Enz in default = 0;
  species $src_PGF in default = 0;
  species $src_LH in default = 0;
  species $src_FSH in default = 0;
  species $snk_GnRH_Hyp in default = 0;
  species $src_GnRH_Pit in default = 0;
  species $src_Foll in default = 0;
  species $src_IOF in default = 0;
  species $src_CL in default = 0;
  species $snk_Inh in default = 0;
  species $snk_P4 in default = 0;
  species $snk_E2 in default = 0;
  species $snk_GnRH_Pit in default = 0;
  species $snk_LH in default = 0;
  species $snk_FSH in default = 0;
  species $snk_IOF in default = 0;
  species $snk_CL in default = 0;
  species $snk_Enz in default = 0;
  species $snk_OT in default = 0;
  species $snk_PGF in default = 0;
  species $snk_Foll in default = 0;
  species $PGF_syn in default = 0;

  // Parameters:
  par2 = 2.75; par2 is "k_G";
  par1 = 16; par1 is "GnRH_max";
  par3 = 2.05; par3 is "h_P4&E2_G";
  par4 = 0.0972; par4 is "T_E2_G1";
  par5 = 0.35; par5 is "T_p4_G1";
  par6 = 1.91; par6 is "h_p4_G2";
  par7 = 0.252; par7 is "T_p4_G2";
  par8 = 0.99; par8 is "h_e2_g2";
  par9 = 0.648; par9 is "T_e2_g2";
  par10 = 1.63; par10 is "cl_G";
  par21 = 4.21; par21 is "h_inh_fsh";
  par22 = 0.118; par22 is "T_inh_fsh";
  par23 = 0.293; par23 is "h_p4_fsh";
  par24 = 0.152; par24 is "T_p4_fsh";
  par25 = 0.396; par25 is "h_e2_fsh";
  par26 = 0.312; par26 is "T_e2_fsh";
  par27 = 1.23; par27 is "h_gnrh_fsh";
  par28 = 0.0708; par28 is "T_gnrh_fsh";
  par29 = 2.73; par29 is "cl_fsh";
  par30 = 0.948; par30 is "b_fsh";
  par31 = 0.376; par31 is "h_e2_lh";
  par32 = 0.243; par32 is "T_e2_lh";
  par33 = 2.71; par33 is "h_p4_lh";
  par34 = 0.0269; par34 is "T_p4_lh";
  par35 = 2.22; par35 is "h_gnrh_lh";
  par36 = 0.69; par36 is "T_gnrh_lh";
  par37 = 0.0141; par37 is "b_lh";
  par38 = 12; par38 is "cl_lh";
  par41 = 0.562; par41 is "h_fsh_foll";
  par42 = 0.57; par42 is "T_fsh_foll";
  par43 = 0.22; par43 is "T_foll_fsh";
  par45 = 1.1; par45 is "h_p4_fsh_2";
  par46 = 0.126; par46 is "T_p4_foll";
  par47 = 3.49; par47 is "h_lh_foll";
  par48 = 0.171; par48 is "T_lh_Foll";
  par56 = 53.91; par56 is "h_enz_pgf";
  par57 = 1.43; par57 is "T_enz_pgf";
  par58 = 1.087; par58 is "T_ot_pgf";
  par59 = 1.23; par59 is "cl_pgf";
  par62 = 0.2; par62 is "SF_CL";
  par63 = 0.0353; par63 is "h_cl_cl";
  par64 = 0.1; par64 is "T_cl_cl";
  par65 = 41.39; par65 is "h_iof_cl";
  par66 = 1.32; par66 is "T_iof_cl";
  par71 = 2.25; par71 is "k_cl_p4";
  par72 = 1.41; par72 is "cl_p4";
  par76 = 2.19; par76 is "k_foll_e2";
  par77 = 1.23; par77 is "cl_e2";
  par81 = 1.41; par81 is "k_foll_inh";
  par82 = 0.475; par82 is "cl_inh";
  par86 = 3.58; par86 is "h_p4_enz";
  par87 = 0.77; par87 is "T_p4_enz";
  par89 = 2.98; par89 is "cl_enz";
  par91 = 1.59; par91 is "h_e2cl_ot";
  par92 = 0.143; par92 is "T_e2_ot";
  par94 = 0.644; par94 is "cl_ot";
  par95 = 39.68; par95 is "h_pg_iof";
  par96 = 1.22; par96 is "T_pg_ot";
  par97 = 0.6; par97 is "T_cl_iof";
  par98 = 0.298; par98 is "cl_iof";
  D = 3.7;
  beta = 100;
  c_PGF_syn = 5.5;
  var t_mod;
  t_D = 0;
  var Total_PGF_2alpha;
  quantity_1 = 0;
  Initial_for_D = D;
  Initial_for_beta = beta;

  // Assignment rules:
  t_mod := piecewise(time - t_D, time > t_D, 0);
  Total_PGF_2alpha := PGF + PGF_syn;

  // Rate rules:
  PGF_syn' = Initial_for_D*Initial_for_beta*Initial_for_beta*t_mod*exp(-Initial_for_beta*t_mod) - c_PGF_syn*PGF_syn;

  // Reactions:
  re1: LH_Pit => LH_Bld; default*Function_for_re1(GnRH_Pit, LH_Pit, default, par35, par36, par37);  // modifiers: GnRH_Pit
  re2: FSH_Pit => FSH_Bld; default*Function_for_re2(E2, FSH_Pit, GnRH_Pit, P4, default, par23, par24, par25, par26, par27, par28, par30);  // modifiers: E2, P4, GnRH_Pit
  re3: GnRH_Hyp => $snk_GnRH_Hyp; default*Function_for_re3(E2, GnRH_Hyp, P4, default, par3, par4, par5, par6, par7);  // modifiers: E2, P4
  re4: $src_CL => CL; default*Function_for_re4(CL, Foll, LH_Bld, default, par47, par48, par62, par63, par64);  // modifiers: Foll, LH_Bld
  re5: $src_GnRH => GnRH_Hyp; default*Function_for_re5(GnRH_Hyp, default, par1, par2);
  re6: $src_E2 => E2; default*Function_for_re6(Foll, default, par76);  // modifiers: Foll
  re7: $src_P4 => P4; default*Function_for_re7(CL, default, par71);  // modifiers: CL
  re8: $src_Inh => Inh; default*Function_for_re8(Foll, default, par81);  // modifiers: Foll
  re9: $src_OT => OT; default*Function_for_re9(CL, E2, default, par91, par92);  // modifiers: E2, CL
  re10: $src_Enz => Enz; default*Function_for_re10(P4, default, par86, par87);  // modifiers: P4
  re11: $src_PGF => PGF; default*Function_for_re11(Enz, OT, default, par56, par57, par58);  // modifiers: OT, Enz
  re12: GnRH_Pit => $snk_GnRH_Pit; default*Function_for_re12(GnRH_Pit, default, par10);
  re13: LH_Bld => $snk_LH; default*Function_for_re13(LH_Bld, default, par38);
  re14: FSH_Bld => $snk_FSH; default*Function_for_re14(FSH_Bld, default, par29);
  re15: P4 => $snk_P4; default*Function_for_re15(P4, default, par72);
  re16: E2 => $snk_E2; default*Function_for_re16(E2, default, par77);
  re17: Inh => $snk_Inh; default*Function_for_re17(Inh, default, par82);
  re18: OT => $snk_OT; default*Function_for_re18(OT, default, par94);
  re19: Enz => $snk_Enz; default*Function_for_re19(Enz, default, par89);
  re20: PGF => $snk_PGF; default*Function_for_re20(PGF, default, par59);
  re21: IOF => $snk_IOF; default*Function_for_re21(IOF, default, par98);
  l: Foll => $snk_Foll; default*Function_for_l(Foll, LH_Bld, P4, default, par45, par46, par47, par48);  // modifiers: P4, LH_Bld
  re23: CL => $snk_CL; default*Function_for_re23(CL, IOF, default, par65, par66);  // modifiers: IOF
  re24: $src_LH => LH_Pit; default*Function_for_re24(E2, P4, default, par31, par32, par33, par34);  // modifiers: E2, P4
  re25: $src_FSH => FSH_Pit; default*Function_for_re25(Inh, default, par21, par22);  // modifiers: Inh
  re26: $src_GnRH_Pit => GnRH_Pit; default*Function_for_re26(E2, GnRH_Hyp, P4, default, par3, par4, par5, par6, par7, par8, par9);  // modifiers: GnRH_Hyp, E2, P4
  re27: $src_Foll => Foll; default*Function_for_re27(FSH_Bld, Foll, default, par41, par42, par43);  // modifiers: FSH_Bld
  re28: $src_IOF => IOF; default*Function_for_re28(CL, PGF, default, par95, par96, par97);  // modifiers: CL, PGF

  // Unit definitions:
  unit substance = mole;
  unit volume = litre;
  unit area = metre^2;
  unit length = metre;
  unit time = second;
end
