// SBML level 2 version 4
// dcterms:bibliographicCitation: http://identifiers.org/eco/ECO:0000035
// dcterms:bibliographicCitation: http://identifiers.org/pubmed/18687109
// dcterms:bibliographicCitation: http://identifiers.org/pubmed/9804825
// dcterms:bibliographicCitation: http://identifiers.org/eco/ECO:0000033
// dcterms:bibliographicCitation: http://identifiers.org/pubmed/10714900
// dcterms:bibliographicCitation: http://identifiers.org/eco/ECO:0000034
// dcterms:bibliographicCitation: http://identifiers.org/pubmed/19321003
// dcterms:bibliographicCitation: http://identifiers.org/pubmed/18846089

function MAX(a, b)
  piecewise(a, a >= b, b);
end

function function_33(Keq_r_0130, Vmax_r_0130, intracellular, kmp_s_0400r_0130, kmp_s_1070r_0130, kms_s_0446r_0130, kms_s_1071r_0130, ADP_intracellular, ATP_intracellular, s_1070, s_1071)
  Vmax_r_0130*((1/kms_s_0446r_0130)^1*(1/kms_s_1071r_0130)^1*(ATP_intracellular^1*s_1071^1 - ADP_intracellular^1*s_1070^1/Keq_r_0130)/((1 + ATP_intracellular/kms_s_0446r_0130)*(1 + s_1071/kms_s_1071r_0130) + (1 + ADP_intracellular/kmp_s_0400r_0130)*(1 + s_1070/kmp_s_1070r_0130) - 1))/intracellular;
end
function_33 is "Function for acetylglutamate kinase";

function function_34(Keq_r_0133, Vmax_r_0133, intracellular, kmp_s_0185r_0133, kmp_s_1051r_0133, kms_s_0149r_0133, kms_s_0899r_0133, s_0149, _2_oxoglutarate_intracellular, L_glutamate_intracellular, s_1051)
  Vmax_r_0133*((1/kms_s_0149r_0133)^1*(1/kms_s_0899r_0133)^1*(s_0149^1*L_glutamate_intracellular^1 - _2_oxoglutarate_intracellular^1*s_1051^1/Keq_r_0133)/((1 + s_0149/kms_s_0149r_0133)*(1 + L_glutamate_intracellular/kms_s_0899r_0133) + (1 + _2_oxoglutarate_intracellular/kmp_s_0185r_0133)*(1 + s_1051/kmp_s_1051r_0133) - 1))/intracellular;
end
function_34 is "Function for acteylornithine transaminase";

function Function_for_adenosine_kinase(Keq_r_0157, Vmax_r_0157, intracellular, kmp_s_0400r_0157, kmp_s_0434r_0157, kmp_s_0763_br_0157, kms_s_0393r_0157, kms_s_0446r_0157, adenosine_intracellular, ADP_intracellular, AMP_intracellular, ATP_intracellular, s_0763_b)
  Vmax_r_0157*((1/kms_s_0393r_0157)^1*(1/kms_s_0446r_0157)^1*(adenosine_intracellular^1*ATP_intracellular^1 - ADP_intracellular^1*AMP_intracellular^1*s_0763_b^1/Keq_r_0157)/((1 + adenosine_intracellular/kms_s_0393r_0157)*(1 + ATP_intracellular/kms_s_0446r_0157) + (1 + ADP_intracellular/kmp_s_0400r_0157)*(1 + AMP_intracellular/kmp_s_0434r_0157)*(1 + s_0763_b/kmp_s_0763_br_0157) - 1))/intracellular;
end

function function_52(Keq_r_0232, Vmax_r_0232, intracellular, kmp_s_0763_br_0232, kmp_s_1073r_0232, kmp_s_1207r_0232, kms_s_0469r_0232, kms_s_0881r_0232, s_0469, s_0763_b, L_aspartate_intracellular, s_1073, phosphate_intracellular)
  Vmax_r_0232*((1/kms_s_0469r_0232)^1*(1/kms_s_0881r_0232)^1*(s_0469^1*L_aspartate_intracellular^1 - s_0763_b^1*s_1073^1*phosphate_intracellular^1/Keq_r_0232)/((1 + s_0469/kms_s_0469r_0232)*(1 + L_aspartate_intracellular/kms_s_0881r_0232) + (1 + s_0763_b/kmp_s_0763_br_0232)*(1 + s_1073/kmp_s_1073r_0232)*(1 + phosphate_intracellular/kmp_s_1207r_0232) - 1))/intracellular;
end
function_52 is "Function for aspartate carbamoyltransferase";

function function_112(Keq_r_0430, Vmax_r_0430, intracellular, kmp_s_0470r_0430, kmp_s_0514r_0430, kmp_s_1091r_0430, kmp_s_1140r_0430, kmp_s_1434_br_0430, kms_s_0380r_0430, kms_s_0763_br_0430, kms_s_1005r_0430, kms_s_1096r_0430, acetyl_CoA_intracellular, carbon_dioxide_intracellular, coenzyme_A_intracellular, s_0763_b, malonyl_CoA_intracellular, NADP_intracellular, NADPH_intracellular, octanoyl_CoA_intracellular, s_1434_b)
  Vmax_r_0430*((1/kms_s_0380r_0430)^1*(1/kms_s_0763_br_0430)^9*(1/kms_s_1005r_0430)^3*(1/kms_s_1096r_0430)^6*(acetyl_CoA_intracellular^1*s_0763_b^9*malonyl_CoA_intracellular^3*NADPH_intracellular^6 - carbon_dioxide_intracellular^3*coenzyme_A_intracellular^3*NADP_intracellular^6*octanoyl_CoA_intracellular^1*s_1434_b^3/Keq_r_0430)/((1 + acetyl_CoA_intracellular/kms_s_0380r_0430)*(1 + s_0763_b/kms_s_0763_br_0430)*(1 + malonyl_CoA_intracellular/kms_s_1005r_0430)*(1 + NADPH_intracellular/kms_s_1096r_0430) + (1 + carbon_dioxide_intracellular/kmp_s_0470r_0430)*(1 + coenzyme_A_intracellular/kmp_s_0514r_0430)*(1 + NADP_intracellular/kmp_s_1091r_0430)*(1 + octanoyl_CoA_intracellular/kmp_s_1140r_0430)*(1 + s_1434_b/kmp_s_1434_br_0430) - 1))/intracellular;
end
function_112 is "Function for fatty acyl-CoA synthase (n-C8:0CoA), lumped reaction";

function function_113(Keq_r_0437, Vmax_r_0437, intracellular, kmp_s_0434r_0437, kmp_s_0605r_0437, kmp_s_1355r_0437, kms_s_0446r_0437, kms_s_0514r_0437, kms_s_0987r_0437, AMP_intracellular, ATP_intracellular, coenzyme_A_intracellular, diphosphate_intracellular, lignocerate_intracellular, tetracosanoyl_CoA_intracellular)
  Vmax_r_0437*((1/kms_s_0446r_0437)^1*(1/kms_s_0514r_0437)^1*(1/kms_s_0987r_0437)^1*(ATP_intracellular^1*coenzyme_A_intracellular^1*lignocerate_intracellular^1 - AMP_intracellular^1*diphosphate_intracellular^1*tetracosanoyl_CoA_intracellular^1/Keq_r_0437)/((1 + ATP_intracellular/kms_s_0446r_0437)*(1 + coenzyme_A_intracellular/kms_s_0514r_0437)*(1 + lignocerate_intracellular/kms_s_0987r_0437) + (1 + AMP_intracellular/kmp_s_0434r_0437)*(1 + diphosphate_intracellular/kmp_s_0605r_0437)*(1 + tetracosanoyl_CoA_intracellular/kmp_s_1355r_0437) - 1))/intracellular;
end
function_113 is "Function for fatty-acid--CoA ligase (n-C24:0)";

function function_114(Keq_r_0439, Vmax_r_0439, intracellular, kmp_s_0446r_0439, kmp_s_0514r_0439, kmp_s_1329r_0439, kms_s_0434r_0439, kms_s_0605r_0439, kms_s_1334r_0439, AMP_intracellular, ATP_intracellular, coenzyme_A_intracellular, diphosphate_intracellular, stearate_intracellular, stearoyl_CoA_intracellular)
  Vmax_r_0439*((1/kms_s_0434r_0439)^1*(1/kms_s_0605r_0439)^1*(1/kms_s_1334r_0439)^1*(AMP_intracellular^1*diphosphate_intracellular^1*stearoyl_CoA_intracellular^1 - ATP_intracellular^1*coenzyme_A_intracellular^1*stearate_intracellular^1/Keq_r_0439)/((1 + AMP_intracellular/kms_s_0434r_0439)*(1 + diphosphate_intracellular/kms_s_0605r_0439)*(1 + stearoyl_CoA_intracellular/kms_s_1334r_0439) + (1 + ATP_intracellular/kmp_s_0446r_0439)*(1 + coenzyme_A_intracellular/kmp_s_0514r_0439)*(1 + stearate_intracellular/kmp_s_1329r_0439) - 1))/intracellular;
end
function_114 is "Function for fatty-acid--CoA ligase (octadecanoate)";

function function_115(Keq_r_0442, Vmax_r_0442, intracellular, kmp_s_0446r_0442, kmp_s_0514r_0442, kmp_s_1132r_0442, kms_s_0434r_0442, kms_s_0605r_0442, kms_s_1140r_0442, AMP_intracellular, ATP_intracellular, coenzyme_A_intracellular, diphosphate_intracellular, octanoate_intracellular, octanoyl_CoA_intracellular)
  Vmax_r_0442*((1/kms_s_0434r_0442)^1*(1/kms_s_0605r_0442)^1*(1/kms_s_1140r_0442)^1*(AMP_intracellular^1*diphosphate_intracellular^1*octanoyl_CoA_intracellular^1 - ATP_intracellular^1*coenzyme_A_intracellular^1*octanoate_intracellular^1/Keq_r_0442)/((1 + AMP_intracellular/kms_s_0434r_0442)*(1 + diphosphate_intracellular/kms_s_0605r_0442)*(1 + octanoyl_CoA_intracellular/kms_s_1140r_0442) + (1 + ATP_intracellular/kmp_s_0446r_0442)*(1 + coenzyme_A_intracellular/kmp_s_0514r_0442)*(1 + octanoate_intracellular/kmp_s_1132r_0442) - 1))/intracellular;
end
function_115 is "Function for fatty-acid--CoA ligase (octanoate)";

function function_116(Keq_r_0464, Vmax_r_0464, intracellular, kmp_s_0470r_0464, kmp_s_0514r_0464, kmp_s_0977r_0464, kmp_s_1091r_0464, kmp_s_1434_br_0464, kms_s_0582r_0464, kms_s_0763_br_0464, kms_s_1005r_0464, kms_s_1096r_0464, carbon_dioxide_intracellular, coenzyme_A_intracellular, decanoyl_CoA_intracellular, s_0763_b, lauroyl_CoA_intracellular, malonyl_CoA_intracellular, NADP_intracellular, NADPH_intracellular, s_1434_b)
  Vmax_r_0464*((1/kms_s_0582r_0464)^1*(1/kms_s_0763_br_0464)^3*(1/kms_s_1005r_0464)^1*(1/kms_s_1096r_0464)^2*(decanoyl_CoA_intracellular^1*s_0763_b^3*malonyl_CoA_intracellular^1*NADPH_intracellular^2 - carbon_dioxide_intracellular^1*coenzyme_A_intracellular^1*lauroyl_CoA_intracellular^1*NADP_intracellular^2*s_1434_b^1/Keq_r_0464)/((1 + decanoyl_CoA_intracellular/kms_s_0582r_0464)*(1 + s_0763_b/kms_s_0763_br_0464)*(1 + malonyl_CoA_intracellular/kms_s_1005r_0464)*(1 + NADPH_intracellular/kms_s_1096r_0464) + (1 + carbon_dioxide_intracellular/kmp_s_0470r_0464)*(1 + coenzyme_A_intracellular/kmp_s_0514r_0464)*(1 + lauroyl_CoA_intracellular/kmp_s_0977r_0464)*(1 + NADP_intracellular/kmp_s_1091r_0464)*(1 + s_1434_b/kmp_s_1434_br_0464) - 1))/intracellular;
end
function_116 is "Function for fatty-acyl-CoA synthase (n-C12:0CoA)";

function Function_for_chorismate_mutase(Keq_r_0304, Vmax_r_0304, intracellular, kmp_s_1258r_0304, kms_s_0500r_0304, chorismate_2_intracellular, prephenate_2_intracellular)
  Vmax_r_0304*((1/kms_s_0500r_0304)^1*(chorismate_2_intracellular^1 - prephenate_2_intracellular^1/Keq_r_0304)/(1 + chorismate_2_intracellular/kms_s_0500r_0304 + 1 + prephenate_2_intracellular/kmp_s_1258r_0304 - 1))/intracellular;
end

function Function_for_chorismate_synthase(Keq_r_0306, Vmax_r_0306, intracellular, kmp_s_0500r_0306, kmp_s_1207r_0306, kms_s_0330r_0306, s_0330, chorismate_2_intracellular, phosphate_intracellular)
  Vmax_r_0306*((1/kms_s_0330r_0306)^1*(s_0330^1 - chorismate_2_intracellular^1*phosphate_intracellular^1/Keq_r_0306)/(1 + s_0330/kms_s_0330r_0306 + (1 + chorismate_2_intracellular/kmp_s_0500r_0306)*(1 + phosphate_intracellular/kmp_s_1207r_0306) - 1))/intracellular;
end

function function_79(Keq_r_0307, Vmax_r_0307, intracellular, kmp_s_0847r_0307, kms_s_0501r_0307, kms_s_1434_br_0307, cis_aconitate_3_intracellular, isocitrate_3_intracellular, s_1434_b)
  Vmax_r_0307*((1/kms_s_0501r_0307)^1*(1/kms_s_1434_br_0307)^1*(cis_aconitate_3_intracellular^1*s_1434_b^1 - isocitrate_3_intracellular^1/Keq_r_0307)/((1 + cis_aconitate_3_intracellular/kms_s_0501r_0307)*(1 + s_1434_b/kms_s_1434_br_0307) + 1 + isocitrate_3_intracellular/kmp_s_0847r_0307 - 1))/intracellular;
end
function_79 is "Function for cis-aconitate(3-) to isocitrate";

function Function_for_citrate_synthase(Keq_r_0328, Vmax_r_0328, intracellular, kmp_s_0507r_0328, kmp_s_0514r_0328, kmp_s_0763_br_0328, kms_s_0380r_0328, kms_s_1156r_0328, kms_s_1434_br_0328, acetyl_CoA_intracellular, citrate_3_intracellular, coenzyme_A_intracellular, s_0763_b, oxaloacetate_2_intracellular, s_1434_b)
  Vmax_r_0328*((1/kms_s_0380r_0328)^1*(1/kms_s_1156r_0328)^1*(1/kms_s_1434_br_0328)^1*(acetyl_CoA_intracellular^1*oxaloacetate_2_intracellular^1*s_1434_b^1 - citrate_3_intracellular^1*coenzyme_A_intracellular^1*s_0763_b^1/Keq_r_0328)/((1 + acetyl_CoA_intracellular/kms_s_0380r_0328)*(1 + oxaloacetate_2_intracellular/kms_s_1156r_0328)*(1 + s_1434_b/kms_s_1434_br_0328) + (1 + citrate_3_intracellular/kmp_s_0507r_0328)*(1 + coenzyme_A_intracellular/kmp_s_0514r_0328)*(1 + s_0763_b/kmp_s_0763_br_0328) - 1))/intracellular;
end

function function_81(Keq_r_0330, Vmax_r_0330, intracellular, kmp_s_0501r_0330, kmp_s_1434_br_0330, kms_s_0507r_0330, cis_aconitate_3_intracellular, citrate_3_intracellular, s_1434_b)
  Vmax_r_0330*((1/kms_s_0507r_0330)^1*(citrate_3_intracellular^1 - cis_aconitate_3_intracellular^1*s_1434_b^1/Keq_r_0330)/(1 + citrate_3_intracellular/kms_s_0507r_0330 + (1 + cis_aconitate_3_intracellular/kmp_s_0501r_0330)*(1 + s_1434_b/kmp_s_1434_br_0330) - 1))/intracellular;
end
function_81 is "Function for citrate to cis-aconitate(3-)";

function Function_for_CTP_synthase_NH3(Keq_r_0336, Vmax_r_0336, intracellular, kmp_s_0400r_0336, kmp_s_0521r_0336, kmp_s_0763_br_0336, kmp_s_1207r_0336, kms_s_0430r_0336, kms_s_0446r_0336, kms_s_1430r_0336, ADP_intracellular, ammonium_intracellular, ATP_intracellular, CTP_intracellular, s_0763_b, phosphate_intracellular, UTP_intracellular)
  Vmax_r_0336*((1/kms_s_0430r_0336)^1*(1/kms_s_0446r_0336)^1*(1/kms_s_1430r_0336)^1*(ammonium_intracellular^1*ATP_intracellular^1*UTP_intracellular^1 - ADP_intracellular^1*CTP_intracellular^1*s_0763_b^2*phosphate_intracellular^1/Keq_r_0336)/((1 + ammonium_intracellular/kms_s_0430r_0336)*(1 + ATP_intracellular/kms_s_0446r_0336)*(1 + UTP_intracellular/kms_s_1430r_0336) + (1 + ADP_intracellular/kmp_s_0400r_0336)*(1 + CTP_intracellular/kmp_s_0521r_0336)*(1 + s_0763_b/kmp_s_0763_br_0336)*(1 + phosphate_intracellular/kmp_s_1207r_0336) - 1))/intracellular;
end
Function_for_CTP_synthase_NH3 is "Function for CTP synthase (NH3)";

function function_83(Keq_r_0338, Vmax_r_0338, intracellular, kmp_s_0888r_0338, kmp_s_1434_br_0338, kms_s_0917r_0338, kms_s_0943r_0338, L_cystathionine_intracellular, L_homocysteine_intracellular, L_serine_intracellular, s_1434_b)
  Vmax_r_0338*((1/kms_s_0917r_0338)^1*(1/kms_s_0943r_0338)^1*(L_homocysteine_intracellular^1*L_serine_intracellular^1 - L_cystathionine_intracellular^1*s_1434_b^1/Keq_r_0338)/((1 + L_homocysteine_intracellular/kms_s_0917r_0338)*(1 + L_serine_intracellular/kms_s_0943r_0338) + (1 + L_cystathionine_intracellular/kmp_s_0888r_0338)*(1 + s_1434_b/kmp_s_1434_br_0338) - 1))/intracellular;
end
function_83 is "Function for cystathionine beta-synthase";

function function_84(Keq_r_0339, Vmax_r_0339, intracellular, kmp_s_0183r_0339, kmp_s_0430r_0339, kmp_s_0889r_0339, kms_s_0888r_0339, kms_s_1434_br_0339, _2_oxobutanoate_intracellular, ammonium_intracellular, L_cystathionine_intracellular, L_cysteine_intracellular, s_1434_b)
  Vmax_r_0339*((1/kms_s_0888r_0339)^1*(1/kms_s_1434_br_0339)^1*(L_cystathionine_intracellular^1*s_1434_b^1 - _2_oxobutanoate_intracellular^1*ammonium_intracellular^1*L_cysteine_intracellular^1/Keq_r_0339)/((1 + L_cystathionine_intracellular/kms_s_0888r_0339)*(1 + s_1434_b/kms_s_1434_br_0339) + (1 + _2_oxobutanoate_intracellular/kmp_s_0183r_0339)*(1 + ammonium_intracellular/kmp_s_0430r_0339)*(1 + L_cysteine_intracellular/kmp_s_0889r_0339) - 1))/intracellular;
end
function_84 is "Function for cystathionine g-lyase";

function function_85(Keq_r_0340, Vmax_r_0340, intracellular, kmp_s_0369r_0340, kmp_s_0763_br_0340, kmp_s_0888r_0340, kms_s_0889r_0340, kms_s_1117r_0340, acetate_intracellular, s_0763_b, L_cystathionine_intracellular, L_cysteine_intracellular, s_1117)
  Vmax_r_0340*((1/kms_s_0889r_0340)^1*(1/kms_s_1117r_0340)^1*(L_cysteine_intracellular^1*s_1117^1 - acetate_intracellular^1*s_0763_b^1*L_cystathionine_intracellular^1/Keq_r_0340)/((1 + L_cysteine_intracellular/kms_s_0889r_0340)*(1 + s_1117/kms_s_1117r_0340) + (1 + acetate_intracellular/kmp_s_0369r_0340)*(1 + s_0763_b/kmp_s_0763_br_0340)*(1 + L_cystathionine_intracellular/kmp_s_0888r_0340) - 1))/intracellular;
end
function_85 is "Function for cystathionine gamma-synthase";

function function_86(Keq_r_0345, Vmax_r_0345, intracellular, kmp_s_0446r_0345, kmp_s_0511r_0345, kms_s_0400r_0345, kms_s_0481r_0345, ADP_intracellular, ATP_intracellular, CDP_intracellular, CMP_intracellular)
  Vmax_r_0345*((1/kms_s_0400r_0345)^1*(1/kms_s_0481r_0345)^1*(ADP_intracellular^1*CDP_intracellular^1 - ATP_intracellular^1*CMP_intracellular^1/Keq_r_0345)/((1 + ADP_intracellular/kms_s_0400r_0345)*(1 + CDP_intracellular/kms_s_0481r_0345) + (1 + ATP_intracellular/kmp_s_0446r_0345)*(1 + CMP_intracellular/kmp_s_0511r_0345) - 1))/intracellular;
end
function_86 is "Function for cytidylate kinase (CMP)";

function function_87(Keq_r_0347, Vmax_r_0347, intracellular, kmp_s_0268r_0347, kmp_s_0689r_0347, kmp_s_1082r_0347, kmp_s_1434_br_0347, kms_s_0763_br_0347, kms_s_0963r_0347, kms_s_1087r_0347, kms_s_1160r_0347, s_0268, formate_intracellular, s_0763_b, lanosterol_intracellular, NAD_intracellular, NADH_intracellular, oxygen_intracellular, s_1434_b)
  Vmax_r_0347*((1/kms_s_0763_br_0347)^2*(1/kms_s_0963r_0347)^1*(1/kms_s_1087r_0347)^3*(1/kms_s_1160r_0347)^3*(s_0763_b^2*lanosterol_intracellular^1*NADH_intracellular^3*oxygen_intracellular^3 - s_0268^1*formate_intracellular^1*NAD_intracellular^3*s_1434_b^4/Keq_r_0347)/((1 + s_0763_b/kms_s_0763_br_0347)*(1 + lanosterol_intracellular/kms_s_0963r_0347)*(1 + NADH_intracellular/kms_s_1087r_0347)*(1 + oxygen_intracellular/kms_s_1160r_0347) + (1 + s_0268/kmp_s_0268r_0347)*(1 + formate_intracellular/kmp_s_0689r_0347)*(1 + NAD_intracellular/kmp_s_1082r_0347)*(1 + s_1434_b/kmp_s_1434_br_0347) - 1))/intracellular;
end
function_87 is "Function for cytochrome P450 lanosterol 14-alpha-demethylase (NAD)";

function function_88(Keq_r_0351, Vmax_r_0351, intracellular, kmp_s_0530r_0351, kmp_s_1082r_0351, kms_s_0529r_0351, kms_s_0763_br_0351, kms_s_1087r_0351, s_0529, D_arabinose_intracellular, s_0763_b, NAD_intracellular, NADH_intracellular)
  Vmax_r_0351*((1/kms_s_0529r_0351)^1*(1/kms_s_0763_br_0351)^1*(1/kms_s_1087r_0351)^1*(s_0529^1*s_0763_b^1*NADH_intracellular^1 - D_arabinose_intracellular^1*NAD_intracellular^1/Keq_r_0351)/((1 + s_0529/kms_s_0529r_0351)*(1 + s_0763_b/kms_s_0763_br_0351)*(1 + NADH_intracellular/kms_s_1087r_0351) + (1 + D_arabinose_intracellular/kmp_s_0530r_0351)*(1 + NAD_intracellular/kmp_s_1082r_0351) - 1))/intracellular;
end
function_88 is "Function for D-arabinose 1-dehydrogenase (NAD)";

function function_89(Keq_r_0352, Vmax_r_0352, intracellular, kmp_s_0529r_0352, kmp_s_0763_br_0352, kmp_s_1096r_0352, kms_s_0530r_0352, kms_s_1091r_0352, s_0529, D_arabinose_intracellular, s_0763_b, NADP_intracellular, NADPH_intracellular)
  Vmax_r_0352*((1/kms_s_0530r_0352)^1*(1/kms_s_1091r_0352)^1*(D_arabinose_intracellular^1*NADP_intracellular^1 - s_0529^1*s_0763_b^1*NADPH_intracellular^1/Keq_r_0352)/((1 + D_arabinose_intracellular/kms_s_0530r_0352)*(1 + NADP_intracellular/kms_s_1091r_0352) + (1 + s_0529/kmp_s_0529r_0352)*(1 + s_0763_b/kmp_s_0763_br_0352)*(1 + NADPH_intracellular/kmp_s_1096r_0352) - 1))/intracellular;
end
function_89 is "Function for D-arabinose 1-dehydrogenase (NADP)";

function Function_for_dCMP_deaminase(Keq_r_0357, Vmax_r_0357, intracellular, kmp_s_0569r_0357, kmp_s_0763_br_0357, kmp_s_1434_br_0357, kms_s_0430r_0357, kms_s_0624r_0357, ammonium_intracellular, dCMP_intracellular, dUMP_intracellular, s_0763_b, s_1434_b)
  Vmax_r_0357*((1/kms_s_0430r_0357)^1*(1/kms_s_0624r_0357)^1*(ammonium_intracellular^1*dUMP_intracellular^1 - dCMP_intracellular^1*s_0763_b^1*s_1434_b^1/Keq_r_0357)/((1 + ammonium_intracellular/kms_s_0430r_0357)*(1 + dUMP_intracellular/kms_s_0624r_0357) + (1 + dCMP_intracellular/kmp_s_0569r_0357)*(1 + s_0763_b/kmp_s_0763_br_0357)*(1 + s_1434_b/kmp_s_1434_br_0357) - 1))/intracellular;
end

function function_91(Keq_r_0360, Vmax_r_0360, intracellular, kmp_s_0446r_0360, kmp_s_0564r_0360, kms_s_0400r_0360, kms_s_0562r_0360, ADP_intracellular, ATP_intracellular, dADP_intracellular, dAMP_intracellular)
  Vmax_r_0360*((1/kms_s_0400r_0360)^1*(1/kms_s_0562r_0360)^1*(ADP_intracellular^1*dADP_intracellular^1 - ATP_intracellular^1*dAMP_intracellular^1/Keq_r_0360)/((1 + ADP_intracellular/kms_s_0400r_0360)*(1 + dADP_intracellular/kms_s_0562r_0360) + (1 + ATP_intracellular/kmp_s_0446r_0360)*(1 + dAMP_intracellular/kmp_s_0564r_0360) - 1))/intracellular;
end
function_91 is "Function for deoxyadenylate kinase";

function function_92(Keq_r_0362, Vmax_r_0362, intracellular, kmp_s_0446r_0362, kmp_s_0593r_0362, kms_s_0400r_0362, kms_s_0591r_0362, ADP_intracellular, ATP_intracellular, dGDP_intracellular, dGMP_intracellular)
  Vmax_r_0362*((1/kms_s_0400r_0362)^1*(1/kms_s_0591r_0362)^1*(ADP_intracellular^1*dGDP_intracellular^1 - ATP_intracellular^1*dGMP_intracellular^1/Keq_r_0362)/((1 + ADP_intracellular/kms_s_0400r_0362)*(1 + dGDP_intracellular/kms_s_0591r_0362) + (1 + ATP_intracellular/kmp_s_0446r_0362)*(1 + dGMP_intracellular/kmp_s_0593r_0362) - 1))/intracellular;
end
function_92 is "Function for deoxyguanylate kinase (dGMP:ATP)";

function function_93(Keq_r_0370, Vmax_r_0370, intracellular, kmp_s_0514r_0370, kmp_s_0763_br_0370, kmp_s_1399r_0370, kms_s_0386r_0370, kms_s_0596r_0370, acyl_CoA_intracellular, coenzyme_A_intracellular, diglyceride_intracellular, s_0763_b, triglyceride_intracellular)
  Vmax_r_0370*((1/kms_s_0386r_0370)^1*(1/kms_s_0596r_0370)^1*(acyl_CoA_intracellular^1*diglyceride_intracellular^1 - coenzyme_A_intracellular^1*s_0763_b^4*triglyceride_intracellular^1/Keq_r_0370)/((1 + acyl_CoA_intracellular/kms_s_0386r_0370)*(1 + diglyceride_intracellular/kms_s_0596r_0370) + (1 + coenzyme_A_intracellular/kmp_s_0514r_0370)*(1 + s_0763_b/kmp_s_0763_br_0370)*(1 + triglyceride_intracellular/kmp_s_1399r_0370) - 1))/intracellular;
end
function_93 is "Function for diacylglycerol acyltransferase";

function function_36(Keq_r_0159, Vmax_r_0159, intracellular, kmp_s_0393r_0159, kmp_s_0917r_0159, kms_s_1290r_0159, kms_s_1434_br_0159, adenosine_intracellular, L_homocysteine_intracellular, s_1290, s_1434_b)
  Vmax_r_0159*((1/kms_s_1290r_0159)^1*(1/kms_s_1434_br_0159)^1*(s_1290^1*s_1434_b^1 - adenosine_intracellular^1*L_homocysteine_intracellular^1/Keq_r_0159)/((1 + s_1290/kms_s_1290r_0159)*(1 + s_1434_b/kms_s_1434_br_0159) + (1 + adenosine_intracellular/kmp_s_0393r_0159)*(1 + L_homocysteine_intracellular/kmp_s_0917r_0159) - 1))/intracellular;
end
function_36 is "Function for adenosylhomocysteinase";

function Function_for_adenylate_kinase(Keq_r_0163, Vmax_r_0163, intracellular, kmp_s_0434r_0163, kmp_s_0446r_0163, kms_s_0400r_0163, ADP_intracellular, AMP_intracellular, ATP_intracellular)
  Vmax_r_0163*((1/kms_s_0400r_0163)^2*(ADP_intracellular^2 - AMP_intracellular^1*ATP_intracellular^1/Keq_r_0163)/(1 + ADP_intracellular/kms_s_0400r_0163 + (1 + AMP_intracellular/kmp_s_0434r_0163)*(1 + ATP_intracellular/kmp_s_0446r_0163) - 1))/intracellular;
end

function function_38(Keq_r_0165, Vmax_r_0165, intracellular, kmp_s_0434r_0165, kmp_s_0755r_0165, kms_s_0400r_0165, kms_s_0706r_0165, ADP_intracellular, AMP_intracellular, GDP_intracellular, GTP_intracellular)
  Vmax_r_0165*((1/kms_s_0400r_0165)^1*(1/kms_s_0706r_0165)^1*(ADP_intracellular^1*GDP_intracellular^1 - AMP_intracellular^1*GTP_intracellular^1/Keq_r_0165)/((1 + ADP_intracellular/kms_s_0400r_0165)*(1 + GDP_intracellular/kms_s_0706r_0165) + (1 + AMP_intracellular/kmp_s_0434r_0165)*(1 + GTP_intracellular/kmp_s_0755r_0165) - 1))/intracellular;
end
function_38 is "Function for adenylate kinase (GTP)";

function function_39(Keq_r_0169, Vmax_r_0169, intracellular, kmp_s_0317r_0169, kmp_s_0692r_0169, kms_s_0009r_0169, s_0009, s_0317, fumarate_2_intracellular)
  Vmax_r_0169*((1/kms_s_0009r_0169)^1*(s_0009^1 - s_0317^1*fumarate_2_intracellular^1/Keq_r_0169)/(1 + s_0009/kms_s_0009r_0169 + (1 + s_0317/kmp_s_0317r_0169)*(1 + fumarate_2_intracellular/kmp_s_0692r_0169) - 1))/intracellular;
end
function_39 is "Function for adenylosuccinate lyase";

function function_40(Keq_r_0170, Vmax_r_0170, intracellular, kmp_s_0706r_0170, kmp_s_0763_br_0170, kmp_s_1053r_0170, kmp_s_1207r_0170, kms_s_0755r_0170, kms_s_0816r_0170, kms_s_0881r_0170, GDP_intracellular, GTP_intracellular, s_0763_b, IMP_intracellular, L_aspartate_intracellular, s_1053, phosphate_intracellular)
  Vmax_r_0170*((1/kms_s_0755r_0170)^1*(1/kms_s_0816r_0170)^1*(1/kms_s_0881r_0170)^1*(GTP_intracellular^1*IMP_intracellular^1*L_aspartate_intracellular^1 - GDP_intracellular^1*s_0763_b^2*s_1053^1*phosphate_intracellular^1/Keq_r_0170)/((1 + GTP_intracellular/kms_s_0755r_0170)*(1 + IMP_intracellular/kms_s_0816r_0170)*(1 + L_aspartate_intracellular/kms_s_0881r_0170) + (1 + GDP_intracellular/kmp_s_0706r_0170)*(1 + s_0763_b/kmp_s_0763_br_0170)*(1 + s_1053/kmp_s_1053r_0170)*(1 + phosphate_intracellular/kmp_s_1207r_0170) - 1))/intracellular;
end
function_40 is "Function for adenylosuccinate synthase";

function function_41(Keq_r_0171, Vmax_r_0171, intracellular, kmp_s_0434r_0171, kmp_s_0692r_0171, kms_s_1053r_0171, AMP_intracellular, fumarate_2_intracellular, s_1053)
  Vmax_r_0171*((1/kms_s_1053r_0171)^1*(s_1053^1 - AMP_intracellular^1*fumarate_2_intracellular^1/Keq_r_0171)/(1 + s_1053/kms_s_1053r_0171 + (1 + AMP_intracellular/kmp_s_0434r_0171)*(1 + fumarate_2_intracellular/kmp_s_0692r_0171) - 1))/intracellular;
end
function_41 is "Function for adenylsuccinate lyase";

function function_42(Keq_r_0172, Vmax_r_0172, intracellular, kmp_s_0206r_0172, kmp_s_0400r_0172, kmp_s_0763_br_0172, kms_s_0304r_0172, kms_s_0446r_0172, s_0206, _5_adenylyl_sulfate_intracellular, ADP_intracellular, ATP_intracellular, s_0763_b)
  Vmax_r_0172*((1/kms_s_0304r_0172)^1*(1/kms_s_0446r_0172)^1*(_5_adenylyl_sulfate_intracellular^1*ATP_intracellular^1 - s_0206^1*ADP_intracellular^1*s_0763_b^1/Keq_r_0172)/((1 + _5_adenylyl_sulfate_intracellular/kms_s_0304r_0172)*(1 + ATP_intracellular/kms_s_0446r_0172) + (1 + s_0206/kmp_s_0206r_0172)*(1 + ADP_intracellular/kmp_s_0400r_0172)*(1 + s_0763_b/kmp_s_0763_br_0172) - 1))/intracellular;
end
function_42 is "Function for adenylyl-sulfate kinase";

function function_43(Keq_r_0174, Vmax_r_0174, intracellular, kmp_s_0740r_0174, kmp_s_1277r_0174, kms_s_0749r_0174, kms_s_0863r_0174, glycine_intracellular, glyoxylate_intracellular, L_alanine_intracellular, pyruvate_intracellular)
  Vmax_r_0174*((1/kms_s_0749r_0174)^1*(1/kms_s_0863r_0174)^1*(glyoxylate_intracellular^1*L_alanine_intracellular^1 - glycine_intracellular^1*pyruvate_intracellular^1/Keq_r_0174)/((1 + glyoxylate_intracellular/kms_s_0749r_0174)*(1 + L_alanine_intracellular/kms_s_0863r_0174) + (1 + glycine_intracellular/kmp_s_0740r_0174)*(1 + pyruvate_intracellular/kmp_s_1277r_0174) - 1))/intracellular;
end
function_43 is "Function for alanine glyoxylate aminotransferase";

function function_44(Keq_r_0183, Vmax_r_0183, intracellular, kmp_s_0650r_0183, kmp_s_1082r_0183, kms_s_0366r_0183, kms_s_0763_br_0183, kms_s_1087r_0183, acetaldehyde_intracellular, ethanol_intracellular, s_0763_b, NAD_intracellular, NADH_intracellular)
  Vmax_r_0183*((1/kms_s_0366r_0183)^1*(1/kms_s_0763_br_0183)^1*(1/kms_s_1087r_0183)^1*(acetaldehyde_intracellular^1*s_0763_b^1*NADH_intracellular^1 - ethanol_intracellular^1*NAD_intracellular^1/Keq_r_0183)/((1 + acetaldehyde_intracellular/kms_s_0366r_0183)*(1 + s_0763_b/kms_s_0763_br_0183)*(1 + NADH_intracellular/kms_s_1087r_0183) + (1 + ethanol_intracellular/kmp_s_0650r_0183)*(1 + NAD_intracellular/kmp_s_1082r_0183) - 1))/intracellular;
end
function_44 is "Function for alcohol dehydrogenase, reverse rxn (acetaldehyde -> ethanol)";

function function_45(Keq_r_0191, Vmax_r_0191, intracellular, kmp_s_0369r_0191, kmp_s_0763_br_0191, kmp_s_1096r_0191, kms_s_0366r_0191, kms_s_1091r_0191, kms_s_1434_br_0191, acetaldehyde_intracellular, acetate_intracellular, s_0763_b, NADP_intracellular, NADPH_intracellular, s_1434_b)
  Vmax_r_0191*((1/kms_s_0366r_0191)^1*(1/kms_s_1091r_0191)^1*(1/kms_s_1434_br_0191)^1*(acetaldehyde_intracellular^1*NADP_intracellular^1*s_1434_b^1 - acetate_intracellular^1*s_0763_b^2*NADPH_intracellular^1/Keq_r_0191)/((1 + acetaldehyde_intracellular/kms_s_0366r_0191)*(1 + NADP_intracellular/kms_s_1091r_0191)*(1 + s_1434_b/kms_s_1434_br_0191) + (1 + acetate_intracellular/kmp_s_0369r_0191)*(1 + s_0763_b/kmp_s_0763_br_0191)*(1 + NADPH_intracellular/kmp_s_1096r_0191) - 1))/intracellular;
end
function_45 is "Function for aldehyde dehydrogenase (acetaldehyde, NADP)";

function function_46(Keq_r_0213, Vmax_r_0213, intracellular, kmp_s_0419r_0213, kmp_s_0763_br_0213, kmp_s_1411r_0213, kms_s_0410r_0213, kms_s_1415r_0213, s_0410, s_0419, s_0763_b, UDP_intracellular, UDP_D_glucose_intracellular)
  Vmax_r_0213*((1/kms_s_0410r_0213)^1*(1/kms_s_1415r_0213)^1*(s_0410^1*UDP_D_glucose_intracellular^1 - s_0419^1*s_0763_b^1*UDP_intracellular^1/Keq_r_0213)/((1 + s_0410/kms_s_0410r_0213)*(1 + UDP_D_glucose_intracellular/kms_s_1415r_0213) + (1 + s_0419/kmp_s_0419r_0213)*(1 + s_0763_b/kmp_s_0763_br_0213)*(1 + UDP_intracellular/kmp_s_1411r_0213) - 1))/intracellular;
end
function_46 is "Function for alpha,alpha-trehalose-phosphate synthase (UDP-forming)";

function function_47(Keq_r_0220, Vmax_r_0220, intracellular, kmp_s_0605r_0220, kmp_s_1066r_0220, kms_s_0331r_0220, kms_s_0439r_0220, s_0331, anthranilate_intracellular, diphosphate_intracellular, s_1066)
  Vmax_r_0220*((1/kms_s_0331r_0220)^1*(1/kms_s_0439r_0220)^1*(s_0331^1*anthranilate_intracellular^1 - diphosphate_intracellular^1*s_1066^1/Keq_r_0220)/((1 + s_0331/kms_s_0331r_0220)*(1 + anthranilate_intracellular/kms_s_0439r_0220) + (1 + diphosphate_intracellular/kmp_s_0605r_0220)*(1 + s_1066/kmp_s_1066r_0220) - 1))/intracellular;
end
function_47 is "Function for anthranilate phosphoribosyltransferase";

function function_48(Keq_r_0221, Vmax_r_0221, intracellular, kmp_s_0439r_0221, kmp_s_0763_br_0221, kmp_s_0899r_0221, kmp_s_1277r_0221, kms_s_0500r_0221, kms_s_0907r_0221, anthranilate_intracellular, chorismate_2_intracellular, s_0763_b, L_glutamate_intracellular, L_glutamine_intracellular, pyruvate_intracellular)
  Vmax_r_0221*((1/kms_s_0500r_0221)^1*(1/kms_s_0907r_0221)^1*(chorismate_2_intracellular^1*L_glutamine_intracellular^1 - anthranilate_intracellular^1*s_0763_b^1*L_glutamate_intracellular^1*pyruvate_intracellular^1/Keq_r_0221)/((1 + chorismate_2_intracellular/kms_s_0500r_0221)*(1 + L_glutamine_intracellular/kms_s_0907r_0221) + (1 + anthranilate_intracellular/kmp_s_0439r_0221)*(1 + s_0763_b/kmp_s_0763_br_0221)*(1 + L_glutamate_intracellular/kmp_s_0899r_0221)*(1 + pyruvate_intracellular/kmp_s_1277r_0221) - 1))/intracellular;
end
function_48 is "Function for anthranilate synthase";

function function_49(Keq_r_0225, Vmax_r_0225, intracellular, kmp_s_0692r_0225, kmp_s_0873r_0225, kms_s_0017r_0225, s_0017, fumarate_2_intracellular, L_arginine_intracellular)
  Vmax_r_0225*((1/kms_s_0017r_0225)^1*(s_0017^1 - fumarate_2_intracellular^1*L_arginine_intracellular^1/Keq_r_0225)/(1 + s_0017/kms_s_0017r_0225 + (1 + fumarate_2_intracellular/kmp_s_0692r_0225)*(1 + L_arginine_intracellular/kmp_s_0873r_0225) - 1))/intracellular;
end
function_49 is "Function for argininosuccinate lyase";

function function_50(Keq_r_0226, Vmax_r_0226, intracellular, kmp_s_0017r_0226, kmp_s_0434r_0226, kmp_s_0605r_0226, kmp_s_0763_br_0226, kms_s_0446r_0226, kms_s_0881r_0226, kms_s_0887r_0226, s_0017, AMP_intracellular, ATP_intracellular, diphosphate_intracellular, s_0763_b, L_aspartate_intracellular, L_citrulline_intracellular)
  Vmax_r_0226*((1/kms_s_0446r_0226)^1*(1/kms_s_0881r_0226)^1*(1/kms_s_0887r_0226)^1*(ATP_intracellular^1*L_aspartate_intracellular^1*L_citrulline_intracellular^1 - s_0017^1*AMP_intracellular^1*diphosphate_intracellular^1*s_0763_b^1/Keq_r_0226)/((1 + ATP_intracellular/kms_s_0446r_0226)*(1 + L_aspartate_intracellular/kms_s_0881r_0226)*(1 + L_citrulline_intracellular/kms_s_0887r_0226) + (1 + s_0017/kmp_s_0017r_0226)*(1 + AMP_intracellular/kmp_s_0434r_0226)*(1 + diphosphate_intracellular/kmp_s_0605r_0226)*(1 + s_0763_b/kmp_s_0763_br_0226) - 1))/intracellular;
end
function_50 is "Function for argininosuccinate synthase";

function function_51(Keq_r_0229, Vmax_r_0229, intracellular, kmp_s_0434r_0229, kmp_s_0605r_0229, kmp_s_0763_br_0229, kmp_s_0877r_0229, kmp_s_0899r_0229, kms_s_0446r_0229, kms_s_0881r_0229, kms_s_0907r_0229, kms_s_1434_br_0229, AMP_intracellular, ATP_intracellular, diphosphate_intracellular, s_0763_b, L_asparagine_intracellular, L_aspartate_intracellular, L_glutamate_intracellular, L_glutamine_intracellular, s_1434_b)
  Vmax_r_0229*((1/kms_s_0446r_0229)^1*(1/kms_s_0881r_0229)^1*(1/kms_s_0907r_0229)^1*(1/kms_s_1434_br_0229)^1*(ATP_intracellular^1*L_aspartate_intracellular^1*L_glutamine_intracellular^1*s_1434_b^1 - AMP_intracellular^1*diphosphate_intracellular^1*s_0763_b^1*L_asparagine_intracellular^1*L_glutamate_intracellular^1/Keq_r_0229)/((1 + ATP_intracellular/kms_s_0446r_0229)*(1 + L_aspartate_intracellular/kms_s_0881r_0229)*(1 + L_glutamine_intracellular/kms_s_0907r_0229)*(1 + s_1434_b/kms_s_1434_br_0229) + (1 + AMP_intracellular/kmp_s_0434r_0229)*(1 + diphosphate_intracellular/kmp_s_0605r_0229)*(1 + s_0763_b/kmp_s_0763_br_0229)*(1 + L_asparagine_intracellular/kmp_s_0877r_0229)*(1 + L_glutamate_intracellular/kmp_s_0899r_0229) - 1))/intracellular;
end
function_51 is "Function for asparagine synthase (glutamine-hydrolysing)";

function Function_for_aspartate_kinase(Keq_r_0233, Vmax_r_0233, intracellular, kmp_s_0301r_0233, kmp_s_0400r_0233, kms_s_0446r_0233, kms_s_0881r_0233, s_0301, ADP_intracellular, ATP_intracellular, L_aspartate_intracellular)
  Vmax_r_0233*((1/kms_s_0446r_0233)^1*(1/kms_s_0881r_0233)^1*(ATP_intracellular^1*L_aspartate_intracellular^1 - s_0301^1*ADP_intracellular^1/Keq_r_0233)/((1 + ATP_intracellular/kms_s_0446r_0233)*(1 + L_aspartate_intracellular/kms_s_0881r_0233) + (1 + s_0301/kmp_s_0301r_0233)*(1 + ADP_intracellular/kmp_s_0400r_0233) - 1))/intracellular;
end

function function_54(Keq_r_0235, Vmax_r_0235, intracellular, kmp_s_0185r_0235, kmp_s_0881r_0235, kms_s_0899r_0235, kms_s_1156r_0235, _2_oxoglutarate_intracellular, L_aspartate_intracellular, L_glutamate_intracellular, oxaloacetate_2_intracellular)
  Vmax_r_0235*((1/kms_s_0899r_0235)^1*(1/kms_s_1156r_0235)^1*(L_glutamate_intracellular^1*oxaloacetate_2_intracellular^1 - _2_oxoglutarate_intracellular^1*L_aspartate_intracellular^1/Keq_r_0235)/((1 + L_glutamate_intracellular/kms_s_0899r_0235)*(1 + oxaloacetate_2_intracellular/kms_s_1156r_0235) + (1 + _2_oxoglutarate_intracellular/kmp_s_0185r_0235)*(1 + L_aspartate_intracellular/kmp_s_0881r_0235) - 1))/intracellular;
end
function_54 is "Function for aspartate transaminase";

function function_1(Keq_r_0005, Vmax_r_0005, intracellular, kmp_s_0001r_0005, kmp_s_0763_br_0005, kmp_s_1411r_0005, kms_s_1415r_0005, _1_3_beta_D_glucan_intracellular, s_0763_b, UDP_intracellular, UDP_D_glucose_intracellular)
  Vmax_r_0005*((1/kms_s_1415r_0005)^1*(UDP_D_glucose_intracellular^1 - _1_3_beta_D_glucan_intracellular^1*s_0763_b^1*UDP_intracellular^1/Keq_r_0005)/(1 + UDP_D_glucose_intracellular/kms_s_1415r_0005 + (1 + _1_3_beta_D_glucan_intracellular/kmp_s_0001r_0005)*(1 + s_0763_b/kmp_s_0763_br_0005)*(1 + UDP_intracellular/kmp_s_1411r_0005) - 1))/intracellular;
end
function_1 is "Function for 1,3-beta-glucan synthase";

function function_2(Keq_r_0006, Vmax_r_0006, intracellular, kmp_s_0743r_0006, kmp_s_1434_br_0006, kms_s_0438r_0006, amylose_intracellular, glycogen_intracellular, s_1434_b)
  Vmax_r_0006*((1/kms_s_0438r_0006)^1*(amylose_intracellular^1 - glycogen_intracellular^1*s_1434_b^1/Keq_r_0006)/(1 + amylose_intracellular/kms_s_0438r_0006 + (1 + glycogen_intracellular/kmp_s_0743r_0006)*(1 + s_1434_b/kmp_s_1434_br_0006) - 1))/intracellular;
end
function_2 is "Function for 1,4-alpha-glucan branching enzyme";

function function_3(Keq_r_0008, Vmax_r_0008, intracellular, kmp_s_0315r_0008, kms_s_0079r_0008, s_0079, s_0315)
  Vmax_r_0008*((1/kms_s_0079r_0008)^1*(s_0079^1 - s_0315^1/Keq_r_0008)/(1 + s_0079/kms_s_0079r_0008 + 1 + s_0315/kmp_s_0315r_0008 - 1))/intracellular;
end
function_3 is "Function for 1-(5-phosphoribosyl)-5-[(5-phosphoribosylamino)methylideneamino)imidazole-4-carboxamide isomerase";

function function_4(Keq_r_0009, Vmax_r_0009, intracellular, kmp_s_0514r_0009, kmp_s_0763_br_0009, kmp_s_1215r_0009, kms_s_0083r_0009, kms_s_0386r_0009, s_0083, acyl_CoA_intracellular, coenzyme_A_intracellular, s_0763_b, phosphatidate_intracellular)
  Vmax_r_0009*((1/kms_s_0083r_0009)^1*(1/kms_s_0386r_0009)^1*(s_0083^1*acyl_CoA_intracellular^1 - coenzyme_A_intracellular^1*s_0763_b^4*phosphatidate_intracellular^1/Keq_r_0009)/((1 + s_0083/kms_s_0083r_0009)*(1 + acyl_CoA_intracellular/kms_s_0386r_0009) + (1 + coenzyme_A_intracellular/kmp_s_0514r_0009)*(1 + s_0763_b/kmp_s_0763_br_0009)*(1 + phosphatidate_intracellular/kmp_s_1215r_0009) - 1))/intracellular;
end
function_4 is "Function for 1-acyl-sn-gylcerol-3-phosphate acyltransferase";

function function_5(Keq_r_0014, Vmax_r_0014, intracellular, kmp_s_0319r_0014, kmp_s_0430r_0014, kms_s_0146r_0014, kms_s_0763_br_0014, kms_s_1434_br_0014, s_0146, s_0319, ammonium_intracellular, s_0763_b, s_1434_b)
  Vmax_r_0014*((1/kms_s_0146r_0014)^1*(1/kms_s_0763_br_0014)^1*(1/kms_s_1434_br_0014)^1*(s_0146^1*s_0763_b^1*s_1434_b^1 - s_0319^1*ammonium_intracellular^1/Keq_r_0014)/((1 + s_0146/kms_s_0146r_0014)*(1 + s_0763_b/kms_s_0763_br_0014)*(1 + s_1434_b/kms_s_1434_br_0014) + (1 + s_0319/kmp_s_0319r_0014)*(1 + ammonium_intracellular/kmp_s_0430r_0014) - 1))/intracellular;
end
function_5 is "Function for 2,5-diamino-6-ribitylamino-4(3H)-pyrimidinone 5'-phosphate deaminase";

function function_6(Keq_r_0015, Vmax_r_0015, intracellular, kmp_s_0146r_0015, kmp_s_1091r_0015, kms_s_0145r_0015, kms_s_0763_br_0015, kms_s_1096r_0015, s_0145, s_0146, s_0763_b, NADP_intracellular, NADPH_intracellular)
  Vmax_r_0015*((1/kms_s_0145r_0015)^1*(1/kms_s_0763_br_0015)^1*(1/kms_s_1096r_0015)^1*(s_0145^1*s_0763_b^1*NADPH_intracellular^1 - s_0146^1*NADP_intracellular^1/Keq_r_0015)/((1 + s_0145/kms_s_0145r_0015)*(1 + s_0763_b/kms_s_0763_br_0015)*(1 + NADPH_intracellular/kms_s_1096r_0015) + (1 + s_0146/kmp_s_0146r_0015)*(1 + NADP_intracellular/kmp_s_1091r_0015) - 1))/intracellular;
end
function_6 is "Function for 2,5-diamino-6-ribosylamino-4(3H)-pyrimidinone 5'-phosphate reductase (NADPH)";

function function_7(Keq_r_0016, Vmax_r_0016, intracellular, kmp_s_0042r_0016, kmp_s_0470r_0016, kms_s_0183r_0016, kms_s_0763_br_0016, kms_s_1277r_0016, s_0042, _2_oxobutanoate_intracellular, carbon_dioxide_intracellular, s_0763_b, pyruvate_intracellular)
  Vmax_r_0016*((1/kms_s_0183r_0016)^1*(1/kms_s_0763_br_0016)^1*(1/kms_s_1277r_0016)^1*(_2_oxobutanoate_intracellular^1*s_0763_b^1*pyruvate_intracellular^1 - s_0042^1*carbon_dioxide_intracellular^1/Keq_r_0016)/((1 + _2_oxobutanoate_intracellular/kms_s_0183r_0016)*(1 + s_0763_b/kms_s_0763_br_0016)*(1 + pyruvate_intracellular/kms_s_1277r_0016) + (1 + s_0042/kmp_s_0042r_0016)*(1 + carbon_dioxide_intracellular/kmp_s_0470r_0016) - 1))/intracellular;
end
function_7 is "Function for 2-aceto-2-hydroxybutanoate synthase";

function function_8(Keq_r_0018, Vmax_r_0018, intracellular, kmp_s_0185r_0018, kmp_s_0861r_0018, kms_s_0181r_0018, kms_s_0899r_0018, _2_oxoadipic_acid_intracellular, _2_oxoglutarate_intracellular, L_2_aminoadipate_2_intracellular, L_glutamate_intracellular)
  Vmax_r_0018*((1/kms_s_0181r_0018)^1*(1/kms_s_0899r_0018)^1*(_2_oxoadipic_acid_intracellular^1*L_glutamate_intracellular^1 - _2_oxoglutarate_intracellular^1*L_2_aminoadipate_2_intracellular^1/Keq_r_0018)/((1 + _2_oxoadipic_acid_intracellular/kms_s_0181r_0018)*(1 + L_glutamate_intracellular/kms_s_0899r_0018) + (1 + _2_oxoglutarate_intracellular/kmp_s_0185r_0018)*(1 + L_2_aminoadipate_2_intracellular/kmp_s_0861r_0018) - 1))/intracellular;
end
function_8 is "Function for 2-aminoadipate transaminase";

function function_9(Keq_r_0021, Vmax_r_0021, intracellular, kmp_s_0356r_0021, kmp_s_1207r_0021, kms_s_0533r_0021, kms_s_1243r_0021, kms_s_1434_br_0021, s_0356, s_0533, phosphate_intracellular, s_1243, s_1434_b)
  Vmax_r_0021*((1/kms_s_0533r_0021)^1*(1/kms_s_1243r_0021)^1*(1/kms_s_1434_br_0021)^1*(s_0533^1*s_1243^1*s_1434_b^1 - s_0356^1*phosphate_intracellular^1/Keq_r_0021)/((1 + s_0533/kms_s_0533r_0021)*(1 + s_1243/kms_s_1243r_0021)*(1 + s_1434_b/kms_s_1434_br_0021) + (1 + s_0356/kmp_s_0356r_0021)*(1 + phosphate_intracellular/kmp_s_1207r_0021) - 1))/intracellular;
end
function_9 is "Function for 2-deoxy-D-arabino-heptulosonate 7-phosphate synthetase";

function function_10(Keq_r_0025, Vmax_r_0025, intracellular, kmp_s_0170r_0025, kmp_s_1434_br_0025, kms_s_0167r_0025, s_0167, s_0170, s_1434_b)
  Vmax_r_0025*((1/kms_s_0167r_0025)^1*(s_0167^1 - s_0170^1*s_1434_b^1/Keq_r_0025)/(1 + s_0167/kms_s_0167r_0025 + (1 + s_0170/kmp_s_0170r_0025)*(1 + s_1434_b/kmp_s_1434_br_0025) - 1))/intracellular;
end
function_10 is "Function for 2-isopropylmalate hydratase";

function function_11(Keq_r_0026, Vmax_r_0026, intracellular, kmp_s_0167r_0026, kmp_s_0514r_0026, kmp_s_0763_br_0026, kms_s_0238r_0026, kms_s_0380r_0026, kms_s_1434_br_0026, s_0167, s_0238, acetyl_CoA_intracellular, coenzyme_A_intracellular, s_0763_b, s_1434_b)
  Vmax_r_0026*((1/kms_s_0238r_0026)^1*(1/kms_s_0380r_0026)^1*(1/kms_s_1434_br_0026)^1*(s_0238^1*acetyl_CoA_intracellular^1*s_1434_b^1 - s_0167^1*coenzyme_A_intracellular^1*s_0763_b^1/Keq_r_0026)/((1 + s_0238/kms_s_0238r_0026)*(1 + acetyl_CoA_intracellular/kms_s_0380r_0026)*(1 + s_1434_b/kms_s_1434_br_0026) + (1 + s_0167/kmp_s_0167r_0026)*(1 + coenzyme_A_intracellular/kmp_s_0514r_0026)*(1 + s_0763_b/kmp_s_0763_br_0026) - 1))/intracellular;
end
function_11 is "Function for 2-isopropylmalate synthase";

function function_12(Keq_r_0029, Vmax_r_0029, intracellular, kmp_s_0468r_0029, kmp_s_1434_br_0029, kms_s_0798r_0029, s_0468, homocitrate_3_intracellular, s_1434_b)
  Vmax_r_0029*((1/kms_s_0798r_0029)^1*(homocitrate_3_intracellular^1 - s_0468^1*s_1434_b^1/Keq_r_0029)/(1 + homocitrate_3_intracellular/kms_s_0798r_0029 + (1 + s_0468/kmp_s_0468r_0029)*(1 + s_1434_b/kmp_s_1434_br_0029) - 1))/intracellular;
end
function_12 is "Function for 2-methylcitrate dehydratase";

function function_13(Keq_r_0031, Vmax_r_0031, intracellular, kmp_s_0297r_0031, kmp_s_0470r_0031, kms_s_0010r_0031, kms_s_0763_br_0031, s_0010, s_0297, carbon_dioxide_intracellular, s_0763_b)
  Vmax_r_0031*((1/kms_s_0010r_0031)^1*(1/kms_s_0763_br_0031)^1*(s_0010^1*s_0763_b^1 - s_0297^1*carbon_dioxide_intracellular^1/Keq_r_0031)/((1 + s_0010/kms_s_0010r_0031)*(1 + s_0763_b/kms_s_0763_br_0031) + (1 + s_0297/kmp_s_0297r_0031)*(1 + carbon_dioxide_intracellular/kmp_s_0470r_0031) - 1))/intracellular;
end
function_13 is "Function for 2-oxo-4-methyl-3-carboxypentanoate decarboxylation";

function function_14(Keq_r_0034, Vmax_r_0034, intracellular, kmp_s_0434r_0034, kmp_s_1207r_0034, kms_s_0397r_0034, kms_s_1434_br_0034, s_0397, AMP_intracellular, phosphate_intracellular, s_1434_b)
  Vmax_r_0034*((1/kms_s_0397r_0034)^1*(1/kms_s_1434_br_0034)^1*(s_0397^1*s_1434_b^1 - AMP_intracellular^1*phosphate_intracellular^1/Keq_r_0034)/((1 + s_0397/kms_s_0397r_0034)*(1 + s_1434_b/kms_s_1434_br_0034) + (1 + AMP_intracellular/kmp_s_0434r_0034)*(1 + phosphate_intracellular/kmp_s_1207r_0034) - 1))/intracellular;
end
function_14 is "Function for 3',5'-bisphosphate nucleotidase";

function function_15(Keq_r_0040, Vmax_r_0040, intracellular, kmp_s_0163r_0040, kmp_s_0689r_0040, kmp_s_0763_br_0040, kms_s_0557r_0040, s_0163, s_0557, formate_intracellular, s_0763_b)
  Vmax_r_0040*((1/kms_s_0557r_0040)^1*(s_0557^1 - s_0163^1*formate_intracellular^1*s_0763_b^1/Keq_r_0040)/(1 + s_0557/kms_s_0557r_0040 + (1 + s_0163/kmp_s_0163r_0040)*(1 + formate_intracellular/kmp_s_0689r_0040)*(1 + s_0763_b/kmp_s_0763_br_0040) - 1))/intracellular;
end
function_15 is "Function for 3,4-dihydroxy-2-butanone-4-phosphate synthase";

function function_16(Keq_r_0042, Vmax_r_0042, intracellular, kmp_s_0217r_0042, kmp_s_1434_br_0042, kms_s_0216r_0042, _3_dehydroquinate_intracellular, _3_dehydroshikimate_intracellular, s_1434_b)
  Vmax_r_0042*((1/kms_s_0216r_0042)^1*(_3_dehydroquinate_intracellular^1 - _3_dehydroshikimate_intracellular^1*s_1434_b^1/Keq_r_0042)/(1 + _3_dehydroquinate_intracellular/kms_s_0216r_0042 + (1 + _3_dehydroshikimate_intracellular/kmp_s_0217r_0042)*(1 + s_1434_b/kmp_s_1434_br_0042) - 1))/intracellular;
end
function_16 is "Function for 3-dehydroquinate dehydratase";

function function_17(Keq_r_0043, Vmax_r_0043, intracellular, kmp_s_0216r_0043, kmp_s_1207r_0043, kms_s_0356r_0043, _3_dehydroquinate_intracellular, s_0356, phosphate_intracellular)
  Vmax_r_0043*((1/kms_s_0356r_0043)^1*(s_0356^1 - _3_dehydroquinate_intracellular^1*phosphate_intracellular^1/Keq_r_0043)/(1 + s_0356/kms_s_0356r_0043 + (1 + _3_dehydroquinate_intracellular/kmp_s_0216r_0043)*(1 + phosphate_intracellular/kmp_s_1207r_0043) - 1))/intracellular;
end
function_17 is "Function for 3-dehydroquinate synthase";

function function_18(Keq_r_0044, Vmax_r_0044, intracellular, kmp_s_1091r_0044, kmp_s_1325r_0044, kms_s_0218r_0044, kms_s_0763_br_0044, kms_s_1096r_0044, s_0218, s_0763_b, NADP_intracellular, NADPH_intracellular, sphinganine_intracellular)
  Vmax_r_0044*((1/kms_s_0218r_0044)^1*(1/kms_s_0763_br_0044)^2*(1/kms_s_1096r_0044)^1*(s_0218^1*s_0763_b^2*NADPH_intracellular^1 - NADP_intracellular^1*sphinganine_intracellular^1/Keq_r_0044)/((1 + s_0218/kms_s_0218r_0044)*(1 + s_0763_b/kms_s_0763_br_0044)*(1 + NADPH_intracellular/kms_s_1096r_0044) + (1 + NADP_intracellular/kmp_s_1091r_0044)*(1 + sphinganine_intracellular/kmp_s_1325r_0044) - 1))/intracellular;
end
function_18 is "Function for 3-dehydrosphinganine reductase";

function function_19(Keq_r_0057, Vmax_r_0057, intracellular, kmp_s_0046r_0057, kmp_s_1082r_0057, kms_s_0247r_0057, kms_s_0763_br_0057, kms_s_1087r_0057, s_0046, s_0247, s_0763_b, NAD_intracellular, NADH_intracellular)
  Vmax_r_0057*((1/kms_s_0247r_0057)^1*(1/kms_s_0763_br_0057)^1*(1/kms_s_1087r_0057)^1*(s_0247^1*s_0763_b^1*NADH_intracellular^1 - s_0046^1*NAD_intracellular^1/Keq_r_0057)/((1 + s_0247/kms_s_0247r_0057)*(1 + s_0763_b/kms_s_0763_br_0057)*(1 + NADH_intracellular/kms_s_1087r_0057) + (1 + s_0046/kmp_s_0046r_0057)*(1 + NAD_intracellular/kmp_s_1082r_0057) - 1))/intracellular;
end
function_19 is "Function for 3-hydroxyacyl-CoA dehydrogenase (3-oxohexacosyl-CoA)";

function function_20(Keq_r_0058, Vmax_r_0058, intracellular, kmp_s_0052r_0058, kmp_s_1082r_0058, kms_s_0257r_0058, kms_s_0763_br_0058, kms_s_1087r_0058, s_0052, _3_oxopalmitoyl_CoA_intracellular, s_0763_b, NAD_intracellular, NADH_intracellular)
  Vmax_r_0058*((1/kms_s_0257r_0058)^1*(1/kms_s_0763_br_0058)^1*(1/kms_s_1087r_0058)^1*(_3_oxopalmitoyl_CoA_intracellular^1*s_0763_b^1*NADH_intracellular^1 - s_0052^1*NAD_intracellular^1/Keq_r_0058)/((1 + _3_oxopalmitoyl_CoA_intracellular/kms_s_0257r_0058)*(1 + s_0763_b/kms_s_0763_br_0058)*(1 + NADH_intracellular/kms_s_1087r_0058) + (1 + s_0052/kmp_s_0052r_0058)*(1 + NAD_intracellular/kmp_s_1082r_0058) - 1))/intracellular;
end
function_20 is "Function for 3-hydroxyacyl-CoA dehydrogenase (3-oxohexadecanoyl-CoA)";

function function_21(Keq_r_0059, Vmax_r_0059, intracellular, kmp_s_0234r_0059, kmp_s_1082r_0059, kms_s_0254r_0059, kms_s_0763_br_0059, kms_s_1087r_0059, s_0234, s_0254, s_0763_b, NAD_intracellular, NADH_intracellular)
  Vmax_r_0059*((1/kms_s_0254r_0059)^1*(1/kms_s_0763_br_0059)^1*(1/kms_s_1087r_0059)^1*(s_0254^1*s_0763_b^1*NADH_intracellular^1 - s_0234^1*NAD_intracellular^1/Keq_r_0059)/((1 + s_0254/kms_s_0254r_0059)*(1 + s_0763_b/kms_s_0763_br_0059)*(1 + NADH_intracellular/kms_s_1087r_0059) + (1 + s_0234/kmp_s_0234r_0059)*(1 + NAD_intracellular/kmp_s_1082r_0059) - 1))/intracellular;
end
function_21 is "Function for 3-hydroxyacyl-CoA dehydrogenase (3-oxooctadecanoyl-CoA)";

function function_22(Keq_r_0060, Vmax_r_0060, intracellular, kmp_s_0055r_0060, kmp_s_1082r_0060, kms_s_0261r_0060, kms_s_0763_br_0060, kms_s_1087r_0060, s_0055, s_0261, s_0763_b, NAD_intracellular, NADH_intracellular)
  Vmax_r_0060*((1/kms_s_0261r_0060)^1*(1/kms_s_0763_br_0060)^1*(1/kms_s_1087r_0060)^1*(s_0261^1*s_0763_b^1*NADH_intracellular^1 - s_0055^1*NAD_intracellular^1/Keq_r_0060)/((1 + s_0261/kms_s_0261r_0060)*(1 + s_0763_b/kms_s_0763_br_0060)*(1 + NADH_intracellular/kms_s_1087r_0060) + (1 + s_0055/kmp_s_0055r_0060)*(1 + NAD_intracellular/kmp_s_1082r_0060) - 1))/intracellular;
end
function_22 is "Function for 3-hydroxyacyl-CoA dehydrogenase (3-oxotetradecanoyl-CoA)";

function function_23(Keq_r_0063, Vmax_r_0063, intracellular, kmp_s_0008r_0063, kms_s_0170r_0063, kms_s_1434_br_0063, s_0008, s_0170, s_1434_b)
  Vmax_r_0063*((1/kms_s_0170r_0063)^1*(1/kms_s_1434_br_0063)^1*(s_0170^1*s_1434_b^1 - s_0008^1/Keq_r_0063)/((1 + s_0170/kms_s_0170r_0063)*(1 + s_1434_b/kms_s_1434_br_0063) + 1 + s_0008/kmp_s_0008r_0063 - 1))/intracellular;
end
function_23 is "Function for 3-isopropylmalate dehydratase";

function function_24(Keq_r_0064, Vmax_r_0064, intracellular, kmp_s_0010r_0064, kmp_s_0763_br_0064, kmp_s_1087r_0064, kms_s_0008r_0064, kms_s_1082r_0064, s_0008, s_0010, s_0763_b, NAD_intracellular, NADH_intracellular)
  Vmax_r_0064*((1/kms_s_0008r_0064)^1*(1/kms_s_1082r_0064)^1*(s_0008^1*NAD_intracellular^1 - s_0010^1*s_0763_b^1*NADH_intracellular^1/Keq_r_0064)/((1 + s_0008/kms_s_0008r_0064)*(1 + NAD_intracellular/kms_s_1082r_0064) + (1 + s_0010/kmp_s_0010r_0064)*(1 + s_0763_b/kmp_s_0763_br_0064)*(1 + NADH_intracellular/kmp_s_1087r_0064) - 1))/intracellular;
end
function_24 is "Function for 3-isopropylmalate dehydrogenase";

function function_25(Keq_r_0068, Vmax_r_0068, intracellular, kmp_s_0330r_0068, kmp_s_1207r_0068, kms_s_0267r_0068, kms_s_1243r_0068, s_0267, s_0330, phosphate_intracellular, s_1243)
  Vmax_r_0068*((1/kms_s_0267r_0068)^1*(1/kms_s_1243r_0068)^1*(s_0267^1*s_1243^1 - s_0330^1*phosphate_intracellular^1/Keq_r_0068)/((1 + s_0267/kms_s_0267r_0068)*(1 + s_1243/kms_s_1243r_0068) + (1 + s_0330/kmp_s_0330r_0068)*(1 + phosphate_intracellular/kmp_s_1207r_0068) - 1))/intracellular;
end
function_25 is "Function for 3-phosphoshikimate 1-carboxyvinyltransferase";

function function_26(Keq_r_0093, Vmax_r_0093, intracellular, kmp_s_0328r_0093, kmp_s_1091r_0093, kms_s_0307r_0093, kms_s_0763_br_0093, kms_s_1096r_0093, s_0307, s_0328, s_0763_b, NADP_intracellular, NADPH_intracellular)
  Vmax_r_0093*((1/kms_s_0307r_0093)^1*(1/kms_s_0763_br_0093)^2*(1/kms_s_1096r_0093)^1*(s_0307^1*s_0763_b^2*NADPH_intracellular^1 - s_0328^1*NADP_intracellular^1/Keq_r_0093)/((1 + s_0307/kms_s_0307r_0093)*(1 + s_0763_b/kms_s_0763_br_0093)*(1 + NADPH_intracellular/kms_s_1096r_0093) + (1 + s_0328/kmp_s_0328r_0093)*(1 + NADP_intracellular/kmp_s_1091r_0093) - 1))/intracellular;
end
function_26 is "Function for 5,10-methylenetetrahydrofolatereductase (NADPH)";

function function_27(Keq_r_0111, Vmax_r_0111, intracellular, kmp_s_0018r_0111, kmp_s_1091r_0111, kms_s_0150r_0111, kms_s_0763_br_0111, kms_s_1096r_0111, s_0018, s_0150, s_0763_b, NADP_intracellular, NADPH_intracellular)
  Vmax_r_0111*((1/kms_s_0150r_0111)^1*(1/kms_s_0763_br_0111)^1*(1/kms_s_1096r_0111)^1*(s_0150^1*s_0763_b^1*NADPH_intracellular^1 - s_0018^1*NADP_intracellular^1/Keq_r_0111)/((1 + s_0150/kms_s_0150r_0111)*(1 + s_0763_b/kms_s_0763_br_0111)*(1 + NADPH_intracellular/kms_s_1096r_0111) + (1 + s_0018/kmp_s_0018r_0111)*(1 + NADP_intracellular/kmp_s_1091r_0111) - 1))/intracellular;
end
function_27 is "Function for acetohydroxy acid isomeroreductase";

function function_28(Keq_r_0112, Vmax_r_0112, intracellular, kmp_s_0150r_0112, kmp_s_0470r_0112, kms_s_0763_br_0112, kms_s_1277r_0112, s_0150, carbon_dioxide_intracellular, s_0763_b, pyruvate_intracellular)
  Vmax_r_0112*((1/kms_s_0763_br_0112)^1*(1/kms_s_1277r_0112)^2*(s_0763_b^1*pyruvate_intracellular^2 - s_0150^1*carbon_dioxide_intracellular^1/Keq_r_0112)/((1 + s_0763_b/kms_s_0763_br_0112)*(1 + pyruvate_intracellular/kms_s_1277r_0112) + (1 + s_0150/kmp_s_0150r_0112)*(1 + carbon_dioxide_intracellular/kmp_s_0470r_0112) - 1))/intracellular;
end
function_28 is "Function for acetolactate synthase";

function function_29(Keq_r_0118, Vmax_r_0118, intracellular, kmp_s_0374r_0118, kmp_s_0514r_0118, kms_s_0380r_0118, acetoacetyl_CoA_intracellular, acetyl_CoA_intracellular, coenzyme_A_intracellular)
  Vmax_r_0118*((1/kms_s_0380r_0118)^2*(acetyl_CoA_intracellular^2 - acetoacetyl_CoA_intracellular^1*coenzyme_A_intracellular^1/Keq_r_0118)/(1 + acetyl_CoA_intracellular/kms_s_0380r_0118 + (1 + acetoacetyl_CoA_intracellular/kmp_s_0374r_0118)*(1 + coenzyme_A_intracellular/kmp_s_0514r_0118) - 1))/intracellular;
end
function_29 is "Function for acetyl-CoA C-acetyltransferase";

function function_30(Keq_r_0123, Vmax_r_0123, intracellular, kmp_s_0400r_0123, kmp_s_0763_br_0123, kmp_s_1005r_0123, kmp_s_1207r_0123, kms_s_0380r_0123, kms_s_0446r_0123, kms_s_0458r_0123, acetyl_CoA_intracellular, ADP_intracellular, ATP_intracellular, bicarbonate_intracellular, s_0763_b, malonyl_CoA_intracellular, phosphate_intracellular)
  Vmax_r_0123*((1/kms_s_0380r_0123)^1*(1/kms_s_0446r_0123)^1*(1/kms_s_0458r_0123)^1*(acetyl_CoA_intracellular^1*ATP_intracellular^1*bicarbonate_intracellular^1 - ADP_intracellular^1*s_0763_b^1*malonyl_CoA_intracellular^1*phosphate_intracellular^1/Keq_r_0123)/((1 + acetyl_CoA_intracellular/kms_s_0380r_0123)*(1 + ATP_intracellular/kms_s_0446r_0123)*(1 + bicarbonate_intracellular/kms_s_0458r_0123) + (1 + ADP_intracellular/kmp_s_0400r_0123)*(1 + s_0763_b/kmp_s_0763_br_0123)*(1 + malonyl_CoA_intracellular/kmp_s_1005r_0123)*(1 + phosphate_intracellular/kmp_s_1207r_0123) - 1))/intracellular;
end
function_30 is "Function for acetyl-Coa carboxylase";

function function_31(Keq_r_0125, Vmax_r_0125, intracellular, kmp_s_0380r_0125, kmp_s_1434_br_0125, kms_s_0369r_0125, kms_s_0514r_0125, kms_s_0763_br_0125, acetate_intracellular, acetyl_CoA_intracellular, coenzyme_A_intracellular, s_0763_b, s_1434_b)
  Vmax_r_0125*((1/kms_s_0369r_0125)^1*(1/kms_s_0514r_0125)^1*(1/kms_s_0763_br_0125)^1*(acetate_intracellular^1*coenzyme_A_intracellular^1*s_0763_b^1 - acetyl_CoA_intracellular^1*s_1434_b^1/Keq_r_0125)/((1 + acetate_intracellular/kms_s_0369r_0125)*(1 + coenzyme_A_intracellular/kms_s_0514r_0125)*(1 + s_0763_b/kms_s_0763_br_0125) + (1 + acetyl_CoA_intracellular/kmp_s_0380r_0125)*(1 + s_1434_b/kmp_s_1434_br_0125) - 1))/intracellular;
end
function_31 is "Function for acetyl-CoA hydrolase";

function function_32(Keq_r_0127, Vmax_r_0127, intracellular, kmp_s_0369r_0127, kmp_s_0446r_0127, kmp_s_0514r_0127, kms_s_0380r_0127, kms_s_0434r_0127, kms_s_0605r_0127, acetate_intracellular, acetyl_CoA_intracellular, AMP_intracellular, ATP_intracellular, coenzyme_A_intracellular, diphosphate_intracellular)
  Vmax_r_0127*((1/kms_s_0380r_0127)^1*(1/kms_s_0434r_0127)^1*(1/kms_s_0605r_0127)^1*(acetyl_CoA_intracellular^1*AMP_intracellular^1*diphosphate_intracellular^1 - acetate_intracellular^1*ATP_intracellular^1*coenzyme_A_intracellular^1/Keq_r_0127)/((1 + acetyl_CoA_intracellular/kms_s_0380r_0127)*(1 + AMP_intracellular/kms_s_0434r_0127)*(1 + diphosphate_intracellular/kms_s_0605r_0127) + (1 + acetate_intracellular/kmp_s_0369r_0127)*(1 + ATP_intracellular/kmp_s_0446r_0127)*(1 + coenzyme_A_intracellular/kmp_s_0514r_0127) - 1))/intracellular;
end
function_32 is "Function for acetyl-CoA synthetase";

function function_117(Keq_r_0465, Vmax_r_0465, intracellular, kmp_s_0470r_0465, kmp_s_0514r_0465, kmp_s_1044r_0465, kmp_s_1091r_0465, kmp_s_1434_br_0465, kms_s_0763_br_0465, kms_s_0977r_0465, kms_s_1005r_0465, kms_s_1096r_0465, carbon_dioxide_intracellular, coenzyme_A_intracellular, s_0763_b, lauroyl_CoA_intracellular, malonyl_CoA_intracellular, myristoyl_CoA_intracellular, NADP_intracellular, NADPH_intracellular, s_1434_b)
  Vmax_r_0465*((1/kms_s_0763_br_0465)^3*(1/kms_s_0977r_0465)^1*(1/kms_s_1005r_0465)^1*(1/kms_s_1096r_0465)^2*(s_0763_b^3*lauroyl_CoA_intracellular^1*malonyl_CoA_intracellular^1*NADPH_intracellular^2 - carbon_dioxide_intracellular^1*coenzyme_A_intracellular^1*myristoyl_CoA_intracellular^1*NADP_intracellular^2*s_1434_b^1/Keq_r_0465)/((1 + s_0763_b/kms_s_0763_br_0465)*(1 + lauroyl_CoA_intracellular/kms_s_0977r_0465)*(1 + malonyl_CoA_intracellular/kms_s_1005r_0465)*(1 + NADPH_intracellular/kms_s_1096r_0465) + (1 + carbon_dioxide_intracellular/kmp_s_0470r_0465)*(1 + coenzyme_A_intracellular/kmp_s_0514r_0465)*(1 + myristoyl_CoA_intracellular/kmp_s_1044r_0465)*(1 + NADP_intracellular/kmp_s_1091r_0465)*(1 + s_1434_b/kmp_s_1434_br_0465) - 1))/intracellular;
end
function_117 is "Function for fatty-acyl-CoA synthase (n-C14:0CoA)";

function function_118(Keq_r_0466, Vmax_r_0466, intracellular, kmp_s_0470r_0466, kmp_s_0514r_0466, kmp_s_1091r_0466, kmp_s_1187r_0466, kmp_s_1434_br_0466, kms_s_0763_br_0466, kms_s_1005r_0466, kms_s_1044r_0466, kms_s_1096r_0466, carbon_dioxide_intracellular, coenzyme_A_intracellular, s_0763_b, malonyl_CoA_intracellular, myristoyl_CoA_intracellular, NADP_intracellular, NADPH_intracellular, palmitoyl_CoA_intracellular, s_1434_b)
  Vmax_r_0466*((1/kms_s_0763_br_0466)^3*(1/kms_s_1005r_0466)^1*(1/kms_s_1044r_0466)^1*(1/kms_s_1096r_0466)^2*(s_0763_b^3*malonyl_CoA_intracellular^1*myristoyl_CoA_intracellular^1*NADPH_intracellular^2 - carbon_dioxide_intracellular^1*coenzyme_A_intracellular^1*NADP_intracellular^2*palmitoyl_CoA_intracellular^1*s_1434_b^1/Keq_r_0466)/((1 + s_0763_b/kms_s_0763_br_0466)*(1 + malonyl_CoA_intracellular/kms_s_1005r_0466)*(1 + myristoyl_CoA_intracellular/kms_s_1044r_0466)*(1 + NADPH_intracellular/kms_s_1096r_0466) + (1 + carbon_dioxide_intracellular/kmp_s_0470r_0466)*(1 + coenzyme_A_intracellular/kmp_s_0514r_0466)*(1 + NADP_intracellular/kmp_s_1091r_0466)*(1 + palmitoyl_CoA_intracellular/kmp_s_1187r_0466)*(1 + s_1434_b/kmp_s_1434_br_0466) - 1))/intracellular;
end
function_118 is "Function for fatty-acyl-CoA synthase (n-C16:0CoA)";

function function_119(Keq_r_0467, Vmax_r_0467, intracellular, kmp_s_0470r_0467, kmp_s_0514r_0467, kmp_s_1091r_0467, kmp_s_1334r_0467, kmp_s_1434_br_0467, kms_s_0763_br_0467, kms_s_1005r_0467, kms_s_1096r_0467, kms_s_1187r_0467, carbon_dioxide_intracellular, coenzyme_A_intracellular, s_0763_b, malonyl_CoA_intracellular, NADP_intracellular, NADPH_intracellular, palmitoyl_CoA_intracellular, stearoyl_CoA_intracellular, s_1434_b)
  Vmax_r_0467*((1/kms_s_0763_br_0467)^3*(1/kms_s_1005r_0467)^1*(1/kms_s_1096r_0467)^2*(1/kms_s_1187r_0467)^1*(s_0763_b^3*malonyl_CoA_intracellular^1*NADPH_intracellular^2*palmitoyl_CoA_intracellular^1 - carbon_dioxide_intracellular^1*coenzyme_A_intracellular^1*NADP_intracellular^2*stearoyl_CoA_intracellular^1*s_1434_b^1/Keq_r_0467)/((1 + s_0763_b/kms_s_0763_br_0467)*(1 + malonyl_CoA_intracellular/kms_s_1005r_0467)*(1 + NADPH_intracellular/kms_s_1096r_0467)*(1 + palmitoyl_CoA_intracellular/kms_s_1187r_0467) + (1 + carbon_dioxide_intracellular/kmp_s_0470r_0467)*(1 + coenzyme_A_intracellular/kmp_s_0514r_0467)*(1 + NADP_intracellular/kmp_s_1091r_0467)*(1 + stearoyl_CoA_intracellular/kmp_s_1334r_0467)*(1 + s_1434_b/kmp_s_1434_br_0467) - 1))/intracellular;
end
function_119 is "Function for fatty-acyl-CoA synthase (n-C18:0CoA)";

function function_120(Keq_r_0479, Vmax_r_0479, intracellular, kmp_s_0122r_0479, kmp_s_0400r_0479, kmp_s_1207r_0479, kms_s_0309r_0479, kms_s_0446r_0479, kms_s_0689r_0479, s_0122, s_0309, ADP_intracellular, ATP_intracellular, formate_intracellular, phosphate_intracellular)
  Vmax_r_0479*((1/kms_s_0309r_0479)^1*(1/kms_s_0446r_0479)^1*(1/kms_s_0689r_0479)^1*(s_0309^1*ATP_intracellular^1*formate_intracellular^1 - s_0122^1*ADP_intracellular^1*phosphate_intracellular^1/Keq_r_0479)/((1 + s_0309/kms_s_0309r_0479)*(1 + ATP_intracellular/kms_s_0446r_0479)*(1 + formate_intracellular/kms_s_0689r_0479) + (1 + s_0122/kmp_s_0122r_0479)*(1 + ADP_intracellular/kmp_s_0400r_0479)*(1 + phosphate_intracellular/kmp_s_1207r_0479) - 1))/intracellular;
end
function_120 is "Function for formate-tetrahydrofolate ligase";

function function_121(Keq_r_0484, Vmax_r_0484, intracellular, kmp_s_0731r_0484, kmp_s_0735r_0484, kms_s_0537r_0484, s_0537, s_0731, s_0735)
  Vmax_r_0484*((1/kms_s_0537r_0484)^1*(s_0537^1 - s_0731^1*s_0735^1/Keq_r_0484)/(1 + s_0537/kms_s_0537r_0484 + (1 + s_0731/kmp_s_0731r_0484)*(1 + s_0735/kmp_s_0735r_0484) - 1))/intracellular;
end
function_121 is "Function for fructose-bisphosphate aldolase";

function Function_for_fumarase(Keq_r_0485, Vmax_r_0485, intracellular, kmp_s_0692r_0485, kmp_s_1434_br_0485, kms_s_0069r_0485, S_malate_2_intracellular, fumarate_2_intracellular, s_1434_b)
  Vmax_r_0485*((1/kms_s_0069r_0485)^1*(S_malate_2_intracellular^1 - fumarate_2_intracellular^1*s_1434_b^1/Keq_r_0485)/(1 + S_malate_2_intracellular/kms_s_0069r_0485 + (1 + fumarate_2_intracellular/kmp_s_0692r_0485)*(1 + s_1434_b/kmp_s_1434_br_0485) - 1))/intracellular;
end

function Function_for_fumarate_reductase(Keq_r_0488, Vmax_r_0488, intracellular, kmp_s_0657r_0488, kmp_s_1338r_0488, kms_s_0659r_0488, kms_s_0692r_0488, FAD_intracellular, FADH2_intracellular, fumarate_2_intracellular, succinate_2_intracellular)
  Vmax_r_0488*((1/kms_s_0659r_0488)^1*(1/kms_s_0692r_0488)^1*(FADH2_intracellular^1*fumarate_2_intracellular^1 - FAD_intracellular^1*succinate_2_intracellular^1/Keq_r_0488)/((1 + FADH2_intracellular/kms_s_0659r_0488)*(1 + fumarate_2_intracellular/kms_s_0692r_0488) + (1 + FAD_intracellular/kmp_s_0657r_0488)*(1 + succinate_2_intracellular/kmp_s_1338r_0488) - 1))/intracellular;
end

function function_124(Keq_r_0496, Vmax_r_0496, intracellular, kmp_s_0195r_0496, kmp_s_0605r_0496, kms_s_0712r_0496, kms_s_0850r_0496, s_0195, diphosphate_intracellular, s_0712, s_0850)
  Vmax_r_0496*((1/kms_s_0712r_0496)^1*(1/kms_s_0850r_0496)^1*(s_0712^1*s_0850^1 - s_0195^1*diphosphate_intracellular^1/Keq_r_0496)/((1 + s_0712/kms_s_0712r_0496)*(1 + s_0850/kms_s_0850r_0496) + (1 + s_0195/kmp_s_0195r_0496)*(1 + diphosphate_intracellular/kmp_s_0605r_0496) - 1))/intracellular;
end
function_124 is "Function for geranyltranstransferase";

function Function_for_glucokinase(Keq_r_0499, Vmax_r_0499, intracellular, kmp_s_0400r_0499, kmp_s_0455r_0499, kmp_s_0763_br_0499, kms_s_0446r_0499, kms_s_0545r_0499, ADP_intracellular, ATP_intracellular, s_0455, D_glucose_intracellular, s_0763_b)
  Vmax_r_0499*((1/kms_s_0446r_0499)^1*(1/kms_s_0545r_0499)^1*(ATP_intracellular^1*D_glucose_intracellular^1 - ADP_intracellular^1*s_0455^1*s_0763_b^1/Keq_r_0499)/((1 + ATP_intracellular/kms_s_0446r_0499)*(1 + D_glucose_intracellular/kms_s_0545r_0499) + (1 + ADP_intracellular/kmp_s_0400r_0499)*(1 + s_0455/kmp_s_0455r_0499)*(1 + s_0763_b/kmp_s_0763_br_0499) - 1))/intracellular;
end

function function_126(Keq_r_0504, Vmax_r_0504, intracellular, kmp_s_0539r_0504, kms_s_0455r_0504, s_0455, s_0539)
  Vmax_r_0504*((1/kms_s_0455r_0504)^1*(s_0455^1 - s_0539^1/Keq_r_0504)/(1 + s_0455/kms_s_0455r_0504 + 1 + s_0539/kmp_s_0539r_0504 - 1))/intracellular;
end
function_126 is "Function for glucose-6-phosphate isomerase";

function function_127(Keq_r_0505, Vmax_r_0505, intracellular, kmp_s_0539r_0505, kms_s_0410r_0505, s_0410, s_0539)
  Vmax_r_0505*((1/kms_s_0410r_0505)^1*(s_0410^1 - s_0539^1/Keq_r_0505)/(1 + s_0410/kms_s_0410r_0505 + 1 + s_0539/kmp_s_0539r_0505 - 1))/intracellular;
end
function_127 is "Function for glucose-6-phosphate isomerase_2";

function Function_for_glutamate_5_kinase(Keq_r_0506, Vmax_r_0506, intracellular, kmp_s_0400r_0506, kmp_s_0894r_0506, kms_s_0446r_0506, kms_s_0899r_0506, ADP_intracellular, ATP_intracellular, s_0894, L_glutamate_intracellular)
  Vmax_r_0506*((1/kms_s_0446r_0506)^1*(1/kms_s_0899r_0506)^1*(ATP_intracellular^1*L_glutamate_intracellular^1 - ADP_intracellular^1*s_0894^1/Keq_r_0506)/((1 + ATP_intracellular/kms_s_0446r_0506)*(1 + L_glutamate_intracellular/kms_s_0899r_0506) + (1 + ADP_intracellular/kmp_s_0400r_0506)*(1 + s_0894/kmp_s_0894r_0506) - 1))/intracellular;
end
Function_for_glutamate_5_kinase is "Function for glutamate 5-kinase";

function function_129(Keq_r_0509, Vmax_r_0509, intracellular, kmp_s_0899r_0509, kmp_s_1091r_0509, kmp_s_1434_br_0509, kms_s_0185r_0509, kms_s_0430r_0509, kms_s_0763_br_0509, kms_s_1096r_0509, _2_oxoglutarate_intracellular, ammonium_intracellular, s_0763_b, L_glutamate_intracellular, NADP_intracellular, NADPH_intracellular, s_1434_b)
  Vmax_r_0509*((1/kms_s_0185r_0509)^1*(1/kms_s_0430r_0509)^1*(1/kms_s_0763_br_0509)^1*(1/kms_s_1096r_0509)^1*(_2_oxoglutarate_intracellular^1*ammonium_intracellular^1*s_0763_b^1*NADPH_intracellular^1 - L_glutamate_intracellular^1*NADP_intracellular^1*s_1434_b^1/Keq_r_0509)/((1 + _2_oxoglutarate_intracellular/kms_s_0185r_0509)*(1 + ammonium_intracellular/kms_s_0430r_0509)*(1 + s_0763_b/kms_s_0763_br_0509)*(1 + NADPH_intracellular/kms_s_1096r_0509) + (1 + L_glutamate_intracellular/kmp_s_0899r_0509)*(1 + NADP_intracellular/kmp_s_1091r_0509)*(1 + s_1434_b/kmp_s_1434_br_0509) - 1))/intracellular;
end
function_129 is "Function for glutamate dehydrogenase (NADP)";

function function_130(Keq_r_0510, Vmax_r_0510, intracellular, kmp_s_0899r_0510, kmp_s_1082r_0510, kms_s_0185r_0510, kms_s_0763_br_0510, kms_s_0907r_0510, kms_s_1087r_0510, _2_oxoglutarate_intracellular, s_0763_b, L_glutamate_intracellular, L_glutamine_intracellular, NAD_intracellular, NADH_intracellular)
  Vmax_r_0510*((1/kms_s_0185r_0510)^1*(1/kms_s_0763_br_0510)^1*(1/kms_s_0907r_0510)^1*(1/kms_s_1087r_0510)^1*(_2_oxoglutarate_intracellular^1*s_0763_b^1*L_glutamine_intracellular^1*NADH_intracellular^1 - L_glutamate_intracellular^2*NAD_intracellular^1/Keq_r_0510)/((1 + _2_oxoglutarate_intracellular/kms_s_0185r_0510)*(1 + s_0763_b/kms_s_0763_br_0510)*(1 + L_glutamine_intracellular/kms_s_0907r_0510)*(1 + NADH_intracellular/kms_s_1087r_0510) + (1 + L_glutamate_intracellular/kmp_s_0899r_0510)*(1 + NAD_intracellular/kmp_s_1082r_0510) - 1))/intracellular;
end
function_130 is "Function for glutamate synthase (NADH2)";

function function_55(Keq_r_0238, Vmax_r_0238, intracellular, kmp_s_0886r_0238, kmp_s_1091r_0238, kmp_s_1207r_0238, kms_s_0301r_0238, kms_s_0763_br_0238, kms_s_1096r_0238, s_0301, s_0763_b, s_0886, NADP_intracellular, NADPH_intracellular, phosphate_intracellular)
  Vmax_r_0238*((1/kms_s_0301r_0238)^1*(1/kms_s_0763_br_0238)^1*(1/kms_s_1096r_0238)^1*(s_0301^1*s_0763_b^1*NADPH_intracellular^1 - s_0886^1*NADP_intracellular^1*phosphate_intracellular^1/Keq_r_0238)/((1 + s_0301/kms_s_0301r_0238)*(1 + s_0763_b/kms_s_0763_br_0238)*(1 + NADPH_intracellular/kms_s_1096r_0238) + (1 + s_0886/kmp_s_0886r_0238)*(1 + NADP_intracellular/kmp_s_1091r_0238)*(1 + phosphate_intracellular/kmp_s_1207r_0238) - 1))/intracellular;
end
function_55 is "Function for aspartate-semialdehyde dehydrogenase";

function function_56(Keq_r_0245, Vmax_r_0245, intracellular, kmp_s_0334r_0245, kmp_s_0605r_0245, kms_s_0331r_0245, kms_s_0446r_0245, s_0331, s_0334, ATP_intracellular, diphosphate_intracellular)
  Vmax_r_0245*((1/kms_s_0331r_0245)^1*(1/kms_s_0446r_0245)^1*(s_0331^1*ATP_intracellular^1 - s_0334^1*diphosphate_intracellular^1/Keq_r_0245)/((1 + s_0331/kms_s_0331r_0245)*(1 + ATP_intracellular/kms_s_0446r_0245) + (1 + s_0334/kmp_s_0334r_0245)*(1 + diphosphate_intracellular/kmp_s_0605r_0245) - 1))/intracellular;
end
function_56 is "Function for ATP phosphoribosyltransferase";

function Function_for_ATP_synthase(Keq_r_0246, Vmax_r_0246, intracellular, kmp_s_0446r_0246, kmp_s_0763_br_0246, kmp_s_1434_br_0246, kms_s_0400r_0246, kms_s_0763_br_0246, kms_s_1207r_0246, ADP_intracellular, ATP_intracellular, s_0763_b, phosphate_intracellular, s_1434_b)
  Vmax_r_0246*((1/kms_s_0400r_0246)^1*(1/kms_s_0763_br_0246)^3*(1/kms_s_1207r_0246)^1*(ADP_intracellular^1*s_0763_b^3*phosphate_intracellular^1 - ATP_intracellular^1*s_0763_b^2*s_1434_b^1/Keq_r_0246)/((1 + ADP_intracellular/kms_s_0400r_0246)*(1 + s_0763_b/kms_s_0763_br_0246)*(1 + phosphate_intracellular/kms_s_1207r_0246) + (1 + ATP_intracellular/kmp_s_0446r_0246)*(1 + s_0763_b/kmp_s_0763_br_0246)*(1 + s_1434_b/kmp_s_1434_br_0246) - 1))/intracellular;
end

function Function_for_ATPase_cytosolic(Keq_r_0249, Vmax_r_0249, kmp_s_0400r_0249, kmp_s_0766_br_0249, kmp_s_1207r_0249, kms_s_0446r_0249, kms_s_1434_br_0249, ADP_intracellular, ATP_intracellular, s_0766_b, phosphate_intracellular, s_1434_b)
  Vmax_r_0249*((1/kms_s_0446r_0249)^1*(1/kms_s_1434_br_0249)^1*(ATP_intracellular^1*s_1434_b^1 - ADP_intracellular^1*s_0766_b^1*phosphate_intracellular^1/Keq_r_0249)/((1 + ATP_intracellular/kms_s_0446r_0249)*(1 + s_1434_b/kms_s_1434_br_0249) + (1 + ADP_intracellular/kmp_s_0400r_0249)*(1 + s_0766_b/kmp_s_0766_br_0249)*(1 + phosphate_intracellular/kmp_s_1207r_0249) - 1));
end
Function_for_ATPase_cytosolic is "Function for ATPase, cytosolic";

function function_59(Keq_r_0251, Vmax_r_0251, intracellular, kmp_s_0458r_0251, kmp_s_0763_br_0251, kms_s_0470r_0251, kms_s_1434_br_0251, bicarbonate_intracellular, carbon_dioxide_intracellular, s_0763_b, s_1434_b)
  Vmax_r_0251*((1/kms_s_0470r_0251)^1*(1/kms_s_1434_br_0251)^1*(carbon_dioxide_intracellular^1*s_1434_b^1 - bicarbonate_intracellular^1*s_0763_b^1/Keq_r_0251)/((1 + carbon_dioxide_intracellular/kms_s_0470r_0251)*(1 + s_1434_b/kms_s_1434_br_0251) + (1 + bicarbonate_intracellular/kmp_s_0458r_0251)*(1 + s_0763_b/kmp_s_0763_br_0251) - 1))/intracellular;
end
function_59 is "Function for bicarbonate formation";

function function_60(Keq_r_0258, Vmax_r_0258, intracellular, kmp_s_0124r_0258, kmp_s_1091r_0258, kms_s_0268r_0258, kms_s_0763_br_0258, kms_s_1096r_0258, s_0124, s_0268, s_0763_b, NADP_intracellular, NADPH_intracellular)
  Vmax_r_0258*((1/kms_s_0268r_0258)^1*(1/kms_s_0763_br_0258)^1*(1/kms_s_1096r_0258)^1*(s_0268^1*s_0763_b^1*NADPH_intracellular^1 - s_0124^1*NADP_intracellular^1/Keq_r_0258)/((1 + s_0268/kms_s_0268r_0258)*(1 + s_0763_b/kms_s_0763_br_0258)*(1 + NADPH_intracellular/kms_s_1096r_0258) + (1 + s_0124/kmp_s_0124r_0258)*(1 + NADP_intracellular/kmp_s_1091r_0258) - 1))/intracellular;
end
function_60 is "Function for C-14 sterol reductase";

function function_61(Keq_r_0261, Vmax_r_0261, intracellular, kmp_s_0470r_0261, kmp_s_0763_br_0261, kmp_s_1096r_0261, kmp_s_1458r_0261, kms_s_1091r_0261, kms_s_1457r_0261, carbon_dioxide_intracellular, s_0763_b, NADP_intracellular, NADPH_intracellular, s_1457, s_1458)
  Vmax_r_0261*((1/kms_s_1091r_0261)^1*(1/kms_s_1457r_0261)^1*(NADP_intracellular^1*s_1457^1 - carbon_dioxide_intracellular^1*s_0763_b^1*NADPH_intracellular^1*s_1458^1/Keq_r_0261)/((1 + NADP_intracellular/kms_s_1091r_0261)*(1 + s_1457/kms_s_1457r_0261) + (1 + carbon_dioxide_intracellular/kmp_s_0470r_0261)*(1 + s_0763_b/kmp_s_0763_br_0261)*(1 + NADPH_intracellular/kmp_s_1096r_0261)*(1 + s_1458/kmp_s_1458r_0261) - 1))/intracellular;
end
function_61 is "Function for C-3 sterol dehydrogenase";

function function_62(Keq_r_0262, Vmax_r_0262, intracellular, kmp_s_0215r_0262, kmp_s_0470r_0262, kmp_s_0763_br_0262, kmp_s_1087r_0262, kms_s_0303r_0262, kms_s_1082r_0262, s_0215, s_0303, carbon_dioxide_intracellular, s_0763_b, NAD_intracellular, NADH_intracellular)
  Vmax_r_0262*((1/kms_s_0303r_0262)^1*(1/kms_s_1082r_0262)^1*(s_0303^1*NAD_intracellular^1 - s_0215^1*carbon_dioxide_intracellular^1*s_0763_b^1*NADH_intracellular^1/Keq_r_0262)/((1 + s_0303/kms_s_0303r_0262)*(1 + NAD_intracellular/kms_s_1082r_0262) + (1 + s_0215/kmp_s_0215r_0262)*(1 + carbon_dioxide_intracellular/kmp_s_0470r_0262)*(1 + s_0763_b/kmp_s_0763_br_0262)*(1 + NADH_intracellular/kmp_s_1087r_0262) - 1))/intracellular;
end
function_62 is "Function for C-3 sterol dehydrogenase (4-methylzymosterol)";

function function_63(Keq_r_0263, Vmax_r_0263, intracellular, kmp_s_0302r_0263, kmp_s_1091r_0263, kms_s_0215r_0263, kms_s_0763_br_0263, kms_s_1096r_0263, s_0215, s_0302, s_0763_b, NADP_intracellular, NADPH_intracellular)
  Vmax_r_0263*((1/kms_s_0215r_0263)^1*(1/kms_s_0763_br_0263)^1*(1/kms_s_1096r_0263)^1*(s_0215^1*s_0763_b^1*NADPH_intracellular^1 - s_0302^1*NADP_intracellular^1/Keq_r_0263)/((1 + s_0215/kms_s_0215r_0263)*(1 + s_0763_b/kms_s_0763_br_0263)*(1 + NADPH_intracellular/kms_s_1096r_0263) + (1 + s_0302/kmp_s_0302r_0263)*(1 + NADP_intracellular/kmp_s_1091r_0263) - 1))/intracellular;
end
function_63 is "Function for C-3 sterol keto reductase (4-methylzymosterol)";

function function_64(Keq_r_0264, Vmax_r_0264, intracellular, kmp_s_1091r_0264, kmp_s_1447r_0264, kms_s_0763_br_0264, kms_s_1096r_0264, kms_s_1458r_0264, s_0763_b, NADP_intracellular, NADPH_intracellular, zymosterol_intracellular, s_1458)
  Vmax_r_0264*((1/kms_s_0763_br_0264)^1*(1/kms_s_1096r_0264)^1*(1/kms_s_1458r_0264)^1*(s_0763_b^1*NADPH_intracellular^1*s_1458^1 - NADP_intracellular^1*zymosterol_intracellular^1/Keq_r_0264)/((1 + s_0763_b/kms_s_0763_br_0264)*(1 + NADPH_intracellular/kms_s_1096r_0264)*(1 + s_1458/kms_s_1458r_0264) + (1 + NADP_intracellular/kmp_s_1091r_0264)*(1 + zymosterol_intracellular/kmp_s_1447r_0264) - 1))/intracellular;
end
function_64 is "Function for C-3 sterol keto reductase (zymosterol)";

function function_65(Keq_r_0265, Vmax_r_0265, intracellular, kmp_s_1091r_0265, kmp_s_1434_br_0265, kmp_s_1455r_0265, kms_s_0302r_0265, kms_s_0763_br_0265, kms_s_1096r_0265, kms_s_1160r_0265, s_0302, s_0763_b, NADP_intracellular, NADPH_intracellular, oxygen_intracellular, s_1434_b, s_1455)
  Vmax_r_0265*((1/kms_s_0302r_0265)^1*(1/kms_s_0763_br_0265)^1*(1/kms_s_1096r_0265)^1*(1/kms_s_1160r_0265)^1*(s_0302^1*s_0763_b^1*NADPH_intracellular^1*oxygen_intracellular^1 - NADP_intracellular^1*s_1434_b^1*s_1455^1/Keq_r_0265)/((1 + s_0302/kms_s_0302r_0265)*(1 + s_0763_b/kms_s_0763_br_0265)*(1 + NADPH_intracellular/kms_s_1096r_0265)*(1 + oxygen_intracellular/kms_s_1160r_0265) + (1 + NADP_intracellular/kmp_s_1091r_0265)*(1 + s_1434_b/kmp_s_1434_br_0265)*(1 + s_1455/kmp_s_1455r_0265) - 1))/intracellular;
end
function_65 is "Function for C-4 methyl sterol oxidase";

function function_66(Keq_r_0266, Vmax_r_0266, intracellular, kmp_s_1091r_0266, kmp_s_1434_br_0266, kmp_s_1456r_0266, kms_s_0763_br_0266, kms_s_1096r_0266, kms_s_1160r_0266, kms_s_1455r_0266, s_0763_b, NADP_intracellular, NADPH_intracellular, oxygen_intracellular, s_1434_b, s_1455, s_1456)
  Vmax_r_0266*((1/kms_s_0763_br_0266)^1*(1/kms_s_1096r_0266)^1*(1/kms_s_1160r_0266)^1*(1/kms_s_1455r_0266)^1*(s_0763_b^1*NADPH_intracellular^1*oxygen_intracellular^1*s_1455^1 - NADP_intracellular^1*s_1434_b^2*s_1456^1/Keq_r_0266)/((1 + s_0763_b/kms_s_0763_br_0266)*(1 + NADPH_intracellular/kms_s_1096r_0266)*(1 + oxygen_intracellular/kms_s_1160r_0266)*(1 + s_1455/kms_s_1455r_0266) + (1 + NADP_intracellular/kmp_s_1091r_0266)*(1 + s_1434_b/kmp_s_1434_br_0266)*(1 + s_1456/kmp_s_1456r_0266) - 1))/intracellular;
end
function_66 is "Function for C-4 methyl sterol oxidase_2";

function function_67(Keq_r_0267, Vmax_r_0267, intracellular, kmp_s_1091r_0267, kmp_s_1434_br_0267, kmp_s_1457r_0267, kms_s_0763_br_0267, kms_s_1096r_0267, kms_s_1160r_0267, kms_s_1456r_0267, s_0763_b, NADP_intracellular, NADPH_intracellular, oxygen_intracellular, s_1434_b, s_1456, s_1457)
  Vmax_r_0267*((1/kms_s_0763_br_0267)^1*(1/kms_s_1096r_0267)^1*(1/kms_s_1160r_0267)^1*(1/kms_s_1456r_0267)^1*(s_0763_b^1*NADPH_intracellular^1*oxygen_intracellular^1*s_1456^1 - NADP_intracellular^1*s_1434_b^1*s_1457^1/Keq_r_0267)/((1 + s_0763_b/kms_s_0763_br_0267)*(1 + NADPH_intracellular/kms_s_1096r_0267)*(1 + oxygen_intracellular/kms_s_1160r_0267)*(1 + s_1456/kms_s_1456r_0267) + (1 + NADP_intracellular/kmp_s_1091r_0267)*(1 + s_1434_b/kmp_s_1434_br_0267)*(1 + s_1457/kmp_s_1457r_0267) - 1))/intracellular;
end
function_67 is "Function for C-4 methyl sterol oxidase_3";

function function_68(Keq_r_0268, Vmax_r_0268, intracellular, kmp_s_0303r_0268, kmp_s_1091r_0268, kmp_s_1434_br_0268, kms_s_0124r_0268, kms_s_0763_br_0268, kms_s_1096r_0268, kms_s_1160r_0268, s_0124, s_0303, s_0763_b, NADP_intracellular, NADPH_intracellular, oxygen_intracellular, s_1434_b)
  Vmax_r_0268*((1/kms_s_0124r_0268)^1*(1/kms_s_0763_br_0268)^3*(1/kms_s_1096r_0268)^3*(1/kms_s_1160r_0268)^3*(s_0124^1*s_0763_b^3*NADPH_intracellular^3*oxygen_intracellular^3 - s_0303^1*NADP_intracellular^3*s_1434_b^4/Keq_r_0268)/((1 + s_0124/kms_s_0124r_0268)*(1 + s_0763_b/kms_s_0763_br_0268)*(1 + NADPH_intracellular/kms_s_1096r_0268)*(1 + oxygen_intracellular/kms_s_1160r_0268) + (1 + s_0303/kmp_s_0303r_0268)*(1 + NADP_intracellular/kmp_s_1091r_0268)*(1 + s_1434_b/kmp_s_1434_br_0268) - 1))/intracellular;
end
function_68 is "Function for C-4 sterol methyl oxidase (4,4-dimethylzymosterol)";

function function_69(Keq_r_0270, Vmax_r_0270, intracellular, kmp_s_0627r_0270, kms_s_0669r_0270, episterol_intracellular, fecosterol_intracellular)
  Vmax_r_0270*((1/kms_s_0669r_0270)^1*(fecosterol_intracellular^1 - episterol_intracellular^1/Keq_r_0270)/(1 + fecosterol_intracellular/kms_s_0669r_0270 + 1 + episterol_intracellular/kmp_s_0627r_0270 - 1))/intracellular;
end
function_69 is "Function for C-8 sterol isomerase";

function function_70(Keq_r_0271, Vmax_r_0271, intracellular, kmp_s_0635r_0271, kmp_s_1091r_0271, kms_s_0632r_0271, kms_s_0763_br_0271, kms_s_1096r_0271, s_0632, ergosterol_intracellular, s_0763_b, NADP_intracellular, NADPH_intracellular)
  Vmax_r_0271*((1/kms_s_0632r_0271)^1*(1/kms_s_0763_br_0271)^1*(1/kms_s_1096r_0271)^1*(s_0632^1*s_0763_b^1*NADPH_intracellular^1 - ergosterol_intracellular^1*NADP_intracellular^1/Keq_r_0271)/((1 + s_0632/kms_s_0632r_0271)*(1 + s_0763_b/kms_s_0763_br_0271)*(1 + NADPH_intracellular/kms_s_1096r_0271) + (1 + ergosterol_intracellular/kmp_s_0635r_0271)*(1 + NADP_intracellular/kmp_s_1091r_0271) - 1))/intracellular;
end
function_70 is "Function for C-s24 sterol reductase";

function function_71(Keq_r_0277, Vmax_r_0277, intracellular, kmp_s_0400r_0277, kmp_s_0469r_0277, kmp_s_0763_br_0277, kmp_s_0899r_0277, kmp_s_1207r_0277, kms_s_0446r_0277, kms_s_0458r_0277, kms_s_0907r_0277, kms_s_1434_br_0277, ADP_intracellular, ATP_intracellular, bicarbonate_intracellular, s_0469, s_0763_b, L_glutamate_intracellular, L_glutamine_intracellular, phosphate_intracellular, s_1434_b)
  Vmax_r_0277*((1/kms_s_0446r_0277)^2*(1/kms_s_0458r_0277)^1*(1/kms_s_0907r_0277)^1*(1/kms_s_1434_br_0277)^1*(ATP_intracellular^2*bicarbonate_intracellular^1*L_glutamine_intracellular^1*s_1434_b^1 - ADP_intracellular^2*s_0469^1*s_0763_b^2*L_glutamate_intracellular^1*phosphate_intracellular^1/Keq_r_0277)/((1 + ATP_intracellular/kms_s_0446r_0277)*(1 + bicarbonate_intracellular/kms_s_0458r_0277)*(1 + L_glutamine_intracellular/kms_s_0907r_0277)*(1 + s_1434_b/kms_s_1434_br_0277) + (1 + ADP_intracellular/kmp_s_0400r_0277)*(1 + s_0469/kmp_s_0469r_0277)*(1 + s_0763_b/kmp_s_0763_br_0277)*(1 + L_glutamate_intracellular/kmp_s_0899r_0277)*(1 + phosphate_intracellular/kmp_s_1207r_0277) - 1))/intracellular;
end
function_71 is "Function for carbamoyl-phosphate synthase (glutamine-hydrolysing)";

function Function_for_catalase(Keq_r_0282, Vmax_r_0282, intracellular, kmp_s_1160r_0282, kmp_s_1434_br_0282, kms_s_0801r_0282, hydrogen_peroxide_intracellular, oxygen_intracellular, s_1434_b)
  Vmax_r_0282*((1/kms_s_0801r_0282)^2*(hydrogen_peroxide_intracellular^2 - oxygen_intracellular^1*s_1434_b^2/Keq_r_0282)/(1 + hydrogen_peroxide_intracellular/kms_s_0801r_0282 + (1 + oxygen_intracellular/kmp_s_1160r_0282)*(1 + s_1434_b/kmp_s_1434_br_0282) - 1))/intracellular;
end

function function_73(Keq_r_0284, Vmax_r_0284, intracellular, kmp_s_0485r_0284, kmp_s_0605r_0284, kms_s_0521r_0284, kms_s_0763_br_0284, kms_s_1215r_0284, CDP_diacylglycerol_intracellular, CTP_intracellular, diphosphate_intracellular, s_0763_b, phosphatidate_intracellular)
  Vmax_r_0284*((1/kms_s_0521r_0284)^1*(1/kms_s_0763_br_0284)^1*(1/kms_s_1215r_0284)^1*(CTP_intracellular^1*s_0763_b^1*phosphatidate_intracellular^1 - CDP_diacylglycerol_intracellular^1*diphosphate_intracellular^1/Keq_r_0284)/((1 + CTP_intracellular/kms_s_0521r_0284)*(1 + s_0763_b/kms_s_0763_br_0284)*(1 + phosphatidate_intracellular/kms_s_1215r_0284) + (1 + CDP_diacylglycerol_intracellular/kmp_s_0485r_0284)*(1 + diphosphate_intracellular/kmp_s_0605r_0284) - 1))/intracellular;
end
function_73 is "Function for CDP-diacylglycerol synthase";

function function_74(Keq_r_0287, Vmax_r_0287, intracellular, kmp_s_1060r_0287, kmp_s_1091r_0287, kmp_s_1434_br_0287, kms_s_0763_br_0287, kms_s_1080r_0287, kms_s_1096r_0287, kms_s_1160r_0287, s_0763_b, s_1060, s_1080, NADP_intracellular, NADPH_intracellular, oxygen_intracellular, s_1434_b)
  Vmax_r_0287*((1/kms_s_0763_br_0287)^1*(1/kms_s_1080r_0287)^1*(1/kms_s_1096r_0287)^1*(1/kms_s_1160r_0287)^1*(s_0763_b^1*s_1080^1*NADPH_intracellular^1*oxygen_intracellular^1 - s_1060^1*NADP_intracellular^1*s_1434_b^1/Keq_r_0287)/((1 + s_0763_b/kms_s_0763_br_0287)*(1 + s_1080/kms_s_1080r_0287)*(1 + NADPH_intracellular/kms_s_1096r_0287)*(1 + oxygen_intracellular/kms_s_1160r_0287) + (1 + s_1060/kmp_s_1060r_0287)*(1 + NADP_intracellular/kmp_s_1091r_0287)*(1 + s_1434_b/kmp_s_1434_br_0287) - 1))/intracellular;
end
function_74 is "Function for ceramide-1 hydroxylase (24C)";

function function_75(Keq_r_0290, Vmax_r_0290, intracellular, kmp_s_0514r_0290, kmp_s_0763_br_0290, kmp_s_1080r_0290, kms_s_1325r_0290, kms_s_1355r_0290, coenzyme_A_intracellular, s_0763_b, s_1080, sphinganine_intracellular, tetracosanoyl_CoA_intracellular)
  Vmax_r_0290*((1/kms_s_1325r_0290)^1*(1/kms_s_1355r_0290)^1*(sphinganine_intracellular^1*tetracosanoyl_CoA_intracellular^1 - coenzyme_A_intracellular^1*s_0763_b^1*s_1080^1/Keq_r_0290)/((1 + sphinganine_intracellular/kms_s_1325r_0290)*(1 + tetracosanoyl_CoA_intracellular/kms_s_1355r_0290) + (1 + coenzyme_A_intracellular/kmp_s_0514r_0290)*(1 + s_0763_b/kmp_s_0763_br_0290)*(1 + s_1080/kmp_s_1080r_0290) - 1))/intracellular;
end
function_75 is "Function for ceramide-1 synthase (24C)";

function function_76(Keq_r_0298, Vmax_r_0298, intracellular, kmp_s_0632r_0298, kmp_s_0763_br_0298, kmp_s_1290r_0298, kmp_s_1434_br_0298, kms_s_1160r_0298, kms_s_1293r_0298, kms_s_1447r_0298, s_0632, s_0763_b, oxygen_intracellular, s_1290, s_1293, s_1434_b, zymosterol_intracellular)
  Vmax_r_0298*((1/kms_s_1160r_0298)^1*(1/kms_s_1293r_0298)^1*(1/kms_s_1447r_0298)^1*(oxygen_intracellular^1*s_1293^1*zymosterol_intracellular^1 - s_0632^1*s_0763_b^1*s_1290^1*s_1434_b^2/Keq_r_0298)/((1 + oxygen_intracellular/kms_s_1160r_0298)*(1 + s_1293/kms_s_1293r_0298)*(1 + zymosterol_intracellular/kms_s_1447r_0298) + (1 + s_0632/kmp_s_0632r_0298)*(1 + s_0763_b/kmp_s_0763_br_0298)*(1 + s_1290/kmp_s_1290r_0298)*(1 + s_1434_b/kmp_s_1434_br_0298) - 1))/intracellular;
end
function_76 is "Function for cholestenol delta-isomerase, lumped reaction";

function function_175(Keq_r_0660, Vmax_r_0660, intracellular, kmp_s_0118r_0660, kmp_s_0763_br_0660, kmp_s_1096r_0660, kms_s_1091r_0660, kms_s_1379r_0660, s_0118, s_0763_b, NADP_intracellular, NADPH_intracellular, s_1379)
  Vmax_r_0660*((1/kms_s_1091r_0660)^1*(1/kms_s_1379r_0660)^1*(NADP_intracellular^1*s_1379^1 - s_0118^1*s_0763_b^2*NADPH_intracellular^1/Keq_r_0660)/((1 + NADP_intracellular/kms_s_1091r_0660)*(1 + s_1379/kms_s_1379r_0660) + (1 + s_0118/kmp_s_0118r_0660)*(1 + s_0763_b/kmp_s_0763_br_0660)*(1 + NADPH_intracellular/kmp_s_1096r_0660) - 1))/intracellular;
end
function_175 is "Function for L-hydroxyproline dehydrogenase (NADP)";

function function_176(Keq_r_0661, Vmax_r_0661, intracellular, kmp_s_1082r_0661, kmp_s_1379r_0661, kms_s_0118r_0661, kms_s_0763_br_0661, kms_s_1087r_0661, s_0118, s_0763_b, NAD_intracellular, NADH_intracellular, s_1379)
  Vmax_r_0661*((1/kms_s_0118r_0661)^1*(1/kms_s_0763_br_0661)^2*(1/kms_s_1087r_0661)^1*(s_0118^1*s_0763_b^2*NADH_intracellular^1 - NAD_intracellular^1*s_1379^1/Keq_r_0661)/((1 + s_0118/kms_s_0118r_0661)*(1 + s_0763_b/kms_s_0763_br_0661)*(1 + NADH_intracellular/kms_s_1087r_0661) + (1 + NAD_intracellular/kmp_s_1082r_0661)*(1 + s_1379/kmp_s_1379r_0661) - 1))/intracellular;
end
function_176 is "Function for L-hydroxyproline reductase (NAD)";

function function_177(Keq_r_0667, Vmax_r_0667, intracellular, kmp_s_0183r_0667, kmp_s_0430r_0667, kms_s_0949r_0667, _2_oxobutanoate_intracellular, ammonium_intracellular, L_threonine_intracellular)
  Vmax_r_0667*((1/kms_s_0949r_0667)^1*(L_threonine_intracellular^1 - _2_oxobutanoate_intracellular^1*ammonium_intracellular^1/Keq_r_0667)/(1 + L_threonine_intracellular/kms_s_0949r_0667 + (1 + _2_oxobutanoate_intracellular/kmp_s_0183r_0667)*(1 + ammonium_intracellular/kmp_s_0430r_0667) - 1))/intracellular;
end
function_177 is "Function for L-threonine deaminase";

function Function_for_lanosterol_synthase(Keq_r_0673, Vmax_r_0673, intracellular, kmp_s_0963r_0673, kms_s_0040r_0673, s_0040, lanosterol_intracellular)
  Vmax_r_0673*((1/kms_s_0040r_0673)^1*(s_0040^1 - lanosterol_intracellular^1/Keq_r_0673)/(1 + s_0040/kms_s_0040r_0673 + 1 + lanosterol_intracellular/kmp_s_0963r_0673 - 1))/intracellular;
end

function function_179(Keq_r_0674, Vmax_r_0674, intracellular, kmp_s_0185r_0674, kmp_s_0925r_0674, kms_s_0297r_0674, kms_s_0899r_0674, _2_oxoglutarate_intracellular, s_0297, L_glutamate_intracellular, L_leucine_intracellular)
  Vmax_r_0674*((1/kms_s_0297r_0674)^1*(1/kms_s_0899r_0674)^1*(s_0297^1*L_glutamate_intracellular^1 - _2_oxoglutarate_intracellular^1*L_leucine_intracellular^1/Keq_r_0674)/((1 + s_0297/kms_s_0297r_0674)*(1 + L_glutamate_intracellular/kms_s_0899r_0674) + (1 + _2_oxoglutarate_intracellular/kmp_s_0185r_0674)*(1 + L_leucine_intracellular/kmp_s_0925r_0674) - 1))/intracellular;
end
function_179 is "Function for leucine transaminase";

function function_180(Keq_r_0688, Vmax_r_0688, intracellular, kmp_s_0069r_0688, kmp_s_1082r_0688, kms_s_0763_br_0688, kms_s_1087r_0688, kms_s_1156r_0688, S_malate_2_intracellular, s_0763_b, NAD_intracellular, NADH_intracellular, oxaloacetate_2_intracellular)
  Vmax_r_0688*((1/kms_s_0763_br_0688)^1*(1/kms_s_1087r_0688)^1*(1/kms_s_1156r_0688)^1*(s_0763_b^1*NADH_intracellular^1*oxaloacetate_2_intracellular^1 - S_malate_2_intracellular^1*NAD_intracellular^1/Keq_r_0688)/((1 + s_0763_b/kms_s_0763_br_0688)*(1 + NADH_intracellular/kms_s_1087r_0688)*(1 + oxaloacetate_2_intracellular/kms_s_1156r_0688) + (1 + S_malate_2_intracellular/kmp_s_0069r_0688)*(1 + NAD_intracellular/kmp_s_1082r_0688) - 1))/intracellular;
end
function_180 is "Function for malate dehydrogenase";

function function_181(Keq_r_0697, Vmax_r_0697, intracellular, kmp_s_0605r_0697, kmp_s_0710r_0697, kms_s_0553r_0697, kms_s_0755r_0697, kms_s_0763_br_0697, s_0553, diphosphate_intracellular, s_0710, GTP_intracellular, s_0763_b)
  Vmax_r_0697*((1/kms_s_0553r_0697)^1*(1/kms_s_0755r_0697)^1*(1/kms_s_0763_br_0697)^1*(s_0553^1*GTP_intracellular^1*s_0763_b^1 - diphosphate_intracellular^1*s_0710^1/Keq_r_0697)/((1 + s_0553/kms_s_0553r_0697)*(1 + GTP_intracellular/kms_s_0755r_0697)*(1 + s_0763_b/kms_s_0763_br_0697) + (1 + diphosphate_intracellular/kmp_s_0605r_0697)*(1 + s_0710/kmp_s_0710r_0697) - 1))/intracellular;
end
function_181 is "Function for mannose-1-phosphate guanylyltransferase";

function function_182(Keq_r_0698, Vmax_r_0698, intracellular, kmp_s_0554r_0698, kms_s_0539r_0698, s_0539, s_0554)
  Vmax_r_0698*((1/kms_s_0539r_0698)^1*(s_0539^1 - s_0554^1/Keq_r_0698)/(1 + s_0539/kms_s_0539r_0698 + 1 + s_0554/kmp_s_0554r_0698 - 1))/intracellular;
end
function_182 is "Function for mannose-6-phosphate isomerase";

function function_183(Keq_r_0699, Vmax_r_0699, intracellular, kmp_s_0122r_0699, kmp_s_0763_br_0699, kms_s_0015r_0699, kms_s_1434_br_0699, s_0015, s_0122, s_0763_b, s_1434_b)
  Vmax_r_0699*((1/kms_s_0015r_0699)^1*(1/kms_s_1434_br_0699)^1*(s_0015^1*s_1434_b^1 - s_0122^1*s_0763_b^1/Keq_r_0699)/((1 + s_0015/kms_s_0015r_0699)*(1 + s_1434_b/kms_s_1434_br_0699) + (1 + s_0122/kmp_s_0122r_0699)*(1 + s_0763_b/kmp_s_0763_br_0699) - 1))/intracellular;
end
function_183 is "Function for methenyltetrahydrifikate cyclohydrolase";

function function_184(Keq_r_0701, Vmax_r_0701, intracellular, kmp_s_0605r_0701, kmp_s_1207r_0701, kmp_s_1293r_0701, kms_s_0446r_0701, kms_s_0933r_0701, kms_s_1434_br_0701, ATP_intracellular, diphosphate_intracellular, L_methionine_intracellular, phosphate_intracellular, s_1293, s_1434_b)
  Vmax_r_0701*((1/kms_s_0446r_0701)^1*(1/kms_s_0933r_0701)^1*(1/kms_s_1434_br_0701)^1*(ATP_intracellular^1*L_methionine_intracellular^1*s_1434_b^1 - diphosphate_intracellular^1*phosphate_intracellular^1*s_1293^1/Keq_r_0701)/((1 + ATP_intracellular/kms_s_0446r_0701)*(1 + L_methionine_intracellular/kms_s_0933r_0701)*(1 + s_1434_b/kms_s_1434_br_0701) + (1 + diphosphate_intracellular/kmp_s_0605r_0701)*(1 + phosphate_intracellular/kmp_s_1207r_0701)*(1 + s_1293/kmp_s_1293r_0701) - 1))/intracellular;
end
function_184 is "Function for methionine adenosyltransferase";

function Function_for_methionine_synthase(Keq_r_0702, Vmax_r_0702, intracellular, kmp_s_0309r_0702, kmp_s_0763_br_0702, kmp_s_0933r_0702, kms_s_0328r_0702, kms_s_0917r_0702, s_0309, s_0328, s_0763_b, L_homocysteine_intracellular, L_methionine_intracellular)
  Vmax_r_0702*((1/kms_s_0328r_0702)^1*(1/kms_s_0917r_0702)^1*(s_0328^1*L_homocysteine_intracellular^1 - s_0309^1*s_0763_b^1*L_methionine_intracellular^1/Keq_r_0702)/((1 + s_0328/kms_s_0328r_0702)*(1 + L_homocysteine_intracellular/kms_s_0917r_0702) + (1 + s_0309/kmp_s_0309r_0702)*(1 + s_0763_b/kmp_s_0763_br_0702)*(1 + L_methionine_intracellular/kmp_s_0933r_0702) - 1))/intracellular;
end

function function_186(Keq_r_0707, Vmax_r_0707, intracellular, kmp_s_0015r_0707, kmp_s_1096r_0707, kms_s_0307r_0707, kms_s_1091r_0707, s_0015, s_0307, NADP_intracellular, NADPH_intracellular)
  Vmax_r_0707*((1/kms_s_0307r_0707)^1*(1/kms_s_1091r_0707)^1*(s_0307^1*NADP_intracellular^1 - s_0015^1*NADPH_intracellular^1/Keq_r_0707)/((1 + s_0307/kms_s_0307r_0707)*(1 + NADP_intracellular/kms_s_1091r_0707) + (1 + s_0015/kmp_s_0015r_0707)*(1 + NADPH_intracellular/kmp_s_1096r_0707) - 1))/intracellular;
end
function_186 is "Function for methylenetetrahydrofolate dehydrogenase (NADP)";

function function_187(Keq_r_0712, Vmax_r_0712, intracellular, kmp_s_0022r_0712, kmp_s_0481r_0712, kmp_s_0763_br_0712, kms_s_0031r_0712, kms_s_0521r_0712, s_0022, R_mevalonate_intracellular, CDP_intracellular, CTP_intracellular, s_0763_b)
  Vmax_r_0712*((1/kms_s_0031r_0712)^1*(1/kms_s_0521r_0712)^1*(R_mevalonate_intracellular^1*CTP_intracellular^1 - s_0022^1*CDP_intracellular^1*s_0763_b^1/Keq_r_0712)/((1 + R_mevalonate_intracellular/kms_s_0031r_0712)*(1 + CTP_intracellular/kms_s_0521r_0712) + (1 + s_0022/kmp_s_0022r_0712)*(1 + CDP_intracellular/kmp_s_0481r_0712)*(1 + s_0763_b/kmp_s_0763_br_0712) - 1))/intracellular;
end
function_187 is "Function for mevalonate kinase (ctp)";

function function_188(Keq_r_0715, Vmax_r_0715, intracellular, kmp_s_0400r_0715, kmp_s_0470r_0715, kmp_s_0850r_0715, kmp_s_1207r_0715, kms_s_0021r_0715, kms_s_0446r_0715, s_0021, ADP_intracellular, ATP_intracellular, carbon_dioxide_intracellular, s_0850, phosphate_intracellular)
  Vmax_r_0715*((1/kms_s_0021r_0715)^1*(1/kms_s_0446r_0715)^1*(s_0021^1*ATP_intracellular^1 - ADP_intracellular^1*carbon_dioxide_intracellular^1*s_0850^1*phosphate_intracellular^1/Keq_r_0715)/((1 + s_0021/kms_s_0021r_0715)*(1 + ATP_intracellular/kms_s_0446r_0715) + (1 + ADP_intracellular/kmp_s_0400r_0715)*(1 + carbon_dioxide_intracellular/kmp_s_0470r_0715)*(1 + s_0850/kmp_s_0850r_0715)*(1 + phosphate_intracellular/kmp_s_1207r_0715) - 1))/intracellular;
end
function_188 is "Function for mevalonate pyrophoshate decarboxylase";

function function_189(Keq_r_0719, Vmax_r_0719, intracellular, kmp_s_0247r_0719, kmp_s_0763_br_0719, kmp_s_1096r_0719, kms_s_0046r_0719, kms_s_1091r_0719, s_0046, s_0247, s_0763_b, NADP_intracellular, NADPH_intracellular)
  Vmax_r_0719*((1/kms_s_0046r_0719)^1*(1/kms_s_1091r_0719)^1*(s_0046^1*NADP_intracellular^1 - s_0247^1*s_0763_b^1*NADPH_intracellular^1/Keq_r_0719)/((1 + s_0046/kms_s_0046r_0719)*(1 + NADP_intracellular/kms_s_1091r_0719) + (1 + s_0247/kmp_s_0247r_0719)*(1 + s_0763_b/kmp_s_0763_br_0719)*(1 + NADPH_intracellular/kmp_s_1096r_0719) - 1))/intracellular;
end
function_189 is "Function for microsomal beta-keto-reductase";

function function_190(Keq_r_0720, Vmax_r_0720, intracellular, kmp_s_0257r_0720, kmp_s_0763_br_0720, kmp_s_1096r_0720, kms_s_0052r_0720, kms_s_1091r_0720, s_0052, _3_oxopalmitoyl_CoA_intracellular, s_0763_b, NADP_intracellular, NADPH_intracellular)
  Vmax_r_0720*((1/kms_s_0052r_0720)^1*(1/kms_s_1091r_0720)^1*(s_0052^1*NADP_intracellular^1 - _3_oxopalmitoyl_CoA_intracellular^1*s_0763_b^1*NADPH_intracellular^1/Keq_r_0720)/((1 + s_0052/kms_s_0052r_0720)*(1 + NADP_intracellular/kms_s_1091r_0720) + (1 + _3_oxopalmitoyl_CoA_intracellular/kmp_s_0257r_0720)*(1 + s_0763_b/kmp_s_0763_br_0720)*(1 + NADPH_intracellular/kmp_s_1096r_0720) - 1))/intracellular;
end
function_190 is "Function for microsomal beta-keto-reductase_2";

function function_191(Keq_r_0721, Vmax_r_0721, intracellular, kmp_s_0254r_0721, kmp_s_0763_br_0721, kmp_s_1096r_0721, kms_s_0234r_0721, kms_s_1091r_0721, s_0234, s_0254, s_0763_b, NADP_intracellular, NADPH_intracellular)
  Vmax_r_0721*((1/kms_s_0234r_0721)^1*(1/kms_s_1091r_0721)^1*(s_0234^1*NADP_intracellular^1 - s_0254^1*s_0763_b^1*NADPH_intracellular^1/Keq_r_0721)/((1 + s_0234/kms_s_0234r_0721)*(1 + NADP_intracellular/kms_s_1091r_0721) + (1 + s_0254/kmp_s_0254r_0721)*(1 + s_0763_b/kmp_s_0763_br_0721)*(1 + NADPH_intracellular/kmp_s_1096r_0721) - 1))/intracellular;
end
function_191 is "Function for microsomal beta-keto-reductase_3";

function function_192(Keq_r_0722, Vmax_r_0722, intracellular, kmp_s_0261r_0722, kmp_s_0763_br_0722, kmp_s_1096r_0722, kms_s_0055r_0722, kms_s_1091r_0722, s_0055, s_0261, s_0763_b, NADP_intracellular, NADPH_intracellular)
  Vmax_r_0722*((1/kms_s_0055r_0722)^1*(1/kms_s_1091r_0722)^1*(s_0055^1*NADP_intracellular^1 - s_0261^1*s_0763_b^1*NADPH_intracellular^1/Keq_r_0722)/((1 + s_0055/kms_s_0055r_0722)*(1 + NADP_intracellular/kms_s_1091r_0722) + (1 + s_0261/kmp_s_0261r_0722)*(1 + s_0763_b/kmp_s_0763_br_0722)*(1 + NADPH_intracellular/kmp_s_1096r_0722) - 1))/intracellular;
end
function_192 is "Function for microsomal beta-keto-reductase_4";

function Function_for_MIPC_synthase(Keq_r_0723, Vmax_r_0723, intracellular, kmp_s_1013r_0723, kms_s_0710r_0723, kms_s_0828r_0723, s_0710, s_0828, s_1013)
  Vmax_r_0723*((1/kms_s_0710r_0723)^1*(1/kms_s_0828r_0723)^1*(s_0710^1*s_0828^1 - s_1013^1/Keq_r_0723)/((1 + s_0710/kms_s_0710r_0723)*(1 + s_0828/kms_s_0828r_0723) + 1 + s_1013/kmp_s_1013r_0723 - 1))/intracellular;
end

function function_194(Keq_r_0725, Vmax_r_0725, intracellular, kmp_s_1020r_0725, kmp_s_1207r_0725, kms_s_0128r_0725, kms_s_1434_br_0725, s_0128, myo_inositol_intracellular, phosphate_intracellular, s_1434_b)
  Vmax_r_0725*((1/kms_s_0128r_0725)^1*(1/kms_s_1434_br_0725)^1*(s_0128^1*s_1434_b^1 - myo_inositol_intracellular^1*phosphate_intracellular^1/Keq_r_0725)/((1 + s_0128/kms_s_0128r_0725)*(1 + s_1434_b/kms_s_1434_br_0725) + (1 + myo_inositol_intracellular/kmp_s_1020r_0725)*(1 + phosphate_intracellular/kmp_s_1207r_0725) - 1))/intracellular;
end
function_194 is "Function for myo-inositol 1-phosphatase";

function function_195(Keq_r_0726, Vmax_r_0726, intracellular, kmp_s_0128r_0726, kms_s_0410r_0726, s_0128, s_0410)
  Vmax_r_0726*((1/kms_s_0410r_0726)^1*(s_0410^1 - s_0128^1/Keq_r_0726)/(1 + s_0410/kms_s_0410r_0726 + 1 + s_0128/kmp_s_0128r_0726 - 1))/intracellular;
end
function_195 is "Function for myo-inositol-1-phosphate synthase";

function function_196(Keq_r_0728, Vmax_r_0728, intracellular, kmp_s_0149r_0728, kmp_s_1091r_0728, kmp_s_1207r_0728, kms_s_0763_br_0728, kms_s_1070r_0728, kms_s_1096r_0728, s_0149, s_0763_b, s_1070, NADP_intracellular, NADPH_intracellular, phosphate_intracellular)
  Vmax_r_0728*((1/kms_s_0763_br_0728)^1*(1/kms_s_1070r_0728)^1*(1/kms_s_1096r_0728)^1*(s_0763_b^1*s_1070^1*NADPH_intracellular^1 - s_0149^1*NADP_intracellular^1*phosphate_intracellular^1/Keq_r_0728)/((1 + s_0763_b/kms_s_0763_br_0728)*(1 + s_1070/kms_s_1070r_0728)*(1 + NADPH_intracellular/kms_s_1096r_0728) + (1 + s_0149/kmp_s_0149r_0728)*(1 + NADP_intracellular/kmp_s_1091r_0728)*(1 + phosphate_intracellular/kmp_s_1207r_0728) - 1))/intracellular;
end
function_196 is "Function for N-acetyl-g-glutamyl-phosphate reductase";

function function_197(Keq_r_0765, Vmax_r_0765, intracellular, kmp_s_0181r_0765, kmp_s_0470r_0765, kms_s_0180r_0765, kms_s_0763_br_0765, s_0180, _2_oxoadipic_acid_intracellular, carbon_dioxide_intracellular, s_0763_b)
  Vmax_r_0765*((1/kms_s_0180r_0765)^1*(1/kms_s_0763_br_0765)^1*(s_0180^1*s_0763_b^1 - _2_oxoadipic_acid_intracellular^1*carbon_dioxide_intracellular^1/Keq_r_0765)/((1 + s_0180/kms_s_0180r_0765)*(1 + s_0763_b/kms_s_0763_br_0765) + (1 + _2_oxoadipic_acid_intracellular/kmp_s_0181r_0765)*(1 + carbon_dioxide_intracellular/kmp_s_0470r_0765) - 1))/intracellular;
end
function_197 is "Function for non-enzymatic reaction";

function function_198(Keq_r_0771, Vmax_r_0771, intracellular, kmp_s_0446r_0771, kmp_s_0481r_0771, kms_s_0400r_0771, kms_s_0521r_0771, ADP_intracellular, ATP_intracellular, CDP_intracellular, CTP_intracellular)
  Vmax_r_0771*((1/kms_s_0400r_0771)^1*(1/kms_s_0521r_0771)^1*(ADP_intracellular^1*CTP_intracellular^1 - ATP_intracellular^1*CDP_intracellular^1/Keq_r_0771)/((1 + ADP_intracellular/kms_s_0400r_0771)*(1 + CTP_intracellular/kms_s_0521r_0771) + (1 + ATP_intracellular/kmp_s_0446r_0771)*(1 + CDP_intracellular/kmp_s_0481r_0771) - 1))/intracellular;
end
function_198 is "Function for nucleoside-diphosphate kinase (ATP:CDP)";

function function_199(Keq_r_0779, Vmax_r_0779, intracellular, kmp_s_0400r_0779, kmp_s_1430r_0779, kms_s_0446r_0779, kms_s_1411r_0779, ADP_intracellular, ATP_intracellular, UDP_intracellular, UTP_intracellular)
  Vmax_r_0779*((1/kms_s_0446r_0779)^1*(1/kms_s_1411r_0779)^1*(ATP_intracellular^1*UDP_intracellular^1 - ADP_intracellular^1*UTP_intracellular^1/Keq_r_0779)/((1 + ATP_intracellular/kms_s_0446r_0779)*(1 + UDP_intracellular/kms_s_1411r_0779) + (1 + ADP_intracellular/kmp_s_0400r_0779)*(1 + UTP_intracellular/kmp_s_1430r_0779) - 1))/intracellular;
end
function_199 is "Function for nucleoside-diphosphate kinase (ATP:UDP)";

function function_200(Keq_r_0783, Vmax_r_0783, intracellular, kmp_s_0369r_0783, kmp_s_0763_br_0783, kmp_s_0917r_0783, kms_s_0805r_0783, kms_s_1117r_0783, acetate_intracellular, s_0763_b, hydrogen_sulfide_intracellular, L_homocysteine_intracellular, s_1117)
  Vmax_r_0783*((1/kms_s_0805r_0783)^1*(1/kms_s_1117r_0783)^1*(hydrogen_sulfide_intracellular^1*s_1117^1 - acetate_intracellular^1*s_0763_b^1*L_homocysteine_intracellular^1/Keq_r_0783)/((1 + hydrogen_sulfide_intracellular/kms_s_0805r_0783)*(1 + s_1117/kms_s_1117r_0783) + (1 + acetate_intracellular/kmp_s_0369r_0783)*(1 + s_0763_b/kmp_s_0763_br_0783)*(1 + L_homocysteine_intracellular/kmp_s_0917r_0783) - 1))/intracellular;
end
function_200 is "Function for O-acetylhomoserine (thiol)-lyase";

function function_207(Keq_r_0847, Vmax_r_0847, intracellular, kmp_s_0090r_0847, kmp_s_0511r_0847, kmp_s_0763_br_0847, kms_s_0485r_0847, kms_s_1020r_0847, s_0090, CDP_diacylglycerol_intracellular, CMP_intracellular, s_0763_b, myo_inositol_intracellular)
  Vmax_r_0847*((1/kms_s_0485r_0847)^1*(1/kms_s_1020r_0847)^1*(CDP_diacylglycerol_intracellular^1*myo_inositol_intracellular^1 - s_0090^1*CMP_intracellular^1*s_0763_b^2/Keq_r_0847)/((1 + CDP_diacylglycerol_intracellular/kms_s_0485r_0847)*(1 + myo_inositol_intracellular/kms_s_1020r_0847) + (1 + s_0090/kmp_s_0090r_0847)*(1 + CMP_intracellular/kmp_s_0511r_0847)*(1 + s_0763_b/kmp_s_0763_br_0847) - 1))/intracellular;
end
function_207 is "Function for phosphatidylinositol synthase";

function function_208(Keq_r_0850, Vmax_r_0850, intracellular, kmp_s_0470r_0850, kmp_s_1233r_0850, kms_s_1219r_0850, carbon_dioxide_intracellular, s_1219, s_1233)
  Vmax_r_0850*((1/kms_s_1219r_0850)^1*(s_1219^1 - carbon_dioxide_intracellular^1*s_1233^1/Keq_r_0850)/(1 + s_1219/kms_s_1219r_0850 + (1 + carbon_dioxide_intracellular/kmp_s_0470r_0850)*(1 + s_1233/kmp_s_1233r_0850) - 1))/intracellular;
end
function_208 is "Function for phosphatidylserine decarboxylase";

function function_209(Keq_r_0853, Vmax_r_0853, intracellular, kmp_s_0511r_0853, kmp_s_0763_br_0853, kmp_s_1219r_0853, kms_s_0485r_0853, kms_s_0943r_0853, CDP_diacylglycerol_intracellular, CMP_intracellular, s_0763_b, L_serine_intracellular, s_1219)
  Vmax_r_0853*((1/kms_s_0485r_0853)^1*(1/kms_s_0943r_0853)^1*(CDP_diacylglycerol_intracellular^1*L_serine_intracellular^1 - CMP_intracellular^1*s_0763_b^2*s_1219^1/Keq_r_0853)/((1 + CDP_diacylglycerol_intracellular/kms_s_0485r_0853)*(1 + L_serine_intracellular/kms_s_0943r_0853) + (1 + CMP_intracellular/kmp_s_0511r_0853)*(1 + s_0763_b/kmp_s_0763_br_0853)*(1 + s_1219/kmp_s_1219r_0853) - 1))/intracellular;
end
function_209 is "Function for phosphatidylserine synthase";

function function_210(Keq_r_0856, Vmax_r_0856, intracellular, kmp_s_0397r_0856, kmp_s_0763_br_0856, kmp_s_1349r_0856, kmp_s_1517r_0856, kms_s_0206r_0856, kms_s_1521r_0856, s_0206, s_0397, s_0763_b, sulphite_intracellular, s_1517, s_1521)
  Vmax_r_0856*((1/kms_s_0206r_0856)^1*(1/kms_s_1521r_0856)^1*(s_0206^1*s_1521^1 - s_0397^1*s_0763_b^2*sulphite_intracellular^1*s_1517^1/Keq_r_0856)/((1 + s_0206/kms_s_0206r_0856)*(1 + s_1521/kms_s_1521r_0856) + (1 + s_0397/kmp_s_0397r_0856)*(1 + s_0763_b/kmp_s_0763_br_0856)*(1 + sulphite_intracellular/kmp_s_1349r_0856)*(1 + s_1517/kmp_s_1517r_0856) - 1))/intracellular;
end
function_210 is "Function for phosphoadenylyl-sulfate reductase (thioredoxin)";
function Function_for_phosphofructokinase(Keq_r_0859, Vmax_r_0859, intracellular, kmp_s_0400r_0859, kmp_s_0537r_0859, kmp_s_0763_br_0859, kms_s_0446r_0859, kms_s_0539r_0859, ADP_intracellular, ATP_intracellular, s_0537, s_0539, s_0763_b)
  Vmax_r_0859*((1/kms_s_0446r_0859)^1*(1/kms_s_0539r_0859)^1*(ATP_intracellular^1*s_0539^1 - ADP_intracellular^1*s_0537^1*s_0763_b^1/Keq_r_0859)/((1 + ATP_intracellular/kms_s_0446r_0859)*(1 + s_0539/kms_s_0539r_0859) + (1 + ADP_intracellular/kmp_s_0400r_0859)*(1 + s_0537/kmp_s_0537r_0859)*(1 + s_0763_b/kmp_s_0763_br_0859) - 1))/intracellular;
end

function Function_for_phosphoglucomutase(Keq_r_0861, Vmax_r_0861, intracellular, kmp_s_0549r_0861, kms_s_0410r_0861, s_0410, s_0549)
  Vmax_r_0861*((1/kms_s_0410r_0861)^1*(s_0410^1 - s_0549^1/Keq_r_0861)/(1 + s_0410/kms_s_0410r_0861 + 1 + s_0549/kmp_s_0549r_0861 - 1))/intracellular;
end

function function_213(Keq_r_0865, Vmax_r_0865, intracellular, kmp_s_0264r_0865, kmp_s_0446r_0865, kms_s_0265r_0865, kms_s_0400r_0865, s_0264, s_0265, ADP_intracellular, ATP_intracellular)
  Vmax_r_0865*((1/kms_s_0265r_0865)^1*(1/kms_s_0400r_0865)^1*(s_0265^1*ADP_intracellular^1 - s_0264^1*ATP_intracellular^1/Keq_r_0865)/((1 + s_0265/kms_s_0265r_0865)*(1 + ADP_intracellular/kms_s_0400r_0865) + (1 + s_0264/kmp_s_0264r_0865)*(1 + ATP_intracellular/kmp_s_0446r_0865) - 1))/intracellular;
end
function_213 is "Function for phosphoglycerate kinase";

function function_94(Keq_r_0371, Vmax_r_0371, intracellular, kmp_s_0596r_0371, kmp_s_0763_br_0371, kmp_s_1207r_0371, kms_s_1215r_0371, kms_s_1434_br_0371, diglyceride_intracellular, s_0763_b, phosphate_intracellular, phosphatidate_intracellular, s_1434_b)
  Vmax_r_0371*((1/kms_s_1215r_0371)^1*(1/kms_s_1434_br_0371)^1*(phosphatidate_intracellular^1*s_1434_b^1 - diglyceride_intracellular^1*s_0763_b^2*phosphate_intracellular^1/Keq_r_0371)/((1 + phosphatidate_intracellular/kms_s_1215r_0371)*(1 + s_1434_b/kms_s_1434_br_0371) + (1 + diglyceride_intracellular/kmp_s_0596r_0371)*(1 + s_0763_b/kmp_s_0763_br_0371)*(1 + phosphate_intracellular/kmp_s_1207r_0371) - 1))/intracellular;
end
function_94 is "Function for diacylglycerol pyrophosphate phosphatase";

function function_95(Keq_r_0374, Vmax_r_0374, intracellular, kmp_s_0801r_0374, kmp_s_1154r_0374, kms_s_0064r_0374, kms_s_1160r_0374, S_dihydroorotate_intracellular, hydrogen_peroxide_intracellular, orotate_intracellular, oxygen_intracellular)
  Vmax_r_0374*((1/kms_s_0064r_0374)^1*(1/kms_s_1160r_0374)^1*(S_dihydroorotate_intracellular^1*oxygen_intracellular^1 - hydrogen_peroxide_intracellular^1*orotate_intracellular^1/Keq_r_0374)/((1 + S_dihydroorotate_intracellular/kms_s_0064r_0374)*(1 + oxygen_intracellular/kms_s_1160r_0374) + (1 + hydrogen_peroxide_intracellular/kmp_s_0801r_0374)*(1 + orotate_intracellular/kmp_s_1154r_0374) - 1))/intracellular;
end
function_95 is "Function for dihydoorotic acid dehydrogenase";

function function_96(Keq_r_0375, Vmax_r_0375, intracellular, kmp_s_0309r_0375, kmp_s_1091r_0375, kms_s_0601r_0375, kms_s_0763_br_0375, kms_s_1096r_0375, s_0309, dihydrofolic_acid_intracellular, s_0763_b, NADP_intracellular, NADPH_intracellular)
  Vmax_r_0375*((1/kms_s_0601r_0375)^1*(1/kms_s_0763_br_0375)^1*(1/kms_s_1096r_0375)^1*(dihydrofolic_acid_intracellular^1*s_0763_b^1*NADPH_intracellular^1 - s_0309^1*NADP_intracellular^1/Keq_r_0375)/((1 + dihydrofolic_acid_intracellular/kms_s_0601r_0375)*(1 + s_0763_b/kms_s_0763_br_0375)*(1 + NADPH_intracellular/kms_s_1096r_0375) + (1 + s_0309/kmp_s_0309r_0375)*(1 + NADP_intracellular/kmp_s_1091r_0375) - 1))/intracellular;
end
function_96 is "Function for dihydrofolate reductase";

function Function_for_dihydroorotase(Keq_r_0381, Vmax_r_0381, intracellular, kmp_s_0064r_0381, kmp_s_1434_br_0381, kms_s_0763_br_0381, kms_s_1073r_0381, S_dihydroorotate_intracellular, s_0763_b, s_1073, s_1434_b)
  Vmax_r_0381*((1/kms_s_0763_br_0381)^1*(1/kms_s_1073r_0381)^1*(s_0763_b^1*s_1073^1 - S_dihydroorotate_intracellular^1*s_1434_b^1/Keq_r_0381)/((1 + s_0763_b/kms_s_0763_br_0381)*(1 + s_1073/kms_s_1073r_0381) + (1 + S_dihydroorotate_intracellular/kmp_s_0064r_0381)*(1 + s_1434_b/kmp_s_1434_br_0381) - 1))/intracellular;
end

function function_98(Keq_r_0384, Vmax_r_0384, intracellular, kmp_s_0238r_0384, kmp_s_1434_br_0384, kms_s_0018r_0384, s_0018, s_0238, s_1434_b)
  Vmax_r_0384*((1/kms_s_0018r_0384)^1*(s_0018^1 - s_0238^1*s_1434_b^1/Keq_r_0384)/(1 + s_0018/kms_s_0018r_0384 + (1 + s_0238/kmp_s_0238r_0384)*(1 + s_1434_b/kmp_s_1434_br_0384) - 1))/intracellular;
end
function_98 is "Function for dihydroxy-acid dehydratase (2,3-dihydroxy-3-methylbutanoate)";

function function_99(Keq_r_0385, Vmax_r_0385, intracellular, kmp_s_0058r_0385, kmp_s_1434_br_0385, kms_s_0007r_0385, s_0007, s_0058, s_1434_b)
  Vmax_r_0385*((1/kms_s_0007r_0385)^1*(s_0007^1 - s_0058^1*s_1434_b^1/Keq_r_0385)/(1 + s_0007/kms_s_0007r_0385 + (1 + s_0058/kmp_s_0058r_0385)*(1 + s_1434_b/kmp_s_1434_br_0385) - 1))/intracellular;
end
function_99 is "Function for dihydroxy-acid dehydratase (2,3-dihydroxy-3-methylpentanoate)";

function function_100(Keq_r_0386, Vmax_r_0386, intracellular, kmp_s_0400r_0386, kmp_s_0735r_0386, kmp_s_0763_br_0386, kms_s_0446r_0386, kms_s_0734r_0386, ADP_intracellular, ATP_intracellular, glycerone_intracellular, s_0735, s_0763_b)
  Vmax_r_0386*((1/kms_s_0446r_0386)^1*(1/kms_s_0734r_0386)^1*(ATP_intracellular^1*glycerone_intracellular^1 - ADP_intracellular^1*s_0735^1*s_0763_b^1/Keq_r_0386)/((1 + ATP_intracellular/kms_s_0446r_0386)*(1 + glycerone_intracellular/kms_s_0734r_0386) + (1 + ADP_intracellular/kmp_s_0400r_0386)*(1 + s_0735/kmp_s_0735r_0386)*(1 + s_0763_b/kmp_s_0763_br_0386) - 1))/intracellular;
end
function_100 is "Function for dihydroxyacetone kinase";

function function_101(Keq_r_0387, Vmax_r_0387, intracellular, kmp_s_0605r_0387, kmp_s_0712r_0387, kms_s_0850r_0387, kms_s_1257r_0387, diphosphate_intracellular, s_0712, s_0850, prenyl_diphosphate_intracellular)
  Vmax_r_0387*((1/kms_s_0850r_0387)^1*(1/kms_s_1257r_0387)^1*(s_0850^1*prenyl_diphosphate_intracellular^1 - diphosphate_intracellular^1*s_0712^1/Keq_r_0387)/((1 + s_0850/kms_s_0850r_0387)*(1 + prenyl_diphosphate_intracellular/kms_s_1257r_0387) + (1 + diphosphate_intracellular/kmp_s_0605r_0387)*(1 + s_0712/kmp_s_0712r_0387) - 1))/intracellular;
end
function_101 is "Function for dimethylallyltranstransferase";

function function_102(Keq_r_0393, Vmax_r_0393, intracellular, kmp_s_0615r_0393, kmp_s_0706r_0393, kms_s_0616r_0393, kms_s_0710r_0393, s_0615, dolichyl_phosphate_intracellular, GDP_intracellular, s_0710)
  Vmax_r_0393*((1/kms_s_0616r_0393)^1*(1/kms_s_0710r_0393)^1*(dolichyl_phosphate_intracellular^1*s_0710^1 - s_0615^1*GDP_intracellular^1/Keq_r_0393)/((1 + dolichyl_phosphate_intracellular/kms_s_0616r_0393)*(1 + s_0710/kms_s_0710r_0393) + (1 + s_0615/kmp_s_0615r_0393)*(1 + GDP_intracellular/kmp_s_0706r_0393) - 1))/intracellular;
end
function_102 is "Function for dolichyl-phosphate D-mannosyltransferase";

function function_103(Keq_r_0394, Vmax_r_0394, intracellular, kmp_s_0616r_0394, kmp_s_0763_br_0394, kmp_s_1011r_0394, kms_s_0615r_0394, s_0615, dolichyl_phosphate_intracellular, s_0763_b, mannan_intracellular)
  Vmax_r_0394*((1/kms_s_0615r_0394)^1*(s_0615^1 - dolichyl_phosphate_intracellular^1*s_0763_b^1*mannan_intracellular^1/Keq_r_0394)/(1 + s_0615/kms_s_0615r_0394 + (1 + dolichyl_phosphate_intracellular/kmp_s_0616r_0394)*(1 + s_0763_b/kmp_s_0763_br_0394)*(1 + mannan_intracellular/kmp_s_1011r_0394) - 1))/intracellular;
end
function_103 is "Function for dolichyl-phosphate-mannose--protein mannosyltransferase";

function Function_for_enolase(Keq_r_0398, Vmax_r_0398, intracellular, kmp_s_1243r_0398, kmp_s_1434_br_0398, kms_s_0193r_0398, s_0193, s_1243, s_1434_b)
  Vmax_r_0398*((1/kms_s_0193r_0398)^1*(s_0193^1 - s_1243^1*s_1434_b^1/Keq_r_0398)/(1 + s_0193/kms_s_0193r_0398 + (1 + s_1243/kmp_s_1243r_0398)*(1 + s_1434_b/kmp_s_1434_br_0398) - 1))/intracellular;
end

function function_105(Keq_r_0417, Vmax_r_0417, intracellular, kmp_s_0470r_0417, kmp_s_0514r_0417, kmp_s_0574r_0417, kmp_s_1091r_0417, kmp_s_1434_br_0417, kms_s_0763_br_0417, kms_s_1005r_0417, kms_s_1096r_0417, kms_s_1132r_0417, carbon_dioxide_intracellular, coenzyme_A_intracellular, decanoate_intracellular, s_0763_b, malonyl_CoA_intracellular, NADP_intracellular, NADPH_intracellular, octanoate_intracellular, s_1434_b)
  Vmax_r_0417*((1/kms_s_0763_br_0417)^3*(1/kms_s_1005r_0417)^1*(1/kms_s_1096r_0417)^2*(1/kms_s_1132r_0417)^1*(s_0763_b^3*malonyl_CoA_intracellular^1*NADPH_intracellular^2*octanoate_intracellular^1 - carbon_dioxide_intracellular^1*coenzyme_A_intracellular^1*decanoate_intracellular^1*NADP_intracellular^2*s_1434_b^1/Keq_r_0417)/((1 + s_0763_b/kms_s_0763_br_0417)*(1 + malonyl_CoA_intracellular/kms_s_1005r_0417)*(1 + NADPH_intracellular/kms_s_1096r_0417)*(1 + octanoate_intracellular/kms_s_1132r_0417) + (1 + carbon_dioxide_intracellular/kmp_s_0470r_0417)*(1 + coenzyme_A_intracellular/kmp_s_0514r_0417)*(1 + decanoate_intracellular/kmp_s_0574r_0417)*(1 + NADP_intracellular/kmp_s_1091r_0417)*(1 + s_1434_b/kmp_s_1434_br_0417) - 1))/intracellular;
end
function_105 is "Function for fatty acid synthase (n-C10:0)";

function function_106(Keq_r_0418, Vmax_r_0418, intracellular, kmp_s_0470r_0418, kmp_s_0514r_0418, kmp_s_0968r_0418, kmp_s_1091r_0418, kmp_s_1434_br_0418, kms_s_0574r_0418, kms_s_0763_br_0418, kms_s_1005r_0418, kms_s_1096r_0418, carbon_dioxide_intracellular, coenzyme_A_intracellular, decanoate_intracellular, s_0763_b, laurate_intracellular, malonyl_CoA_intracellular, NADP_intracellular, NADPH_intracellular, s_1434_b)
  Vmax_r_0418*((1/kms_s_0574r_0418)^1*(1/kms_s_0763_br_0418)^3*(1/kms_s_1005r_0418)^1*(1/kms_s_1096r_0418)^2*(decanoate_intracellular^1*s_0763_b^3*malonyl_CoA_intracellular^1*NADPH_intracellular^2 - carbon_dioxide_intracellular^1*coenzyme_A_intracellular^1*laurate_intracellular^1*NADP_intracellular^2*s_1434_b^1/Keq_r_0418)/((1 + decanoate_intracellular/kms_s_0574r_0418)*(1 + s_0763_b/kms_s_0763_br_0418)*(1 + malonyl_CoA_intracellular/kms_s_1005r_0418)*(1 + NADPH_intracellular/kms_s_1096r_0418) + (1 + carbon_dioxide_intracellular/kmp_s_0470r_0418)*(1 + coenzyme_A_intracellular/kmp_s_0514r_0418)*(1 + laurate_intracellular/kmp_s_0968r_0418)*(1 + NADP_intracellular/kmp_s_1091r_0418)*(1 + s_1434_b/kmp_s_1434_br_0418) - 1))/intracellular;
end
function_106 is "Function for fatty acid synthase (n-C12:0)";

function function_107(Keq_r_0419, Vmax_r_0419, intracellular, kmp_s_0470r_0419, kmp_s_0514r_0419, kmp_s_1028r_0419, kmp_s_1091r_0419, kmp_s_1434_br_0419, kms_s_0763_br_0419, kms_s_0968r_0419, kms_s_1005r_0419, kms_s_1096r_0419, carbon_dioxide_intracellular, coenzyme_A_intracellular, s_0763_b, laurate_intracellular, malonyl_CoA_intracellular, myristate_intracellular, NADP_intracellular, NADPH_intracellular, s_1434_b)
  Vmax_r_0419*((1/kms_s_0763_br_0419)^3*(1/kms_s_0968r_0419)^1*(1/kms_s_1005r_0419)^1*(1/kms_s_1096r_0419)^2*(s_0763_b^3*laurate_intracellular^1*malonyl_CoA_intracellular^1*NADPH_intracellular^2 - carbon_dioxide_intracellular^1*coenzyme_A_intracellular^1*myristate_intracellular^1*NADP_intracellular^2*s_1434_b^1/Keq_r_0419)/((1 + s_0763_b/kms_s_0763_br_0419)*(1 + laurate_intracellular/kms_s_0968r_0419)*(1 + malonyl_CoA_intracellular/kms_s_1005r_0419)*(1 + NADPH_intracellular/kms_s_1096r_0419) + (1 + carbon_dioxide_intracellular/kmp_s_0470r_0419)*(1 + coenzyme_A_intracellular/kmp_s_0514r_0419)*(1 + myristate_intracellular/kmp_s_1028r_0419)*(1 + NADP_intracellular/kmp_s_1091r_0419)*(1 + s_1434_b/kmp_s_1434_br_0419) - 1))/intracellular;
end
function_107 is "Function for fatty acid synthase (n-C14:0)";

function function_108(Keq_r_0421, Vmax_r_0421, intracellular, kmp_s_0470r_0421, kmp_s_0514r_0421, kmp_s_1091r_0421, kmp_s_1170r_0421, kmp_s_1434_br_0421, kms_s_0763_br_0421, kms_s_1005r_0421, kms_s_1028r_0421, kms_s_1096r_0421, carbon_dioxide_intracellular, coenzyme_A_intracellular, s_0763_b, malonyl_CoA_intracellular, myristate_intracellular, NADP_intracellular, NADPH_intracellular, palmitate_intracellular, s_1434_b)
  Vmax_r_0421*((1/kms_s_0763_br_0421)^3*(1/kms_s_1005r_0421)^1*(1/kms_s_1028r_0421)^1*(1/kms_s_1096r_0421)^2*(s_0763_b^3*malonyl_CoA_intracellular^1*myristate_intracellular^1*NADPH_intracellular^2 - carbon_dioxide_intracellular^1*coenzyme_A_intracellular^1*NADP_intracellular^2*palmitate_intracellular^1*s_1434_b^1/Keq_r_0421)/((1 + s_0763_b/kms_s_0763_br_0421)*(1 + malonyl_CoA_intracellular/kms_s_1005r_0421)*(1 + myristate_intracellular/kms_s_1028r_0421)*(1 + NADPH_intracellular/kms_s_1096r_0421) + (1 + carbon_dioxide_intracellular/kmp_s_0470r_0421)*(1 + coenzyme_A_intracellular/kmp_s_0514r_0421)*(1 + NADP_intracellular/kmp_s_1091r_0421)*(1 + palmitate_intracellular/kmp_s_1170r_0421)*(1 + s_1434_b/kmp_s_1434_br_0421) - 1))/intracellular;
end
function_108 is "Function for fatty acid synthase (n-C16:0)";

function function_109(Keq_r_0423, Vmax_r_0423, intracellular, kmp_s_0470r_0423, kmp_s_0514r_0423, kmp_s_1091r_0423, kmp_s_1329r_0423, kmp_s_1434_br_0423, kms_s_0763_br_0423, kms_s_1005r_0423, kms_s_1096r_0423, kms_s_1170r_0423, carbon_dioxide_intracellular, coenzyme_A_intracellular, s_0763_b, malonyl_CoA_intracellular, NADP_intracellular, NADPH_intracellular, palmitate_intracellular, stearate_intracellular, s_1434_b)
  Vmax_r_0423*((1/kms_s_0763_br_0423)^3*(1/kms_s_1005r_0423)^1*(1/kms_s_1096r_0423)^2*(1/kms_s_1170r_0423)^1*(s_0763_b^3*malonyl_CoA_intracellular^1*NADPH_intracellular^2*palmitate_intracellular^1 - carbon_dioxide_intracellular^1*coenzyme_A_intracellular^1*NADP_intracellular^2*stearate_intracellular^1*s_1434_b^1/Keq_r_0423)/((1 + s_0763_b/kms_s_0763_br_0423)*(1 + malonyl_CoA_intracellular/kms_s_1005r_0423)*(1 + NADPH_intracellular/kms_s_1096r_0423)*(1 + palmitate_intracellular/kms_s_1170r_0423) + (1 + carbon_dioxide_intracellular/kmp_s_0470r_0423)*(1 + coenzyme_A_intracellular/kmp_s_0514r_0423)*(1 + NADP_intracellular/kmp_s_1091r_0423)*(1 + stearate_intracellular/kmp_s_1329r_0423)*(1 + s_1434_b/kmp_s_1434_br_0423) - 1))/intracellular;
end
function_109 is "Function for fatty acid synthase (n-C18:0)";

function function_110(Keq_r_0425, Vmax_r_0425, intracellular, kmp_s_0470r_0425, kmp_s_0514r_0425, kmp_s_0987r_0425, kmp_s_1091r_0425, kmp_s_1434_br_0425, kms_s_0763_br_0425, kms_s_1005r_0425, kms_s_1096r_0425, kms_s_1329r_0425, carbon_dioxide_intracellular, coenzyme_A_intracellular, s_0763_b, lignocerate_intracellular, malonyl_CoA_intracellular, NADP_intracellular, NADPH_intracellular, stearate_intracellular, s_1434_b)
  Vmax_r_0425*((1/kms_s_0763_br_0425)^9*(1/kms_s_1005r_0425)^3*(1/kms_s_1096r_0425)^6*(1/kms_s_1329r_0425)^1*(s_0763_b^9*malonyl_CoA_intracellular^3*NADPH_intracellular^6*stearate_intracellular^1 - carbon_dioxide_intracellular^3*coenzyme_A_intracellular^3*lignocerate_intracellular^1*NADP_intracellular^6*s_1434_b^3/Keq_r_0425)/((1 + s_0763_b/kms_s_0763_br_0425)*(1 + malonyl_CoA_intracellular/kms_s_1005r_0425)*(1 + NADPH_intracellular/kms_s_1096r_0425)*(1 + stearate_intracellular/kms_s_1329r_0425) + (1 + carbon_dioxide_intracellular/kmp_s_0470r_0425)*(1 + coenzyme_A_intracellular/kmp_s_0514r_0425)*(1 + lignocerate_intracellular/kmp_s_0987r_0425)*(1 + NADP_intracellular/kmp_s_1091r_0425)*(1 + s_1434_b/kmp_s_1434_br_0425) - 1))/intracellular;
end
function_110 is "Function for fatty acid synthase (n-C24:0), lumped reaction";

function function_111(Keq_r_0429, Vmax_r_0429, intracellular, kmp_s_0470r_0429, kmp_s_0514r_0429, kmp_s_0582r_0429, kmp_s_1091r_0429, kmp_s_1434_br_0429, kms_s_0763_br_0429, kms_s_1005r_0429, kms_s_1096r_0429, kms_s_1140r_0429, carbon_dioxide_intracellular, coenzyme_A_intracellular, decanoyl_CoA_intracellular, s_0763_b, malonyl_CoA_intracellular, NADP_intracellular, NADPH_intracellular, octanoyl_CoA_intracellular, s_1434_b)
  Vmax_r_0429*((1/kms_s_0763_br_0429)^3*(1/kms_s_1005r_0429)^1*(1/kms_s_1096r_0429)^2*(1/kms_s_1140r_0429)^1*(s_0763_b^3*malonyl_CoA_intracellular^1*NADPH_intracellular^2*octanoyl_CoA_intracellular^1 - carbon_dioxide_intracellular^1*coenzyme_A_intracellular^1*decanoyl_CoA_intracellular^1*NADP_intracellular^2*s_1434_b^1/Keq_r_0429)/((1 + s_0763_b/kms_s_0763_br_0429)*(1 + malonyl_CoA_intracellular/kms_s_1005r_0429)*(1 + NADPH_intracellular/kms_s_1096r_0429)*(1 + octanoyl_CoA_intracellular/kms_s_1140r_0429) + (1 + carbon_dioxide_intracellular/kmp_s_0470r_0429)*(1 + coenzyme_A_intracellular/kmp_s_0514r_0429)*(1 + decanoyl_CoA_intracellular/kmp_s_0582r_0429)*(1 + NADP_intracellular/kmp_s_1091r_0429)*(1 + s_1434_b/kmp_s_1434_br_0429) - 1))/intracellular;
end
function_111 is "Function for fatty acyl-CoA synthase (n-C10:0CoA)";

function function_137(Keq_r_0529, Vmax_r_0529, intracellular, kmp_s_0659r_0529, kmp_s_0735r_0529, kms_s_0657r_0529, kms_s_1315r_0529, FAD_intracellular, FADH2_intracellular, s_0735, s_1315)
  Vmax_r_0529*((1/kms_s_0657r_0529)^1*(1/kms_s_1315r_0529)^1*(FAD_intracellular^1*s_1315^1 - FADH2_intracellular^1*s_0735^1/Keq_r_0529)/((1 + FAD_intracellular/kms_s_0657r_0529)*(1 + s_1315/kms_s_1315r_0529) + (1 + FADH2_intracellular/kmp_s_0659r_0529)*(1 + s_0735/kmp_s_0735r_0529) - 1))/intracellular;
end
function_137 is "Function for glycerol-3-phosphate dehydrogenase (fad)";

function function_138(Keq_r_0530, Vmax_r_0530, intracellular, kmp_s_1082r_0530, kmp_s_1315r_0530, kms_s_0735r_0530, kms_s_0763_br_0530, kms_s_1087r_0530, s_0735, s_0763_b, NAD_intracellular, NADH_intracellular, s_1315)
  Vmax_r_0530*((1/kms_s_0735r_0530)^1*(1/kms_s_0763_br_0530)^1*(1/kms_s_1087r_0530)^1*(s_0735^1*s_0763_b^1*NADH_intracellular^1 - NAD_intracellular^1*s_1315^1/Keq_r_0530)/((1 + s_0735/kms_s_0735r_0530)*(1 + s_0763_b/kms_s_0763_br_0530)*(1 + NADH_intracellular/kms_s_1087r_0530) + (1 + NAD_intracellular/kmp_s_1082r_0530)*(1 + s_1315/kmp_s_1315r_0530) - 1))/intracellular;
end
function_138 is "Function for glycerol-3-phosphate dehydrogenase (NAD)";

function function_170(Keq_r_0638, Vmax_r_0638, intracellular, kmp_s_1257r_0638, kms_s_0850r_0638, s_0850, prenyl_diphosphate_intracellular)
  Vmax_r_0638*((1/kms_s_0850r_0638)^1*(s_0850^1 - prenyl_diphosphate_intracellular^1/Keq_r_0638)/(1 + s_0850/kms_s_0850r_0638 + 1 + prenyl_diphosphate_intracellular/kmp_s_1257r_0638 - 1))/intracellular;
end
function_170 is "Function for isopentenyl-diphosphate D-isomerase";

function function_171(Keq_r_0640, Vmax_r_0640, intracellular, kmp_s_0007r_0640, kmp_s_1091r_0640, kms_s_0042r_0640, kms_s_0763_br_0640, kms_s_1096r_0640, s_0007, s_0042, s_0763_b, NADP_intracellular, NADPH_intracellular)
  Vmax_r_0640*((1/kms_s_0042r_0640)^1*(1/kms_s_0763_br_0640)^1*(1/kms_s_1096r_0640)^1*(s_0042^1*s_0763_b^1*NADPH_intracellular^1 - s_0007^1*NADP_intracellular^1/Keq_r_0640)/((1 + s_0042/kms_s_0042r_0640)*(1 + s_0763_b/kms_s_0763_br_0640)*(1 + NADPH_intracellular/kms_s_1096r_0640) + (1 + s_0007/kmp_s_0007r_0640)*(1 + NADP_intracellular/kmp_s_1091r_0640) - 1))/intracellular;
end
function_171 is "Function for ketol-acid reductoisomerase (2-aceto-2-hydroxybutanoate)";

function function_172(Keq_r_0647, Vmax_r_0647, intracellular, kmp_s_0185r_0647, kmp_s_0863r_0647, kms_s_0899r_0647, kms_s_1277r_0647, _2_oxoglutarate_intracellular, L_alanine_intracellular, L_glutamate_intracellular, pyruvate_intracellular)
  Vmax_r_0647*((1/kms_s_0899r_0647)^1*(1/kms_s_1277r_0647)^1*(L_glutamate_intracellular^1*pyruvate_intracellular^1 - _2_oxoglutarate_intracellular^1*L_alanine_intracellular^1/Keq_r_0647)/((1 + L_glutamate_intracellular/kms_s_0899r_0647)*(1 + pyruvate_intracellular/kms_s_1277r_0647) + (1 + _2_oxoglutarate_intracellular/kmp_s_0185r_0647)*(1 + L_alanine_intracellular/kmp_s_0863r_0647) - 1))/intracellular;
end
function_172 is "Function for L-alanine transaminase";

function function_173(Keq_r_0650, Vmax_r_0650, intracellular, kmp_s_0434r_0650, kmp_s_0605r_0650, kmp_s_0867r_0650, kmp_s_1082r_0650, kms_s_0446r_0650, kms_s_0763_br_0650, kms_s_0861r_0650, kms_s_1087r_0650, AMP_intracellular, ATP_intracellular, diphosphate_intracellular, s_0763_b, L_2_aminoadipate_2_intracellular, L_allysine_intracellular, NAD_intracellular, NADH_intracellular)
  Vmax_r_0650*((1/kms_s_0446r_0650)^1*(1/kms_s_0763_br_0650)^1*(1/kms_s_0861r_0650)^1*(1/kms_s_1087r_0650)^1*(ATP_intracellular^1*s_0763_b^1*L_2_aminoadipate_2_intracellular^1*NADH_intracellular^1 - AMP_intracellular^1*diphosphate_intracellular^1*L_allysine_intracellular^1*NAD_intracellular^1/Keq_r_0650)/((1 + ATP_intracellular/kms_s_0446r_0650)*(1 + s_0763_b/kms_s_0763_br_0650)*(1 + L_2_aminoadipate_2_intracellular/kms_s_0861r_0650)*(1 + NADH_intracellular/kms_s_1087r_0650) + (1 + AMP_intracellular/kmp_s_0434r_0650)*(1 + diphosphate_intracellular/kmp_s_0605r_0650)*(1 + L_allysine_intracellular/kmp_s_0867r_0650)*(1 + NAD_intracellular/kmp_s_1082r_0650) - 1))/intracellular;
end
function_173 is "Function for L-aminoadipate-semialdehyde dehydrogenase (NADH)";

function function_174(Keq_r_0657, Vmax_r_0657, intracellular, kmp_s_0120r_0657, kmp_s_0763_br_0657, kmp_s_1434_br_0657, kms_s_0905r_0657, s_0120, s_0763_b, s_0905, s_1434_b)
  Vmax_r_0657*((1/kms_s_0905r_0657)^1*(s_0905^1 - s_0120^1*s_0763_b^1*s_1434_b^1/Keq_r_0657)/(1 + s_0905/kms_s_0905r_0657 + (1 + s_0120/kmp_s_0120r_0657)*(1 + s_0763_b/kmp_s_0763_br_0657)*(1 + s_1434_b/kmp_s_1434_br_0657) - 1))/intracellular;
end
function_174 is "Function for L-glutamate 5-semialdehyde dehydratase";

function function_201(Keq_r_0789, Vmax_r_0789, intracellular, kmp_s_0763_br_0789, kmp_s_0887r_0789, kmp_s_1207r_0789, kms_s_0469r_0789, kms_s_1151r_0789, s_0469, s_0763_b, L_citrulline_intracellular, ornithine_intracellular, phosphate_intracellular)
  Vmax_r_0789*((1/kms_s_0469r_0789)^1*(1/kms_s_1151r_0789)^1*(s_0469^1*ornithine_intracellular^1 - s_0763_b^1*L_citrulline_intracellular^1*phosphate_intracellular^1/Keq_r_0789)/((1 + s_0469/kms_s_0469r_0789)*(1 + ornithine_intracellular/kms_s_1151r_0789) + (1 + s_0763_b/kmp_s_0763_br_0789)*(1 + L_citrulline_intracellular/kmp_s_0887r_0789)*(1 + phosphate_intracellular/kmp_s_1207r_0789) - 1))/intracellular;
end
function_201 is "Function for ornithine carbamoyltransferase";

function function_202(Keq_r_0791, Vmax_r_0791, intracellular, kmp_s_1071r_0791, kmp_s_1151r_0791, kms_s_0899r_0791, kms_s_1051r_0791, L_glutamate_intracellular, s_1051, s_1071, ornithine_intracellular)
  Vmax_r_0791*((1/kms_s_0899r_0791)^1*(1/kms_s_1051r_0791)^1*(L_glutamate_intracellular^1*s_1051^1 - s_1071^1*ornithine_intracellular^1/Keq_r_0791)/((1 + L_glutamate_intracellular/kms_s_0899r_0791)*(1 + s_1051/kms_s_1051r_0791) + (1 + s_1071/kmp_s_1071r_0791)*(1 + ornithine_intracellular/kmp_s_1151r_0791) - 1))/intracellular;
end
function_202 is "Function for ornithine transacetylase";

function function_203(Keq_r_0793, Vmax_r_0793, intracellular, kmp_s_0605r_0793, kmp_s_1155r_0793, kms_s_0331r_0793, kms_s_1154r_0793, s_0331, diphosphate_intracellular, orotate_intracellular, s_1155)
  Vmax_r_0793*((1/kms_s_0331r_0793)^1*(1/kms_s_1154r_0793)^1*(s_0331^1*orotate_intracellular^1 - diphosphate_intracellular^1*s_1155^1/Keq_r_0793)/((1 + s_0331/kms_s_0331r_0793)*(1 + orotate_intracellular/kms_s_1154r_0793) + (1 + diphosphate_intracellular/kmp_s_0605r_0793)*(1 + s_1155/kmp_s_1155r_0793) - 1))/intracellular;
end
function_203 is "Function for orotate phosphoribosyltransferase";

function function_204(Keq_r_0794, Vmax_r_0794, intracellular, kmp_s_0470r_0794, kmp_s_1417r_0794, kms_s_0763_br_0794, kms_s_1155r_0794, carbon_dioxide_intracellular, s_0763_b, s_1155, UMP_intracellular)
  Vmax_r_0794*((1/kms_s_0763_br_0794)^1*(1/kms_s_1155r_0794)^1*(s_0763_b^1*s_1155^1 - carbon_dioxide_intracellular^1*UMP_intracellular^1/Keq_r_0794)/((1 + s_0763_b/kms_s_0763_br_0794)*(1 + s_1155/kms_s_1155r_0794) + (1 + carbon_dioxide_intracellular/kmp_s_0470r_0794)*(1 + UMP_intracellular/kmp_s_1417r_0794) - 1))/intracellular;
end
function_204 is "Function for orotidine-5'-phosphate decarboxylase";

function function_205(Keq_r_0825, Vmax_r_0825, intracellular, kmp_s_0185r_0825, kmp_s_0936r_0825, kms_s_0859r_0825, kms_s_0899r_0825, _2_oxoglutarate_intracellular, s_0859, L_glutamate_intracellular, L_phenylalanine_intracellular)
  Vmax_r_0825*((1/kms_s_0859r_0825)^1*(1/kms_s_0899r_0825)^1*(s_0859^1*L_glutamate_intracellular^1 - _2_oxoglutarate_intracellular^1*L_phenylalanine_intracellular^1/Keq_r_0825)/((1 + s_0859/kms_s_0859r_0825)*(1 + L_glutamate_intracellular/kms_s_0899r_0825) + (1 + _2_oxoglutarate_intracellular/kmp_s_0185r_0825)*(1 + L_phenylalanine_intracellular/kmp_s_0936r_0825) - 1))/intracellular;
end
function_205 is "Function for phenylalanine transaminase";

function function_206(Keq_r_0831, Vmax_r_0831, intracellular, kmp_s_0763_br_0831, kmp_s_1226r_0831, kmp_s_1290r_0831, kms_s_1233r_0831, kms_s_1293r_0831, s_0763_b, s_1226, s_1233, s_1290, s_1293)
  Vmax_r_0831*((1/kms_s_1233r_0831)^1*(1/kms_s_1293r_0831)^1*(s_1233^1*s_1293^1 - s_0763_b^1*s_1226^1*s_1290^1/Keq_r_0831)/((1 + s_1233/kms_s_1233r_0831)*(1 + s_1293/kms_s_1293r_0831) + (1 + s_0763_b/kmp_s_0763_br_0831)*(1 + s_1226/kmp_s_1226r_0831)*(1 + s_1290/kmp_s_1290r_0831) - 1))/intracellular;
end
function_206 is "Function for phosphatidylethanolamine methyltransferase";

function function_235(Keq_r_0938, Vmax_r_0938, intracellular, kmp_s_0366r_0938, kmp_s_0470r_0938, kms_s_0763_br_0938, kms_s_1277r_0938, acetaldehyde_intracellular, carbon_dioxide_intracellular, s_0763_b, pyruvate_intracellular)
  Vmax_r_0938*((1/kms_s_0763_br_0938)^1*(1/kms_s_1277r_0938)^1*(s_0763_b^1*pyruvate_intracellular^1 - acetaldehyde_intracellular^1*carbon_dioxide_intracellular^1/Keq_r_0938)/((1 + s_0763_b/kms_s_0763_br_0938)*(1 + pyruvate_intracellular/kms_s_1277r_0938) + (1 + acetaldehyde_intracellular/kmp_s_0366r_0938)*(1 + carbon_dioxide_intracellular/kmp_s_0470r_0938) - 1))/intracellular;
end
function_235 is "Function for pyruvate decarboxylase";

function function_236(Keq_r_0940, Vmax_r_0940, intracellular, kmp_s_0380r_0940, kmp_s_0470r_0940, kmp_s_1087r_0940, kms_s_0514r_0940, kms_s_1082r_0940, kms_s_1277r_0940, acetyl_CoA_intracellular, carbon_dioxide_intracellular, coenzyme_A_intracellular, NAD_intracellular, NADH_intracellular, pyruvate_intracellular)
  Vmax_r_0940*((1/kms_s_0514r_0940)^1*(1/kms_s_1082r_0940)^1*(1/kms_s_1277r_0940)^1*(coenzyme_A_intracellular^1*NAD_intracellular^1*pyruvate_intracellular^1 - acetyl_CoA_intracellular^1*carbon_dioxide_intracellular^1*NADH_intracellular^1/Keq_r_0940)/((1 + coenzyme_A_intracellular/kms_s_0514r_0940)*(1 + NAD_intracellular/kms_s_1082r_0940)*(1 + pyruvate_intracellular/kms_s_1277r_0940) + (1 + acetyl_CoA_intracellular/kmp_s_0380r_0940)*(1 + carbon_dioxide_intracellular/kmp_s_0470r_0940)*(1 + NADH_intracellular/kmp_s_1087r_0940) - 1))/intracellular;
end
function_236 is "Function for pyruvate dehydrogenase";

function Function_for_pyruvate_kinase(Keq_r_0941, Vmax_r_0941, intracellular, kmp_s_0446r_0941, kmp_s_1277r_0941, kms_s_0400r_0941, kms_s_0763_br_0941, kms_s_1243r_0941, ADP_intracellular, ATP_intracellular, s_0763_b, s_1243, pyruvate_intracellular)
  Vmax_r_0941*((1/kms_s_0400r_0941)^1*(1/kms_s_0763_br_0941)^1*(1/kms_s_1243r_0941)^1*(ADP_intracellular^1*s_0763_b^1*s_1243^1 - ATP_intracellular^1*pyruvate_intracellular^1/Keq_r_0941)/((1 + ADP_intracellular/kms_s_0400r_0941)*(1 + s_0763_b/kms_s_0763_br_0941)*(1 + s_1243/kms_s_1243r_0941) + (1 + ATP_intracellular/kmp_s_0446r_0941)*(1 + pyruvate_intracellular/kmp_s_1277r_0941) - 1))/intracellular;
end

function Function_for_riboflavin_synthase(Keq_r_0948, Vmax_r_0948, intracellular, kmp_s_0335r_0948, kmp_s_1207r_0948, kmp_s_1434_br_0948, kms_s_0163r_0948, kms_s_0320r_0948, s_0163, s_0320, s_0335, phosphate_intracellular, s_1434_b)
  Vmax_r_0948*((1/kms_s_0163r_0948)^1*(1/kms_s_0320r_0948)^1*(s_0163^1*s_0320^1 - s_0335^1*phosphate_intracellular^1*s_1434_b^2/Keq_r_0948)/((1 + s_0163/kms_s_0163r_0948)*(1 + s_0320/kms_s_0320r_0948) + (1 + s_0335/kmp_s_0335r_0948)*(1 + phosphate_intracellular/kmp_s_1207r_0948)*(1 + s_1434_b/kmp_s_1434_br_0948) - 1))/intracellular;
end

function function_239(Keq_r_0949, Vmax_r_0949, intracellular, kmp_s_0320r_0949, kmp_s_1283r_0949, kms_s_0335r_0949, s_0320, s_0335, riboflavin_intracellular)
  Vmax_r_0949*((1/kms_s_0335r_0949)^2*(s_0335^2 - s_0320^1*riboflavin_intracellular^1/Keq_r_0949)/(1 + s_0335/kms_s_0335r_0949 + (1 + s_0320/kmp_s_0320r_0949)*(1 + riboflavin_intracellular/kmp_s_1283r_0949) - 1))/intracellular;
end
function_239 is "Function for riboflavin synthase_2";

function function_240(Keq_r_0951, Vmax_r_0951, intracellular, kmp_s_0562r_0951, kmp_s_1434_br_0951, kmp_s_1517r_0951, kms_s_0400r_0951, kms_s_1521r_0951, ADP_intracellular, dADP_intracellular, s_1434_b, s_1517, s_1521)
  Vmax_r_0951*((1/kms_s_0400r_0951)^1*(1/kms_s_1521r_0951)^1*(ADP_intracellular^1*s_1521^1 - dADP_intracellular^1*s_1434_b^1*s_1517^1/Keq_r_0951)/((1 + ADP_intracellular/kms_s_0400r_0951)*(1 + s_1521/kms_s_1521r_0951) + (1 + dADP_intracellular/kmp_s_0562r_0951)*(1 + s_1434_b/kmp_s_1434_br_0951)*(1 + s_1517/kmp_s_1517r_0951) - 1))/intracellular;
end
function_240 is "Function for ribonucleoside-diphosphate reductase";

function function_241(Keq_r_0955, Vmax_r_0955, intracellular, kmp_s_0591r_0955, kmp_s_1434_br_0955, kmp_s_1517r_0955, kms_s_0706r_0955, kms_s_1521r_0955, dGDP_intracellular, GDP_intracellular, s_1434_b, s_1517, s_1521)
  Vmax_r_0955*((1/kms_s_0706r_0955)^1*(1/kms_s_1521r_0955)^1*(GDP_intracellular^1*s_1521^1 - dGDP_intracellular^1*s_1434_b^1*s_1517^1/Keq_r_0955)/((1 + GDP_intracellular/kms_s_0706r_0955)*(1 + s_1521/kms_s_1521r_0955) + (1 + dGDP_intracellular/kmp_s_0591r_0955)*(1 + s_1434_b/kmp_s_1434_br_0955)*(1 + s_1517/kmp_s_1517r_0955) - 1))/intracellular;
end
function_241 is "Function for ribonucleoside-diphosphate reductase (GDP)";

function function_242(Keq_r_0957, Vmax_r_0957, intracellular, kmp_s_0622r_0957, kmp_s_1434_br_0957, kmp_s_1517r_0957, kms_s_1411r_0957, kms_s_1521r_0957, dUDP_intracellular, UDP_intracellular, s_1434_b, s_1517, s_1521)
  Vmax_r_0957*((1/kms_s_1411r_0957)^1*(1/kms_s_1521r_0957)^1*(UDP_intracellular^1*s_1521^1 - dUDP_intracellular^1*s_1434_b^1*s_1517^1/Keq_r_0957)/((1 + UDP_intracellular/kms_s_1411r_0957)*(1 + s_1521/kms_s_1521r_0957) + (1 + dUDP_intracellular/kmp_s_0622r_0957)*(1 + s_1434_b/kmp_s_1434_br_0957)*(1 + s_1517/kmp_s_1517r_0957) - 1))/intracellular;
end
function_242 is "Function for ribonucleoside-diphosphate reductase (UDP)";

function function_243(Keq_r_0959, Vmax_r_0959, intracellular, kmp_s_0566r_0959, kmp_s_1434_br_0959, kmp_s_1517r_0959, kms_s_0446r_0959, kms_s_1521r_0959, ATP_intracellular, dATP_intracellular, s_1434_b, s_1517, s_1521)
  Vmax_r_0959*((1/kms_s_0446r_0959)^1*(1/kms_s_1521r_0959)^1*(ATP_intracellular^1*s_1521^1 - dATP_intracellular^1*s_1434_b^1*s_1517^1/Keq_r_0959)/((1 + ATP_intracellular/kms_s_0446r_0959)*(1 + s_1521/kms_s_1521r_0959) + (1 + dATP_intracellular/kmp_s_0566r_0959)*(1 + s_1434_b/kmp_s_1434_br_0959)*(1 + s_1517/kmp_s_1517r_0959) - 1))/intracellular;
end
function_243 is "Function for ribonucleoside-triphosphate reductase (ATP)";

function function_244(Keq_r_0963, Vmax_r_0963, intracellular, kmp_s_0427r_0963, kms_s_0557r_0963, s_0427, s_0557)
  Vmax_r_0963*((1/kms_s_0557r_0963)^1*(s_0557^1 - s_0427^1/Keq_r_0963)/(1 + s_0557/kms_s_0557r_0963 + 1 + s_0427/kmp_s_0427r_0963 - 1))/intracellular;
end
function_244 is "Function for ribose-5-phosphate isomerase";

function function_245(Keq_r_0965, Vmax_r_0965, intracellular, kmp_s_0557r_0965, kms_s_0561r_0965, s_0557, s_0561)
  Vmax_r_0965*((1/kms_s_0561r_0965)^1*(s_0561^1 - s_0557^1/Keq_r_0965)/(1 + s_0561/kms_s_0561r_0965 + 1 + s_0557/kmp_s_0557r_0965 - 1))/intracellular;
end
function_245 is "Function for ribulose 5-phosphate 3-epimerase";

function function_246(Keq_r_0967, Vmax_r_0967, intracellular, kmp_s_0669r_0967, kmp_s_0763_br_0967, kmp_s_1290r_0967, kms_s_1293r_0967, kms_s_1447r_0967, fecosterol_intracellular, s_0763_b, s_1290, s_1293, zymosterol_intracellular)
  Vmax_r_0967*((1/kms_s_1293r_0967)^1*(1/kms_s_1447r_0967)^1*(s_1293^1*zymosterol_intracellular^1 - fecosterol_intracellular^1*s_0763_b^1*s_1290^1/Keq_r_0967)/((1 + s_1293/kms_s_1293r_0967)*(1 + zymosterol_intracellular/kms_s_1447r_0967) + (1 + fecosterol_intracellular/kmp_s_0669r_0967)*(1 + s_0763_b/kmp_s_0763_br_0967)*(1 + s_1290/kmp_s_1290r_0967) - 1))/intracellular;
end
function_246 is "Function for S-adenosyl-methionine delta-24-sterol-c-methyltransferase";

function function_247(Keq_r_0969, Vmax_r_0969, intracellular, kmp_s_0185r_0969, kmp_s_0763_br_0969, kmp_s_0929r_0969, kmp_s_1087r_0969, kms_s_0942r_0969, kms_s_1082r_0969, kms_s_1434_br_0969, _2_oxoglutarate_intracellular, s_0763_b, L_lysine_intracellular, L_saccharopine_intracellular, NAD_intracellular, NADH_intracellular, s_1434_b)
  Vmax_r_0969*((1/kms_s_0942r_0969)^1*(1/kms_s_1082r_0969)^1*(1/kms_s_1434_br_0969)^1*(L_saccharopine_intracellular^1*NAD_intracellular^1*s_1434_b^1 - _2_oxoglutarate_intracellular^1*s_0763_b^1*L_lysine_intracellular^1*NADH_intracellular^1/Keq_r_0969)/((1 + L_saccharopine_intracellular/kms_s_0942r_0969)*(1 + NAD_intracellular/kms_s_1082r_0969)*(1 + s_1434_b/kms_s_1434_br_0969) + (1 + _2_oxoglutarate_intracellular/kmp_s_0185r_0969)*(1 + s_0763_b/kmp_s_0763_br_0969)*(1 + L_lysine_intracellular/kmp_s_0929r_0969)*(1 + NADH_intracellular/kmp_s_1087r_0969) - 1))/intracellular;
end
function_247 is "Function for saccharopine dehydrogenase (NAD, L-lysine forming)";

function function_248(Keq_r_0970, Vmax_r_0970, intracellular, kmp_s_0942r_0970, kmp_s_1091r_0970, kmp_s_1434_br_0970, kms_s_0763_br_0970, kms_s_0867r_0970, kms_s_0899r_0970, kms_s_1096r_0970, s_0763_b, L_allysine_intracellular, L_glutamate_intracellular, L_saccharopine_intracellular, NADP_intracellular, NADPH_intracellular, s_1434_b)
  Vmax_r_0970*((1/kms_s_0763_br_0970)^1*(1/kms_s_0867r_0970)^1*(1/kms_s_0899r_0970)^1*(1/kms_s_1096r_0970)^1*(s_0763_b^1*L_allysine_intracellular^1*L_glutamate_intracellular^1*NADPH_intracellular^1 - L_saccharopine_intracellular^1*NADP_intracellular^1*s_1434_b^1/Keq_r_0970)/((1 + s_0763_b/kms_s_0763_br_0970)*(1 + L_allysine_intracellular/kms_s_0867r_0970)*(1 + L_glutamate_intracellular/kms_s_0899r_0970)*(1 + NADPH_intracellular/kms_s_1096r_0970) + (1 + L_saccharopine_intracellular/kmp_s_0942r_0970)*(1 + NADP_intracellular/kmp_s_1091r_0970)*(1 + s_1434_b/kmp_s_1434_br_0970) - 1))/intracellular;
end
function_248 is "Function for saccharopine dehydrogenase (NADP, L-glutamate forming)";

function function_249(Keq_r_0972, Vmax_r_0972, intracellular, kmp_s_0218r_0972, kmp_s_0470r_0972, kmp_s_0514r_0972, kms_s_0943r_0972, kms_s_1187r_0972, s_0218, carbon_dioxide_intracellular, coenzyme_A_intracellular, L_serine_intracellular, palmitoyl_CoA_intracellular)
  Vmax_r_0972*((1/kms_s_0943r_0972)^1*(1/kms_s_1187r_0972)^1*(L_serine_intracellular^1*palmitoyl_CoA_intracellular^1 - s_0218^1*carbon_dioxide_intracellular^1*coenzyme_A_intracellular^1/Keq_r_0972)/((1 + L_serine_intracellular/kms_s_0943r_0972)*(1 + palmitoyl_CoA_intracellular/kms_s_1187r_0972) + (1 + s_0218/kmp_s_0218r_0972)*(1 + carbon_dioxide_intracellular/kmp_s_0470r_0972)*(1 + coenzyme_A_intracellular/kmp_s_0514r_0972) - 1))/intracellular;
end
function_249 is "Function for serine C-palmitoyltransferase";

function function_250(Keq_r_0976, Vmax_r_0976, intracellular, kmp_s_1091r_0976, kmp_s_1306r_0976, kms_s_0217r_0976, kms_s_0763_br_0976, kms_s_1096r_0976, _3_dehydroshikimate_intracellular, s_0763_b, NADP_intracellular, NADPH_intracellular, shikimate_intracellular)
  Vmax_r_0976*((1/kms_s_0217r_0976)^1*(1/kms_s_0763_br_0976)^1*(1/kms_s_1096r_0976)^1*(_3_dehydroshikimate_intracellular^1*s_0763_b^1*NADPH_intracellular^1 - NADP_intracellular^1*shikimate_intracellular^1/Keq_r_0976)/((1 + _3_dehydroshikimate_intracellular/kms_s_0217r_0976)*(1 + s_0763_b/kms_s_0763_br_0976)*(1 + NADPH_intracellular/kms_s_1096r_0976) + (1 + NADP_intracellular/kmp_s_1091r_0976)*(1 + shikimate_intracellular/kmp_s_1306r_0976) - 1))/intracellular;
end
function_250 is "Function for shikimate dehydrogenase";

function Function_for_shikimate_kinase(Keq_r_0977, Vmax_r_0977, intracellular, kmp_s_0267r_0977, kmp_s_0400r_0977, kmp_s_0763_br_0977, kms_s_0446r_0977, kms_s_1306r_0977, s_0267, ADP_intracellular, ATP_intracellular, s_0763_b, shikimate_intracellular)
  Vmax_r_0977*((1/kms_s_0446r_0977)^1*(1/kms_s_1306r_0977)^1*(ATP_intracellular^1*shikimate_intracellular^1 - s_0267^1*ADP_intracellular^1*s_0763_b^1/Keq_r_0977)/((1 + ATP_intracellular/kms_s_0446r_0977)*(1 + shikimate_intracellular/kms_s_1306r_0977) + (1 + s_0267/kmp_s_0267r_0977)*(1 + ADP_intracellular/kmp_s_0400r_0977)*(1 + s_0763_b/kmp_s_0763_br_0977) - 1))/intracellular;
end

function function_252(Keq_r_0991, Vmax_r_0991, intracellular, kmp_s_0040r_0991, kmp_s_1082r_0991, kmp_s_1434_br_0991, kms_s_0763_br_0991, kms_s_1087r_0991, kms_s_1160r_0991, kms_s_1327r_0991, s_0040, s_0763_b, NAD_intracellular, NADH_intracellular, oxygen_intracellular, squalene_intracellular, s_1434_b)
  Vmax_r_0991*((1/kms_s_0763_br_0991)^1*(1/kms_s_1087r_0991)^1*(1/kms_s_1160r_0991)^1*(1/kms_s_1327r_0991)^1*(s_0763_b^1*NADH_intracellular^1*oxygen_intracellular^1*squalene_intracellular^1 - s_0040^1*NAD_intracellular^1*s_1434_b^1/Keq_r_0991)/((1 + s_0763_b/kms_s_0763_br_0991)*(1 + NADH_intracellular/kms_s_1087r_0991)*(1 + oxygen_intracellular/kms_s_1160r_0991)*(1 + squalene_intracellular/kms_s_1327r_0991) + (1 + s_0040/kmp_s_0040r_0991)*(1 + NAD_intracellular/kmp_s_1082r_0991)*(1 + s_1434_b/kmp_s_1434_br_0991) - 1))/intracellular;
end
function_252 is "Function for squalene epoxidase (NAD)";

function function_131(Keq_r_0512, Vmax_r_0512, intracellular, kmp_s_0905r_0512, kmp_s_1082r_0512, kmp_s_1207r_0512, kms_s_0763_br_0512, kms_s_0894r_0512, kms_s_1087r_0512, s_0763_b, s_0894, s_0905, NAD_intracellular, NADH_intracellular, phosphate_intracellular)
  Vmax_r_0512*((1/kms_s_0763_br_0512)^1*(1/kms_s_0894r_0512)^1*(1/kms_s_1087r_0512)^1*(s_0763_b^1*s_0894^1*NADH_intracellular^1 - s_0905^1*NAD_intracellular^1*phosphate_intracellular^1/Keq_r_0512)/((1 + s_0763_b/kms_s_0763_br_0512)*(1 + s_0894/kms_s_0894r_0512)*(1 + NADH_intracellular/kms_s_1087r_0512) + (1 + s_0905/kmp_s_0905r_0512)*(1 + NAD_intracellular/kmp_s_1082r_0512)*(1 + phosphate_intracellular/kmp_s_1207r_0512) - 1))/intracellular;
end
function_131 is "Function for glutamate-5-semialdehyde dehydrogenase";

function function_132(Keq_r_0514, Vmax_r_0514, intracellular, kmp_s_0333r_0514, kmp_s_0605r_0514, kmp_s_0899r_0514, kms_s_0331r_0514, kms_s_0907r_0514, kms_s_1434_br_0514, s_0331, s_0333, diphosphate_intracellular, L_glutamate_intracellular, L_glutamine_intracellular, s_1434_b)
  Vmax_r_0514*((1/kms_s_0331r_0514)^1*(1/kms_s_0907r_0514)^1*(1/kms_s_1434_br_0514)^1*(s_0331^1*L_glutamine_intracellular^1*s_1434_b^1 - s_0333^1*diphosphate_intracellular^1*L_glutamate_intracellular^1/Keq_r_0514)/((1 + s_0331/kms_s_0331r_0514)*(1 + L_glutamine_intracellular/kms_s_0907r_0514)*(1 + s_1434_b/kms_s_1434_br_0514) + (1 + s_0333/kmp_s_0333r_0514)*(1 + diphosphate_intracellular/kmp_s_0605r_0514)*(1 + L_glutamate_intracellular/kmp_s_0899r_0514) - 1))/intracellular;
end
function_132 is "Function for glutamine phosphoribosyldiphosphate amidotransferase";

function function_133(Keq_r_0515, Vmax_r_0515, intracellular, kmp_s_0400r_0515, kmp_s_0763_br_0515, kmp_s_0907r_0515, kmp_s_1207r_0515, kms_s_0430r_0515, kms_s_0446r_0515, kms_s_0899r_0515, ADP_intracellular, ammonium_intracellular, ATP_intracellular, s_0763_b, L_glutamate_intracellular, L_glutamine_intracellular, phosphate_intracellular)
  Vmax_r_0515*((1/kms_s_0430r_0515)^1*(1/kms_s_0446r_0515)^1*(1/kms_s_0899r_0515)^1*(ammonium_intracellular^1*ATP_intracellular^1*L_glutamate_intracellular^1 - ADP_intracellular^1*s_0763_b^1*L_glutamine_intracellular^1*phosphate_intracellular^1/Keq_r_0515)/((1 + ammonium_intracellular/kms_s_0430r_0515)*(1 + ATP_intracellular/kms_s_0446r_0515)*(1 + L_glutamate_intracellular/kms_s_0899r_0515) + (1 + ADP_intracellular/kmp_s_0400r_0515)*(1 + s_0763_b/kmp_s_0763_br_0515)*(1 + L_glutamine_intracellular/kmp_s_0907r_0515)*(1 + phosphate_intracellular/kmp_s_1207r_0515) - 1))/intracellular;
end
function_133 is "Function for glutamine synthetase";

function function_134(Keq_r_0525, Vmax_r_0525, intracellular, kmp_s_0265r_0525, kmp_s_0763_br_0525, kmp_s_1087r_0525, kms_s_0731r_0525, kms_s_1082r_0525, kms_s_1207r_0525, s_0265, s_0731, s_0763_b, NAD_intracellular, NADH_intracellular, phosphate_intracellular)
  Vmax_r_0525*((1/kms_s_0731r_0525)^1*(1/kms_s_1082r_0525)^1*(1/kms_s_1207r_0525)^1*(s_0731^1*NAD_intracellular^1*phosphate_intracellular^1 - s_0265^1*s_0763_b^1*NADH_intracellular^1/Keq_r_0525)/((1 + s_0731/kms_s_0731r_0525)*(1 + NAD_intracellular/kms_s_1082r_0525)*(1 + phosphate_intracellular/kms_s_1207r_0525) + (1 + s_0265/kmp_s_0265r_0525)*(1 + s_0763_b/kmp_s_0763_br_0525)*(1 + NADH_intracellular/kmp_s_1087r_0525) - 1))/intracellular;
end
function_134 is "Function for glyceraldehyde-3-phosphate dehydrogenase";

function function_135(Keq_r_0526, Vmax_r_0526, intracellular, kmp_s_0734r_0526, kmp_s_0763_br_0526, kmp_s_1096r_0526, kms_s_0732r_0526, kms_s_1091r_0526, glycerol_intracellular, glycerone_intracellular, s_0763_b, NADP_intracellular, NADPH_intracellular)
  Vmax_r_0526*((1/kms_s_0732r_0526)^1*(1/kms_s_1091r_0526)^1*(glycerol_intracellular^1*NADP_intracellular^1 - glycerone_intracellular^1*s_0763_b^1*NADPH_intracellular^1/Keq_r_0526)/((1 + glycerol_intracellular/kms_s_0732r_0526)*(1 + NADP_intracellular/kms_s_1091r_0526) + (1 + glycerone_intracellular/kmp_s_0734r_0526)*(1 + s_0763_b/kmp_s_0763_br_0526)*(1 + NADPH_intracellular/kmp_s_1096r_0526) - 1))/intracellular;
end
function_135 is "Function for glycerol dehydrogenase (NADP-dependent)";

function function_136(Keq_r_0528, Vmax_r_0528, intracellular, kmp_s_0732r_0528, kmp_s_1207r_0528, kms_s_1315r_0528, kms_s_1434_br_0528, glycerol_intracellular, phosphate_intracellular, s_1315, s_1434_b)
  Vmax_r_0528*((1/kms_s_1315r_0528)^1*(1/kms_s_1434_br_0528)^1*(s_1315^1*s_1434_b^1 - glycerol_intracellular^1*phosphate_intracellular^1/Keq_r_0528)/((1 + s_1315/kms_s_1315r_0528)*(1 + s_1434_b/kms_s_1434_br_0528) + (1 + glycerol_intracellular/kmp_s_0732r_0528)*(1 + phosphate_intracellular/kmp_s_1207r_0528) - 1))/intracellular;
end
function_136 is "Function for glycerol-3-phosphatase";

function function_139(Keq_r_0534, Vmax_r_0534, intracellular, kmp_s_0083r_0534, kmp_s_0514r_0534, kmp_s_0763_br_0534, kms_s_0386r_0534, kms_s_1315r_0534, s_0083, acyl_CoA_intracellular, coenzyme_A_intracellular, s_0763_b, s_1315)
  Vmax_r_0534*((1/kms_s_0386r_0534)^1*(1/kms_s_1315r_0534)^1*(acyl_CoA_intracellular^1*s_1315^1 - s_0083^1*coenzyme_A_intracellular^1*s_0763_b^2/Keq_r_0534)/((1 + acyl_CoA_intracellular/kms_s_0386r_0534)*(1 + s_1315/kms_s_1315r_0534) + (1 + s_0083/kmp_s_0083r_0534)*(1 + coenzyme_A_intracellular/kmp_s_0514r_0534)*(1 + s_0763_b/kmp_s_0763_br_0534) - 1))/intracellular;
end
function_139 is "Function for glycerol-3-phosphate/dihydroxyacetone phosphate acyltransferase";

function function_140(Keq_r_0538, Vmax_r_0538, intracellular, kmp_s_0307r_0538, kmp_s_0430r_0538, kmp_s_0470r_0538, kmp_s_1087r_0538, kms_s_0309r_0538, kms_s_0740r_0538, kms_s_1082r_0538, s_0307, s_0309, ammonium_intracellular, carbon_dioxide_intracellular, glycine_intracellular, NAD_intracellular, NADH_intracellular)
  Vmax_r_0538*((1/kms_s_0309r_0538)^1*(1/kms_s_0740r_0538)^1*(1/kms_s_1082r_0538)^1*(s_0309^1*glycine_intracellular^1*NAD_intracellular^1 - s_0307^1*ammonium_intracellular^1*carbon_dioxide_intracellular^1*NADH_intracellular^1/Keq_r_0538)/((1 + s_0309/kms_s_0309r_0538)*(1 + glycine_intracellular/kms_s_0740r_0538)*(1 + NAD_intracellular/kms_s_1082r_0538) + (1 + s_0307/kmp_s_0307r_0538)*(1 + ammonium_intracellular/kmp_s_0430r_0538)*(1 + carbon_dioxide_intracellular/kmp_s_0470r_0538)*(1 + NADH_intracellular/kmp_s_1087r_0538) - 1))/intracellular;
end
function_140 is "Function for glycine cleavage system";

function function_141(Keq_r_0539, Vmax_r_0539, intracellular, kmp_s_0309r_0539, kmp_s_0943r_0539, kms_s_0307r_0539, kms_s_0740r_0539, kms_s_1434_br_0539, s_0307, s_0309, glycine_intracellular, L_serine_intracellular, s_1434_b)
  Vmax_r_0539*((1/kms_s_0307r_0539)^1*(1/kms_s_0740r_0539)^1*(1/kms_s_1434_br_0539)^1*(s_0307^1*glycine_intracellular^1*s_1434_b^1 - s_0309^1*L_serine_intracellular^1/Keq_r_0539)/((1 + s_0307/kms_s_0307r_0539)*(1 + glycine_intracellular/kms_s_0740r_0539)*(1 + s_1434_b/kms_s_1434_br_0539) + (1 + s_0309/kmp_s_0309r_0539)*(1 + L_serine_intracellular/kmp_s_0943r_0539) - 1))/intracellular;
end
function_141 is "Function for glycine hydroxymethyltransferase";

function function_142(Keq_r_0547, Vmax_r_0547, intracellular, kmp_s_0438r_0547, kmp_s_0763_br_0547, kmp_s_1411r_0547, kms_s_1415r_0547, kms_s_1434_br_0547, amylose_intracellular, s_0763_b, UDP_intracellular, UDP_D_glucose_intracellular, s_1434_b)
  Vmax_r_0547*((1/kms_s_1415r_0547)^1*(1/kms_s_1434_br_0547)^1*(UDP_D_glucose_intracellular^1*s_1434_b^1 - amylose_intracellular^1*s_0763_b^1*UDP_intracellular^1/Keq_r_0547)/((1 + UDP_D_glucose_intracellular/kms_s_1415r_0547)*(1 + s_1434_b/kms_s_1434_br_0547) + (1 + amylose_intracellular/kmp_s_0438r_0547)*(1 + s_0763_b/kmp_s_0763_br_0547)*(1 + UDP_intracellular/kmp_s_1411r_0547) - 1))/intracellular;
end
function_142 is "Function for glycogen (starch) synthase";

function Function_for_GMP_synthase(Keq_r_0551, Vmax_r_0551, intracellular, kmp_s_0434r_0551, kmp_s_0605r_0551, kmp_s_0752r_0551, kmp_s_0763_br_0551, kmp_s_0899r_0551, kms_s_0306r_0551, kms_s_0446r_0551, kms_s_0907r_0551, kms_s_1434_br_0551, _5_xanthylic_acid_intracellular, AMP_intracellular, ATP_intracellular, diphosphate_intracellular, GMP_intracellular, s_0763_b, L_glutamate_intracellular, L_glutamine_intracellular, s_1434_b)
  Vmax_r_0551*((1/kms_s_0306r_0551)^1*(1/kms_s_0446r_0551)^1*(1/kms_s_0907r_0551)^1*(1/kms_s_1434_br_0551)^1*(_5_xanthylic_acid_intracellular^1*ATP_intracellular^1*L_glutamine_intracellular^1*s_1434_b^1 - AMP_intracellular^1*diphosphate_intracellular^1*GMP_intracellular^1*s_0763_b^2*L_glutamate_intracellular^1/Keq_r_0551)/((1 + _5_xanthylic_acid_intracellular/kms_s_0306r_0551)*(1 + ATP_intracellular/kms_s_0446r_0551)*(1 + L_glutamine_intracellular/kms_s_0907r_0551)*(1 + s_1434_b/kms_s_1434_br_0551) + (1 + AMP_intracellular/kmp_s_0434r_0551)*(1 + diphosphate_intracellular/kmp_s_0605r_0551)*(1 + GMP_intracellular/kmp_s_0752r_0551)*(1 + s_0763_b/kmp_s_0763_br_0551)*(1 + L_glutamate_intracellular/kmp_s_0899r_0551) - 1))/intracellular;
end

function function_144(Keq_r_0562, Vmax_r_0562, intracellular, kmp_s_0145r_0562, kmp_s_0605r_0562, kmp_s_0689r_0562, kmp_s_0763_br_0562, kms_s_0755r_0562, kms_s_1434_br_0562, s_0145, diphosphate_intracellular, formate_intracellular, GTP_intracellular, s_0763_b, s_1434_b)
  Vmax_r_0562*((1/kms_s_0755r_0562)^1*(1/kms_s_1434_br_0562)^3*(GTP_intracellular^1*s_1434_b^3 - s_0145^1*diphosphate_intracellular^1*formate_intracellular^1*s_0763_b^2/Keq_r_0562)/((1 + GTP_intracellular/kms_s_0755r_0562)*(1 + s_1434_b/kms_s_1434_br_0562) + (1 + s_0145/kmp_s_0145r_0562)*(1 + diphosphate_intracellular/kmp_s_0605r_0562)*(1 + formate_intracellular/kmp_s_0689r_0562)*(1 + s_0763_b/kmp_s_0763_br_0562) - 1))/intracellular;
end
function_144 is "Function for GTP cyclohydrolase II";

function function_145(Keq_r_0567, Vmax_r_0567, intracellular, kmp_s_0400r_0567, kmp_s_0706r_0567, kms_s_0446r_0567, kms_s_0752r_0567, ADP_intracellular, ATP_intracellular, GDP_intracellular, GMP_intracellular)
  Vmax_r_0567*((1/kms_s_0446r_0567)^1*(1/kms_s_0752r_0567)^1*(ATP_intracellular^1*GMP_intracellular^1 - ADP_intracellular^1*GDP_intracellular^1/Keq_r_0567)/((1 + ATP_intracellular/kms_s_0446r_0567)*(1 + GMP_intracellular/kms_s_0752r_0567) + (1 + ADP_intracellular/kmp_s_0400r_0567)*(1 + GDP_intracellular/kmp_s_0706r_0567) - 1))/intracellular;
end
function_145 is "Function for guanylate kinase (GMP:ATP)";

function function_146(Keq_r_0568, Vmax_r_0568, intracellular, kmp_s_0562r_0568, kmp_s_0706r_0568, kms_s_0566r_0568, kms_s_0752r_0568, dADP_intracellular, dATP_intracellular, GDP_intracellular, GMP_intracellular)
  Vmax_r_0568*((1/kms_s_0566r_0568)^1*(1/kms_s_0752r_0568)^1*(dATP_intracellular^1*GMP_intracellular^1 - dADP_intracellular^1*GDP_intracellular^1/Keq_r_0568)/((1 + dATP_intracellular/kms_s_0566r_0568)*(1 + GMP_intracellular/kms_s_0752r_0568) + (1 + dADP_intracellular/kmp_s_0562r_0568)*(1 + GDP_intracellular/kmp_s_0706r_0568) - 1))/intracellular;
end
function_146 is "Function for guanylate kinase (GMP:dATP)";

function function_147(Keq_r_0573, Vmax_r_0573, intracellular, kmp_s_0400r_0573, kmp_s_0410r_0573, kmp_s_0763_br_0573, kms_s_0446r_0573, kms_s_0545r_0573, ADP_intracellular, s_0410, ATP_intracellular, D_glucose_intracellular, s_0763_b)
  Vmax_r_0573*((1/kms_s_0446r_0573)^1*(1/kms_s_0545r_0573)^1*(ATP_intracellular^1*D_glucose_intracellular^1 - ADP_intracellular^1*s_0410^1*s_0763_b^1/Keq_r_0573)/((1 + ATP_intracellular/kms_s_0446r_0573)*(1 + D_glucose_intracellular/kms_s_0545r_0573) + (1 + ADP_intracellular/kmp_s_0400r_0573)*(1 + s_0410/kmp_s_0410r_0573)*(1 + s_0763_b/kmp_s_0763_br_0573) - 1))/intracellular;
end
function_147 is "Function for hexokinase (D-glucose:ATP)";

function function_148(Keq_r_0575, Vmax_r_0575, intracellular, kmp_s_0763_br_0575, kmp_s_0911r_0575, kmp_s_1087r_0575, kms_s_0915r_0575, kms_s_1082r_0575, kms_s_1434_br_0575, s_0763_b, L_histidine_intracellular, L_histidinol_intracellular, NAD_intracellular, NADH_intracellular, s_1434_b)
  Vmax_r_0575*((1/kms_s_0915r_0575)^1*(1/kms_s_1082r_0575)^2*(1/kms_s_1434_br_0575)^1*(L_histidinol_intracellular^1*NAD_intracellular^2*s_1434_b^1 - s_0763_b^3*L_histidine_intracellular^1*NADH_intracellular^2/Keq_r_0575)/((1 + L_histidinol_intracellular/kms_s_0915r_0575)*(1 + NAD_intracellular/kms_s_1082r_0575)*(1 + s_1434_b/kms_s_1434_br_0575) + (1 + s_0763_b/kmp_s_0763_br_0575)*(1 + L_histidine_intracellular/kmp_s_0911r_0575)*(1 + NADH_intracellular/kmp_s_1087r_0575) - 1))/intracellular;
end
function_148 is "Function for histidinol dehydrogenase";

function function_149(Keq_r_0576, Vmax_r_0576, intracellular, kmp_s_0915r_0576, kmp_s_1207r_0576, kms_s_0916r_0576, kms_s_1434_br_0576, L_histidinol_intracellular, s_0916, phosphate_intracellular, s_1434_b)
  Vmax_r_0576*((1/kms_s_0916r_0576)^1*(1/kms_s_1434_br_0576)^1*(s_0916^1*s_1434_b^1 - L_histidinol_intracellular^1*phosphate_intracellular^1/Keq_r_0576)/((1 + s_0916/kms_s_0916r_0576)*(1 + s_1434_b/kms_s_1434_br_0576) + (1 + L_histidinol_intracellular/kmp_s_0915r_0576)*(1 + phosphate_intracellular/kmp_s_1207r_0576) - 1))/intracellular;
end
function_149 is "Function for histidinol-phosphatase";

function function_150(Keq_r_0577, Vmax_r_0577, intracellular, kmp_s_0185r_0577, kmp_s_0916r_0577, kms_s_0212r_0577, kms_s_0899r_0577, _2_oxoglutarate_intracellular, s_0212, L_glutamate_intracellular, s_0916)
  Vmax_r_0577*((1/kms_s_0212r_0577)^1*(1/kms_s_0899r_0577)^1*(s_0212^1*L_glutamate_intracellular^1 - _2_oxoglutarate_intracellular^1*s_0916^1/Keq_r_0577)/((1 + s_0212/kms_s_0212r_0577)*(1 + L_glutamate_intracellular/kms_s_0899r_0577) + (1 + _2_oxoglutarate_intracellular/kmp_s_0185r_0577)*(1 + s_0916/kmp_s_0916r_0577) - 1))/intracellular;
end
function_150 is "Function for histidinol-phosphate transaminase";

function function_151(Keq_r_0581, Vmax_r_0581, intracellular, kmp_s_0800r_0581, kms_s_0468r_0581, kms_s_1434_br_0581, s_0468, homoisocitrate_3_intracellular, s_1434_b)
  Vmax_r_0581*((1/kms_s_0468r_0581)^1*(1/kms_s_1434_br_0581)^1*(s_0468^1*s_1434_b^1 - homoisocitrate_3_intracellular^1/Keq_r_0581)/((1 + s_0468/kms_s_0468r_0581)*(1 + s_1434_b/kms_s_1434_br_0581) + 1 + homoisocitrate_3_intracellular/kmp_s_0800r_0581 - 1))/intracellular;
end
function_151 is "Function for homoacontinate hydratase";

function function_152(Keq_r_0582, Vmax_r_0582, intracellular, kmp_s_0514r_0582, kmp_s_0763_br_0582, kmp_s_0798r_0582, kms_s_0185r_0582, kms_s_0380r_0582, kms_s_1434_br_0582, _2_oxoglutarate_intracellular, acetyl_CoA_intracellular, coenzyme_A_intracellular, s_0763_b, homocitrate_3_intracellular, s_1434_b)
  Vmax_r_0582*((1/kms_s_0185r_0582)^1*(1/kms_s_0380r_0582)^1*(1/kms_s_1434_br_0582)^1*(_2_oxoglutarate_intracellular^1*acetyl_CoA_intracellular^1*s_1434_b^1 - coenzyme_A_intracellular^1*s_0763_b^1*homocitrate_3_intracellular^1/Keq_r_0582)/((1 + _2_oxoglutarate_intracellular/kms_s_0185r_0582)*(1 + acetyl_CoA_intracellular/kms_s_0380r_0582)*(1 + s_1434_b/kms_s_1434_br_0582) + (1 + coenzyme_A_intracellular/kmp_s_0514r_0582)*(1 + s_0763_b/kmp_s_0763_br_0582)*(1 + homocitrate_3_intracellular/kmp_s_0798r_0582) - 1))/intracellular;
end
function_152 is "Function for homocitrate synthase";

function function_153(Keq_r_0585, Vmax_r_0585, intracellular, kmp_s_0180r_0585, kmp_s_0763_br_0585, kmp_s_1087r_0585, kms_s_0800r_0585, kms_s_1082r_0585, s_0180, s_0763_b, homoisocitrate_3_intracellular, NAD_intracellular, NADH_intracellular)
  Vmax_r_0585*((1/kms_s_0800r_0585)^1*(1/kms_s_1082r_0585)^1*(homoisocitrate_3_intracellular^1*NAD_intracellular^1 - s_0180^1*s_0763_b^1*NADH_intracellular^1/Keq_r_0585)/((1 + homoisocitrate_3_intracellular/kms_s_0800r_0585)*(1 + NAD_intracellular/kms_s_1082r_0585) + (1 + s_0180/kmp_s_0180r_0585)*(1 + s_0763_b/kmp_s_0763_br_0585)*(1 + NADH_intracellular/kmp_s_1087r_0585) - 1))/intracellular;
end
function_153 is "Function for homoisocitrate dehydrogenase";

function function_154(Keq_r_0586, Vmax_r_0586, intracellular, kmp_s_0919r_0586, kmp_s_1082r_0586, kms_s_0763_br_0586, kms_s_0886r_0586, kms_s_1087r_0586, s_0763_b, s_0886, L_homoserine_intracellular, NAD_intracellular, NADH_intracellular)
  Vmax_r_0586*((1/kms_s_0763_br_0586)^1*(1/kms_s_0886r_0586)^1*(1/kms_s_1087r_0586)^1*(s_0763_b^1*s_0886^1*NADH_intracellular^1 - L_homoserine_intracellular^1*NAD_intracellular^1/Keq_r_0586)/((1 + s_0763_b/kms_s_0763_br_0586)*(1 + s_0886/kms_s_0886r_0586)*(1 + NADH_intracellular/kms_s_1087r_0586) + (1 + L_homoserine_intracellular/kmp_s_0919r_0586)*(1 + NAD_intracellular/kmp_s_1082r_0586) - 1))/intracellular;
end
function_154 is "Function for homoserine dehydrogenase (NADH)";

function Function_for_homoserine_kinase(Keq_r_0588, Vmax_r_0588, intracellular, kmp_s_0400r_0588, kmp_s_0763_br_0588, kmp_s_1122r_0588, kms_s_0446r_0588, kms_s_0919r_0588, ADP_intracellular, ATP_intracellular, s_0763_b, L_homoserine_intracellular, s_1122)
  Vmax_r_0588*((1/kms_s_0446r_0588)^1*(1/kms_s_0919r_0588)^1*(ATP_intracellular^1*L_homoserine_intracellular^1 - ADP_intracellular^1*s_0763_b^1*s_1122^1/Keq_r_0588)/((1 + ATP_intracellular/kms_s_0446r_0588)*(1 + L_homoserine_intracellular/kms_s_0919r_0588) + (1 + ADP_intracellular/kmp_s_0400r_0588)*(1 + s_0763_b/kmp_s_0763_br_0588)*(1 + s_1122/kmp_s_1122r_0588) - 1))/intracellular;
end

function function_156(Keq_r_0589, Vmax_r_0589, intracellular, kmp_s_0514r_0589, kmp_s_1117r_0589, kms_s_0380r_0589, kms_s_0919r_0589, acetyl_CoA_intracellular, coenzyme_A_intracellular, L_homoserine_intracellular, s_1117)
  Vmax_r_0589*((1/kms_s_0380r_0589)^1*(1/kms_s_0919r_0589)^1*(acetyl_CoA_intracellular^1*L_homoserine_intracellular^1 - coenzyme_A_intracellular^1*s_1117^1/Keq_r_0589)/((1 + acetyl_CoA_intracellular/kms_s_0380r_0589)*(1 + L_homoserine_intracellular/kms_s_0919r_0589) + (1 + coenzyme_A_intracellular/kmp_s_0514r_0589)*(1 + s_1117/kmp_s_1117r_0589) - 1))/intracellular;
end
function_156 is "Function for homoserine O-trans-acetylase";

function function_157(Keq_r_0598, Vmax_r_0598, intracellular, kmp_s_0031r_0598, kmp_s_0514r_0598, kmp_s_1091r_0598, kms_s_0225r_0598, kms_s_0763_br_0598, kms_s_1096r_0598, R_mevalonate_intracellular, s_0225, coenzyme_A_intracellular, s_0763_b, NADP_intracellular, NADPH_intracellular)
  Vmax_r_0598*((1/kms_s_0225r_0598)^1*(1/kms_s_0763_br_0598)^2*(1/kms_s_1096r_0598)^2*(s_0225^1*s_0763_b^2*NADPH_intracellular^2 - R_mevalonate_intracellular^1*coenzyme_A_intracellular^1*NADP_intracellular^2/Keq_r_0598)/((1 + s_0225/kms_s_0225r_0598)*(1 + s_0763_b/kms_s_0763_br_0598)*(1 + NADPH_intracellular/kms_s_1096r_0598) + (1 + R_mevalonate_intracellular/kmp_s_0031r_0598)*(1 + coenzyme_A_intracellular/kmp_s_0514r_0598)*(1 + NADP_intracellular/kmp_s_1091r_0598) - 1))/intracellular;
end
function_157 is "Function for hydroxymethylglutaryl CoA reductase";

function function_158(Keq_r_0599, Vmax_r_0599, intracellular, kmp_s_0225r_0599, kmp_s_0514r_0599, kmp_s_0763_br_0599, kms_s_0374r_0599, kms_s_0380r_0599, kms_s_1434_br_0599, s_0225, acetoacetyl_CoA_intracellular, acetyl_CoA_intracellular, coenzyme_A_intracellular, s_0763_b, s_1434_b)
  Vmax_r_0599*((1/kms_s_0374r_0599)^1*(1/kms_s_0380r_0599)^1*(1/kms_s_1434_br_0599)^1*(acetoacetyl_CoA_intracellular^1*acetyl_CoA_intracellular^1*s_1434_b^1 - s_0225^1*coenzyme_A_intracellular^1*s_0763_b^1/Keq_r_0599)/((1 + acetoacetyl_CoA_intracellular/kms_s_0374r_0599)*(1 + acetyl_CoA_intracellular/kms_s_0380r_0599)*(1 + s_1434_b/kms_s_1434_br_0599) + (1 + s_0225/kmp_s_0225r_0599)*(1 + coenzyme_A_intracellular/kmp_s_0514r_0599)*(1 + s_0763_b/kmp_s_0763_br_0599) - 1))/intracellular;
end
function_158 is "Function for hydroxymethylglutaryl CoA synthase";

function function_159(Keq_r_0604, Vmax_r_0604, intracellular, kmp_s_0317r_0604, kmp_s_0532r_0604, kmp_s_0763_br_0604, kmp_s_0899r_0604, kms_s_0315r_0604, kms_s_0907r_0604, s_0315, s_0317, s_0532, s_0763_b, L_glutamate_intracellular, L_glutamine_intracellular)
  Vmax_r_0604*((1/kms_s_0315r_0604)^1*(1/kms_s_0907r_0604)^1*(s_0315^1*L_glutamine_intracellular^1 - s_0317^1*s_0532^1*s_0763_b^1*L_glutamate_intracellular^1/Keq_r_0604)/((1 + s_0315/kms_s_0315r_0604)*(1 + L_glutamine_intracellular/kms_s_0907r_0604) + (1 + s_0317/kmp_s_0317r_0604)*(1 + s_0532/kmp_s_0532r_0604)*(1 + s_0763_b/kmp_s_0763_br_0604)*(1 + L_glutamate_intracellular/kmp_s_0899r_0604) - 1))/intracellular;
end
function_159 is "Function for Imidazole-glycerol-3-phosphate synthase";

function function_160(Keq_r_0605, Vmax_r_0605, intracellular, kmp_s_0212r_0605, kmp_s_1434_br_0605, kms_s_0532r_0605, s_0212, s_0532, s_1434_b)
  Vmax_r_0605*((1/kms_s_0532r_0605)^1*(s_0532^1 - s_0212^1*s_1434_b^1/Keq_r_0605)/(1 + s_0532/kms_s_0532r_0605 + (1 + s_0212/kmp_s_0212r_0605)*(1 + s_1434_b/kmp_s_1434_br_0605) - 1))/intracellular;
end
function_160 is "Function for imidazoleglycerol-phosphate dehydratase";

function Function_for_IMP_cyclohydrolase(Keq_r_0606, Vmax_r_0606, intracellular, kmp_s_0816r_0606, kmp_s_1434_br_0606, kms_s_0325r_0606, s_0325, IMP_intracellular, s_1434_b)
  Vmax_r_0606*((1/kms_s_0325r_0606)^1*(s_0325^1 - IMP_intracellular^1*s_1434_b^1/Keq_r_0606)/(1 + s_0325/kms_s_0325r_0606 + (1 + IMP_intracellular/kmp_s_0816r_0606)*(1 + s_1434_b/kmp_s_1434_br_0606) - 1))/intracellular;
end

function Function_for_IMP_dehydrogenase(Keq_r_0607, Vmax_r_0607, intracellular, kmp_s_0306r_0607, kmp_s_0763_br_0607, kmp_s_1087r_0607, kms_s_0816r_0607, kms_s_1082r_0607, kms_s_1434_br_0607, _5_xanthylic_acid_intracellular, s_0763_b, IMP_intracellular, NAD_intracellular, NADH_intracellular, s_1434_b)
  Vmax_r_0607*((1/kms_s_0816r_0607)^1*(1/kms_s_1082r_0607)^1*(1/kms_s_1434_br_0607)^1*(IMP_intracellular^1*NAD_intracellular^1*s_1434_b^1 - _5_xanthylic_acid_intracellular^1*s_0763_b^1*NADH_intracellular^1/Keq_r_0607)/((1 + IMP_intracellular/kms_s_0816r_0607)*(1 + NAD_intracellular/kms_s_1082r_0607)*(1 + s_1434_b/kms_s_1434_br_0607) + (1 + _5_xanthylic_acid_intracellular/kmp_s_0306r_0607)*(1 + s_0763_b/kmp_s_0763_br_0607)*(1 + NADH_intracellular/kmp_s_1087r_0607) - 1))/intracellular;
end

function function_163(Keq_r_0608, Vmax_r_0608, intracellular, kmp_s_0088r_0608, kmp_s_0470r_0608, kmp_s_1434_br_0608, kms_s_0078r_0608, kms_s_0763_br_0608, s_0078, s_0088, carbon_dioxide_intracellular, s_0763_b, s_1434_b)
  Vmax_r_0608*((1/kms_s_0078r_0608)^1*(1/kms_s_0763_br_0608)^1*(s_0078^1*s_0763_b^1 - s_0088^1*carbon_dioxide_intracellular^1*s_1434_b^1/Keq_r_0608)/((1 + s_0078/kms_s_0078r_0608)*(1 + s_0763_b/kms_s_0763_br_0608) + (1 + s_0088/kmp_s_0088r_0608)*(1 + carbon_dioxide_intracellular/kmp_s_0470r_0608)*(1 + s_1434_b/kmp_s_1434_br_0608) - 1))/intracellular;
end
function_163 is "Function for indole-3-glycerol-phosphate synthase";

function function_164(Keq_r_0610, Vmax_r_0610, intracellular, kmp_s_0763_br_0610, kmp_s_1207r_0610, kms_s_0605r_0610, kms_s_1434_br_0610, diphosphate_intracellular, s_0763_b, phosphate_intracellular, s_1434_b)
  Vmax_r_0610*((1/kms_s_0605r_0610)^1*(1/kms_s_1434_br_0610)^1*(diphosphate_intracellular^1*s_1434_b^1 - s_0763_b^1*phosphate_intracellular^2/Keq_r_0610)/((1 + diphosphate_intracellular/kms_s_0605r_0610)*(1 + s_1434_b/kms_s_1434_br_0610) + (1 + s_0763_b/kmp_s_0763_br_0610)*(1 + phosphate_intracellular/kmp_s_1207r_0610) - 1))/intracellular;
end
function_164 is "Function for inorganic diphosphatase";

function function_165(Keq_r_0618, Vmax_r_0618, intracellular, kmp_s_0824r_0618, kms_s_0128r_0618, kms_s_1013r_0618, s_0128, s_0824, s_1013)
  Vmax_r_0618*((1/kms_s_0128r_0618)^1*(1/kms_s_1013r_0618)^1*(s_0128^1*s_1013^1 - s_0824^1/Keq_r_0618)/((1 + s_0128/kms_s_0128r_0618)*(1 + s_1013/kms_s_1013r_0618) + 1 + s_0824/kmp_s_0824r_0618 - 1))/intracellular;
end
function_165 is "Function for inositolphosphotransferase";

function Function_for_IPC_synthase(Keq_r_0621, Vmax_r_0621, intracellular, kmp_s_0828r_0621, kms_s_0128r_0621, kms_s_1060r_0621, s_0128, s_0828, s_1060)
  Vmax_r_0621*((1/kms_s_0128r_0621)^1*(1/kms_s_1060r_0621)^1*(s_0128^1*s_1060^1 - s_0828^1/Keq_r_0621)/((1 + s_0128/kms_s_0128r_0621)*(1 + s_1060/kms_s_1060r_0621) + 1 + s_0828/kmp_s_0828r_0621 - 1))/intracellular;
end

function function_167(Keq_r_0630, Vmax_r_0630, intracellular, kmp_s_0185r_0630, kmp_s_0470r_0630, kmp_s_1096r_0630, kms_s_0847r_0630, kms_s_1091r_0630, _2_oxoglutarate_intracellular, carbon_dioxide_intracellular, isocitrate_3_intracellular, NADP_intracellular, NADPH_intracellular)
  Vmax_r_0630*((1/kms_s_0847r_0630)^1*(1/kms_s_1091r_0630)^1*(isocitrate_3_intracellular^1*NADP_intracellular^1 - _2_oxoglutarate_intracellular^1*carbon_dioxide_intracellular^1*NADPH_intracellular^1/Keq_r_0630)/((1 + isocitrate_3_intracellular/kms_s_0847r_0630)*(1 + NADP_intracellular/kms_s_1091r_0630) + (1 + _2_oxoglutarate_intracellular/kmp_s_0185r_0630)*(1 + carbon_dioxide_intracellular/kmp_s_0470r_0630)*(1 + NADPH_intracellular/kmp_s_1096r_0630) - 1))/intracellular;
end
function_167 is "Function for isocitrate dehydrogenase (NADP)";

function Function_for_isocitrate_lyase(Keq_r_0633, Vmax_r_0633, intracellular, kmp_s_0749r_0633, kmp_s_1338r_0633, kms_s_0847r_0633, glyoxylate_intracellular, isocitrate_3_intracellular, succinate_2_intracellular)
  Vmax_r_0633*((1/kms_s_0847r_0633)^1*(isocitrate_3_intracellular^1 - glyoxylate_intracellular^1*succinate_2_intracellular^1/Keq_r_0633)/(1 + isocitrate_3_intracellular/kms_s_0847r_0633 + (1 + glyoxylate_intracellular/kmp_s_0749r_0633)*(1 + succinate_2_intracellular/kmp_s_1338r_0633) - 1))/intracellular;
end

function function_169(Keq_r_0634, Vmax_r_0634, intracellular, kmp_s_0185r_0634, kmp_s_0920r_0634, kms_s_0058r_0634, kms_s_0899r_0634, s_0058, _2_oxoglutarate_intracellular, L_glutamate_intracellular, L_isoleucine_intracellular)
  Vmax_r_0634*((1/kms_s_0058r_0634)^1*(1/kms_s_0899r_0634)^1*(s_0058^1*L_glutamate_intracellular^1 - _2_oxoglutarate_intracellular^1*L_isoleucine_intracellular^1/Keq_r_0634)/((1 + s_0058/kms_s_0058r_0634)*(1 + L_glutamate_intracellular/kms_s_0899r_0634) + (1 + _2_oxoglutarate_intracellular/kmp_s_0185r_0634)*(1 + L_isoleucine_intracellular/kmp_s_0920r_0634) - 1))/intracellular;
end
function_169 is "Function for isoleucine transaminase";

function function_214(Keq_r_0866, Vmax_r_0866, intracellular, kmp_s_0193r_0866, kms_s_0264r_0866, s_0193, s_0264)
  Vmax_r_0866*((1/kms_s_0264r_0866)^1*(s_0264^1 - s_0193^1/Keq_r_0866)/(1 + s_0264/kms_s_0264r_0866 + 1 + s_0193/kmp_s_0193r_0866 - 1))/intracellular;
end
function_214 is "Function for phosphoglycerate mutase";

function function_215(Keq_r_0873, Vmax_r_0873, intracellular, kmp_s_1228r_0873, kmp_s_1290r_0873, kms_s_1225r_0873, kms_s_1293r_0873, s_1225, s_1228, s_1290, s_1293)
  Vmax_r_0873*((1/kms_s_1225r_0873)^1*(1/kms_s_1293r_0873)^1*(s_1225^1*s_1293^1 - s_1228^1*s_1290^1/Keq_r_0873)/((1 + s_1225/kms_s_1225r_0873)*(1 + s_1293/kms_s_1293r_0873) + (1 + s_1228/kmp_s_1228r_0873)*(1 + s_1290/kmp_s_1290r_0873) - 1))/intracellular;
end
function_215 is "Function for phospholipid methyltransferase";

function function_216(Keq_r_0874, Vmax_r_0874, intracellular, kmp_s_0763_br_0874, kmp_s_1225r_0874, kmp_s_1290r_0874, kms_s_1226r_0874, kms_s_1293r_0874, s_0763_b, s_1225, s_1226, s_1290, s_1293)
  Vmax_r_0874*((1/kms_s_1226r_0874)^1*(1/kms_s_1293r_0874)^1*(s_1226^1*s_1293^1 - s_0763_b^1*s_1225^1*s_1290^1/Keq_r_0874)/((1 + s_1226/kms_s_1226r_0874)*(1 + s_1293/kms_s_1293r_0874) + (1 + s_0763_b/kmp_s_0763_br_0874)*(1 + s_1225/kmp_s_1225r_0874)*(1 + s_1290/kmp_s_1290r_0874) - 1))/intracellular;
end
function_216 is "Function for phospholipid methyltransferase_2";

function Function_for_phosphomannomutase(Keq_r_0875, Vmax_r_0875, intracellular, kmp_s_0553r_0875, kms_s_0554r_0875, s_0553, s_0554)
  Vmax_r_0875*((1/kms_s_0554r_0875)^1*(s_0554^1 - s_0553^1/Keq_r_0875)/(1 + s_0554/kms_s_0554r_0875 + 1 + s_0553/kmp_s_0553r_0875 - 1))/intracellular;
end

function function_218(Keq_r_0877, Vmax_r_0877, intracellular, kmp_s_0021r_0877, kmp_s_0400r_0877, kms_s_0022r_0877, kms_s_0446r_0877, s_0021, s_0022, ADP_intracellular, ATP_intracellular)
  Vmax_r_0877*((1/kms_s_0022r_0877)^1*(1/kms_s_0446r_0877)^1*(s_0022^1*ATP_intracellular^1 - s_0021^1*ADP_intracellular^1/Keq_r_0877)/((1 + s_0022/kms_s_0022r_0877)*(1 + ATP_intracellular/kms_s_0446r_0877) + (1 + s_0021/kmp_s_0021r_0877)*(1 + ADP_intracellular/kmp_s_0400r_0877) - 1))/intracellular;
end
function_218 is "Function for phosphomevalonate kinase";

function function_219(Keq_r_0881, Vmax_r_0881, intracellular, kmp_s_0079r_0881, kms_s_0080r_0881, kms_s_1434_br_0881, s_0079, s_0080, s_1434_b)
  Vmax_r_0881*((1/kms_s_0080r_0881)^1*(1/kms_s_1434_br_0881)^1*(s_0080^1*s_1434_b^1 - s_0079^1/Keq_r_0881)/((1 + s_0080/kms_s_0080r_0881)*(1 + s_1434_b/kms_s_1434_br_0881) + 1 + s_0079/kmp_s_0079r_0881 - 1))/intracellular;
end
function_219 is "Function for phosphoribosyl-AMP cyclohydrolase";

function function_220(Keq_r_0882, Vmax_r_0882, intracellular, kmp_s_0080r_0882, kmp_s_0605r_0882, kmp_s_0763_br_0882, kms_s_0334r_0882, kms_s_1434_br_0882, s_0080, s_0334, diphosphate_intracellular, s_0763_b, s_1434_b)
  Vmax_r_0882*((1/kms_s_0334r_0882)^1*(1/kms_s_1434_br_0882)^1*(s_0334^1*s_1434_b^1 - s_0080^1*diphosphate_intracellular^1*s_0763_b^1/Keq_r_0882)/((1 + s_0334/kms_s_0334r_0882)*(1 + s_1434_b/kms_s_1434_br_0882) + (1 + s_0080/kmp_s_0080r_0882)*(1 + diphosphate_intracellular/kmp_s_0605r_0882)*(1 + s_0763_b/kmp_s_0763_br_0882) - 1))/intracellular;
end
function_220 is "Function for phosphoribosyl-ATP pyrophosphatase";

function function_221(Keq_r_0883, Vmax_r_0883, intracellular, kmp_s_0318r_0883, kmp_s_0763_br_0883, kms_s_0316r_0883, kms_s_0470r_0883, s_0316, s_0318, carbon_dioxide_intracellular, s_0763_b)
  Vmax_r_0883*((1/kms_s_0316r_0883)^1*(1/kms_s_0470r_0883)^1*(s_0316^1*carbon_dioxide_intracellular^1 - s_0318^1*s_0763_b^1/Keq_r_0883)/((1 + s_0316/kms_s_0316r_0883)*(1 + carbon_dioxide_intracellular/kms_s_0470r_0883) + (1 + s_0318/kmp_s_0318r_0883)*(1 + s_0763_b/kmp_s_0763_br_0883) - 1))/intracellular;
end
function_221 is "Function for phosphoribosylaminoimidazole carboxylase";

function function_222(Keq_r_0884, Vmax_r_0884, intracellular, kmp_s_0316r_0884, kmp_s_0400r_0884, kmp_s_0763_br_0884, kmp_s_1207r_0884, kms_s_0158r_0884, kms_s_0446r_0884, s_0158, s_0316, ADP_intracellular, ATP_intracellular, s_0763_b, phosphate_intracellular)
  Vmax_r_0884*((1/kms_s_0158r_0884)^1*(1/kms_s_0446r_0884)^1*(s_0158^1*ATP_intracellular^1 - s_0316^1*ADP_intracellular^1*s_0763_b^2*phosphate_intracellular^1/Keq_r_0884)/((1 + s_0158/kms_s_0158r_0884)*(1 + ATP_intracellular/kms_s_0446r_0884) + (1 + s_0316/kmp_s_0316r_0884)*(1 + ADP_intracellular/kmp_s_0400r_0884)*(1 + s_0763_b/kmp_s_0763_br_0884)*(1 + phosphate_intracellular/kmp_s_1207r_0884) - 1))/intracellular;
end
function_222 is "Function for phosphoribosylaminoimidazole synthase";

function function_223(Keq_r_0885, Vmax_r_0885, intracellular, kmp_s_0309r_0885, kmp_s_0325r_0885, kms_s_0122r_0885, kms_s_0317r_0885, s_0122, s_0309, s_0317, s_0325)
  Vmax_r_0885*((1/kms_s_0122r_0885)^1*(1/kms_s_0317r_0885)^1*(s_0122^1*s_0317^1 - s_0309^1*s_0325^1/Keq_r_0885)/((1 + s_0122/kms_s_0122r_0885)*(1 + s_0317/kms_s_0317r_0885) + (1 + s_0309/kmp_s_0309r_0885)*(1 + s_0325/kmp_s_0325r_0885) - 1))/intracellular;
end
function_223 is "Function for phosphoribosylaminoimidazolecarboxamide formyltransferase";

function function_224(Keq_r_0886, Vmax_r_0886, intracellular, kmp_s_0009r_0886, kmp_s_0400r_0886, kmp_s_0763_br_0886, kmp_s_1207r_0886, kms_s_0318r_0886, kms_s_0446r_0886, kms_s_0881r_0886, s_0009, s_0318, ADP_intracellular, ATP_intracellular, s_0763_b, L_aspartate_intracellular, phosphate_intracellular)
  Vmax_r_0886*((1/kms_s_0318r_0886)^1*(1/kms_s_0446r_0886)^1*(1/kms_s_0881r_0886)^1*(s_0318^1*ATP_intracellular^1*L_aspartate_intracellular^1 - s_0009^1*ADP_intracellular^1*s_0763_b^1*phosphate_intracellular^1/Keq_r_0886)/((1 + s_0318/kms_s_0318r_0886)*(1 + ATP_intracellular/kms_s_0446r_0886)*(1 + L_aspartate_intracellular/kms_s_0881r_0886) + (1 + s_0009/kmp_s_0009r_0886)*(1 + ADP_intracellular/kmp_s_0400r_0886)*(1 + s_0763_b/kmp_s_0763_br_0886)*(1 + phosphate_intracellular/kmp_s_1207r_0886) - 1))/intracellular;
end
function_224 is "Function for phosphoribosylaminoimidazolesuccinocarboxamide synthase";

function function_225(Keq_r_0887, Vmax_r_0887, intracellular, kmp_s_0078r_0887, kms_s_1066r_0887, s_0078, s_1066)
  Vmax_r_0887*((1/kms_s_1066r_0887)^1*(s_1066^1 - s_0078^1/Keq_r_0887)/(1 + s_1066/kms_s_1066r_0887 + 1 + s_0078/kmp_s_0078r_0887 - 1))/intracellular;
end
function_225 is "Function for phosphoribosylanthranilate isomerase";

function function_226(Keq_r_0888, Vmax_r_0888, intracellular, kmp_s_0158r_0888, kmp_s_0400r_0888, kmp_s_0763_br_0888, kmp_s_0899r_0888, kmp_s_1207r_0888, kms_s_0446r_0888, kms_s_0907r_0888, kms_s_1052r_0888, kms_s_1434_br_0888, s_0158, ADP_intracellular, ATP_intracellular, s_0763_b, L_glutamate_intracellular, L_glutamine_intracellular, s_1052, phosphate_intracellular, s_1434_b)
  Vmax_r_0888*((1/kms_s_0446r_0888)^1*(1/kms_s_0907r_0888)^1*(1/kms_s_1052r_0888)^1*(1/kms_s_1434_br_0888)^1*(ATP_intracellular^1*L_glutamine_intracellular^1*s_1052^1*s_1434_b^1 - s_0158^1*ADP_intracellular^1*s_0763_b^1*L_glutamate_intracellular^1*phosphate_intracellular^1/Keq_r_0888)/((1 + ATP_intracellular/kms_s_0446r_0888)*(1 + L_glutamine_intracellular/kms_s_0907r_0888)*(1 + s_1052/kms_s_1052r_0888)*(1 + s_1434_b/kms_s_1434_br_0888) + (1 + s_0158/kmp_s_0158r_0888)*(1 + ADP_intracellular/kmp_s_0400r_0888)*(1 + s_0763_b/kmp_s_0763_br_0888)*(1 + L_glutamate_intracellular/kmp_s_0899r_0888)*(1 + phosphate_intracellular/kmp_s_1207r_0888) - 1))/intracellular;
end
function_226 is "Function for phosphoribosylformylglycinamidine synthase";

function function_227(Keq_r_0889, Vmax_r_0889, intracellular, kmp_s_0309r_0889, kmp_s_0763_br_0889, kmp_s_1052r_0889, kms_s_0122r_0889, kms_s_1048r_0889, s_0122, s_0309, s_0763_b, s_1048, s_1052)
  Vmax_r_0889*((1/kms_s_0122r_0889)^1*(1/kms_s_1048r_0889)^1*(s_0122^1*s_1048^1 - s_0309^1*s_0763_b^1*s_1052^1/Keq_r_0889)/((1 + s_0122/kms_s_0122r_0889)*(1 + s_1048/kms_s_1048r_0889) + (1 + s_0309/kmp_s_0309r_0889)*(1 + s_0763_b/kmp_s_0763_br_0889)*(1 + s_1052/kmp_s_1052r_0889) - 1))/intracellular;
end
function_227 is "Function for phosphoribosylglycinamide formyltransferase";

function function_228(Keq_r_0890, Vmax_r_0890, intracellular, kmp_s_0400r_0890, kmp_s_0763_br_0890, kmp_s_1048r_0890, kmp_s_1207r_0890, kms_s_0333r_0890, kms_s_0446r_0890, kms_s_0740r_0890, s_0333, ADP_intracellular, ATP_intracellular, glycine_intracellular, s_0763_b, s_1048, phosphate_intracellular)
  Vmax_r_0890*((1/kms_s_0333r_0890)^1*(1/kms_s_0446r_0890)^1*(1/kms_s_0740r_0890)^1*(s_0333^1*ATP_intracellular^1*glycine_intracellular^1 - ADP_intracellular^1*s_0763_b^1*s_1048^1*phosphate_intracellular^1/Keq_r_0890)/((1 + s_0333/kms_s_0333r_0890)*(1 + ATP_intracellular/kms_s_0446r_0890)*(1 + glycine_intracellular/kms_s_0740r_0890) + (1 + ADP_intracellular/kmp_s_0400r_0890)*(1 + s_0763_b/kmp_s_0763_br_0890)*(1 + s_1048/kmp_s_1048r_0890)*(1 + phosphate_intracellular/kmp_s_1207r_0890) - 1))/intracellular;
end
function_228 is "Function for phosphoribosylglycinamide synthase";

function function_229(Keq_r_0891, Vmax_r_0891, intracellular, kmp_s_0331r_0891, kmp_s_0434r_0891, kmp_s_0763_br_0891, kms_s_0427r_0891, kms_s_0446r_0891, s_0331, s_0427, AMP_intracellular, ATP_intracellular, s_0763_b)
  Vmax_r_0891*((1/kms_s_0427r_0891)^1*(1/kms_s_0446r_0891)^1*(s_0427^1*ATP_intracellular^1 - s_0331^1*AMP_intracellular^1*s_0763_b^1/Keq_r_0891)/((1 + s_0427/kms_s_0427r_0891)*(1 + ATP_intracellular/kms_s_0446r_0891) + (1 + s_0331/kmp_s_0331r_0891)*(1 + AMP_intracellular/kmp_s_0434r_0891)*(1 + s_0763_b/kmp_s_0763_br_0891) - 1))/intracellular;
end
function_229 is "Function for phosphoribosylpyrophosphate synthetase";

function function_230(Keq_r_0911, Vmax_r_0911, intracellular, kmp_s_0470r_0911, kmp_s_0859r_0911, kmp_s_1434_br_0911, kms_s_0763_br_0911, kms_s_1258r_0911, carbon_dioxide_intracellular, s_0763_b, s_0859, prephenate_2_intracellular, s_1434_b)
  Vmax_r_0911*((1/kms_s_0763_br_0911)^1*(1/kms_s_1258r_0911)^1*(s_0763_b^1*prephenate_2_intracellular^1 - carbon_dioxide_intracellular^1*s_0859^1*s_1434_b^1/Keq_r_0911)/((1 + s_0763_b/kms_s_0763_br_0911)*(1 + prephenate_2_intracellular/kms_s_1258r_0911) + (1 + carbon_dioxide_intracellular/kmp_s_0470r_0911)*(1 + s_0859/kmp_s_0859r_0911)*(1 + s_1434_b/kmp_s_1434_br_0911) - 1))/intracellular;
end
function_230 is "Function for prephenate dehydratase";

function function_231(Keq_r_0913, Vmax_r_0913, intracellular, kmp_s_0209r_0913, kmp_s_0470r_0913, kmp_s_1096r_0913, kms_s_1091r_0913, kms_s_1258r_0913, s_0209, carbon_dioxide_intracellular, NADP_intracellular, NADPH_intracellular, prephenate_2_intracellular)
  Vmax_r_0913*((1/kms_s_1091r_0913)^1*(1/kms_s_1258r_0913)^1*(NADP_intracellular^1*prephenate_2_intracellular^1 - s_0209^1*carbon_dioxide_intracellular^1*NADPH_intracellular^1/Keq_r_0913)/((1 + NADP_intracellular/kms_s_1091r_0913)*(1 + prephenate_2_intracellular/kms_s_1258r_0913) + (1 + s_0209/kmp_s_0209r_0913)*(1 + carbon_dioxide_intracellular/kmp_s_0470r_0913)*(1 + NADPH_intracellular/kmp_s_1096r_0913) - 1))/intracellular;
end
function_231 is "Function for prephenate dehydrogenase (NADP)";

function function_232(Keq_r_0934, Vmax_r_0934, intracellular, kmp_s_0320r_0934, kmp_s_1207r_0934, kms_s_0319r_0934, kms_s_1434_br_0934, s_0319, s_0320, phosphate_intracellular, s_1434_b)
  Vmax_r_0934*((1/kms_s_0319r_0934)^1*(1/kms_s_1434_br_0934)^1*(s_0319^1*s_1434_b^1 - s_0320^1*phosphate_intracellular^1/Keq_r_0934)/((1 + s_0319/kms_s_0319r_0934)*(1 + s_1434_b/kms_s_1434_br_0934) + (1 + s_0320/kmp_s_0320r_0934)*(1 + phosphate_intracellular/kmp_s_1207r_0934) - 1))/intracellular;
end
function_232 is "Function for pyrimidine phosphatase";

function function_233(Keq_r_0936, Vmax_r_0936, intracellular, kmp_s_0939r_0936, kmp_s_1091r_0936, kms_s_0120r_0936, kms_s_0763_br_0936, kms_s_1096r_0936, s_0120, s_0763_b, L_proline_intracellular, NADP_intracellular, NADPH_intracellular)
  Vmax_r_0936*((1/kms_s_0120r_0936)^1*(1/kms_s_0763_br_0936)^2*(1/kms_s_1096r_0936)^1*(s_0120^1*s_0763_b^2*NADPH_intracellular^1 - L_proline_intracellular^1*NADP_intracellular^1/Keq_r_0936)/((1 + s_0120/kms_s_0120r_0936)*(1 + s_0763_b/kms_s_0763_br_0936)*(1 + NADPH_intracellular/kms_s_1096r_0936) + (1 + L_proline_intracellular/kmp_s_0939r_0936)*(1 + NADP_intracellular/kmp_s_1091r_0936) - 1))/intracellular;
end
function_233 is "Function for pyrroline-5-carboxylate reductase";

function function_234(Keq_r_0937, Vmax_r_0937, intracellular, kmp_s_0400r_0937, kmp_s_0763_br_0937, kmp_s_1156r_0937, kmp_s_1207r_0937, kms_s_0446r_0937, kms_s_0458r_0937, kms_s_1277r_0937, ADP_intracellular, ATP_intracellular, bicarbonate_intracellular, s_0763_b, oxaloacetate_2_intracellular, phosphate_intracellular, pyruvate_intracellular)
  Vmax_r_0937*((1/kms_s_0446r_0937)^1*(1/kms_s_0458r_0937)^1*(1/kms_s_1277r_0937)^1*(ATP_intracellular^1*bicarbonate_intracellular^1*pyruvate_intracellular^1 - ADP_intracellular^1*s_0763_b^1*oxaloacetate_2_intracellular^1*phosphate_intracellular^1/Keq_r_0937)/((1 + ATP_intracellular/kms_s_0446r_0937)*(1 + bicarbonate_intracellular/kms_s_0458r_0937)*(1 + pyruvate_intracellular/kms_s_1277r_0937) + (1 + ADP_intracellular/kmp_s_0400r_0937)*(1 + s_0763_b/kmp_s_0763_br_0937)*(1 + oxaloacetate_2_intracellular/kmp_s_1156r_0937)*(1 + phosphate_intracellular/kmp_s_1207r_0937) - 1))/intracellular;
end
function_234 is "Function for pyruvate carboxylase";

function function_254(Keq_r_0995, Vmax_r_0995, intracellular, kmp_s_0641r_0995, kmp_s_1434_br_0995, kms_s_0635r_0995, kms_s_0663r_0995, ergosterol_intracellular, ergosterol_ester_intracellular, fatty_acid_intracellular, s_1434_b)
  Vmax_r_0995*((1/kms_s_0635r_0995)^1*(1/kms_s_0663r_0995)^1*(ergosterol_intracellular^1*fatty_acid_intracellular^1 - ergosterol_ester_intracellular^1*s_1434_b^1/Keq_r_0995)/((1 + ergosterol_intracellular/kms_s_0635r_0995)*(1 + fatty_acid_intracellular/kms_s_0663r_0995) + (1 + ergosterol_ester_intracellular/kmp_s_0641r_0995)*(1 + s_1434_b/kmp_s_1434_br_0995) - 1))/intracellular;
end
function_254 is "Function for steryl ester hydrolase";

function function_255(Keq_r_1003, Vmax_r_1003, intracellular, kmp_s_0400r_1003, kmp_s_1207r_1003, kmp_s_1342r_1003, kms_s_0446r_1003, kms_s_0514r_1003, kms_s_1338r_1003, ADP_intracellular, ATP_intracellular, coenzyme_A_intracellular, phosphate_intracellular, succinate_2_intracellular, succinyl_CoA_intracellular)
  Vmax_r_1003*((1/kms_s_0446r_1003)^1*(1/kms_s_0514r_1003)^1*(1/kms_s_1338r_1003)^1*(ATP_intracellular^1*coenzyme_A_intracellular^1*succinate_2_intracellular^1 - ADP_intracellular^1*phosphate_intracellular^1*succinyl_CoA_intracellular^1/Keq_r_1003)/((1 + ATP_intracellular/kms_s_0446r_1003)*(1 + coenzyme_A_intracellular/kms_s_0514r_1003)*(1 + succinate_2_intracellular/kms_s_1338r_1003) + (1 + ADP_intracellular/kmp_s_0400r_1003)*(1 + phosphate_intracellular/kmp_s_1207r_1003)*(1 + succinyl_CoA_intracellular/kmp_s_1342r_1003) - 1))/intracellular;
end
function_255 is "Function for succinate-CoA ligase (ADP-forming)";

function function_256(Keq_r_1007, Vmax_r_1007, intracellular, kmp_s_0304r_1007, kmp_s_1207r_1007, kms_s_0400r_1007, kms_s_0763_br_1007, kms_s_1347r_1007, _5_adenylyl_sulfate_intracellular, ADP_intracellular, s_0763_b, phosphate_intracellular, sulphate_intracellular)
  Vmax_r_1007*((1/kms_s_0400r_1007)^1*(1/kms_s_0763_br_1007)^1*(1/kms_s_1347r_1007)^1*(ADP_intracellular^1*s_0763_b^1*sulphate_intracellular^1 - _5_adenylyl_sulfate_intracellular^1*phosphate_intracellular^1/Keq_r_1007)/((1 + ADP_intracellular/kms_s_0400r_1007)*(1 + s_0763_b/kms_s_0763_br_1007)*(1 + sulphate_intracellular/kms_s_1347r_1007) + (1 + _5_adenylyl_sulfate_intracellular/kmp_s_0304r_1007)*(1 + phosphate_intracellular/kmp_s_1207r_1007) - 1))/intracellular;
end
function_256 is "Function for sulfate adenylyltransferase (ADP)";

function function_257(Keq_r_1008, Vmax_r_1008, intracellular, kmp_s_0805r_1008, kmp_s_1091r_1008, kmp_s_1434_br_1008, kms_s_0763_br_1008, kms_s_1096r_1008, kms_s_1349r_1008, s_0763_b, hydrogen_sulfide_intracellular, NADP_intracellular, NADPH_intracellular, sulphite_intracellular, s_1434_b)
  Vmax_r_1008*((1/kms_s_0763_br_1008)^5*(1/kms_s_1096r_1008)^3*(1/kms_s_1349r_1008)^1*(s_0763_b^5*NADPH_intracellular^3*sulphite_intracellular^1 - hydrogen_sulfide_intracellular^1*NADP_intracellular^3*s_1434_b^3/Keq_r_1008)/((1 + s_0763_b/kms_s_0763_br_1008)*(1 + NADPH_intracellular/kms_s_1096r_1008)*(1 + sulphite_intracellular/kms_s_1349r_1008) + (1 + hydrogen_sulfide_intracellular/kmp_s_0805r_1008)*(1 + NADP_intracellular/kmp_s_1091r_1008)*(1 + s_1434_b/kmp_s_1434_br_1008) - 1))/intracellular;
end
function_257 is "Function for sulfite reductase (NADPH2)";

function function_258(Keq_r_1024, Vmax_r_1024, intracellular, kmp_s_1091r_1024, kmp_s_1521r_1024, kms_s_0763_br_1024, kms_s_1096r_1024, kms_s_1517r_1024, s_0763_b, NADP_intracellular, NADPH_intracellular, s_1517, s_1521)
  Vmax_r_1024*((1/kms_s_0763_br_1024)^1*(1/kms_s_1096r_1024)^1*(1/kms_s_1517r_1024)^1*(s_0763_b^1*NADPH_intracellular^1*s_1517^1 - NADP_intracellular^1*s_1521^1/Keq_r_1024)/((1 + s_0763_b/kms_s_0763_br_1024)*(1 + NADPH_intracellular/kms_s_1096r_1024)*(1 + s_1517/kms_s_1517r_1024) + (1 + NADP_intracellular/kmp_s_1091r_1024)*(1 + s_1521/kmp_s_1521r_1024) - 1))/intracellular;
end
function_258 is "Function for thioredoxin reductase (NADPH)";

function Function_for_threonine_aldolase(Keq_r_1026, Vmax_r_1026, intracellular, kmp_s_0366r_1026, kmp_s_0740r_1026, kms_s_0949r_1026, acetaldehyde_intracellular, glycine_intracellular, L_threonine_intracellular)
  Vmax_r_1026*((1/kms_s_0949r_1026)^1*(L_threonine_intracellular^1 - acetaldehyde_intracellular^1*glycine_intracellular^1/Keq_r_1026)/(1 + L_threonine_intracellular/kms_s_0949r_1026 + (1 + acetaldehyde_intracellular/kmp_s_0366r_1026)*(1 + glycine_intracellular/kmp_s_0740r_1026) - 1))/intracellular;
end

function Function_for_threonine_synthase(Keq_r_1027, Vmax_r_1027, intracellular, kmp_s_0949r_1027, kmp_s_1207r_1027, kms_s_1122r_1027, kms_s_1434_br_1027, L_threonine_intracellular, s_1122, phosphate_intracellular, s_1434_b)
  Vmax_r_1027*((1/kms_s_1122r_1027)^1*(1/kms_s_1434_br_1027)^1*(s_1122^1*s_1434_b^1 - L_threonine_intracellular^1*phosphate_intracellular^1/Keq_r_1027)/((1 + s_1122/kms_s_1122r_1027)*(1 + s_1434_b/kms_s_1434_br_1027) + (1 + L_threonine_intracellular/kmp_s_0949r_1027)*(1 + phosphate_intracellular/kmp_s_1207r_1027) - 1))/intracellular;
end

function function_261(Keq_r_1032, Vmax_r_1032, intracellular, kmp_s_0601r_1032, kmp_s_0619r_1032, kms_s_0307r_1032, kms_s_0624r_1032, s_0307, dihydrofolic_acid_intracellular, dTMP_intracellular, dUMP_intracellular)
  Vmax_r_1032*((1/kms_s_0307r_1032)^1*(1/kms_s_0624r_1032)^1*(s_0307^1*dUMP_intracellular^1 - dihydrofolic_acid_intracellular^1*dTMP_intracellular^1/Keq_r_1032)/((1 + s_0307/kms_s_0307r_1032)*(1 + dUMP_intracellular/kms_s_0624r_1032) + (1 + dihydrofolic_acid_intracellular/kmp_s_0601r_1032)*(1 + dTMP_intracellular/kmp_s_0619r_1032) - 1))/intracellular;
end
function_261 is "Function for thymidylate synthase";

function Function_for_transaldolase(Keq_r_1035, Vmax_r_1035, intracellular, kmp_s_0731r_1035, kmp_s_1304r_1035, kms_s_0533r_1035, kms_s_0539r_1035, s_0533, s_0539, s_0731, s_1304)
  Vmax_r_1035*((1/kms_s_0533r_1035)^1*(1/kms_s_0539r_1035)^1*(s_0533^1*s_0539^1 - s_0731^1*s_1304^1/Keq_r_1035)/((1 + s_0533/kms_s_0533r_1035)*(1 + s_0539/kms_s_0539r_1035) + (1 + s_0731/kmp_s_0731r_1035)*(1 + s_1304/kmp_s_1304r_1035) - 1))/intracellular;
end

function Function_for_transketolase(Keq_r_1036, Vmax_r_1036, intracellular, kmp_s_0427r_1036, kmp_s_0561r_1036, kms_s_0731r_1036, kms_s_1304r_1036, s_0427, s_0561, s_0731, s_1304)
  Vmax_r_1036*((1/kms_s_0731r_1036)^1*(1/kms_s_1304r_1036)^1*(s_0731^1*s_1304^1 - s_0427^1*s_0561^1/Keq_r_1036)/((1 + s_0731/kms_s_0731r_1036)*(1 + s_1304/kms_s_1304r_1036) + (1 + s_0427/kmp_s_0427r_1036)*(1 + s_0561/kmp_s_0561r_1036) - 1))/intracellular;
end

function Function_for_transketolase_2(Keq_r_1037, Vmax_r_1037, intracellular, kmp_s_0533r_1037, kmp_s_0561r_1037, kms_s_0539r_1037, kms_s_0731r_1037, s_0533, s_0539, s_0561, s_0731)
  Vmax_r_1037*((1/kms_s_0539r_1037)^1*(1/kms_s_0731r_1037)^1*(s_0539^1*s_0731^1 - s_0533^1*s_0561^1/Keq_r_1037)/((1 + s_0539/kms_s_0539r_1037)*(1 + s_0731/kms_s_0731r_1037) + (1 + s_0533/kmp_s_0533r_1037)*(1 + s_0561/kmp_s_0561r_1037) - 1))/intracellular;
end

function function_265(Keq_r_1038, Vmax_r_1038, intracellular, kmp_s_0416r_1038, kmp_s_1207r_1038, kms_s_0419r_1038, kms_s_1434_br_1038, s_0416, s_0419, phosphate_intracellular, s_1434_b)
  Vmax_r_1038*((1/kms_s_0419r_1038)^1*(1/kms_s_1434_br_1038)^1*(s_0419^1*s_1434_b^1 - s_0416^1*phosphate_intracellular^1/Keq_r_1038)/((1 + s_0419/kms_s_0419r_1038)*(1 + s_1434_b/kms_s_1434_br_1038) + (1 + s_0416/kmp_s_0416r_1038)*(1 + phosphate_intracellular/kmp_s_1207r_1038) - 1))/intracellular;
end
function_265 is "Function for trehalose-phosphatase";

function Function_for_UMP_kinase(Keq_r_1059, Vmax_r_1059, intracellular, kmp_s_0400r_1059, kmp_s_1411r_1059, kms_s_0446r_1059, kms_s_1417r_1059, ADP_intracellular, ATP_intracellular, UDP_intracellular, UMP_intracellular)
  Vmax_r_1059*((1/kms_s_0446r_1059)^1*(1/kms_s_1417r_1059)^1*(ATP_intracellular^1*UMP_intracellular^1 - ADP_intracellular^1*UDP_intracellular^1/Keq_r_1059)/((1 + ATP_intracellular/kms_s_0446r_1059)*(1 + UMP_intracellular/kms_s_1417r_1059) + (1 + ADP_intracellular/kmp_s_0400r_1059)*(1 + UDP_intracellular/kmp_s_1411r_1059) - 1))/intracellular;
end

function function_271(Keq_r_1066, Vmax_r_1066, intracellular, kmp_s_0446r_1066, kmp_s_0624r_1066, kms_s_0400r_1066, kms_s_0622r_1066, ADP_intracellular, ATP_intracellular, dUDP_intracellular, dUMP_intracellular)
  Vmax_r_1066*((1/kms_s_0400r_1066)^1*(1/kms_s_0622r_1066)^1*(ADP_intracellular^1*dUDP_intracellular^1 - ATP_intracellular^1*dUMP_intracellular^1/Keq_r_1066)/((1 + ADP_intracellular/kms_s_0400r_1066)*(1 + dUDP_intracellular/kms_s_0622r_1066) + (1 + ATP_intracellular/kmp_s_0446r_1066)*(1 + dUMP_intracellular/kmp_s_0624r_1066) - 1))/intracellular;
end
function_271 is "Function for uridylate kinase (dUMP)";

function function_272(Keq_r_1072, Vmax_r_1072, intracellular, kmp_s_0605r_1072, kmp_s_1415r_1072, kms_s_0549r_1072, kms_s_0763_br_1072, kms_s_1430r_1072, s_0549, diphosphate_intracellular, s_0763_b, UDP_D_glucose_intracellular, UTP_intracellular)
  Vmax_r_1072*((1/kms_s_0549r_1072)^1*(1/kms_s_0763_br_1072)^1*(1/kms_s_1430r_1072)^1*(s_0549^1*s_0763_b^1*UTP_intracellular^1 - diphosphate_intracellular^1*UDP_D_glucose_intracellular^1/Keq_r_1072)/((1 + s_0549/kms_s_0549r_1072)*(1 + s_0763_b/kms_s_0763_br_1072)*(1 + UTP_intracellular/kms_s_1430r_1072) + (1 + diphosphate_intracellular/kmp_s_0605r_1072)*(1 + UDP_D_glucose_intracellular/kmp_s_1415r_1072) - 1))/intracellular;
end
function_272 is "Function for UTP-glucose-1-phosphate uridylyltransferase";

function Function_for_valine_transaminase(Keq_r_1073, Vmax_r_1073, intracellular, kmp_s_0185r_1073, kmp_s_0960r_1073, kms_s_0238r_1073, kms_s_0899r_1073, _2_oxoglutarate_intracellular, s_0238, L_glutamate_intracellular, L_valine_intracellular)
  Vmax_r_1073*((1/kms_s_0238r_1073)^1*(1/kms_s_0899r_1073)^1*(s_0238^1*L_glutamate_intracellular^1 - _2_oxoglutarate_intracellular^1*L_valine_intracellular^1/Keq_r_1073)/((1 + s_0238/kms_s_0238r_1073)*(1 + L_glutamate_intracellular/kms_s_0899r_1073) + (1 + _2_oxoglutarate_intracellular/kmp_s_0185r_1073)*(1 + L_valine_intracellular/kmp_s_0960r_1073) - 1))/intracellular;
end

function Function_for_ammonia_transport(Keq_r_1157, Vmax_r_1157, kmp_s_0430r_1157, kms_s_0431_br_1157, ammonium_intracellular, s_0431_b)
  Vmax_r_1157*((1/kms_s_0431_br_1157)^1*(s_0431_b^1 - ammonium_intracellular^1/Keq_r_1157)/(1 + s_0431_b/kms_s_0431_br_1157 + 1 + ammonium_intracellular/kmp_s_0430r_1157 - 1));
end

function Function_for_CO2_transport(Keq_r_1194, Vmax_r_1194, kmp_s_0472_br_1194, kms_s_0470r_1194, carbon_dioxide_intracellular, s_0472_b)
  Vmax_r_1194*((1/kms_s_0470r_1194)^1*(carbon_dioxide_intracellular^1 - s_0472_b^1/Keq_r_1194)/(1 + carbon_dioxide_intracellular/kms_s_0470r_1194 + 1 + s_0472_b/kmp_s_0472_br_1194 - 1));
end

function Function_for_ethanol_transport(Keq_r_1247, Vmax_r_1247, kmp_s_0651_br_1247, kms_s_0650r_1247, ethanol_intracellular, s_0651_b)
  Vmax_r_1247*((1/kms_s_0650r_1247)^1*(ethanol_intracellular^1 - s_0651_b^1/Keq_r_1247)/(1 + ethanol_intracellular/kms_s_0650r_1247 + 1 + s_0651_b/kmp_s_0651_br_1247 - 1));
end

function Function_for_glucose_transport(Keq_r_1293, Vmax_r_1293, kmp_s_0545r_1293, kms_s_0547_br_1293, D_glucose_intracellular, s_0547_b)
  Vmax_r_1293*((1/kms_s_0547_br_1293)^1*(s_0547_b^1 - D_glucose_intracellular^1/Keq_r_1293)/(1 + s_0547_b/kms_s_0547_br_1293 + 1 + D_glucose_intracellular/kmp_s_0545r_1293 - 1));
end

function Function_for_O2_transport(Keq_r_1435, Vmax_r_1435, kmp_s_1160r_1435, kms_s_1162_br_1435, oxygen_intracellular, s_1162_b)
  Vmax_r_1435*((1/kms_s_1162_br_1435)^1*(s_1162_b^1 - oxygen_intracellular^1/Keq_r_1435)/(1 + s_1162_b/kms_s_1162_br_1435 + 1 + oxygen_intracellular/kmp_s_1160r_1435 - 1));
end

function Function_for_phosphate_transport(Keq_r_1461, Vmax_r_1461, kmp_s_0763_br_1461, kmp_s_1207r_1461, kms_s_0766_br_1461, kms_s_1209_br_1461, s_0763_b, s_0766_b, phosphate_intracellular, s_1209_b)
  Vmax_r_1461*((1/kms_s_0766_br_1461)^1*(1/kms_s_1209_br_1461)^1*(s_0766_b^1*s_1209_b^1 - s_0763_b^1*phosphate_intracellular^1/Keq_r_1461)/((1 + s_0766_b/kms_s_0766_br_1461)*(1 + s_1209_b/kms_s_1209_br_1461) + (1 + s_0763_b/kmp_s_0763_br_1461)*(1 + phosphate_intracellular/kmp_s_1207r_1461) - 1));
end

function Function_for_succinate_transport(Keq_r_1503, Vmax_r_1503, kmp_s_0766_br_1503, kmp_s_1339_br_1503, kms_s_0763_br_1503, kms_s_1338r_1503, s_0763_b, s_0766_b, succinate_2_intracellular, s_1339_b)
  Vmax_r_1503*((1/kms_s_0763_br_1503)^1*(1/kms_s_1338r_1503)^1*(s_0763_b^1*succinate_2_intracellular^1 - s_0766_b^1*s_1339_b^1/Keq_r_1503)/((1 + s_0763_b/kms_s_0763_br_1503)*(1 + succinate_2_intracellular/kms_s_1338r_1503) + (1 + s_0766_b/kmp_s_0766_br_1503)*(1 + s_1339_b/kmp_s_1339_br_1503) - 1));
end

function Function_for_sulfate_uniport(Keq_r_1507, Vmax_r_1507, kmp_s_1347r_1507, kms_s_1348_br_1507, sulphate_intracellular, s_1348_b)
  Vmax_r_1507*((1/kms_s_1348_br_1507)^1*(s_1348_b^1 - sulphate_intracellular^1/Keq_r_1507)/(1 + s_1348_b/kms_s_1348_br_1507 + 1 + sulphate_intracellular/kmp_s_1347r_1507 - 1));
end

function Function_for_isa_acyl_CoA(Keq_r_1672, Vmax_r_1672, intracellular, kmp_s_0386r_1672, kms_s_1342r_1672, acyl_CoA_intracellular, succinyl_CoA_intracellular)
  Vmax_r_1672*((1/kms_s_1342r_1672)^1*(succinyl_CoA_intracellular^1 - acyl_CoA_intracellular^1/Keq_r_1672)/(1 + succinyl_CoA_intracellular/kms_s_1342r_1672 + 1 + acyl_CoA_intracellular/kmp_s_0386r_1672 - 1))/intracellular;
end
Function_for_isa_acyl_CoA is "Function for isa acyl-CoA";

function Function_for_biomass_production(V_o, a_s_0001r_1812, a_s_0416r_1812, a_s_0434r_1812, a_s_0446r_1812, a_s_0511r_1812, a_s_0564r_1812, a_s_0569r_1812, a_s_0593r_1812, a_s_0619r_1812, a_s_0740r_1812, a_s_0743r_1812, a_s_0752r_1812, a_s_0863r_1812, a_s_0873r_1812, a_s_0877r_1812, a_s_0881r_1812, a_s_0889r_1812, a_s_0899r_1812, a_s_0907r_1812, a_s_0911r_1812, a_s_0920r_1812, a_s_0925r_1812, a_s_0929r_1812, a_s_0933r_1812, a_s_0936r_1812, a_s_0939r_1812, a_s_0943r_1812, a_s_0949r_1812, a_s_0952r_1812, a_s_0955r_1812, a_s_0960r_1812, a_s_1000r_1812, a_s_1011r_1812, a_s_1283r_1812, a_s_1347r_1812, a_s_1417r_1812, intracellular, _1_3_beta_D_glucan_intracellular, s_0001_or_1812, s_0416, s_0416_or_1812, AMP_intracellular, s_0434_or_1812, ATP_intracellular, s_0446_or_1812, CMP_intracellular, s_0511_or_1812, dAMP_intracellular, s_0564_or_1812, dCMP_intracellular, s_0569_or_1812, dGMP_intracellular, s_0593_or_1812, dTMP_intracellular, s_0619_or_1812, glycine_intracellular, s_0740_or_1812, glycogen_intracellular, s_0743_or_1812, GMP_intracellular, s_0752_or_1812, L_alanine_intracellular, s_0863_or_1812, L_arginine_intracellular, s_0873_or_1812, L_asparagine_intracellular, s_0877_or_1812, L_aspartate_intracellular, s_0881_or_1812, L_cysteine_intracellular, s_0889_or_1812, L_glutamate_intracellular, s_0899_or_1812, L_glutamine_intracellular, s_0907_or_1812, L_histidine_intracellular, s_0911_or_1812, L_isoleucine_intracellular, s_0920_or_1812, L_leucine_intracellular, s_0925_or_1812, L_lysine_intracellular, s_0929_or_1812, L_methionine_intracellular, s_0933_or_1812, L_phenylalanine_intracellular, s_0936_or_1812, L_proline_intracellular, s_0939_or_1812, L_serine_intracellular, s_0943_or_1812, L_threonine_intracellular, s_0949_or_1812, L_tryptophan_intracellular, s_0952_or_1812, L_tyrosine_intracellular, s_0955_or_1812, L_valine_intracellular, s_0960_or_1812, lipid_intracellular, s_1000_or_1812, mannan_intracellular, s_1011_or_1812, riboflavin_intracellular, s_1283_or_1812, sulphate_intracellular, s_1347_or_1812, UMP_intracellular, s_1417_or_1812, zero_flux)
  MAX(V_o*(1 + a_s_0001r_1812*ln(_1_3_beta_D_glucan_intracellular/s_0001_or_1812) + a_s_0416r_1812*ln(s_0416/s_0416_or_1812) + a_s_0434r_1812*ln(AMP_intracellular/s_0434_or_1812) + a_s_0446r_1812*ln(ATP_intracellular/s_0446_or_1812) + a_s_0511r_1812*ln(CMP_intracellular/s_0511_or_1812) + a_s_0564r_1812*ln(dAMP_intracellular/s_0564_or_1812) + a_s_0569r_1812*ln(dCMP_intracellular/s_0569_or_1812) + a_s_0593r_1812*ln(dGMP_intracellular/s_0593_or_1812) + a_s_0619r_1812*ln(dTMP_intracellular/s_0619_or_1812) + a_s_0740r_1812*ln(glycine_intracellular/s_0740_or_1812) + a_s_0743r_1812*ln(glycogen_intracellular/s_0743_or_1812) + a_s_0752r_1812*ln(GMP_intracellular/s_0752_or_1812) + a_s_0863r_1812*ln(L_alanine_intracellular/s_0863_or_1812) + a_s_0873r_1812*ln(L_arginine_intracellular/s_0873_or_1812) + a_s_0877r_1812*ln(L_asparagine_intracellular/s_0877_or_1812) + a_s_0881r_1812*ln(L_aspartate_intracellular/s_0881_or_1812) + a_s_0889r_1812*ln(L_cysteine_intracellular/s_0889_or_1812) + a_s_0899r_1812*ln(L_glutamate_intracellular/s_0899_or_1812) + a_s_0907r_1812*ln(L_glutamine_intracellular/s_0907_or_1812) + a_s_0911r_1812*ln(L_histidine_intracellular/s_0911_or_1812) + a_s_0920r_1812*ln(L_isoleucine_intracellular/s_0920_or_1812) + a_s_0925r_1812*ln(L_leucine_intracellular/s_0925_or_1812) + a_s_0929r_1812*ln(L_lysine_intracellular/s_0929_or_1812) + a_s_0933r_1812*ln(L_methionine_intracellular/s_0933_or_1812) + a_s_0936r_1812*ln(L_phenylalanine_intracellular/s_0936_or_1812) + a_s_0939r_1812*ln(L_proline_intracellular/s_0939_or_1812) + a_s_0943r_1812*ln(L_serine_intracellular/s_0943_or_1812) + a_s_0949r_1812*ln(L_threonine_intracellular/s_0949_or_1812) + a_s_0952r_1812*ln(L_tryptophan_intracellular/s_0952_or_1812) + a_s_0955r_1812*ln(L_tyrosine_intracellular/s_0955_or_1812) + a_s_0960r_1812*ln(L_valine_intracellular/s_0960_or_1812) + a_s_1000r_1812*ln(lipid_intracellular/s_1000_or_1812) + a_s_1011r_1812*ln(mannan_intracellular/s_1011_or_1812) + a_s_1347r_1812*ln(sulphate_intracellular/s_1347_or_1812) + a_s_1417r_1812*ln(UMP_intracellular/s_1417_or_1812) + a_s_1283r_1812*ln(riboflavin_intracellular/s_1283_or_1812)), zero_flux)/intracellular;
end

function Function_for_growth_1(V_o, a_s_0463r_1814, biomass_intracellular, s_0463_or_1814, zero_flux)
  MAX(V_o*(1 + a_s_0463r_1814*ln(biomass_intracellular/s_0463_or_1814)), zero_flux);
end

function Function_for_lipid_production_1(V_o, a_s_0090r_1816, a_s_0124r_1816, a_s_0627r_1816, a_s_0632r_1816, a_s_0635r_1816, a_s_0641r_1816, a_s_0663r_1816, a_s_0669r_1816, a_s_0824r_1816, a_s_0963r_1816, a_s_1219r_1816, a_s_1228r_1816, a_s_1233r_1816, a_s_1399r_1816, a_s_1447r_1816, intracellular, s_0090, s_0090_or_1816, s_0124, s_0124_or_1816, episterol_intracellular, s_0627_or_1816, s_0632, s_0632_or_1816, ergosterol_intracellular, s_0635_or_1816, ergosterol_ester_intracellular, s_0641_or_1816, fatty_acid_intracellular, s_0663_or_1816, fecosterol_intracellular, s_0669_or_1816, s_0824, s_0824_or_1816, lanosterol_intracellular, s_0963_or_1816, s_1219, s_1219_or_1816, s_1228, s_1228_or_1816, s_1233, s_1233_or_1816, triglyceride_intracellular, s_1399_or_1816, zymosterol_intracellular, s_1447_or_1816, zero_flux)
  MAX(V_o*(1 + a_s_0090r_1816*ln(s_0090/s_0090_or_1816) + a_s_0124r_1816*ln(s_0124/s_0124_or_1816) + a_s_0627r_1816*ln(episterol_intracellular/s_0627_or_1816) + a_s_0632r_1816*ln(s_0632/s_0632_or_1816) + a_s_0635r_1816*ln(ergosterol_intracellular/s_0635_or_1816) + a_s_0641r_1816*ln(ergosterol_ester_intracellular/s_0641_or_1816) + a_s_0663r_1816*ln(fatty_acid_intracellular/s_0663_or_1816) + a_s_0669r_1816*ln(fecosterol_intracellular/s_0669_or_1816) + a_s_0824r_1816*ln(s_0824/s_0824_or_1816) + a_s_0963r_1816*ln(lanosterol_intracellular/s_0963_or_1816) + a_s_1219r_1816*ln(s_1219/s_1219_or_1816) + a_s_1228r_1816*ln(s_1228/s_1228_or_1816) + a_s_1233r_1816*ln(s_1233/s_1233_or_1816) + a_s_1399r_1816*ln(triglyceride_intracellular/s_1399_or_1816) + a_s_1447r_1816*ln(zymosterol_intracellular/s_1447_or_1816)), zero_flux)/intracellular;
end

function Function_for_squalene_synthase(Keq_r_0993, Vmax_r_0993, intracellular, kmp_s_0605r_0993, kmp_s_1091r_0993, kmp_s_1327r_0993, kms_s_0195r_0993, kms_s_0763_br_0993, kms_s_1096r_0993, s_0195, diphosphate_intracellular, s_0763_b, NADP_intracellular, NADPH_intracellular, squalene_intracellular)
  Vmax_r_0993*((1/kms_s_0195r_0993)^2*(1/kms_s_0763_br_0993)^1*(1/kms_s_1096r_0993)^1*(s_0195^2*s_0763_b^1*NADPH_intracellular^1 - diphosphate_intracellular^2*NADP_intracellular^1*squalene_intracellular^1/Keq_r_0993)/((1 + s_0195/kms_s_0195r_0993)*(1 + s_0763_b/kms_s_0763_br_0993)*(1 + NADPH_intracellular/kms_s_1096r_0993) + (1 + diphosphate_intracellular/kmp_s_0605r_0993)*(1 + NADP_intracellular/kmp_s_1091r_0993)*(1 + squalene_intracellular/kmp_s_1327r_0993) - 1))/intracellular;
end

function function_266(Keq_r_1040, Vmax_r_1040, intracellular, kmp_s_0596r_1040, kmp_s_0663r_1040, kms_s_1399r_1040, kms_s_1434_br_1040, diglyceride_intracellular, fatty_acid_intracellular, triglyceride_intracellular, s_1434_b)
  Vmax_r_1040*((1/kms_s_1399r_1040)^1*(1/kms_s_1434_br_1040)^1*(triglyceride_intracellular^1*s_1434_b^1 - diglyceride_intracellular^1*fatty_acid_intracellular^1/Keq_r_1040)/((1 + triglyceride_intracellular/kms_s_1399r_1040)*(1 + s_1434_b/kms_s_1434_br_1040) + (1 + diglyceride_intracellular/kmp_s_0596r_1040)*(1 + fatty_acid_intracellular/kmp_s_0663r_1040) - 1))/intracellular;
end
function_266 is "Function for triacylglycerol lipase";

function function_267(Keq_r_1041, Vmax_r_1041, intracellular, kmp_s_0731r_1041, kms_s_0735r_1041, s_0731, s_0735)
  Vmax_r_1041*((1/kms_s_0735r_1041)^1*(s_0735^1 - s_0731^1/Keq_r_1041)/(1 + s_0735/kms_s_0735r_1041 + 1 + s_0731/kmp_s_0731r_1041 - 1))/intracellular;
end
function_267 is "Function for triose-phosphate isomerase";

function function_268(Keq_r_1042, Vmax_r_1042, intracellular, kmp_s_0731r_1042, kmp_s_0952r_1042, kmp_s_1434_br_1042, kms_s_0088r_1042, kms_s_0943r_1042, s_0088, s_0731, L_serine_intracellular, L_tryptophan_intracellular, s_1434_b)
  Vmax_r_1042*((1/kms_s_0088r_1042)^1*(1/kms_s_0943r_1042)^1*(s_0088^1*L_serine_intracellular^1 - s_0731^1*L_tryptophan_intracellular^1*s_1434_b^1/Keq_r_1042)/((1 + s_0088/kms_s_0088r_1042)*(1 + L_serine_intracellular/kms_s_0943r_1042) + (1 + s_0731/kmp_s_0731r_1042)*(1 + L_tryptophan_intracellular/kmp_s_0952r_1042)*(1 + s_1434_b/kmp_s_1434_br_1042) - 1))/intracellular;
end
function_268 is "Function for tryptophan synthase (indoleglycerol phosphate)";

function function_269(Keq_r_1050, Vmax_r_1050, intracellular, kmp_s_0185r_1050, kmp_s_0955r_1050, kms_s_0209r_1050, kms_s_0899r_1050, _2_oxoglutarate_intracellular, s_0209, L_glutamate_intracellular, L_tyrosine_intracellular)
  Vmax_r_1050*((1/kms_s_0209r_1050)^1*(1/kms_s_0899r_1050)^1*(s_0209^1*L_glutamate_intracellular^1 - _2_oxoglutarate_intracellular^1*L_tyrosine_intracellular^1/Keq_r_1050)/((1 + s_0209/kms_s_0209r_1050)*(1 + L_glutamate_intracellular/kms_s_0899r_1050) + (1 + _2_oxoglutarate_intracellular/kmp_s_0185r_1050)*(1 + L_tyrosine_intracellular/kmp_s_0955r_1050) - 1))/intracellular;
end
function_269 is "Function for tyrosine transaminase";

model MODEL1204270000()
  // Stanford2013 - Kinetic model of yeast metabolic network (standard)
  // Large-scale model construction based on a logical layering of data such as reaction fluxes, metabolite concentrations, and kinetic constants.
  // This model is described in the article:
  // Systematic construction of kinetic models from genome-scale metabolic networks.
  // Stanford NJ, Lubitz T, Smallbone K, Klipp E, Mendes P, Liebermeister W.
  // PLoS ONE 2013; 8(11): e79195
  // Abstract:
  // The quantitative effects of environmental and genetic perturbations on metabolism can be studied in silico using kinetic models. We present a strategy for large-scale model construction based on a logical layering of data such as reaction fluxes, metabolite concentrations, and kinetic constants. The resulting models contain realistic standard rate laws and plausible parameters, adhere to the laws of thermodynamics, and reproduce a predefined steady state. These features have not been simultaneously achieved by previous workflows. We demonstrate the advantages and limitations of the workflow by translating the yeast consensus metabolic network into a kinetic model. Despite crudely selected data, the model shows realistic control behaviour, a stable dynamic, and realistic response to perturbations in extracellular glucose concentrations. The paper concludes by outlining how new data can continuously be fed into the workflow and how iterative model building can assist in directing experiments.
  // [corrections made to the model compared to the paper, optional]
  // This model is hosted on BioModels Database and identified by: BIOMD0000000496 .
  // To cite BioModels Database, please use: BioModels Database: An enhanced, curated and annotated resource for published quantitative kinetic models .
  // To the extent possible under law, all copyright and related or neighbouring rights to this encoded model have been dedicated to the public domain worldwide. Please refer to CC0 Public Domain Dedication for more information.
  // biomodels.db:MODEL1204270000
  // biomodels.db:BIOMD0000000496
  // isDescribedBy pubmed:24324546
  // hasProperty mamo:MAMO_0000046
  // isVersionOf GO:0008152 GO:1901576
  // hasTaxon taxonomy:4932

  // Compartments:
  compartment intracellular = 1;  // GO:0005622
  compartment extracellular = 1;  // GO:0005576

  // Species:
  species _1_3_beta_D_glucan_intracellular in intracellular = 0.549; _1_3_beta_D_glucan_intracellular is "(1->3)-beta-D-glucan [intracellular]";  // CHEBI:37671
  species s_0007 in intracellular = 0.549; s_0007 is "(2R,3R)-2,3-dihydroxy-3-methylpentanoate [intracellular]";  // CHEBI:49258
  species s_0008 in intracellular = 0.549; s_0008 is "(2R,3S)-3-isopropylmalate(2-) [intracellular]";  // CHEBI:35121
  species s_0009 in intracellular = 0.549; s_0009 is "(2S)-2-[5-amino-1-(5-phospho-beta-D-ribosyl)imidazole-4-carboxamido]succinic acid [intracellular]";  // CHEBI:18319
  species s_0010 in intracellular = 0.549; s_0010 is "(2S)-2-isopropyl-3-oxosuccinate(2-) [intracellular]";  // CHEBI:17214
  species s_0015 in intracellular = 0.549; s_0015 is "(6R)-5,10-methenyltetrahydrofolic acid [intracellular]";  // CHEBI:15638
  species s_0017 in intracellular = 0.549; s_0017 is "(N(omega)-L-arginino)succinic acid [intracellular]";  // CHEBI:15682
  species s_0018 in intracellular = 0.549; s_0018 is "(R)-2,3-dihydroxy-3-methylbutanoate [intracellular]";  // CHEBI:49072
  species s_0021 in intracellular = 0.549; s_0021 is "(R)-5-diphosphomevalonic acid [intracellular]";  // CHEBI:15899
  species s_0022 in intracellular = 0.549; s_0022 is "(R)-5-phosphomevalonic acid [intracellular]";  // CHEBI:17436
  species R_mevalonate_intracellular in intracellular = 0.549; R_mevalonate_intracellular is "(R)-mevalonate [intracellular]";  // CHEBI:36464
  species s_0040 in intracellular = 0.549; s_0040 is "(S)-2,3-epoxysqualene [intracellular]";  // CHEBI:15441
  species s_0042 in intracellular = 0.549; s_0042 is "(S)-2-acetyl-2-hydroxybutanoate [intracellular]";  // CHEBI:49256
  species s_0046 in intracellular = 0.549; s_0046 is "(S)-3-hydroxyhexacosanoyl-CoA [intracellular]";  // CHEBI:52976
  species s_0052 in intracellular = 0.549; s_0052 is "(S)-3-hydroxypalmitoyl-CoA [intracellular]";  // CHEBI:27402
  species s_0055 in intracellular = 0.549; s_0055 is "(S)-3-hydroxytetradecanoyl-CoA [intracellular]";  // CHEBI:27466
  species s_0058 in intracellular = 0.549; s_0058 is "(S)-3-methyl-2-oxopentanoate [intracellular]";  // CHEBI:35146
  species S_dihydroorotate_intracellular in intracellular = 0.549; S_dihydroorotate_intracellular is "(S)-dihydroorotate [intracellular]";  // CHEBI:30864
  species S_malate_2_intracellular in intracellular = 0.549; S_malate_2_intracellular is "(S)-malate(2-) [intracellular]";  // CHEBI:15589
  species s_0078 in intracellular = 0.549; s_0078 is "1-(2-carboxyphenylamino)-1-deoxy-D-ribulose 5-phosphate [intracellular]";  // CHEBI:29112
  species s_0079 in intracellular = 0.549; s_0079 is "1-(5-phospho-D-ribosyl)-5-[(5-phospho-D-ribosylamino)methylideneamino]imidazole-4-carboxamide [intracellular]";  // CHEBI:18302
  species s_0080 in intracellular = 0.549; s_0080 is "1-(5-phosphoribosyl)-5'-AMP [intracellular]";  // CHEBI:37522
  species s_0083 in intracellular = 0.549; s_0083 is "1-acyl-sn-glycerol 3-phosphate [intracellular]";  // CHEBI:16975
  species s_0088 in intracellular = 0.549; s_0088 is "1-C-(indol-3-yl)glycerol 3-phosphate [intracellular]";  // CHEBI:18299
  species s_0090 in intracellular = 0.549; s_0090 is "1-phosphatidyl-1D-myo-inositol [intracellular]";  // CHEBI:16749
  species s_0118 in intracellular = 0.549; s_0118 is "1-pyrroline-3-hydroxy-5-carboxylic acid [intracellular]";  // CHEBI:27391
  species s_0120 in intracellular = 0.549; s_0120 is "1-pyrroline-5-carboxylate [intracellular]";  // CHEBI:15893
  species s_0122 in intracellular = 0.549; s_0122 is "10-formyltetrahydrofolic acid [intracellular]";  // CHEBI:15637
  species s_0124 in intracellular = 0.549; s_0124 is "14-demethyllanosterol [intracellular]";  // CHEBI:18364
  species s_0128 in intracellular = 0.549; s_0128 is "1D-myo-inositol 1-phosphate [intracellular]";  // CHEBI:18297
  species s_0145 in intracellular = 0.549; s_0145 is "2,5-diamino-4-hydroxy-6-(5-phosphoribosylamino)pyrimidine [intracellular]";  // CHEBI:29114
  species s_0146 in intracellular = 0.549; s_0146 is "2,5-diamino-6-(5-phosphono)ribitylamino-4(3H)-pyrimidinone [intracellular]";  // CHEBI:52957
  species s_0149 in intracellular = 0.549; s_0149 is "2-acetamido-5-oxopentanoate [intracellular]";  // CHEBI:29123
  species s_0150 in intracellular = 0.549; s_0150 is "2-acetyllactic acid [intracellular]";  // CHEBI:16444
  species s_0158 in intracellular = 0.549; s_0158 is "2-formamido-N(1)-(5-phospho-D-ribosyl)acetamidine [intracellular]";  // CHEBI:18413
  species s_0163 in intracellular = 0.549; s_0163 is "2-hydroxy-3-oxobutyl phosphate [intracellular]";  // CHEBI:50606
  species s_0167 in intracellular = 0.549; s_0167 is "2-isopropylmalate(2-) [intracellular]";  // CHEBI:35129
  species s_0170 in intracellular = 0.549; s_0170 is "2-isopropylmaleic acid [intracellular]";  // CHEBI:17275
  species s_0180 in intracellular = 0.549; s_0180 is "2-oxaloglutaric acid [intracellular]";  // CHEBI:7814
  species _2_oxoadipic_acid_intracellular in intracellular = 0.549; _2_oxoadipic_acid_intracellular is "2-oxoadipic acid [intracellular]";  // CHEBI:15753
  species _2_oxobutanoate_intracellular in intracellular = 0.549; _2_oxobutanoate_intracellular is "2-oxobutanoate [intracellular]";  // CHEBI:16763
  species _2_oxoglutarate_intracellular in intracellular = 0.549; _2_oxoglutarate_intracellular is "2-oxoglutarate [intracellular]";  // CHEBI:16810
  species s_0193 in intracellular = 0.0515066; s_0193 is "2-phospho-D-glyceric acid [intracellular]";  // CHEBI:17835
  species s_0195 in intracellular = 0.549; s_0195 is "2-trans,6-trans-farnesyl diphosphate [intracellular]";  // CHEBI:17407
  species s_0206 in intracellular = 0.549; s_0206 is "3'-phospho-5'-adenylyl sulfate [intracellular]";  // CHEBI:17980
  species s_0209 in intracellular = 0.549; s_0209 is "3-(4-hydroxyphenyl)pyruvate [intracellular]";  // CHEBI:36242
  species s_0212 in intracellular = 0.549; s_0212 is "3-(imidazol-4-yl)-2-oxopropyl dihydrogen phosphate [intracellular]";  // CHEBI:16426
  species s_0215 in intracellular = 0.549; s_0215 is "3-dehydro-4-methylzymosterol [intracellular]";  // CHEBI:50593
  species _3_dehydroquinate_intracellular in intracellular = 0.549; _3_dehydroquinate_intracellular is "3-dehydroquinate [intracellular]";  // CHEBI:32364
  species _3_dehydroshikimate_intracellular in intracellular = 0.549; _3_dehydroshikimate_intracellular is "3-dehydroshikimate [intracellular]";  // CHEBI:16630
  species s_0218 in intracellular = 0.549; s_0218 is "3-dehydrosphinganine [intracellular]";  // CHEBI:17862
  species s_0225 in intracellular = 0.549; s_0225 is "3-hydroxy-3-methylglutaryl-CoA [intracellular]";  // CHEBI:11814
  species s_0234 in intracellular = 0.549; s_0234 is "3-hydroxyoctadecanoyl-CoA [intracellular]";  // CHEBI:50583
  species s_0238 in intracellular = 0.549; s_0238 is "3-methyl-2-oxobutanoate [intracellular]";  // CHEBI:11851
  species s_0247 in intracellular = 0.549; s_0247 is "3-oxohexacosanoyl-CoA [intracellular]";  // CHEBI:52977
  species s_0254 in intracellular = 0.549; s_0254 is "3-oxooctadecanoyl-CoA [intracellular]";  // CHEBI:50571
  species _3_oxopalmitoyl_CoA_intracellular in intracellular = 0.549; _3_oxopalmitoyl_CoA_intracellular is "3-oxopalmitoyl-CoA [intracellular]";  // CHEBI:15491
  species s_0261 in intracellular = 0.549; s_0261 is "3-oxotetradecanoyl-CoA [intracellular]";  // CHEBI:28726
  species s_0264 in intracellular = 0.363388; s_0264 is "3-phospho-D-glyceric acid [intracellular]";  // CHEBI:17794
  species s_0265 in intracellular = 0.000108759; s_0265 is "3-phospho-D-glyceroyl dihydrogen phosphate [intracellular]";  // CHEBI:16001
  species s_0267 in intracellular = 0.549; s_0267 is "3-phosphoshikimic acid [intracellular]";  // CHEBI:17052
  species s_0268 in intracellular = 0.549; s_0268 is "4,4-dimethyl-5alpha-cholesta-8,14,24-trien-3beta-ol [intracellular]";  // CHEBI:17813
  species s_0297 in intracellular = 0.549; s_0297 is "4-methyl-2-oxopentanoate [intracellular]";  // CHEBI:17865
  species s_0301 in intracellular = 0.549; s_0301 is "4-phospho-L-aspartate [intracellular]";  // CHEBI:30407
  species s_0302 in intracellular = 0.549; s_0302 is "4alpha-methylzymosterol [intracellular]";  // CHEBI:1949
  species s_0303 in intracellular = 0.549; s_0303 is "4beta-methylzymosterol-4alpha-carboxylic acid [intracellular]";  // CHEBI:50591
  species _5_adenylyl_sulfate_intracellular in intracellular = 0.549; _5_adenylyl_sulfate_intracellular is "5'-adenylyl sulfate [intracellular]";  // CHEBI:17709
  species _5_xanthylic_acid_intracellular in intracellular = 0.549; _5_xanthylic_acid_intracellular is "5'-xanthylic acid [intracellular]";  // CHEBI:15652
  species s_0307 in intracellular = 0.549; s_0307 is "5,10-methylenetetrahydrofolate(2-) [intracellular]";  // CHEBI:12071
  species s_0309 in intracellular = 0.549; s_0309 is "5,6,7,8-tetrahydrofolic acid [intracellular]";  // CHEBI:20506
  species s_0315 in intracellular = 0.549; s_0315 is "5-[(5-phospho-1-deoxy-D-ribulos-1-ylamino)methylideneamino]-1-(5-phospho-D-ribosyl)imidazole-4-carboxamide [intracellular]";  // CHEBI:27735
  species s_0316 in intracellular = 0.549; s_0316 is "5-amino-1-(5-phospho-D-ribosyl)imidazole [intracellular]";  // CHEBI:28843
  species s_0317 in intracellular = 0.549; s_0317 is "5-amino-1-(5-phospho-D-ribosyl)imidazole-4-carboxamide [intracellular]";  // CHEBI:18406
  species s_0318 in intracellular = 0.549; s_0318 is "5-amino-1-(5-phospho-D-ribosyl)imidazole-4-carboxylic acid [intracellular]";  // CHEBI:28413
  species s_0319 in intracellular = 0.549; s_0319 is "5-amino-6-(5-phosphoribitylamino)uracil [intracellular]";  // CHEBI:18247
  species s_0320 in intracellular = 0.549; s_0320 is "5-amino-6-(D-ribitylamino)uracil [intracellular]";  // CHEBI:15934
  species s_0325 in intracellular = 0.549; s_0325 is "5-formamido-1-(5-phospho-D-ribosyl)imidazole-4-carboxamide [intracellular]";  // CHEBI:18381
  species s_0328 in intracellular = 0.549; s_0328 is "5-methyltetrahydrofolate(2-) [intracellular]";  // CHEBI:18608
  species s_0330 in intracellular = 0.549; s_0330 is "5-O-(1-carboxyvinyl)-3-phosphoshikimic acid [intracellular]";  // CHEBI:16257
  species s_0331 in intracellular = 0.549; s_0331 is "5-O-phosphono-alpha-D-ribofuranosyl diphosphate [intracellular]";  // CHEBI:17111
  species s_0333 in intracellular = 0.549; s_0333 is "5-phospho-beta-D-ribosylamine [intracellular]";  // CHEBI:37737
  species s_0334 in intracellular = 0.549; s_0334 is "5-phosphoribosyl-ATP [intracellular]";  // CHEBI:20629
  species s_0335 in intracellular = 0.549; s_0335 is "6,7-dimethyl-8-(1-D-ribityl)lumazine [intracellular]";  // CHEBI:17601
  species s_0356 in intracellular = 0.549; s_0356 is "7-phospho-2-dehydro-3-deoxy-D-arabino-heptonic acid [intracellular]";  // CHEBI:18150
  species acetaldehyde_intracellular in intracellular = 0.120104; acetaldehyde_intracellular is "acetaldehyde [intracellular]";  // CHEBI:15343
  species acetate_intracellular in intracellular = 0.549; acetate_intracellular is "acetate [intracellular]";  // CHEBI:30089
  species acetoacetyl_CoA_intracellular in intracellular = 0.549; acetoacetyl_CoA_intracellular is "acetoacetyl-CoA [intracellular]";  // CHEBI:15345
  species acetyl_CoA_intracellular in intracellular = 0.549; acetyl_CoA_intracellular is "acetyl-CoA [intracellular]";  // CHEBI:15351
  species acyl_CoA_intracellular in intracellular = 0.549; acyl_CoA_intracellular is "acyl-CoA [intracellular]";  // CHEBI:17984
  species adenosine_intracellular in intracellular = 0.549; adenosine_intracellular is "adenosine [intracellular]";  // CHEBI:16335
  species s_0397 in intracellular = 0.549; s_0397 is "adenosine 3',5'-bismonophosphate [intracellular]";  // CHEBI:17985
  species ADP_intracellular in intracellular = 1.71907; ADP_intracellular is "ADP [intracellular]";  // CHEBI:16761
  species s_0410 in intracellular = 0.549; s_0410 is "aldehydo-D-glucose 6-phosphate [intracellular]";  // CHEBI:15954
  species s_0416 in intracellular = 0.549; s_0416 is "alpha,alpha-trehalose [intracellular]";  // CHEBI:16551
  species s_0419 in intracellular = 0.549; s_0419 is "alpha,alpha-trehalose 6-phosphate [intracellular]";  // CHEBI:18283
  species s_0427 in intracellular = 0.549; s_0427 is "alpha-D-ribose 5-phosphate [intracellular]";  // CHEBI:18189
  species ammonium_intracellular in intracellular = 0.549; ammonium_intracellular is "ammonium [intracellular]";  // CHEBI:28938
  species AMP_intracellular in intracellular = 1.25956; AMP_intracellular is "AMP [intracellular]";  // CHEBI:16027
  species amylose_intracellular in intracellular = 0.549; amylose_intracellular is "amylose [intracellular]";  // CHEBI:28102
  species anthranilate_intracellular in intracellular = 0.549; anthranilate_intracellular is "anthranilate [intracellular]";  // CHEBI:16567
  species ATP_intracellular in intracellular = 1.09208; ATP_intracellular is "ATP [intracellular]";  // CHEBI:30616
  species s_0455 in intracellular = 0.496414; s_0455 is "beta-D-glucose 6-phosphate [intracellular]";  // CHEBI:17719
  species bicarbonate_intracellular in intracellular = 0.549; bicarbonate_intracellular is "bicarbonate [intracellular]";  // CHEBI:17544
  species biomass_intracellular in intracellular = 0.549; biomass_intracellular is "biomass [intracellular]";  // isDescribedBy ECO:0000035
  species s_0468 in intracellular = 0.549; s_0468 is "but-1-ene-1,2,4-tricarboxylic acid [intracellular]";  // CHEBI:17516
  species s_0469 in intracellular = 0.549; s_0469 is "carbamoyl phosphate [intracellular]";  // CHEBI:17672
  species carbon_dioxide_intracellular in intracellular = 1; carbon_dioxide_intracellular is "carbon dioxide [intracellular]";  // CHEBI:16526
  species CDP_intracellular in intracellular = 0.549; CDP_intracellular is "CDP [intracellular]";  // CHEBI:17239
  species CDP_diacylglycerol_intracellular in intracellular = 0.549; CDP_diacylglycerol_intracellular is "CDP-diacylglycerol [intracellular]";  // CHEBI:17962
  species chorismate_2_intracellular in intracellular = 0.549; chorismate_2_intracellular is "chorismate(2-) [intracellular]";  // CHEBI:29748
  species cis_aconitate_3_intracellular in intracellular = 0.549; cis_aconitate_3_intracellular is "cis-aconitate(3-) [intracellular]";  // CHEBI:16383
  species citrate_3_intracellular in intracellular = 0.549; citrate_3_intracellular is "citrate(3-) [intracellular]";  // CHEBI:16947
  species CMP_intracellular in intracellular = 0.549; CMP_intracellular is "CMP [intracellular]";  // CHEBI:17361
  species coenzyme_A_intracellular in intracellular = 0.549; coenzyme_A_intracellular is "coenzyme A [intracellular]";  // CHEBI:15346
  species CTP_intracellular in intracellular = 0.549; CTP_intracellular is "CTP [intracellular]";  // CHEBI:37563
  species s_0529 in intracellular = 0.549; s_0529 is "D-arabinono-1,4-lactone [intracellular]";  // CHEBI:16292
  species D_arabinose_intracellular in intracellular = 0.549; D_arabinose_intracellular is "D-arabinose [intracellular]";  // CHEBI:17108
  species s_0532 in intracellular = 0.549; s_0532 is "D-erythro-1-(imidazol-4-yl)glycerol 3-phosphate [intracellular]";  // CHEBI:17805
  species s_0533 in intracellular = 0.549; s_0533 is "D-erythrose 4-phosphate(2-) [intracellular]";  // CHEBI:16897
  species s_0537 in intracellular = 1.34278; s_0537 is "D-fructose 1,6-bisphosphate [intracellular]";  // CHEBI:16905
  species s_0539 in intracellular = 0.104555; s_0539 is "D-fructose 6-phosphate [intracellular]";  // CHEBI:15946
  species D_glucose_intracellular in intracellular = 0.0987587; D_glucose_intracellular is "D-glucose [intracellular]";  // CHEBI:17634
  species s_0549 in intracellular = 0.549; s_0549 is "D-glucose 1-phosphate [intracellular]";  // CHEBI:16077
  species s_0553 in intracellular = 0.549; s_0553 is "D-mannose 1-phosphate [intracellular]";  // CHEBI:35374
  species s_0554 in intracellular = 0.549; s_0554 is "D-mannose 6-phosphate [intracellular]";  // CHEBI:17369
  species s_0557 in intracellular = 0.549; s_0557 is "D-ribulose 5-phosphate [intracellular]";  // CHEBI:17363
  species s_0561 in intracellular = 0.549; s_0561 is "D-xylulose 5-phosphate [intracellular]";  // CHEBI:16332
  species dADP_intracellular in intracellular = 0.549; dADP_intracellular is "dADP [intracellular]";  // CHEBI:16174
  species dAMP_intracellular in intracellular = 0.549; dAMP_intracellular is "dAMP [intracellular]";  // CHEBI:17713
  species dATP_intracellular in intracellular = 0.549; dATP_intracellular is "dATP [intracellular]";  // CHEBI:16284
  species dCMP_intracellular in intracellular = 0.549; dCMP_intracellular is "dCMP [intracellular]";  // CHEBI:15918
  species decanoate_intracellular in intracellular = 0.549; decanoate_intracellular is "decanoate [intracellular]";  // CHEBI:27689
  species decanoyl_CoA_intracellular in intracellular = 0.549; decanoyl_CoA_intracellular is "decanoyl-CoA [intracellular]";  // CHEBI:28493
  species dGDP_intracellular in intracellular = 0.549; dGDP_intracellular is "dGDP [intracellular]";  // CHEBI:28862
  species dGMP_intracellular in intracellular = 0.549; dGMP_intracellular is "dGMP [intracellular]";  // CHEBI:16192
  species diglyceride_intracellular in intracellular = 0.549; diglyceride_intracellular is "diglyceride [intracellular]";  // CHEBI:18035
  species dihydrofolic_acid_intracellular in intracellular = 0.549; dihydrofolic_acid_intracellular is "dihydrofolic acid [intracellular]";  // CHEBI:15633
  species diphosphate_intracellular in intracellular = 0.549; diphosphate_intracellular is "diphosphate [intracellular]";  // CHEBI:18361
  species s_0615 in intracellular = 0.549; s_0615 is "dolichyl D-mannosyl phosphate [intracellular]";  // CHEBI:15809
  species dolichyl_phosphate_intracellular in intracellular = 0.549; dolichyl_phosphate_intracellular is "dolichyl phosphate [intracellular]";  // CHEBI:16214
  species dTMP_intracellular in intracellular = 0.549; dTMP_intracellular is "dTMP [intracellular]";  // CHEBI:17013
  species dUDP_intracellular in intracellular = 0.549; dUDP_intracellular is "dUDP [intracellular]";  // CHEBI:28850
  species dUMP_intracellular in intracellular = 0.549; dUMP_intracellular is "dUMP [intracellular]";  // CHEBI:17622
  species episterol_intracellular in intracellular = 0.549; episterol_intracellular is "episterol [intracellular]";  // CHEBI:23929
  species s_0632 in intracellular = 0.549; s_0632 is "ergosta-5,7,22,24(28)-tetraen-3beta-ol [intracellular]";  // CHEBI:18249
  species ergosterol_intracellular in intracellular = 0.549; ergosterol_intracellular is "ergosterol [intracellular]";  // CHEBI:16933
  species ergosterol_ester_intracellular in intracellular = 0.549; ergosterol_ester_intracellular is "ergosterol ester [intracellular]";  // CHEBI:52320
  species ethanol_intracellular in intracellular = 50; ethanol_intracellular is "ethanol [intracellular]";  // CHEBI:16236
  species FAD_intracellular in intracellular = 0.549; FAD_intracellular is "FAD [intracellular]";  // CHEBI:16238
  species FADH2_intracellular in intracellular = 0.549; FADH2_intracellular is "FADH2 [intracellular]";  // CHEBI:17877
  species fatty_acid_intracellular in intracellular = 0.549; fatty_acid_intracellular is "fatty acid [intracellular]";  // CHEBI:35366
  species fecosterol_intracellular in intracellular = 0.549; fecosterol_intracellular is "fecosterol [intracellular]";  // CHEBI:17038
  species formate_intracellular in intracellular = 0.549; formate_intracellular is "formate [intracellular]";  // CHEBI:15740
  species fumarate_2_intracellular in intracellular = 0.549; fumarate_2_intracellular is "fumarate(2-) [intracellular]";  // CHEBI:29806
  species GDP_intracellular in intracellular = 0.549; GDP_intracellular is "GDP [intracellular]";  // CHEBI:17552
  species s_0710 in intracellular = 0.549; s_0710 is "GDP-alpha-D-mannose [intracellular]";  // CHEBI:15820
  species s_0712 in intracellular = 0.549; s_0712 is "geranyl diphosphate [intracellular]";  // CHEBI:17211
  species s_0731 in intracellular = 0.0436363; s_0731 is "glyceraldehyde 3-phosphate [intracellular]";  // CHEBI:17138
  species glycerol_intracellular in intracellular = 0.15; glycerol_intracellular is "glycerol [intracellular]";  // CHEBI:17754
  species glycerone_intracellular in intracellular = 0.549; glycerone_intracellular is "glycerone [intracellular]";  // CHEBI:16016
  species s_0735 in intracellular = 0.601873; s_0735 is "glycerone phosphate [intracellular]";  // CHEBI:16108
  species glycine_intracellular in intracellular = 0.549; glycine_intracellular is "glycine [intracellular]";  // CHEBI:15428
  species glycogen_intracellular in intracellular = 0.549; glycogen_intracellular is "glycogen [intracellular]";  // CHEBI:28087
  species glyoxylate_intracellular in intracellular = 0.549; glyoxylate_intracellular is "glyoxylate [intracellular]";  // CHEBI:36655
  species GMP_intracellular in intracellular = 0.549; GMP_intracellular is "GMP [intracellular]";  // CHEBI:17345
  species GTP_intracellular in intracellular = 0.549; GTP_intracellular is "GTP [intracellular]";  // CHEBI:37565
  species homocitrate_3_intracellular in intracellular = 0.549; homocitrate_3_intracellular is "homocitrate(3-) [intracellular]";  // CHEBI:36457
  species homoisocitrate_3_intracellular in intracellular = 0.549; homoisocitrate_3_intracellular is "homoisocitrate(3-) [intracellular]";  // CHEBI:30904
  species hydrogen_peroxide_intracellular in intracellular = 0.549; hydrogen_peroxide_intracellular is "hydrogen peroxide [intracellular]";  // CHEBI:16240
  species hydrogen_sulfide_intracellular in intracellular = 0.549; hydrogen_sulfide_intracellular is "hydrogen sulfide [intracellular]";  // CHEBI:16136
  species IMP_intracellular in intracellular = 0.549; IMP_intracellular is "IMP [intracellular]";  // CHEBI:17202
  species s_0824 in intracellular = 0.549; s_0824 is "inositol phosphomannosylinositol phosphoceramide [intracellular]";  // CHEBI:53005
  species s_0828 in intracellular = 0.549; s_0828 is "inositol-P-ceramide B [intracellular]";  // isVersionOf CHEBI:53004
  species isocitrate_3_intracellular in intracellular = 0.549; isocitrate_3_intracellular is "isocitrate(3-) [intracellular]";  // CHEBI:16087
  species s_0850 in intracellular = 0.549; s_0850 is "isopentenyl diphosphate [intracellular]";  // CHEBI:16584
  species s_0859 in intracellular = 0.549; s_0859 is "keto-phenylpyruvate [intracellular]";  // CHEBI:18005
  species L_2_aminoadipate_2_intracellular in intracellular = 0.549; L_2_aminoadipate_2_intracellular is "L-2-aminoadipate(2-) [intracellular]";  // CHEBI:17082
  species L_alanine_intracellular in intracellular = 0.549; L_alanine_intracellular is "L-alanine [intracellular]";  // CHEBI:16977
  species L_allysine_intracellular in intracellular = 0.549; L_allysine_intracellular is "L-allysine [intracellular]";  // CHEBI:17917
  species L_arginine_intracellular in intracellular = 0.549; L_arginine_intracellular is "L-arginine [intracellular]";  // CHEBI:16467
  species L_asparagine_intracellular in intracellular = 0.549; L_asparagine_intracellular is "L-asparagine [intracellular]";  // CHEBI:17196
  species L_aspartate_intracellular in intracellular = 0.549; L_aspartate_intracellular is "L-aspartate [intracellular]";  // CHEBI:29991
  species s_0886 in intracellular = 0.549; s_0886 is "L-aspartate 4-semialdehyde [intracellular]";  // CHEBI:13086
  species L_citrulline_intracellular in intracellular = 0.549; L_citrulline_intracellular is "L-citrulline [intracellular]";  // CHEBI:16349
  species L_cystathionine_intracellular in intracellular = 0.549; L_cystathionine_intracellular is "L-cystathionine [intracellular]";  // CHEBI:17482
  species L_cysteine_intracellular in intracellular = 0.549; L_cysteine_intracellular is "L-cysteine [intracellular]";  // CHEBI:17561
  species s_0894 in intracellular = 0.549; s_0894 is "L-gamma-glutamyl phosphate [intracellular]";  // CHEBI:17798
  species L_glutamate_intracellular in intracellular = 0.549; L_glutamate_intracellular is "L-glutamate [intracellular]";  // CHEBI:29985
  species s_0905 in intracellular = 0.549; s_0905 is "L-glutamic 5-semialdehyde [intracellular]";  // CHEBI:17232
  species L_glutamine_intracellular in intracellular = 0.549; L_glutamine_intracellular is "L-glutamine [intracellular]";  // CHEBI:18050
  species L_histidine_intracellular in intracellular = 0.549; L_histidine_intracellular is "L-histidine [intracellular]";  // CHEBI:15971
  species L_histidinol_intracellular in intracellular = 0.549; L_histidinol_intracellular is "L-histidinol [intracellular]";  // CHEBI:16255
  species s_0916 in intracellular = 0.549; s_0916 is "L-histidinol phosphate [intracellular]";  // CHEBI:16996
  species L_homocysteine_intracellular in intracellular = 0.549; L_homocysteine_intracellular is "L-homocysteine [intracellular]";  // CHEBI:17588
  species L_homoserine_intracellular in intracellular = 0.549; L_homoserine_intracellular is "L-homoserine [intracellular]";  // CHEBI:15699
  species L_isoleucine_intracellular in intracellular = 0.549; L_isoleucine_intracellular is "L-isoleucine [intracellular]";  // CHEBI:17191
  species L_leucine_intracellular in intracellular = 0.549; L_leucine_intracellular is "L-leucine [intracellular]";  // CHEBI:15603
  species L_lysine_intracellular in intracellular = 0.549; L_lysine_intracellular is "L-lysine [intracellular]";  // CHEBI:18019
  species L_methionine_intracellular in intracellular = 0.549; L_methionine_intracellular is "L-methionine [intracellular]";  // CHEBI:16643
  species L_phenylalanine_intracellular in intracellular = 0.549; L_phenylalanine_intracellular is "L-phenylalanine [intracellular]";  // CHEBI:17295
  species L_proline_intracellular in intracellular = 0.549; L_proline_intracellular is "L-proline [intracellular]";  // CHEBI:17203
  species L_saccharopine_intracellular in intracellular = 0.549; L_saccharopine_intracellular is "L-saccharopine [intracellular]";  // CHEBI:16927
  species L_serine_intracellular in intracellular = 0.549; L_serine_intracellular is "L-serine [intracellular]";  // CHEBI:17115
  species L_threonine_intracellular in intracellular = 1; L_threonine_intracellular is "L-threonine [intracellular]";  // CHEBI:16857
  species L_tryptophan_intracellular in intracellular = 1; L_tryptophan_intracellular is "L-tryptophan [intracellular]";  // CHEBI:16828
  species L_tyrosine_intracellular in intracellular = 0.549; L_tyrosine_intracellular is "L-tyrosine [intracellular]";  // CHEBI:17895
  species L_valine_intracellular in intracellular = 1; L_valine_intracellular is "L-valine [intracellular]";  // CHEBI:16414
  species lanosterol_intracellular in intracellular = 0.549; lanosterol_intracellular is "lanosterol [intracellular]";  // CHEBI:16521
  species laurate_intracellular in intracellular = 0.549; laurate_intracellular is "laurate [intracellular]";  // CHEBI:18262
  species lauroyl_CoA_intracellular in intracellular = 0.549; lauroyl_CoA_intracellular is "lauroyl-CoA [intracellular]";  // CHEBI:15521
  species lignocerate_intracellular in intracellular = 0.549; lignocerate_intracellular is "lignocerate [intracellular]";  // CHEBI:31014
  species $lipid_intracellular in intracellular = 0.549; lipid_intracellular is "lipid [intracellular]";  // CHEBI:18059
  species malonyl_CoA_intracellular in intracellular = 0.549; malonyl_CoA_intracellular is "malonyl-CoA [intracellular]";  // CHEBI:15531
  species mannan_intracellular in intracellular = 0.549; mannan_intracellular is "mannan [intracellular]";  // CHEBI:28808
  species s_1013 in intracellular = 0.549; s_1013 is "mannosylinositol phosphorylceramide [intracellular]";  // CHEBI:25168
  species myo_inositol_intracellular in intracellular = 0.549; myo_inositol_intracellular is "myo-inositol [intracellular]";  // CHEBI:17268
  species myristate_intracellular in intracellular = 0.549; myristate_intracellular is "myristate [intracellular]";  // CHEBI:30807
  species myristoyl_CoA_intracellular in intracellular = 0.549; myristoyl_CoA_intracellular is "myristoyl-CoA [intracellular]";  // CHEBI:15532
  species s_1048 in intracellular = 0.549; s_1048 is "N(1)-(5-phospho-D-ribosyl)glycinamide [intracellular]";  // CHEBI:18349
  species s_1051 in intracellular = 0.549; s_1051 is "N(2)-acetyl-L-ornithine [intracellular]";  // CHEBI:16543
  species s_1052 in intracellular = 0.549; s_1052 is "N(2)-formyl-N(1)-(5-phospho-D-ribosyl)glycinamide [intracellular]";  // CHEBI:18272
  species s_1053 in intracellular = 0.549; s_1053 is "N(6)-(1,2-dicarboxyethyl)-AMP [intracellular]";  // CHEBI:15919
  species s_1060 in intracellular = 0.549; s_1060 is "N-(24-hydroxytetracosanyl)sphinganine [intracellular]";  // CHEBI:52371
  species s_1066 in intracellular = 0.549; s_1066 is "N-(5-phospho-beta-D-ribosyl)anthranilate [intracellular]";  // CHEBI:18277
  species s_1070 in intracellular = 0.549; s_1070 is "N-acetyl-L-gamma-glutamyl phosphate [intracellular]";  // CHEBI:16878
  species s_1071 in intracellular = 0.549; s_1071 is "N-acetyl-L-glutamate(2-) [intracellular]";  // CHEBI:44337
  species s_1073 in intracellular = 0.549; s_1073 is "N-carbamoyl-L-aspartate [intracellular]";  // CHEBI:32814
  species s_1080 in intracellular = 0.549; s_1080 is "N-tetracosanylsphinganine [intracellular]";  // CHEBI:52961
  species NAD_intracellular in intracellular = 1.50326; NAD_intracellular is "NAD(+) [intracellular]";  // CHEBI:15846
  species NADH_intracellular in intracellular = 0.0867353; NADH_intracellular is "NADH [intracellular]";  // CHEBI:16908
  species NADP_intracellular in intracellular = 0.549; NADP_intracellular is "NADP(+) [intracellular]";  // CHEBI:18009
  species NADPH_intracellular in intracellular = 0.549; NADPH_intracellular is "NADPH [intracellular]";  // CHEBI:16474
  species s_1117 in intracellular = 0.549; s_1117 is "O-acetyl-L-homoserine [intracellular]";  // CHEBI:16288
  species s_1122 in intracellular = 0.549; s_1122 is "O-phospho-L-homoserine [intracellular]";  // CHEBI:15961
  species octanoate_intracellular in intracellular = 0.549; octanoate_intracellular is "octanoate [intracellular]";  // CHEBI:25646
  species octanoyl_CoA_intracellular in intracellular = 0.549; octanoyl_CoA_intracellular is "octanoyl-CoA [intracellular]";  // CHEBI:15533
  species ornithine_intracellular in intracellular = 0.549; ornithine_intracellular is "ornithine [intracellular]";  // CHEBI:18257
  species orotate_intracellular in intracellular = 0.549; orotate_intracellular is "orotate [intracellular]";  // CHEBI:30839
  species s_1155 in intracellular = 0.549; s_1155 is "orotidine 5'-(dihydrogen phosphate) [intracellular]";  // CHEBI:15842
  species oxaloacetate_2_intracellular in intracellular = 0.549; oxaloacetate_2_intracellular is "oxaloacetate(2-) [intracellular]";  // CHEBI:16452
  species oxygen_intracellular in intracellular = 0.549; oxygen_intracellular is "oxygen [intracellular]";  // CHEBI:15379
  species palmitate_intracellular in intracellular = 0.549; palmitate_intracellular is "palmitate [intracellular]";  // CHEBI:29889
  species palmitoyl_CoA_intracellular in intracellular = 0.549; palmitoyl_CoA_intracellular is "palmitoyl-CoA [intracellular]";  // CHEBI:15525
  species $phosphate_intracellular in intracellular = 0.549; phosphate_intracellular is "phosphate [intracellular]";  // CHEBI:43474
  species phosphatidate_intracellular in intracellular = 0.549; phosphatidate_intracellular is "phosphatidate [intracellular]";  // CHEBI:16337
  species s_1219 in intracellular = 0.549; s_1219 is "phosphatidyl-L-serine [intracellular]";  // CHEBI:18303
  species s_1225 in intracellular = 0.549; s_1225 is "phosphatidyl-N,N-dimethylethanolamine [intracellular]";  // CHEBI:52332
  species s_1226 in intracellular = 0.549; s_1226 is "phosphatidyl-N-methylethanolamine [intracellular]";  // CHEBI:15958
  species s_1228 in intracellular = 0.549; s_1228 is "phosphatidylcholine [intracellular]";  // CHEBI:49183
  species s_1233 in intracellular = 0.549; s_1233 is "phosphatidylethanolamine [intracellular]";  // CHEBI:16038
  species s_1243 in intracellular = 0.0271093; s_1243 is "phosphoenolpyruvate [intracellular]";  // CHEBI:18021
  species prenyl_diphosphate_intracellular in intracellular = 0.549; prenyl_diphosphate_intracellular is "prenyl diphosphate [intracellular]";  // CHEBI:16057
  species prephenate_2_intracellular in intracellular = 0.549; prephenate_2_intracellular is "prephenate(2-) [intracellular]";  // CHEBI:29934
  species pyruvate_intracellular in intracellular = 0.0605905; pyruvate_intracellular is "pyruvate [intracellular]";  // CHEBI:15361
  species riboflavin_intracellular in intracellular = 0.549; riboflavin_intracellular is "riboflavin [intracellular]";  // CHEBI:17015
  species s_1290 in intracellular = 0.549; s_1290 is "S-adenosyl-L-homocysteine [intracellular]";  // CHEBI:16680
  species s_1293 in intracellular = 0.549; s_1293 is "S-adenosyl-L-methionine [intracellular]";  // CHEBI:15414
  species s_1304 in intracellular = 0.549; s_1304 is "sedoheptulose 7-phosphate [intracellular]";  // CHEBI:15721
  species shikimate_intracellular in intracellular = 0.549; shikimate_intracellular is "shikimate [intracellular]";  // CHEBI:36208
  species s_1315 in intracellular = 12.8511; s_1315 is "sn-glycerol 3-phosphate [intracellular]";  // CHEBI:15978
  species sphinganine_intracellular in intracellular = 0.549; sphinganine_intracellular is "sphinganine [intracellular]";  // CHEBI:16566
  species squalene_intracellular in intracellular = 0.549; squalene_intracellular is "squalene [intracellular]";  // CHEBI:15440
  species stearate_intracellular in intracellular = 0.549; stearate_intracellular is "stearate [intracellular]";  // CHEBI:25629
  species stearoyl_CoA_intracellular in intracellular = 0.549; stearoyl_CoA_intracellular is "stearoyl-CoA [intracellular]";  // CHEBI:15541
  species succinate_2_intracellular in intracellular = 0.549; succinate_2_intracellular is "succinate(2-) [intracellular]";  // CHEBI:30031
  species succinyl_CoA_intracellular in intracellular = 0.549; succinyl_CoA_intracellular is "succinyl-CoA [intracellular]";  // CHEBI:15380
  species sulphate_intracellular in intracellular = 0.549; sulphate_intracellular is "sulphate [intracellular]";  // CHEBI:16189
  species sulphite_intracellular in intracellular = 0.549; sulphite_intracellular is "sulphite [intracellular]";  // CHEBI:17359
  species tetracosanoyl_CoA_intracellular in intracellular = 0.549; tetracosanoyl_CoA_intracellular is "tetracosanoyl-CoA [intracellular]";  // CHEBI:52974
  species s_1379 in intracellular = 0.549; s_1379 is "trans-4-hydroxy-L-proline [intracellular]";  // CHEBI:18095
  species $triglyceride_intracellular in intracellular = 0.549; triglyceride_intracellular is "triglyceride [intracellular]";  // CHEBI:17855
  species UDP_intracellular in intracellular = 0.549; UDP_intracellular is "UDP [intracellular]";  // CHEBI:17659
  species UDP_D_glucose_intracellular in intracellular = 0.549; UDP_D_glucose_intracellular is "UDP-D-glucose [intracellular]";  // CHEBI:18066
  species UMP_intracellular in intracellular = 0.549; UMP_intracellular is "UMP [intracellular]";  // CHEBI:16695
  species UTP_intracellular in intracellular = 0.549; UTP_intracellular is "UTP [intracellular]";  // CHEBI:46398
  species zymosterol_intracellular in intracellular = 0.549; zymosterol_intracellular is "zymosterol [intracellular]";  // CHEBI:18252
  species s_1455 in intracellular = 0.549; s_1455 is "zymosterol intermediate 1a [intracellular]";  // CHEBI:52388
  species s_1456 in intracellular = 0.549; s_1456 is "zymosterol intermediate 1b [intracellular]";  // CHEBI:52615
  species s_1457 in intracellular = 0.549; s_1457 is "zymosterol intermediate 1c [intracellular]";  // CHEBI:52389
  species s_1458 in intracellular = 0.549; s_1458 is "zymosterol intermediate 2 [intracellular]";  // CHEBI:52386
  species s_1517 in intracellular = 0.549; s_1517 is "thioredoxin disulfide [intracellular]";  // CHEBI:18191
  species s_1521 in intracellular = 0.549; s_1521 is "thioredoxin dithiol [intracellular]";  // CHEBI:15967
  species $s_0763_b in intracellular = 0.549; s_0763_b is "H+ [intracellular]";  // CHEBI:24636
  species $s_1434_b in intracellular = 0.549; s_1434_b is "water [intracellular]";  // CHEBI:15377
  species glucose_extracellular in intracellular = 1; glucose_extracellular is "glucose [extracellular]";
  species $s_0431_b in extracellular = 38; s_0431_b is "ammonium [extracellular]";  // CHEBI:28938
  species $s_0464_b in extracellular = 24.5; s_0464_b is "biomass [extracellular]";  // isDescribedBy ECO:0000035
  species $s_0472_b in extracellular = 1e-5; s_0472_b is "carbon dioxide [extracellular]";  // CHEBI:16526
  species $s_0547_b in extracellular = 11.1; s_0547_b is "D-glucose [extracellular]";  // CHEBI:17634
  species $s_0651_b in extracellular = 24.5; s_0651_b is "ethanol [extracellular]";  // CHEBI:16236
  species $s_0766_b in extracellular = 0.1; s_0766_b is "H+ [extracellular]";  // CHEBI:24636
  species $s_1162_b in extracellular = 24.5; s_1162_b is "oxygen [extracellular]";  // CHEBI:15379
  species $s_1209_b in extracellular = 24.5; s_1209_b is "phosphate [extracellular]";  // CHEBI:43474
  species $s_1339_b in extracellular = 1; s_1339_b is "succinate(2-) [extracellular]";  // CHEBI:30031
  species $s_1348_b in extracellular = 42.2; s_1348_b is "sulphate [extracellular]";  // CHEBI:16189

  // Reactions:
  // GENE_ASSOCIATION:(YGR032W or YLR342W)
  _1_3_beta_glucan_synthase: UDP_D_glucose_intracellular -> _1_3_beta_D_glucan_intracellular + $s_0763_b + UDP_intracellular; intracellular*function_1(Keq_r_0005, Vmax_r_0005, intracellular, kmp_s_0001r_0005, kmp_s_0763_br_0005, kmp_s_1411r_0005, kms_s_1415r_0005, _1_3_beta_D_glucan_intracellular, s_0763_b, UDP_intracellular, UDP_D_glucose_intracellular); _1_3_beta_glucan_synthase is "1,3-beta-glucan synthase";
    Keq_r_0005 = 0.331541; Vmax_r_0005 = 6.24684; kmp_s_0001r_0005 = 0.549; kmp_s_0763_br_0005 = 0.549; kmp_s_1411r_0005 = 0.549; kms_s_1415r_0005 = 0.549;
  // GENE_ASSOCIATION:YEL011W
  r_0006: amylose_intracellular -> glycogen_intracellular + $s_1434_b; intracellular*function_2(Keq_r_0006, Vmax_r_0006, intracellular, kmp_s_0743r_0006, kmp_s_1434_br_0006, kms_s_0438r_0006, amylose_intracellular, glycogen_intracellular, s_1434_b); r_0006 is "1,4-alpha-glucan branching enzyme";
    Keq_r_0006 = 0.6039; Vmax_r_0006 = 1.58399; kmp_s_0743r_0006 = 0.549; kmp_s_1434_br_0006 = 0.549; kms_s_0438r_0006 = 0.549;
  // GENE_ASSOCIATION:YIL020C
  r_0008: s_0079 -> s_0315; intracellular*function_3(Keq_r_0008, Vmax_r_0008, intracellular, kmp_s_0315r_0008, kms_s_0079r_0008, s_0079, s_0315); r_0008 is "1-(5-phosphoribosyl)-5-[(5-phosphoribosylamino)methylideneamino)imidazole-4-carboxamide isomerase";
    Keq_r_0008 = 1.1; Vmax_r_0008 = 0.13761; kmp_s_0315r_0008 = 0.549; kms_s_0079r_0008 = 0.549;
  // GENE_ASSOCIATION:YDL052C
  r_0009: s_0083 + acyl_CoA_intracellular -> coenzyme_A_intracellular + 4 $s_0763_b + phosphatidate_intracellular; intracellular*function_4(Keq_r_0009, Vmax_r_0009, intracellular, kmp_s_0514r_0009, kmp_s_0763_br_0009, kmp_s_1215r_0009, kms_s_0083r_0009, kms_s_0386r_0009, s_0083, acyl_CoA_intracellular, coenzyme_A_intracellular, s_0763_b, phosphatidate_intracellular); r_0009 is "1-acyl-sn-gylcerol-3-phosphate acyltransferase";
    Keq_r_0009 = 0.0999269; Vmax_r_0009 = 0.0421078; kmp_s_0514r_0009 = 0.549; kmp_s_0763_br_0009 = 0.549; kmp_s_1215r_0009 = 0.549; kms_s_0083r_0009 = 0.549; kms_s_0386r_0009 = 0.549;
  // GENE_ASSOCIATION:YOL066C
  r_0014: s_0146 + $s_0763_b + $s_1434_b -> s_0319 + ammonium_intracellular; intracellular*function_5(Keq_r_0014, Vmax_r_0014, intracellular, kmp_s_0319r_0014, kmp_s_0430r_0014, kms_s_0146r_0014, kms_s_0763_br_0014, kms_s_1434_br_0014, s_0146, s_0319, ammonium_intracellular, s_0763_b, s_1434_b); r_0014 is "2,5-diamino-6-ribitylamino-4(3H)-pyrimidinone 5'-phosphate deaminase";
    Keq_r_0014 = 2.00364; Vmax_r_0014 = 0.00605002; kmp_s_0319r_0014 = 0.549; kmp_s_0430r_0014 = 0.549; kms_s_0146r_0014 = 0.549; kms_s_0763_br_0014 = 0.549; kms_s_1434_br_0014 = 0.549;
  // GENE_ASSOCIATION:YBR153W
  r_0015: s_0145 + $s_0763_b + NADPH_intracellular -> s_0146 + NADP_intracellular; intracellular*function_6(Keq_r_0015, Vmax_r_0015, intracellular, kmp_s_0146r_0015, kmp_s_1091r_0015, kms_s_0145r_0015, kms_s_0763_br_0015, kms_s_1096r_0015, s_0145, s_0146, s_0763_b, NADP_intracellular, NADPH_intracellular); r_0015 is "2,5-diamino-6-ribosylamino-4(3H)-pyrimidinone 5'-phosphate reductase (NADPH)";
    Keq_r_0015 = 2.00364; Vmax_r_0015 = 0.00605002; kmp_s_0146r_0015 = 0.549; kmp_s_1091r_0015 = 0.549; kms_s_0145r_0015 = 0.549; kms_s_0763_br_0015 = 0.549; kms_s_1096r_0015 = 0.549;
  // GENE_ASSOCIATION:(YCL009C and YMR108W)
  r_0016: _2_oxobutanoate_intracellular + $s_0763_b + pyruvate_intracellular -> s_0042 + carbon_dioxide_intracellular; intracellular*function_7(Keq_r_0016, Vmax_r_0016, intracellular, kmp_s_0042r_0016, kmp_s_0470r_0016, kms_s_0183r_0016, kms_s_0763_br_0016, kms_s_1277r_0016, s_0042, _2_oxobutanoate_intracellular, carbon_dioxide_intracellular, s_0763_b, pyruvate_intracellular); r_0016 is "2-aceto-2-hydroxybutanoate synthase";
    Keq_r_0016 = 33.0686; Vmax_r_0016 = 1.15193; kmp_s_0042r_0016 = 0.549; kmp_s_0470r_0016 = 1; kms_s_0183r_0016 = 0.549; kms_s_0763_br_0016 = 0.549; kms_s_1277r_0016 = 0.0605905;
  _2_aminoadipate_transaminase: _2_oxoadipic_acid_intracellular + L_glutamate_intracellular -> _2_oxoglutarate_intracellular + L_2_aminoadipate_2_intracellular; intracellular*function_8(Keq_r_0018, Vmax_r_0018, intracellular, kmp_s_0185r_0018, kmp_s_0861r_0018, kms_s_0181r_0018, kms_s_0899r_0018, _2_oxoadipic_acid_intracellular, _2_oxoglutarate_intracellular, L_2_aminoadipate_2_intracellular, L_glutamate_intracellular); _2_aminoadipate_transaminase is "2-aminoadipate transaminase";  // isDescribedBy ECO:0000033
    Keq_r_0018 = 1.1; Vmax_r_0018 = 1.0241; kmp_s_0185r_0018 = 0.549; kmp_s_0861r_0018 = 0.549; kms_s_0181r_0018 = 0.549; kms_s_0899r_0018 = 0.549;
  // GENE_ASSOCIATION:YDR035W or (YBR249C or YDR035W)
  r_0021: s_0533 + s_1243 + $s_1434_b -> s_0356 + $phosphate_intracellular; intracellular*function_9(Keq_r_0021, Vmax_r_0021, intracellular, kmp_s_0356r_0021, kmp_s_1207r_0021, kms_s_0533r_0021, kms_s_1243r_0021, kms_s_1434_br_0021, s_0356, s_0533, phosphate_intracellular, s_1243, s_1434_b); r_0021 is "2-deoxy-D-arabino-heptulosonate 7-phosphate synthetase";
    Keq_r_0021 = 40.5765; Vmax_r_0021 = 1.60931; kmp_s_0356r_0021 = 0.549; kmp_s_1207r_0021 = 0.549; kms_s_0533r_0021 = 0.549; kms_s_1243r_0021 = 0.0271093; kms_s_1434_br_0021 = 0.549;
  // GENE_ASSOCIATION:YGL009C
  _2_isopropylmalate_hydratase: s_0167 -> s_0170 + $s_1434_b; intracellular*function_10(Keq_r_0025, Vmax_r_0025, intracellular, kmp_s_0170r_0025, kmp_s_1434_br_0025, kms_s_0167r_0025, s_0167, s_0170, s_1434_b); _2_isopropylmalate_hydratase is "2-isopropylmalate hydratase";
    Keq_r_0025 = 0.6039; Vmax_r_0025 = 0.764496; kmp_s_0170r_0025 = 0.549; kmp_s_1434_br_0025 = 0.549; kms_s_0167r_0025 = 0.549;
  // GENE_ASSOCIATION:(YNL104C or YOR108W) or YNL104C
  _2_isopropylmalate_synthase: s_0238 + acetyl_CoA_intracellular + $s_1434_b -> s_0167 + coenzyme_A_intracellular + $s_0763_b; intracellular*function_11(Keq_r_0026, Vmax_r_0026, intracellular, kmp_s_0167r_0026, kmp_s_0514r_0026, kmp_s_0763_br_0026, kms_s_0238r_0026, kms_s_0380r_0026, kms_s_1434_br_0026, s_0167, s_0238, acetyl_CoA_intracellular, coenzyme_A_intracellular, s_0763_b, s_1434_b); _2_isopropylmalate_synthase is "2-isopropylmalate synthase";
    Keq_r_0026 = 1.1; Vmax_r_0026 = 2.2935; kmp_s_0167r_0026 = 0.549; kmp_s_0514r_0026 = 0.549; kmp_s_0763_br_0026 = 0.549; kms_s_0238r_0026 = 0.549; kms_s_0380r_0026 = 0.549; kms_s_1434_br_0026 = 0.549;
  // GENE_ASSOCIATION:YDR234W
  _2_methylcitrate_dehydratase: homocitrate_3_intracellular -> s_0468 + $s_1434_b; intracellular*function_12(Keq_r_0029, Vmax_r_0029, intracellular, kmp_s_0468r_0029, kmp_s_1434_br_0029, kms_s_0798r_0029, s_0468, homocitrate_3_intracellular, s_1434_b); _2_methylcitrate_dehydratase is "2-methylcitrate dehydratase";
    Keq_r_0029 = 0.6039; Vmax_r_0029 = 0.731496; kmp_s_0468r_0029 = 0.549; kmp_s_1434_br_0029 = 0.549; kms_s_0798r_0029 = 0.549;
  // GENE_ASSOCIATION:YJR148W or YHR208W
  r_0031: s_0010 + $s_0763_b -> s_0297 + carbon_dioxide_intracellular; intracellular*function_13(Keq_r_0031, Vmax_r_0031, intracellular, kmp_s_0297r_0031, kmp_s_0470r_0031, kms_s_0010r_0031, kms_s_0763_br_0031, s_0010, s_0297, carbon_dioxide_intracellular, s_0763_b); r_0031 is "2-oxo-4-methyl-3-carboxypentanoate decarboxylation";
    Keq_r_0031 = 2.00364; Vmax_r_0031 = 1.0703; kmp_s_0297r_0031 = 0.549; kmp_s_0470r_0031 = 1; kms_s_0010r_0031 = 0.549; kms_s_0763_br_0031 = 0.549;
  // GENE_ASSOCIATION:YOL064C
  _3_5_bisphosphate_nucleotidase: s_0397 + $s_1434_b -> AMP_intracellular + $phosphate_intracellular; intracellular*function_14(Keq_r_0034, Vmax_r_0034, intracellular, kmp_s_0434r_0034, kmp_s_1207r_0034, kms_s_0397r_0034, kms_s_1434_br_0034, s_0397, AMP_intracellular, phosphate_intracellular, s_1434_b); _3_5_bisphosphate_nucleotidase is "3',5'-bisphosphate nucleotidase";
    Keq_r_0034 = 2.52371; Vmax_r_0034 = 0.39732; kmp_s_0434r_0034 = 1.25956; kmp_s_1207r_0034 = 0.549; kms_s_0397r_0034 = 0.549; kms_s_1434_br_0034 = 0.549;
  // GENE_ASSOCIATION:YDR487C
  r_0040: s_0557 -> s_0163 + formate_intracellular + $s_0763_b; intracellular*function_15(Keq_r_0040, Vmax_r_0040, intracellular, kmp_s_0163r_0040, kmp_s_0689r_0040, kmp_s_0763_br_0040, kms_s_0557r_0040, s_0163, s_0557, formate_intracellular, s_0763_b); r_0040 is "3,4-dihydroxy-2-butanone-4-phosphate synthase";
    Keq_r_0040 = 0.331541; Vmax_r_0040 = 0.00989001; kmp_s_0163r_0040 = 0.549; kmp_s_0689r_0040 = 0.549; kmp_s_0763_br_0040 = 0.549; kms_s_0557r_0040 = 0.549;
  // GENE_ASSOCIATION:YDR127W
  _3_dehydroquinate_dehydratase: _3_dehydroquinate_intracellular -> _3_dehydroshikimate_intracellular + $s_1434_b; intracellular*function_16(Keq_r_0042, Vmax_r_0042, intracellular, kmp_s_0217r_0042, kmp_s_1434_br_0042, kms_s_0216r_0042, _3_dehydroquinate_intracellular, _3_dehydroshikimate_intracellular, s_1434_b); _3_dehydroquinate_dehydratase is "3-dehydroquinate dehydratase";
    Keq_r_0042 = 0.6039; Vmax_r_0042 = 0.731496; kmp_s_0217r_0042 = 0.549; kmp_s_1434_br_0042 = 0.549; kms_s_0216r_0042 = 0.549;
  // GENE_ASSOCIATION:YDR127W
  _3_dehydroquinate_synthase: s_0356 -> _3_dehydroquinate_intracellular + $phosphate_intracellular; intracellular*function_17(Keq_r_0043, Vmax_r_0043, intracellular, kmp_s_0216r_0043, kmp_s_1207r_0043, kms_s_0356r_0043, _3_dehydroquinate_intracellular, s_0356, phosphate_intracellular); _3_dehydroquinate_synthase is "3-dehydroquinate synthase";
    Keq_r_0043 = 0.6039; Vmax_r_0043 = 0.731496; kmp_s_0216r_0043 = 0.549; kmp_s_1207r_0043 = 0.549; kms_s_0356r_0043 = 0.549;
  // GENE_ASSOCIATION:YBR265W
  _3_dehydrosphinganine_reductase: s_0218 + 2 $s_0763_b + NADPH_intracellular -> NADP_intracellular + sphinganine_intracellular; intracellular*function_18(Keq_r_0044, Vmax_r_0044, intracellular, kmp_s_1091r_0044, kmp_s_1325r_0044, kms_s_0218r_0044, kms_s_0763_br_0044, kms_s_1096r_0044, s_0218, s_0763_b, NADP_intracellular, NADPH_intracellular, sphinganine_intracellular); _3_dehydrosphinganine_reductase is "3-dehydrosphinganine reductase";
    Keq_r_0044 = 3.64962; Vmax_r_0044 = 0.00279511; kmp_s_1091r_0044 = 0.549; kmp_s_1325r_0044 = 0.549; kms_s_0218r_0044 = 0.549; kms_s_0763_br_0044 = 0.549; kms_s_1096r_0044 = 0.549;
  // GENE_ASSOCIATION:YKR009C
  r_0057: s_0247 + $s_0763_b + NADH_intracellular -> s_0046 + NAD_intracellular; intracellular*function_19(Keq_r_0057, Vmax_r_0057, intracellular, kmp_s_0046r_0057, kmp_s_1082r_0057, kms_s_0247r_0057, kms_s_0763_br_0057, kms_s_1087r_0057, s_0046, s_0247, s_0763_b, NAD_intracellular, NADH_intracellular); r_0057 is "3-hydroxyacyl-CoA dehydrogenase (3-oxohexacosyl-CoA)";
    Keq_r_0057 = 34.7263; Vmax_r_0057 = 3.30332; kmp_s_0046r_0057 = 0.549; kmp_s_1082r_0057 = 1.50326; kms_s_0247r_0057 = 0.549; kms_s_0763_br_0057 = 0.549; kms_s_1087r_0057 = 0.0867353;
  // GENE_ASSOCIATION:YKR009C
  r_0058: _3_oxopalmitoyl_CoA_intracellular + $s_0763_b + NADH_intracellular -> s_0052 + NAD_intracellular; intracellular*function_20(Keq_r_0058, Vmax_r_0058, intracellular, kmp_s_0052r_0058, kmp_s_1082r_0058, kms_s_0257r_0058, kms_s_0763_br_0058, kms_s_1087r_0058, s_0052, _3_oxopalmitoyl_CoA_intracellular, s_0763_b, NAD_intracellular, NADH_intracellular); r_0058 is "3-hydroxyacyl-CoA dehydrogenase (3-oxohexadecanoyl-CoA)";
    Keq_r_0058 = 34.7263; Vmax_r_0058 = 3.30332; kmp_s_0052r_0058 = 0.549; kmp_s_1082r_0058 = 1.50326; kms_s_0257r_0058 = 0.549; kms_s_0763_br_0058 = 0.549; kms_s_1087r_0058 = 0.0867353;
  // GENE_ASSOCIATION:YKR009C
  r_0059: s_0254 + $s_0763_b + NADH_intracellular -> s_0234 + NAD_intracellular; intracellular*function_21(Keq_r_0059, Vmax_r_0059, intracellular, kmp_s_0234r_0059, kmp_s_1082r_0059, kms_s_0254r_0059, kms_s_0763_br_0059, kms_s_1087r_0059, s_0234, s_0254, s_0763_b, NAD_intracellular, NADH_intracellular); r_0059 is "3-hydroxyacyl-CoA dehydrogenase (3-oxooctadecanoyl-CoA)";
    Keq_r_0059 = 34.7263; Vmax_r_0059 = 3.30332; kmp_s_0234r_0059 = 0.549; kmp_s_1082r_0059 = 1.50326; kms_s_0254r_0059 = 0.549; kms_s_0763_br_0059 = 0.549; kms_s_1087r_0059 = 0.0867353;
  // GENE_ASSOCIATION:YKR009C
  r_0060: s_0261 + $s_0763_b + NADH_intracellular -> s_0055 + NAD_intracellular; intracellular*function_22(Keq_r_0060, Vmax_r_0060, intracellular, kmp_s_0055r_0060, kmp_s_1082r_0060, kms_s_0261r_0060, kms_s_0763_br_0060, kms_s_1087r_0060, s_0055, s_0261, s_0763_b, NAD_intracellular, NADH_intracellular); r_0060 is "3-hydroxyacyl-CoA dehydrogenase (3-oxotetradecanoyl-CoA)";
    Keq_r_0060 = 34.7263; Vmax_r_0060 = 3.30332; kmp_s_0055r_0060 = 0.549; kmp_s_1082r_0060 = 1.50326; kms_s_0261r_0060 = 0.549; kms_s_0763_br_0060 = 0.549; kms_s_1087r_0060 = 0.0867353;
  // GENE_ASSOCIATION:YGL009C
  _3_isopropylmalate_dehydratase: s_0170 + $s_1434_b -> s_0008; intracellular*function_23(Keq_r_0063, Vmax_r_0063, intracellular, kmp_s_0008r_0063, kms_s_0170r_0063, kms_s_1434_br_0063, s_0008, s_0170, s_1434_b); _3_isopropylmalate_dehydratase is "3-isopropylmalate dehydratase";
    Keq_r_0063 = 2.00364; Vmax_r_0063 = 0.764505; kmp_s_0008r_0063 = 0.549; kms_s_0170r_0063 = 0.549; kms_s_1434_br_0063 = 0.549;
  // GENE_ASSOCIATION:YCL018W
  _3_isopropylmalate_dehydrogenase: s_0008 + NAD_intracellular -> s_0010 + $s_0763_b + NADH_intracellular; intracellular*function_24(Keq_r_0064, Vmax_r_0064, intracellular, kmp_s_0010r_0064, kmp_s_0763_br_0064, kmp_s_1087r_0064, kms_s_0008r_0064, kms_s_1082r_0064, s_0008, s_0010, s_0763_b, NAD_intracellular, NADH_intracellular); _3_isopropylmalate_dehydrogenase is "3-isopropylmalate dehydrogenase";
    Keq_r_0064 = 0.0348439; Vmax_r_0064 = 1.68189; kmp_s_0010r_0064 = 0.549; kmp_s_0763_br_0064 = 0.549; kmp_s_1087r_0064 = 0.0867353; kms_s_0008r_0064 = 0.549; kms_s_1082r_0064 = 1.50326;
  // GENE_ASSOCIATION:YDR127W
  r_0068: s_0267 + s_1243 -> s_0330 + $phosphate_intracellular; intracellular*function_25(Keq_r_0068, Vmax_r_0068, intracellular, kmp_s_0330r_0068, kmp_s_1207r_0068, kms_s_0267r_0068, kms_s_1243r_0068, s_0267, s_0330, phosphate_intracellular, s_1243); r_0068 is "3-phosphoshikimate 1-carboxyvinyltransferase";
    Keq_r_0068 = 22.2765; Vmax_r_0068 = 1.0241; kmp_s_0330r_0068 = 0.549; kmp_s_1207r_0068 = 0.549; kms_s_0267r_0068 = 0.549; kms_s_1243r_0068 = 0.0271093;
  // GENE_ASSOCIATION:YGL125W
  r_0093: s_0307 + 2 $s_0763_b + NADPH_intracellular -> s_0328 + NADP_intracellular; intracellular*function_26(Keq_r_0093, Vmax_r_0093, intracellular, kmp_s_0328r_0093, kmp_s_1091r_0093, kms_s_0307r_0093, kms_s_0763_br_0093, kms_s_1096r_0093, s_0307, s_0328, s_0763_b, NADP_intracellular, NADPH_intracellular); r_0093 is "5,10-methylenetetrahydrofolatereductase (NADPH)";
    Keq_r_0093 = 3.64962; Vmax_r_0093 = 0.439232; kmp_s_0328r_0093 = 0.549; kmp_s_1091r_0093 = 0.549; kms_s_0307r_0093 = 0.549; kms_s_0763_br_0093 = 0.549; kms_s_1096r_0093 = 0.549;
  // GENE_ASSOCIATION:YLR355C
  r_0111: s_0150 + $s_0763_b + NADPH_intracellular -> s_0018 + NADP_intracellular; intracellular*function_27(Keq_r_0111, Vmax_r_0111, intracellular, kmp_s_0018r_0111, kmp_s_1091r_0111, kms_s_0150r_0111, kms_s_0763_br_0111, kms_s_1096r_0111, s_0018, s_0150, s_0763_b, NADP_intracellular, NADPH_intracellular); r_0111 is "acetohydroxy acid isomeroreductase";
    Keq_r_0111 = 2.00364; Vmax_r_0111 = 3.41221; kmp_s_0018r_0111 = 0.549; kmp_s_1091r_0111 = 0.549; kms_s_0150r_0111 = 0.549; kms_s_0763_br_0111 = 0.549; kms_s_1096r_0111 = 0.549;
  // GENE_ASSOCIATION:(YCL009C and YMR108W)
  acetolactate_synthase: $s_0763_b + 2 pyruvate_intracellular -> s_0150 + carbon_dioxide_intracellular; intracellular*function_28(Keq_r_0112, Vmax_r_0112, intracellular, kmp_s_0150r_0112, kmp_s_0470r_0112, kms_s_0763_br_0112, kms_s_1277r_0112, s_0150, carbon_dioxide_intracellular, s_0763_b, pyruvate_intracellular);
    Keq_r_0112 = 299.629; Vmax_r_0112 = 2.1714; kmp_s_0150r_0112 = 0.549; kmp_s_0470r_0112 = 1; kms_s_0763_br_0112 = 0.549; kms_s_1277r_0112 = 0.0605905;
  // GENE_ASSOCIATION:YPL028W
  acetyl_CoA_C_acetyltransferase: 2 acetyl_CoA_intracellular -> acetoacetyl_CoA_intracellular + coenzyme_A_intracellular; intracellular*function_29(Keq_r_0118, Vmax_r_0118, intracellular, kmp_s_0374r_0118, kmp_s_0514r_0118, kms_s_0380r_0118, acetoacetyl_CoA_intracellular, acetyl_CoA_intracellular, coenzyme_A_intracellular); acetyl_CoA_C_acetyltransferase is "acetyl-CoA C-acetyltransferase";
    Keq_r_0118 = 1.1; Vmax_r_0118 = 0.125399; kmp_s_0374r_0118 = 0.549; kmp_s_0514r_0118 = 0.549; kms_s_0380r_0118 = 0.549;
  // GENE_ASSOCIATION:YMR207C or YNR016C
  acetyl_Coa_carboxylase: acetyl_CoA_intracellular + ATP_intracellular + bicarbonate_intracellular -> ADP_intracellular + $s_0763_b + malonyl_CoA_intracellular + $phosphate_intracellular; intracellular*function_30(Keq_r_0123, Vmax_r_0123, intracellular, kmp_s_0400r_0123, kmp_s_0763_br_0123, kmp_s_1005r_0123, kmp_s_1207r_0123, kms_s_0380r_0123, kms_s_0446r_0123, kms_s_0458r_0123, acetyl_CoA_intracellular, ADP_intracellular, ATP_intracellular, bicarbonate_intracellular, s_0763_b, malonyl_CoA_intracellular, phosphate_intracellular); acetyl_Coa_carboxylase is "acetyl-Coa carboxylase";
    Keq_r_0123 = 0.950614; Vmax_r_0123 = 0.105501; kmp_s_0400r_0123 = 1.71907; kmp_s_0763_br_0123 = 0.549; kmp_s_1005r_0123 = 0.549; kmp_s_1207r_0123 = 0.549; kms_s_0380r_0123 = 0.549; kms_s_0446r_0123 = 1.09208; kms_s_0458r_0123 = 0.549;
  // GENE_ASSOCIATION:YBL015W
  acetyl_CoA_hydrolase: acetate_intracellular + coenzyme_A_intracellular + $s_0763_b -> acetyl_CoA_intracellular + $s_1434_b; intracellular*function_31(Keq_r_0125, Vmax_r_0125, intracellular, kmp_s_0380r_0125, kmp_s_1434_br_0125, kms_s_0369r_0125, kms_s_0514r_0125, kms_s_0763_br_0125, acetate_intracellular, acetyl_CoA_intracellular, coenzyme_A_intracellular, s_0763_b, s_1434_b); acetyl_CoA_hydrolase is "acetyl-CoA hydrolase";
    Keq_r_0125 = 2.00364; Vmax_r_0125 = 26.9831; kmp_s_0380r_0125 = 0.549; kmp_s_1434_br_0125 = 0.549; kms_s_0369r_0125 = 0.549; kms_s_0514r_0125 = 0.549; kms_s_0763_br_0125 = 0.549;
  // GENE_ASSOCIATION:(YAL054C or YLR153C) or YAL054C or YLR153C
  acetyl_CoA_synthetase: acetyl_CoA_intracellular + AMP_intracellular + diphosphate_intracellular -> acetate_intracellular + ATP_intracellular + coenzyme_A_intracellular; intracellular*function_32(Keq_r_0127, Vmax_r_0127, intracellular, kmp_s_0369r_0127, kmp_s_0446r_0127, kmp_s_0514r_0127, kms_s_0380r_0127, kms_s_0434r_0127, kms_s_0605r_0127, acetate_intracellular, acetyl_CoA_intracellular, AMP_intracellular, ATP_intracellular, coenzyme_A_intracellular, diphosphate_intracellular); acetyl_CoA_synthetase is "acetyl-CoA synthetase";
    Keq_r_0127 = 0.953736; Vmax_r_0127 = 25.905; kmp_s_0369r_0127 = 0.549; kmp_s_0446r_0127 = 1.09208; kmp_s_0514r_0127 = 0.549; kms_s_0380r_0127 = 0.549; kms_s_0434r_0127 = 1.25956; kms_s_0605r_0127 = 0.549;
  // GENE_ASSOCIATION:YER069W
  acetylglutamate_kinase: ATP_intracellular + s_1071 -> ADP_intracellular + s_1070; intracellular*function_33(Keq_r_0130, Vmax_r_0130, intracellular, kmp_s_0400r_0130, kmp_s_1070r_0130, kms_s_0446r_0130, kms_s_1071r_0130, ADP_intracellular, ATP_intracellular, s_1070, s_1071);
    Keq_r_0130 = 1.73154; Vmax_r_0130 = 0.58058; kmp_s_0400r_0130 = 1.71907; kmp_s_1070r_0130 = 0.549; kms_s_0446r_0130 = 1.09208; kms_s_1071r_0130 = 0.549;
  // GENE_ASSOCIATION:YOL140W
  acteylornithine_transaminase: s_0149 + L_glutamate_intracellular -> _2_oxoglutarate_intracellular + s_1051; intracellular*function_34(Keq_r_0133, Vmax_r_0133, intracellular, kmp_s_0185r_0133, kmp_s_1051r_0133, kms_s_0149r_0133, kms_s_0899r_0133, s_0149, _2_oxoglutarate_intracellular, L_glutamate_intracellular, s_1051);
    Keq_r_0133 = 1.1; Vmax_r_0133 = 0.58058; kmp_s_0185r_0133 = 0.549; kmp_s_1051r_0133 = 0.549; kms_s_0149r_0133 = 0.549; kms_s_0899r_0133 = 0.549;
  // GENE_ASSOCIATION:YJR105W
  adenosine_kinase: adenosine_intracellular + ATP_intracellular -> ADP_intracellular + AMP_intracellular + $s_0763_b; intracellular*Function_for_adenosine_kinase(Keq_r_0157, Vmax_r_0157, intracellular, kmp_s_0400r_0157, kmp_s_0434r_0157, kmp_s_0763_br_0157, kms_s_0393r_0157, kms_s_0446r_0157, adenosine_intracellular, ADP_intracellular, AMP_intracellular, ATP_intracellular, s_0763_b);
    Keq_r_0157 = 2.18098; Vmax_r_0157 = 0.103455; kmp_s_0400r_0157 = 1.71907; kmp_s_0434r_0157 = 1.25956; kmp_s_0763_br_0157 = 0.549; kms_s_0393r_0157 = 0.549; kms_s_0446r_0157 = 1.09208;
  // GENE_ASSOCIATION:YER043C
  adenosylhomocysteinase: s_1290 + $s_1434_b -> adenosine_intracellular + L_homocysteine_intracellular; intracellular*function_36(Keq_r_0159, Vmax_r_0159, intracellular, kmp_s_0393r_0159, kmp_s_0917r_0159, kms_s_1290r_0159, kms_s_1434_br_0159, adenosine_intracellular, L_homocysteine_intracellular, s_1290, s_1434_b);
    Keq_r_0159 = 1.1; Vmax_r_0159 = 0.065835; kmp_s_0393r_0159 = 0.549; kmp_s_0917r_0159 = 0.549; kms_s_1290r_0159 = 0.549; kms_s_1434_br_0159 = 0.549;
  // GENE_ASSOCIATION:YDR226W or YER170W
  adenylate_kinase: 2 ADP_intracellular -> AMP_intracellular + ATP_intracellular; intracellular*Function_for_adenylate_kinase(Keq_r_0163, Vmax_r_0163, intracellular, kmp_s_0434r_0163, kmp_s_0446r_0163, kms_s_0400r_0163, ADP_intracellular, AMP_intracellular, ATP_intracellular);
    Keq_r_0163 = 0.512011; Vmax_r_0163 = 2.28799; kmp_s_0434r_0163 = 1.25956; kmp_s_0446r_0163 = 1.09208; kms_s_0400r_0163 = 1.71907;
  // GENE_ASSOCIATION:YDR226W or YER170W
  adenylate_kinase_GTP: ADP_intracellular + GDP_intracellular -> AMP_intracellular + GTP_intracellular; intracellular*function_38(Keq_r_0165, Vmax_r_0165, intracellular, kmp_s_0434r_0165, kmp_s_0755r_0165, kms_s_0400r_0165, kms_s_0706r_0165, ADP_intracellular, AMP_intracellular, GDP_intracellular, GTP_intracellular); adenylate_kinase_GTP is "adenylate kinase (GTP)";
    Keq_r_0165 = 0.805968; Vmax_r_0165 = 4.0656; kmp_s_0434r_0165 = 1.25956; kmp_s_0755r_0165 = 0.549; kms_s_0400r_0165 = 1.71907; kms_s_0706r_0165 = 0.549;
  // GENE_ASSOCIATION:YLR359W
  adenylosuccinate_lyase: s_0009 -> s_0317 + fumarate_2_intracellular; intracellular*function_39(Keq_r_0169, Vmax_r_0169, intracellular, kmp_s_0317r_0169, kmp_s_0692r_0169, kms_s_0009r_0169, s_0009, s_0317, fumarate_2_intracellular);
    Keq_r_0169 = 0.6039; Vmax_r_0169 = 0.333848; kmp_s_0317r_0169 = 0.549; kmp_s_0692r_0169 = 0.549; kms_s_0009r_0169 = 0.549;
  // GENE_ASSOCIATION:YNL220W
  adenylosuccinate_synthase: GTP_intracellular + IMP_intracellular + L_aspartate_intracellular -> GDP_intracellular + 2 $s_0763_b + s_1053 + $phosphate_intracellular; intracellular*function_40(Keq_r_0170, Vmax_r_0170, intracellular, kmp_s_0706r_0170, kmp_s_0763_br_0170, kmp_s_1053r_0170, kmp_s_1207r_0170, kms_s_0755r_0170, kms_s_0816r_0170, kms_s_0881r_0170, GDP_intracellular, GTP_intracellular, s_0763_b, IMP_intracellular, L_aspartate_intracellular, s_1053, phosphate_intracellular);
    Keq_r_0170 = 0.331541; Vmax_r_0170 = 1.8216; kmp_s_0706r_0170 = 0.549; kmp_s_0763_br_0170 = 0.549; kmp_s_1053r_0170 = 0.549; kmp_s_1207r_0170 = 0.549; kms_s_0755r_0170 = 0.549; kms_s_0816r_0170 = 0.549; kms_s_0881r_0170 = 0.549;
  // GENE_ASSOCIATION:YLR359W
  adenylsuccinate_lyase: s_1053 -> AMP_intracellular + fumarate_2_intracellular; intracellular*function_41(Keq_r_0171, Vmax_r_0171, intracellular, kmp_s_0434r_0171, kmp_s_0692r_0171, kms_s_1053r_0171, AMP_intracellular, fumarate_2_intracellular, s_1053);
    Keq_r_0171 = 1.38552; Vmax_r_0171 = 0.395998; kmp_s_0434r_0171 = 1.25956; kmp_s_0692r_0171 = 0.549; kms_s_1053r_0171 = 0.549;
  // GENE_ASSOCIATION:YKL001C
  adenylyl_sulfate_kinase: _5_adenylyl_sulfate_intracellular + ATP_intracellular -> s_0206 + ADP_intracellular + $s_0763_b; intracellular*function_42(Keq_r_0172, Vmax_r_0172, intracellular, kmp_s_0206r_0172, kmp_s_0400r_0172, kmp_s_0763_br_0172, kms_s_0304r_0172, kms_s_0446r_0172, s_0206, _5_adenylyl_sulfate_intracellular, ADP_intracellular, ATP_intracellular, s_0763_b); adenylyl_sulfate_kinase is "adenylyl-sulfate kinase";
    Keq_r_0172 = 0.950614; Vmax_r_0172 = 0.624358; kmp_s_0206r_0172 = 0.549; kmp_s_0400r_0172 = 1.71907; kmp_s_0763_br_0172 = 0.549; kms_s_0304r_0172 = 0.549; kms_s_0446r_0172 = 1.09208;
  // GENE_ASSOCIATION:YFL030W
  r_0174: glyoxylate_intracellular + L_alanine_intracellular -> glycine_intracellular + pyruvate_intracellular; intracellular*function_43(Keq_r_0174, Vmax_r_0174, intracellular, kmp_s_0740r_0174, kmp_s_1277r_0174, kms_s_0749r_0174, kms_s_0863r_0174, glycine_intracellular, glyoxylate_intracellular, L_alanine_intracellular, pyruvate_intracellular); r_0174 is "alanine glyoxylate aminotransferase";
    Keq_r_0174 = 0.121402; Vmax_r_0174 = 1.7171; kmp_s_0740r_0174 = 0.549; kmp_s_1277r_0174 = 0.0605905; kms_s_0749r_0174 = 0.549; kms_s_0863r_0174 = 0.549;
  // GENE_ASSOCIATION:YMR083W
  r_0183: acetaldehyde_intracellular + $s_0763_b + NADH_intracellular -> ethanol_intracellular + NAD_intracellular; intracellular*function_44(Keq_r_0183, Vmax_r_0183, intracellular, kmp_s_0650r_0183, kmp_s_1082r_0183, kms_s_0366r_0183, kms_s_0763_br_0183, kms_s_1087r_0183, acetaldehyde_intracellular, ethanol_intracellular, s_0763_b, NAD_intracellular, NADH_intracellular); r_0183 is "alcohol dehydrogenase, reverse rxn (acetaldehyde -> ethanol)";
    Keq_r_0183 = 1.44567e4; Vmax_r_0183 = 99.1; kmp_s_0650r_0183 = 50; kmp_s_1082r_0183 = 1.50326; kms_s_0366r_0183 = 0.120104; kms_s_0763_br_0183 = 0.549; kms_s_1087r_0183 = 0.0867353;
  // GENE_ASSOCIATION:YPL061W or (YER073W or YOR374W)
  r_0191: acetaldehyde_intracellular + NADP_intracellular + $s_1434_b -> acetate_intracellular + 2 $s_0763_b + NADPH_intracellular; intracellular*function_45(Keq_r_0191, Vmax_r_0191, intracellular, kmp_s_0369r_0191, kmp_s_0763_br_0191, kmp_s_1096r_0191, kms_s_0366r_0191, kms_s_1091r_0191, kms_s_1434_br_0191, acetaldehyde_intracellular, acetate_intracellular, s_0763_b, NADP_intracellular, NADPH_intracellular, s_1434_b); r_0191 is "aldehyde dehydrogenase (acetaldehyde, NADP)";
    Keq_r_0191 = 2.76045; Vmax_r_0191 = 9.45451; kmp_s_0369r_0191 = 0.549; kmp_s_0763_br_0191 = 0.549; kmp_s_1096r_0191 = 0.549; kms_s_0366r_0191 = 0.120104; kms_s_1091r_0191 = 0.549; kms_s_1434_br_0191 = 0.549;
  // GENE_ASSOCIATION:(YBR126C and YML100W and YMR261C)
  r_0213: s_0410 + UDP_D_glucose_intracellular -> s_0419 + $s_0763_b + UDP_intracellular; intracellular*function_46(Keq_r_0213, Vmax_r_0213, intracellular, kmp_s_0419r_0213, kmp_s_0763_br_0213, kmp_s_1411r_0213, kms_s_0410r_0213, kms_s_1415r_0213, s_0410, s_0419, s_0763_b, UDP_intracellular, UDP_D_glucose_intracellular); r_0213 is "alpha,alpha-trehalose-phosphate synthase (UDP-forming)";
    Keq_r_0213 = 0.6039; Vmax_r_0213 = 0.157299; kmp_s_0419r_0213 = 0.549; kmp_s_0763_br_0213 = 0.549; kmp_s_1411r_0213 = 0.549; kms_s_0410r_0213 = 0.549; kms_s_1415r_0213 = 0.549;
  // GENE_ASSOCIATION:YDR354W
  r_0220: s_0331 + anthranilate_intracellular -> diphosphate_intracellular + s_1066; intracellular*function_47(Keq_r_0220, Vmax_r_0220, intracellular, kmp_s_0605r_0220, kmp_s_1066r_0220, kms_s_0331r_0220, kms_s_0439r_0220, s_0331, anthranilate_intracellular, diphosphate_intracellular, s_1066); r_0220 is "anthranilate phosphoribosyltransferase";
    Keq_r_0220 = 1.1; Vmax_r_0220 = 0.11935; kmp_s_0605r_0220 = 0.549; kmp_s_1066r_0220 = 0.549; kms_s_0331r_0220 = 0.549; kms_s_0439r_0220 = 0.549;
  // GENE_ASSOCIATION:(YER090W and YKL211C)
  anthranilate_synthase: chorismate_2_intracellular + L_glutamine_intracellular -> anthranilate_intracellular + $s_0763_b + L_glutamate_intracellular + pyruvate_intracellular; intracellular*function_48(Keq_r_0221, Vmax_r_0221, intracellular, kmp_s_0439r_0221, kmp_s_0763_br_0221, kmp_s_0899r_0221, kmp_s_1277r_0221, kms_s_0500r_0221, kms_s_0907r_0221, anthranilate_intracellular, chorismate_2_intracellular, s_0763_b, L_glutamate_intracellular, L_glutamine_intracellular, pyruvate_intracellular);
    Keq_r_0221 = 0.0365906; Vmax_r_0221 = 0.323947; kmp_s_0439r_0221 = 0.549; kmp_s_0763_br_0221 = 0.549; kmp_s_0899r_0221 = 0.549; kmp_s_1277r_0221 = 0.0605905; kms_s_0500r_0221 = 0.549; kms_s_0907r_0221 = 0.549;
  // GENE_ASSOCIATION:YHR018C
  argininosuccinate_lyase: s_0017 -> fumarate_2_intracellular + L_arginine_intracellular; intracellular*function_49(Keq_r_0225, Vmax_r_0225, intracellular, kmp_s_0692r_0225, kmp_s_0873r_0225, kms_s_0017r_0225, s_0017, fumarate_2_intracellular, L_arginine_intracellular);
    Keq_r_0225 = 0.6039; Vmax_r_0225 = 0.414697; kmp_s_0692r_0225 = 0.549; kmp_s_0873r_0225 = 0.549; kms_s_0017r_0225 = 0.549;
  // GENE_ASSOCIATION:YOL058W
  argininosuccinate_synthase: ATP_intracellular + L_aspartate_intracellular + L_citrulline_intracellular -> s_0017 + AMP_intracellular + diphosphate_intracellular + $s_0763_b; intracellular*function_50(Keq_r_0226, Vmax_r_0226, intracellular, kmp_s_0017r_0226, kmp_s_0434r_0226, kmp_s_0605r_0226, kmp_s_0763_br_0226, kms_s_0446r_0226, kms_s_0881r_0226, kms_s_0887r_0226, s_0017, AMP_intracellular, ATP_intracellular, diphosphate_intracellular, s_0763_b, L_aspartate_intracellular, L_citrulline_intracellular);
    Keq_r_0226 = 0.696513; Vmax_r_0226 = 1.90762; kmp_s_0017r_0226 = 0.549; kmp_s_0434r_0226 = 1.25956; kmp_s_0605r_0226 = 0.549; kmp_s_0763_br_0226 = 0.549; kms_s_0446r_0226 = 1.09208; kms_s_0881r_0226 = 0.549; kms_s_0887r_0226 = 0.549;
  // GENE_ASSOCIATION:(YGR124W or YPR145W)
  r_0229: ATP_intracellular + L_aspartate_intracellular + L_glutamine_intracellular + $s_1434_b -> AMP_intracellular + diphosphate_intracellular + $s_0763_b + L_asparagine_intracellular + L_glutamate_intracellular; intracellular*function_51(Keq_r_0229, Vmax_r_0229, intracellular, kmp_s_0434r_0229, kmp_s_0605r_0229, kmp_s_0763_br_0229, kmp_s_0877r_0229, kmp_s_0899r_0229, kms_s_0446r_0229, kms_s_0881r_0229, kms_s_0907r_0229, kms_s_1434_br_0229, AMP_intracellular, ATP_intracellular, diphosphate_intracellular, s_0763_b, L_asparagine_intracellular, L_aspartate_intracellular, L_glutamate_intracellular, L_glutamine_intracellular, s_1434_b); r_0229 is "asparagine synthase (glutamine-hydrolysing)";
    Keq_r_0229 = 0.696513; Vmax_r_0229 = 4.92183; kmp_s_0434r_0229 = 1.25956; kmp_s_0605r_0229 = 0.549; kmp_s_0763_br_0229 = 0.549; kmp_s_0877r_0229 = 0.549; kmp_s_0899r_0229 = 0.549; kms_s_0446r_0229 = 1.09208; kms_s_0881r_0229 = 0.549; kms_s_0907r_0229 = 0.549; kms_s_1434_br_0229 = 0.549;
  // GENE_ASSOCIATION:YJL130C
  aspartate_carbamoyltransferase: s_0469 + L_aspartate_intracellular -> $s_0763_b + s_1073 + $phosphate_intracellular; intracellular*function_52(Keq_r_0232, Vmax_r_0232, intracellular, kmp_s_0763_br_0232, kmp_s_1073r_0232, kmp_s_1207r_0232, kms_s_0469r_0232, kms_s_0881r_0232, s_0469, s_0763_b, L_aspartate_intracellular, s_1073, phosphate_intracellular);
    Keq_r_0232 = 0.6039; Vmax_r_0232 = 0.826427; kmp_s_0763_br_0232 = 0.549; kmp_s_1073r_0232 = 0.549; kmp_s_1207r_0232 = 0.549; kms_s_0469r_0232 = 0.549; kms_s_0881r_0232 = 0.549;
  // GENE_ASSOCIATION:YER052C
  aspartate_kinase: ATP_intracellular + L_aspartate_intracellular -> s_0301 + ADP_intracellular; intracellular*Function_for_aspartate_kinase(Keq_r_0233, Vmax_r_0233, intracellular, kmp_s_0301r_0233, kmp_s_0400r_0233, kms_s_0446r_0233, kms_s_0881r_0233, s_0301, ADP_intracellular, ATP_intracellular, L_aspartate_intracellular);
    Keq_r_0233 = 1.73154; Vmax_r_0233 = 6.2447; kmp_s_0301r_0233 = 0.549; kmp_s_0400r_0233 = 1.71907; kms_s_0446r_0233 = 1.09208; kms_s_0881r_0233 = 0.549;
  // GENE_ASSOCIATION:YLR027C or YKL106W or YLR027C
  aspartate_transaminase: L_glutamate_intracellular + oxaloacetate_2_intracellular -> _2_oxoglutarate_intracellular + L_aspartate_intracellular; intracellular*function_54(Keq_r_0235, Vmax_r_0235, intracellular, kmp_s_0185r_0235, kmp_s_0881r_0235, kms_s_0899r_0235, kms_s_1156r_0235, _2_oxoglutarate_intracellular, L_aspartate_intracellular, L_glutamate_intracellular, oxaloacetate_2_intracellular);
    Keq_r_0235 = 1.1; Vmax_r_0235 = 9.856; kmp_s_0185r_0235 = 0.549; kmp_s_0881r_0235 = 0.549; kms_s_0899r_0235 = 0.549; kms_s_1156r_0235 = 0.549;
  // GENE_ASSOCIATION:YDR158W
  r_0238: s_0301 + $s_0763_b + NADPH_intracellular -> s_0886 + NADP_intracellular + $phosphate_intracellular; intracellular*function_55(Keq_r_0238, Vmax_r_0238, intracellular, kmp_s_0886r_0238, kmp_s_1091r_0238, kmp_s_1207r_0238, kms_s_0301r_0238, kms_s_0763_br_0238, kms_s_1096r_0238, s_0301, s_0763_b, s_0886, NADP_intracellular, NADPH_intracellular, phosphate_intracellular); r_0238 is "aspartate-semialdehyde dehydrogenase";
    Keq_r_0238 = 1.1; Vmax_r_0238 = 13.3815; kmp_s_0886r_0238 = 0.549; kmp_s_1091r_0238 = 0.549; kmp_s_1207r_0238 = 0.549; kms_s_0301r_0238 = 0.549; kms_s_0763_br_0238 = 0.549; kms_s_1096r_0238 = 0.549;
  // GENE_ASSOCIATION:YER055C
  ATP_phosphoribosyltransferase: s_0331 + ATP_intracellular -> s_0334 + diphosphate_intracellular; intracellular*function_56(Keq_r_0245, Vmax_r_0245, intracellular, kmp_s_0334r_0245, kmp_s_0605r_0245, kms_s_0331r_0245, kms_s_0446r_0245, s_0331, s_0334, ATP_intracellular, diphosphate_intracellular);
    Keq_r_0245 = 0.552981; Vmax_r_0245 = 0.32109; kmp_s_0334r_0245 = 0.549; kmp_s_0605r_0245 = 0.549; kms_s_0331r_0245 = 0.549; kms_s_0446r_0245 = 1.09208;
  // GENE_ASSOCIATION:((Q0080 and Q0085 and Q0130 and YBL099W and YBR039W and YDL004W and YDR298C and YDR322C-A and YDR377W and YJR121W and YKL016C and YLR295C and YML081C-A and YPL078C and YPL271W) or (Q0080 and Q0085 and Q0130 and YBL099W and YBR039W and YDL004W and YDR298C and YDR377W and YJR121W and YKL016C and YLR295C and YML081C-A and YPL078C and YPL271W and YPR020W)) or (YBR127C and YDL185W and YEL027W and YEL051W and YGR020C and YHR026W and YHR039C-A and YKL080W and YLR447C and YMR054W and YOR332W and YPL234C and YPR036W) or (YBR127C and YDL185W and YEL027W and YEL051W and YGR020C and YHR026W and YHR039C-A and YKL080W and YLR447C and YOR270C and YOR332W and YPL234C and YPR036W)
  ATP_synthase: ADP_intracellular + 3 $s_0763_b + $phosphate_intracellular -> ATP_intracellular + 2 $s_0763_b + $s_1434_b; intracellular*Function_for_ATP_synthase(Keq_r_0246, Vmax_r_0246, intracellular, kmp_s_0446r_0246, kmp_s_0763_br_0246, kmp_s_1434_br_0246, kms_s_0400r_0246, kms_s_0763_br_0246, kms_s_1207r_0246, ADP_intracellular, ATP_intracellular, s_0763_b, phosphate_intracellular, s_1434_b);
    Keq_r_0246 = 3.47564; Vmax_r_0246 = 76.0041; kmp_s_0446r_0246 = 1.09208; kmp_s_0763_br_0246 = 0.549; kmp_s_1434_br_0246 = 0.549; kms_s_0400r_0246 = 1.71907; kms_s_0763_br_0246 = 0.549; kms_s_1207r_0246 = 0.549;
  // GENE_ASSOCIATION:((YCR024C-A and YEL017C-A and YGL008C) or (YCR024C-A and YEL017C-A and YPL036W))
  ATPase_cytosolic: ATP_intracellular + $s_1434_b -> ADP_intracellular + $s_0766_b + $phosphate_intracellular; Function_for_ATPase_cytosolic(Keq_r_0249, Vmax_r_0249, kmp_s_0400r_0249, kmp_s_0766_br_0249, kmp_s_1207r_0249, kms_s_0446r_0249, kms_s_1434_br_0249, ADP_intracellular, ATP_intracellular, s_0766_b, phosphate_intracellular, s_1434_b); ATPase_cytosolic is "ATPase, cytosolic";
    Keq_r_0249 = 0.173154; Vmax_r_0249 = 50.4568; kmp_s_0400r_0249 = 1.71907; kmp_s_0766_br_0249 = 0.1; kmp_s_1207r_0249 = 0.549; kms_s_0446r_0249 = 1.09208; kms_s_1434_br_0249 = 0.549;
  bicarbonate_formation: carbon_dioxide_intracellular + $s_1434_b -> bicarbonate_intracellular + $s_0763_b; intracellular*function_59(Keq_r_0251, Vmax_r_0251, intracellular, kmp_s_0458r_0251, kmp_s_0763_br_0251, kms_s_0470r_0251, kms_s_1434_br_0251, bicarbonate_intracellular, carbon_dioxide_intracellular, s_0763_b, s_1434_b);  // isDescribedBy ECO:0000034
    Keq_r_0251 = 0.6039; Vmax_r_0251 = 20.097; kmp_s_0458r_0251 = 0.549; kmp_s_0763_br_0251 = 0.549; kms_s_0470r_0251 = 1; kms_s_1434_br_0251 = 0.549;
  // GENE_ASSOCIATION:YNL280C
  C_14_sterol_reductase: s_0268 + $s_0763_b + NADPH_intracellular -> s_0124 + NADP_intracellular; intracellular*function_60(Keq_r_0258, Vmax_r_0258, intracellular, kmp_s_0124r_0258, kmp_s_1091r_0258, kms_s_0268r_0258, kms_s_0763_br_0258, kms_s_1096r_0258, s_0124, s_0268, s_0763_b, NADP_intracellular, NADPH_intracellular); C_14_sterol_reductase is "C-14 sterol reductase";
    Keq_r_0258 = 2.00364; Vmax_r_0258 = 0.0458592; kmp_s_0124r_0258 = 0.549; kmp_s_1091r_0258 = 0.549; kms_s_0268r_0258 = 0.549; kms_s_0763_br_0258 = 0.549; kms_s_1096r_0258 = 0.549;
  // GENE_ASSOCIATION:YGL001C
  C_3_sterol_dehydrogenase: NADP_intracellular + s_1457 -> carbon_dioxide_intracellular + $s_0763_b + NADPH_intracellular + s_1458; intracellular*function_61(Keq_r_0261, Vmax_r_0261, intracellular, kmp_s_0470r_0261, kmp_s_0763_br_0261, kmp_s_1096r_0261, kmp_s_1458r_0261, kms_s_1091r_0261, kms_s_1457r_0261, carbon_dioxide_intracellular, s_0763_b, NADP_intracellular, NADPH_intracellular, s_1457, s_1458); C_3_sterol_dehydrogenase is "C-3 sterol dehydrogenase";
    Keq_r_0261 = 0.6039; Vmax_r_0261 = 0.0785835; kmp_s_0470r_0261 = 1; kmp_s_0763_br_0261 = 0.549; kmp_s_1096r_0261 = 0.549; kmp_s_1458r_0261 = 0.549; kms_s_1091r_0261 = 0.549; kms_s_1457r_0261 = 0.549;
  // GENE_ASSOCIATION:YGL001C
  r_0262: s_0303 + NAD_intracellular -> s_0215 + carbon_dioxide_intracellular + $s_0763_b + NADH_intracellular; intracellular*function_62(Keq_r_0262, Vmax_r_0262, intracellular, kmp_s_0215r_0262, kmp_s_0470r_0262, kmp_s_0763_br_0262, kmp_s_1087r_0262, kms_s_0303r_0262, kms_s_1082r_0262, s_0215, s_0303, carbon_dioxide_intracellular, s_0763_b, NAD_intracellular, NADH_intracellular); r_0262 is "C-3 sterol dehydrogenase (4-methylzymosterol)";
    Keq_r_0262 = 0.0348439; Vmax_r_0262 = 0.0785834; kmp_s_0215r_0262 = 0.549; kmp_s_0470r_0262 = 1; kmp_s_0763_br_0262 = 0.549; kmp_s_1087r_0262 = 0.0867353; kms_s_0303r_0262 = 0.549; kms_s_1082r_0262 = 1.50326;
  // GENE_ASSOCIATION:YLR100W
  r_0263: s_0215 + $s_0763_b + NADPH_intracellular -> s_0302 + NADP_intracellular; intracellular*function_63(Keq_r_0263, Vmax_r_0263, intracellular, kmp_s_0302r_0263, kmp_s_1091r_0263, kms_s_0215r_0263, kms_s_0763_br_0263, kms_s_1096r_0263, s_0215, s_0302, s_0763_b, NADP_intracellular, NADPH_intracellular); r_0263 is "C-3 sterol keto reductase (4-methylzymosterol)";
    Keq_r_0263 = 2.00364; Vmax_r_0263 = 0.0454962; kmp_s_0302r_0263 = 0.549; kmp_s_1091r_0263 = 0.549; kms_s_0215r_0263 = 0.549; kms_s_0763_br_0263 = 0.549; kms_s_1096r_0263 = 0.549;
  // GENE_ASSOCIATION:YLR100W
  r_0264: $s_0763_b + NADPH_intracellular + s_1458 -> NADP_intracellular + zymosterol_intracellular; intracellular*function_64(Keq_r_0264, Vmax_r_0264, intracellular, kmp_s_1091r_0264, kmp_s_1447r_0264, kms_s_0763_br_0264, kms_s_1096r_0264, kms_s_1458r_0264, s_0763_b, NADP_intracellular, NADPH_intracellular, zymosterol_intracellular, s_1458); r_0264 is "C-3 sterol keto reductase (zymosterol)";
    Keq_r_0264 = 2.00364; Vmax_r_0264 = 0.0454962; kmp_s_1091r_0264 = 0.549; kmp_s_1447r_0264 = 0.549; kms_s_0763_br_0264 = 0.549; kms_s_1096r_0264 = 0.549; kms_s_1458r_0264 = 0.549;
  // GENE_ASSOCIATION:YGR060W
  C_4_methyl_sterol_oxidase: s_0302 + $s_0763_b + NADPH_intracellular + oxygen_intracellular -> NADP_intracellular + $s_1434_b + s_1455; intracellular*function_65(Keq_r_0265, Vmax_r_0265, intracellular, kmp_s_1091r_0265, kmp_s_1434_br_0265, kmp_s_1455r_0265, kms_s_0302r_0265, kms_s_0763_br_0265, kms_s_1096r_0265, kms_s_1160r_0265, s_0302, s_0763_b, NADP_intracellular, NADPH_intracellular, oxygen_intracellular, s_1434_b, s_1455); C_4_methyl_sterol_oxidase is "C-4 methyl sterol oxidase";
    Keq_r_0265 = 2.00364; Vmax_r_0265 = 0.0951282; kmp_s_1091r_0265 = 0.549; kmp_s_1434_br_0265 = 0.549; kmp_s_1455r_0265 = 0.549; kms_s_0302r_0265 = 0.549; kms_s_0763_br_0265 = 0.549; kms_s_1096r_0265 = 0.549; kms_s_1160r_0265 = 0.549;
  // GENE_ASSOCIATION:YGR060W
  C_4_methyl_sterol_oxidase_2: $s_0763_b + NADPH_intracellular + oxygen_intracellular + s_1455 -> NADP_intracellular + 2 $s_1434_b + s_1456; intracellular*function_66(Keq_r_0266, Vmax_r_0266, intracellular, kmp_s_1091r_0266, kmp_s_1434_br_0266, kmp_s_1456r_0266, kms_s_0763_br_0266, kms_s_1096r_0266, kms_s_1160r_0266, kms_s_1455r_0266, s_0763_b, NADP_intracellular, NADPH_intracellular, oxygen_intracellular, s_1434_b, s_1455, s_1456); C_4_methyl_sterol_oxidase_2 is "C-4 methyl sterol oxidase_2";
    Keq_r_0266 = 1.1; Vmax_r_0266 = 0.0951282; kmp_s_1091r_0266 = 0.549; kmp_s_1434_br_0266 = 0.549; kmp_s_1456r_0266 = 0.549; kms_s_0763_br_0266 = 0.549; kms_s_1096r_0266 = 0.549; kms_s_1160r_0266 = 0.549; kms_s_1455r_0266 = 0.549;
  // GENE_ASSOCIATION:YGR060W
  C_4_methyl_sterol_oxidase_3: $s_0763_b + NADPH_intracellular + oxygen_intracellular + s_1456 -> NADP_intracellular + $s_1434_b + s_1457; intracellular*function_67(Keq_r_0267, Vmax_r_0267, intracellular, kmp_s_1091r_0267, kmp_s_1434_br_0267, kmp_s_1457r_0267, kms_s_0763_br_0267, kms_s_1096r_0267, kms_s_1160r_0267, kms_s_1456r_0267, s_0763_b, NADP_intracellular, NADPH_intracellular, oxygen_intracellular, s_1434_b, s_1456, s_1457); C_4_methyl_sterol_oxidase_3 is "C-4 methyl sterol oxidase_3";
    Keq_r_0267 = 2.00364; Vmax_r_0267 = 0.0951282; kmp_s_1091r_0267 = 0.549; kmp_s_1434_br_0267 = 0.549; kmp_s_1457r_0267 = 0.549; kms_s_0763_br_0267 = 0.549; kms_s_1096r_0267 = 0.549; kms_s_1160r_0267 = 0.549; kms_s_1456r_0267 = 0.549;
  // GENE_ASSOCIATION:YGR060W
  r_0268: s_0124 + 3 $s_0763_b + 3 NADPH_intracellular + 3 oxygen_intracellular -> s_0303 + 3 NADP_intracellular + 4 $s_1434_b; intracellular*function_68(Keq_r_0268, Vmax_r_0268, intracellular, kmp_s_0303r_0268, kmp_s_1091r_0268, kmp_s_1434_br_0268, kms_s_0124r_0268, kms_s_0763_br_0268, kms_s_1096r_0268, kms_s_1160r_0268, s_0124, s_0303, s_0763_b, NADP_intracellular, NADPH_intracellular, oxygen_intracellular, s_1434_b); r_0268 is "C-4 sterol methyl oxidase (4,4-dimethylzymosterol)";
    Keq_r_0268 = 3.64962; Vmax_r_0268 = 0.0951282; kmp_s_0303r_0268 = 0.549; kmp_s_1091r_0268 = 0.549; kmp_s_1434_br_0268 = 0.549; kms_s_0124r_0268 = 0.549; kms_s_0763_br_0268 = 0.549; kms_s_1096r_0268 = 0.549; kms_s_1160r_0268 = 0.549;
  // GENE_ASSOCIATION:YMR202W
  C_8_sterol_isomerase: fecosterol_intracellular -> episterol_intracellular; intracellular*function_69(Keq_r_0270, Vmax_r_0270, intracellular, kmp_s_0627r_0270, kms_s_0669r_0270, episterol_intracellular, fecosterol_intracellular); C_8_sterol_isomerase is "C-8 sterol isomerase";
    Keq_r_0270 = 1.1; Vmax_r_0270 = 0.00017589; kmp_s_0627r_0270 = 0.549; kms_s_0669r_0270 = 0.549;
  // GENE_ASSOCIATION:YGL012W
  C_s24_sterol_reductase: s_0632 + $s_0763_b + NADPH_intracellular -> ergosterol_intracellular + NADP_intracellular; intracellular*function_70(Keq_r_0271, Vmax_r_0271, intracellular, kmp_s_0635r_0271, kmp_s_1091r_0271, kms_s_0632r_0271, kms_s_0763_br_0271, kms_s_1096r_0271, s_0632, ergosterol_intracellular, s_0763_b, NADP_intracellular, NADPH_intracellular); C_s24_sterol_reductase is "C-s24 sterol reductase";
    Keq_r_0271 = 2.00364; Vmax_r_0271 = 0.0430762; kmp_s_0635r_0271 = 0.549; kmp_s_1091r_0271 = 0.549; kms_s_0632r_0271 = 0.549; kms_s_0763_br_0271 = 0.549; kms_s_1096r_0271 = 0.549;
  // GENE_ASSOCIATION:(YJL130C or (YJR109C and YOR303W))
  r_0277: 2 ATP_intracellular + bicarbonate_intracellular + L_glutamine_intracellular + $s_1434_b -> 2 ADP_intracellular + s_0469 + 2 $s_0763_b + L_glutamate_intracellular + $phosphate_intracellular; intracellular*function_71(Keq_r_0277, Vmax_r_0277, intracellular, kmp_s_0400r_0277, kmp_s_0469r_0277, kmp_s_0763_br_0277, kmp_s_0899r_0277, kmp_s_1207r_0277, kms_s_0446r_0277, kms_s_0458r_0277, kms_s_0907r_0277, kms_s_1434_br_0277, ADP_intracellular, ATP_intracellular, bicarbonate_intracellular, s_0469, s_0763_b, L_glutamate_intracellular, L_glutamine_intracellular, phosphate_intracellular, s_1434_b); r_0277 is "carbamoyl-phosphate synthase (glutamine-hydrolysing)";
    Keq_r_0277 = 0.821515; Vmax_r_0277 = 7.44478; kmp_s_0400r_0277 = 1.71907; kmp_s_0469r_0277 = 0.549; kmp_s_0763_br_0277 = 0.549; kmp_s_0899r_0277 = 0.549; kmp_s_1207r_0277 = 0.549; kms_s_0446r_0277 = 1.09208; kms_s_0458r_0277 = 0.549; kms_s_0907r_0277 = 0.549; kms_s_1434_br_0277 = 0.549;
  // GENE_ASSOCIATION:YGR088W or YDR256C
  catalase: 2 hydrogen_peroxide_intracellular -> oxygen_intracellular + 2 $s_1434_b; intracellular*Function_for_catalase(Keq_r_0282, Vmax_r_0282, intracellular, kmp_s_1160r_0282, kmp_s_1434_br_0282, kms_s_0801r_0282, hydrogen_peroxide_intracellular, oxygen_intracellular, s_1434_b);
    Keq_r_0282 = 0.6039; Vmax_r_0282 = 0.187549; kmp_s_1160r_0282 = 0.549; kmp_s_1434_br_0282 = 0.549; kms_s_0801r_0282 = 0.549;
  // GENE_ASSOCIATION:YBR029C
  CDP_diacylglycerol_synthase: CTP_intracellular + $s_0763_b + phosphatidate_intracellular -> CDP_diacylglycerol_intracellular + diphosphate_intracellular; intracellular*function_73(Keq_r_0284, Vmax_r_0284, intracellular, kmp_s_0485r_0284, kmp_s_0605r_0284, kms_s_0521r_0284, kms_s_0763_br_0284, kms_s_1215r_0284, CDP_diacylglycerol_intracellular, CTP_intracellular, diphosphate_intracellular, s_0763_b, phosphatidate_intracellular); CDP_diacylglycerol_synthase is "CDP-diacylglycerol synthase";
    Keq_r_0284 = 2.00364; Vmax_r_0284 = 0.0367841; kmp_s_0485r_0284 = 0.549; kmp_s_0605r_0284 = 0.549; kms_s_0521r_0284 = 0.549; kms_s_0763_br_0284 = 0.549; kms_s_1215r_0284 = 0.549;
  // GENE_ASSOCIATION:YMR272C
  ceramide_1_hydroxylase_24C: $s_0763_b + s_1080 + NADPH_intracellular + oxygen_intracellular -> s_1060 + NADP_intracellular + $s_1434_b; intracellular*function_74(Keq_r_0287, Vmax_r_0287, intracellular, kmp_s_1060r_0287, kmp_s_1091r_0287, kmp_s_1434_br_0287, kms_s_0763_br_0287, kms_s_1080r_0287, kms_s_1096r_0287, kms_s_1160r_0287, s_0763_b, s_1060, s_1080, NADP_intracellular, NADPH_intracellular, oxygen_intracellular, s_1434_b); ceramide_1_hydroxylase_24C is "ceramide-1 hydroxylase (24C)";
    Keq_r_0287 = 2.00364; Vmax_r_0287 = 0.00584431; kmp_s_1060r_0287 = 0.549; kmp_s_1091r_0287 = 0.549; kmp_s_1434_br_0287 = 0.549; kms_s_0763_br_0287 = 0.549; kms_s_1080r_0287 = 0.549; kms_s_1096r_0287 = 0.549; kms_s_1160r_0287 = 0.549;
  // GENE_ASSOCIATION:(YHL003C or YKL008C or YPL087W)
  ceramide_1_synthase_24C: sphinganine_intracellular + tetracosanoyl_CoA_intracellular -> coenzyme_A_intracellular + $s_0763_b + s_1080; intracellular*function_75(Keq_r_0290, Vmax_r_0290, intracellular, kmp_s_0514r_0290, kmp_s_0763_br_0290, kmp_s_1080r_0290, kms_s_1325r_0290, kms_s_1355r_0290, coenzyme_A_intracellular, s_0763_b, s_1080, sphinganine_intracellular, tetracosanoyl_CoA_intracellular); ceramide_1_synthase_24C is "ceramide-1 synthase (24C)";
    Keq_r_0290 = 0.6039; Vmax_r_0290 = 0.00279509; kmp_s_0514r_0290 = 0.549; kmp_s_0763_br_0290 = 0.549; kmp_s_1080r_0290 = 0.549; kms_s_1325r_0290 = 0.549; kms_s_1355r_0290 = 0.549;
  r_0298: oxygen_intracellular + s_1293 + zymosterol_intracellular -> s_0632 + $s_0763_b + s_1290 + 2 $s_1434_b; intracellular*function_76(Keq_r_0298, Vmax_r_0298, intracellular, kmp_s_0632r_0298, kmp_s_0763_br_0298, kmp_s_1290r_0298, kmp_s_1434_br_0298, kms_s_1160r_0298, kms_s_1293r_0298, kms_s_1447r_0298, s_0632, s_0763_b, oxygen_intracellular, s_1290, s_1293, s_1434_b, zymosterol_intracellular); r_0298 is "cholestenol delta-isomerase, lumped reaction";  // isDescribedBy ECO:0000034
    Keq_r_0298 = 0.331541; Vmax_r_0298 = 0.0918388; kmp_s_0632r_0298 = 0.549; kmp_s_0763_br_0298 = 0.549; kmp_s_1290r_0298 = 0.549; kmp_s_1434_br_0298 = 0.549; kms_s_1160r_0298 = 0.549; kms_s_1293r_0298 = 0.549; kms_s_1447r_0298 = 0.549;
  // GENE_ASSOCIATION:YPR060C
  chorismate_mutase: chorismate_2_intracellular -> prephenate_2_intracellular; intracellular*Function_for_chorismate_mutase(Keq_r_0304, Vmax_r_0304, intracellular, kmp_s_1258r_0304, kms_s_0500r_0304, chorismate_2_intracellular, prephenate_2_intracellular);
    Keq_r_0304 = 1.1; Vmax_r_0304 = 0.3861; kmp_s_1258r_0304 = 0.549; kms_s_0500r_0304 = 0.549;
  // GENE_ASSOCIATION:YGL148W
  chorismate_synthase: s_0330 -> chorismate_2_intracellular + $phosphate_intracellular; intracellular*Function_for_chorismate_synthase(Keq_r_0306, Vmax_r_0306, intracellular, kmp_s_0500r_0306, kmp_s_1207r_0306, kms_s_0330r_0306, s_0330, chorismate_2_intracellular, phosphate_intracellular);
    Keq_r_0306 = 0.6039; Vmax_r_0306 = 0.731496; kmp_s_0500r_0306 = 0.549; kmp_s_1207r_0306 = 0.549; kms_s_0330r_0306 = 0.549;
  // GENE_ASSOCIATION:YLR304C
  cis_aconitate_3_to_isocitrate: cis_aconitate_3_intracellular + $s_1434_b -> isocitrate_3_intracellular; intracellular*function_79(Keq_r_0307, Vmax_r_0307, intracellular, kmp_s_0847r_0307, kms_s_0501r_0307, kms_s_1434_br_0307, cis_aconitate_3_intracellular, isocitrate_3_intracellular, s_1434_b); cis_aconitate_3_to_isocitrate is "cis-aconitate(3-) to isocitrate";
    Keq_r_0307 = 2.00364; Vmax_r_0307 = 4.40553; kmp_s_0847r_0307 = 0.549; kms_s_0501r_0307 = 0.549; kms_s_1434_br_0307 = 0.549;
  // GENE_ASSOCIATION:(YNR001C or YPR001W) or YCR005C
  citrate_synthase: acetyl_CoA_intracellular + oxaloacetate_2_intracellular + $s_1434_b -> citrate_3_intracellular + coenzyme_A_intracellular + $s_0763_b; intracellular*Function_for_citrate_synthase(Keq_r_0328, Vmax_r_0328, intracellular, kmp_s_0507r_0328, kmp_s_0514r_0328, kmp_s_0763_br_0328, kms_s_0380r_0328, kms_s_1156r_0328, kms_s_1434_br_0328, acetyl_CoA_intracellular, citrate_3_intracellular, coenzyme_A_intracellular, s_0763_b, oxaloacetate_2_intracellular, s_1434_b);
    Keq_r_0328 = 1.1; Vmax_r_0328 = 13.2165; kmp_s_0507r_0328 = 0.549; kmp_s_0514r_0328 = 0.549; kmp_s_0763_br_0328 = 0.549; kms_s_0380r_0328 = 0.549; kms_s_1156r_0328 = 0.549; kms_s_1434_br_0328 = 0.549;
  // GENE_ASSOCIATION:YLR304C
  citrate_to_cis_aconitate_3: citrate_3_intracellular -> cis_aconitate_3_intracellular + $s_1434_b; intracellular*function_81(Keq_r_0330, Vmax_r_0330, intracellular, kmp_s_0501r_0330, kmp_s_1434_br_0330, kms_s_0507r_0330, cis_aconitate_3_intracellular, citrate_3_intracellular, s_1434_b); citrate_to_cis_aconitate_3 is "citrate to cis-aconitate(3-)";
    Keq_r_0330 = 0.6039; Vmax_r_0330 = 4.40547; kmp_s_0501r_0330 = 0.549; kmp_s_1434_br_0330 = 0.549; kms_s_0507r_0330 = 0.549;
  // GENE_ASSOCIATION:(YBL039C or YJR103W)
  CTP_synthase_NH3: ammonium_intracellular + ATP_intracellular + UTP_intracellular -> ADP_intracellular + CTP_intracellular + 2 $s_0763_b + $phosphate_intracellular; intracellular*Function_for_CTP_synthase_NH3(Keq_r_0336, Vmax_r_0336, intracellular, kmp_s_0400r_0336, kmp_s_0521r_0336, kmp_s_0763_br_0336, kmp_s_1207r_0336, kms_s_0430r_0336, kms_s_0446r_0336, kms_s_1430r_0336, ADP_intracellular, ammonium_intracellular, ATP_intracellular, CTP_intracellular, s_0763_b, phosphate_intracellular, UTP_intracellular); CTP_synthase_NH3 is "CTP synthase (NH3)";
    Keq_r_0336 = 0.521887; Vmax_r_0336 = 0.703339; kmp_s_0400r_0336 = 1.71907; kmp_s_0521r_0336 = 0.549; kmp_s_0763_br_0336 = 0.549; kmp_s_1207r_0336 = 0.549; kms_s_0430r_0336 = 0.549; kms_s_0446r_0336 = 1.09208; kms_s_1430r_0336 = 0.549;
  // GENE_ASSOCIATION:YGR155W
  cystathionine_beta_synthase: L_homocysteine_intracellular + L_serine_intracellular -> L_cystathionine_intracellular + $s_1434_b; intracellular*function_83(Keq_r_0338, Vmax_r_0338, intracellular, kmp_s_0888r_0338, kmp_s_1434_br_0338, kms_s_0917r_0338, kms_s_0943r_0338, L_cystathionine_intracellular, L_homocysteine_intracellular, L_serine_intracellular, s_1434_b); cystathionine_beta_synthase is "cystathionine beta-synthase";
    Keq_r_0338 = 1.1; Vmax_r_0338 = 0.18326; kmp_s_0888r_0338 = 0.549; kmp_s_1434_br_0338 = 0.549; kms_s_0917r_0338 = 0.549; kms_s_0943r_0338 = 0.549;
  // GENE_ASSOCIATION:YAL012W
  cystathionine_g_lyase: L_cystathionine_intracellular + $s_1434_b -> _2_oxobutanoate_intracellular + ammonium_intracellular + L_cysteine_intracellular; intracellular*function_84(Keq_r_0339, Vmax_r_0339, intracellular, kmp_s_0183r_0339, kmp_s_0430r_0339, kmp_s_0889r_0339, kms_s_0888r_0339, kms_s_1434_br_0339, _2_oxobutanoate_intracellular, ammonium_intracellular, L_cystathionine_intracellular, L_cysteine_intracellular, s_1434_b); cystathionine_g_lyase is "cystathionine g-lyase";
    Keq_r_0339 = 0.6039; Vmax_r_0339 = 0.719947; kmp_s_0183r_0339 = 0.549; kmp_s_0430r_0339 = 0.549; kmp_s_0889r_0339 = 0.549; kms_s_0888r_0339 = 0.549; kms_s_1434_br_0339 = 0.549;
  // GENE_ASSOCIATION:(YJR130C or YML082W)
  cystathionine_gamma_synthase: L_cysteine_intracellular + s_1117 -> acetate_intracellular + $s_0763_b + L_cystathionine_intracellular; intracellular*function_85(Keq_r_0340, Vmax_r_0340, intracellular, kmp_s_0369r_0340, kmp_s_0763_br_0340, kmp_s_0888r_0340, kms_s_0889r_0340, kms_s_1117r_0340, acetate_intracellular, s_0763_b, L_cystathionine_intracellular, L_cysteine_intracellular, s_1117); cystathionine_gamma_synthase is "cystathionine gamma-synthase";
    Keq_r_0340 = 0.6039; Vmax_r_0340 = 0.431968; kmp_s_0369r_0340 = 0.549; kmp_s_0763_br_0340 = 0.549; kmp_s_0888r_0340 = 0.549; kms_s_0889r_0340 = 0.549; kms_s_1117r_0340 = 0.549;
  cytidylate_kinase_CMP: ADP_intracellular + CDP_intracellular -> ATP_intracellular + CMP_intracellular; intracellular*function_86(Keq_r_0345, Vmax_r_0345, intracellular, kmp_s_0446r_0345, kmp_s_0511r_0345, kms_s_0400r_0345, kms_s_0481r_0345, ADP_intracellular, ATP_intracellular, CDP_intracellular, CMP_intracellular); cytidylate_kinase_CMP is "cytidylate kinase (CMP)";  // isDescribedBy ECO:0000034
    Keq_r_0345 = 0.698801; Vmax_r_0345 = 0.19019; kmp_s_0446r_0345 = 1.09208; kmp_s_0511r_0345 = 0.549; kms_s_0400r_0345 = 1.71907; kms_s_0481r_0345 = 0.549;
  // GENE_ASSOCIATION:((YHR007C and YIL043C and YNL111C) or (YHR007C and YKL150W and YNL111C))
  r_0347: 2 $s_0763_b + lanosterol_intracellular + 3 NADH_intracellular + 3 oxygen_intracellular -> s_0268 + formate_intracellular + 3 NAD_intracellular + 4 $s_1434_b; intracellular*function_87(Keq_r_0347, Vmax_r_0347, intracellular, kmp_s_0268r_0347, kmp_s_0689r_0347, kmp_s_1082r_0347, kmp_s_1434_br_0347, kms_s_0763_br_0347, kms_s_0963r_0347, kms_s_1087r_0347, kms_s_1160r_0347, s_0268, formate_intracellular, s_0763_b, lanosterol_intracellular, NAD_intracellular, NADH_intracellular, oxygen_intracellular, s_1434_b); r_0347 is "cytochrome P450 lanosterol 14-alpha-demethylase (NAD)";
    Keq_r_0347 = 5726.73; Vmax_r_0347 = 0.12924; kmp_s_0268r_0347 = 0.549; kmp_s_0689r_0347 = 0.549; kmp_s_1082r_0347 = 1.50326; kmp_s_1434_br_0347 = 0.549; kms_s_0763_br_0347 = 0.549; kms_s_0963r_0347 = 0.549; kms_s_1087r_0347 = 0.0867353; kms_s_1160r_0347 = 0.549;
  // GENE_ASSOCIATION:YMR041C
  D_arabinose_1_dehydrogenase_NAD: s_0529 + $s_0763_b + NADH_intracellular -> D_arabinose_intracellular + NAD_intracellular; intracellular*function_88(Keq_r_0351, Vmax_r_0351, intracellular, kmp_s_0530r_0351, kmp_s_1082r_0351, kms_s_0529r_0351, kms_s_0763_br_0351, kms_s_1087r_0351, s_0529, D_arabinose_intracellular, s_0763_b, NAD_intracellular, NADH_intracellular); D_arabinose_1_dehydrogenase_NAD is "D-arabinose 1-dehydrogenase (NAD)";
    Keq_r_0351 = 34.7263; Vmax_r_0351 = 3.30331; kmp_s_0530r_0351 = 0.549; kmp_s_1082r_0351 = 1.50326; kms_s_0529r_0351 = 0.549; kms_s_0763_br_0351 = 0.549; kms_s_1087r_0351 = 0.0867353;
  // GENE_ASSOCIATION:YBR149W
  D_arabinose_1_dehydrogenase_NADP: D_arabinose_intracellular + NADP_intracellular -> s_0529 + $s_0763_b + NADPH_intracellular; intracellular*function_89(Keq_r_0352, Vmax_r_0352, intracellular, kmp_s_0529r_0352, kmp_s_0763_br_0352, kmp_s_1096r_0352, kms_s_0530r_0352, kms_s_1091r_0352, s_0529, D_arabinose_intracellular, s_0763_b, NADP_intracellular, NADPH_intracellular); D_arabinose_1_dehydrogenase_NADP is "D-arabinose 1-dehydrogenase (NADP)";
    Keq_r_0352 = 0.6039; Vmax_r_0352 = 3.30329; kmp_s_0529r_0352 = 0.549; kmp_s_0763_br_0352 = 0.549; kmp_s_1096r_0352 = 0.549; kms_s_0530r_0352 = 0.549; kms_s_1091r_0352 = 0.549;
  // GENE_ASSOCIATION:YHR144C
  dCMP_deaminase: ammonium_intracellular + dUMP_intracellular -> dCMP_intracellular + $s_0763_b + $s_1434_b; intracellular*Function_for_dCMP_deaminase(Keq_r_0357, Vmax_r_0357, intracellular, kmp_s_0569r_0357, kmp_s_0763_br_0357, kmp_s_1434_br_0357, kms_s_0430r_0357, kms_s_0624r_0357, ammonium_intracellular, dCMP_intracellular, dUMP_intracellular, s_0763_b, s_1434_b);
    Keq_r_0357 = 0.6039; Vmax_r_0357 = 0.0163349; kmp_s_0569r_0357 = 0.549; kmp_s_0763_br_0357 = 0.549; kmp_s_1434_br_0357 = 0.549; kms_s_0430r_0357 = 0.549; kms_s_0624r_0357 = 0.549;
  deoxyadenylate_kinase: ADP_intracellular + dADP_intracellular -> ATP_intracellular + dAMP_intracellular; intracellular*function_91(Keq_r_0360, Vmax_r_0360, intracellular, kmp_s_0446r_0360, kmp_s_0564r_0360, kms_s_0400r_0360, kms_s_0562r_0360, ADP_intracellular, ATP_intracellular, dADP_intracellular, dAMP_intracellular);  // isDescribedBy ECO:0000034
    Keq_r_0360 = 0.698801; Vmax_r_0360 = 0.015323; kmp_s_0446r_0360 = 1.09208; kmp_s_0564r_0360 = 0.549; kms_s_0400r_0360 = 1.71907; kms_s_0562r_0360 = 0.549;
  // GENE_ASSOCIATION:YDR454C
  deoxyguanylate_kinase_dGMP_ATP: ADP_intracellular + dGDP_intracellular -> ATP_intracellular + dGMP_intracellular; intracellular*function_92(Keq_r_0362, Vmax_r_0362, intracellular, kmp_s_0446r_0362, kmp_s_0593r_0362, kms_s_0400r_0362, kms_s_0591r_0362, ADP_intracellular, ATP_intracellular, dGDP_intracellular, dGMP_intracellular); deoxyguanylate_kinase_dGMP_ATP is "deoxyguanylate kinase (dGMP:ATP)";
    Keq_r_0362 = 0.698801; Vmax_r_0362 = 0.010395; kmp_s_0446r_0362 = 1.09208; kmp_s_0593r_0362 = 0.549; kms_s_0400r_0362 = 1.71907; kms_s_0591r_0362 = 0.549;
  // GENE_ASSOCIATION:YOR245C
  diacylglycerol_acyltransferase: acyl_CoA_intracellular + diglyceride_intracellular -> coenzyme_A_intracellular + 4 $s_0763_b + $triglyceride_intracellular; intracellular*function_93(Keq_r_0370, Vmax_r_0370, intracellular, kmp_s_0514r_0370, kmp_s_0763_br_0370, kmp_s_1399r_0370, kms_s_0386r_0370, kms_s_0596r_0370, acyl_CoA_intracellular, coenzyme_A_intracellular, diglyceride_intracellular, s_0763_b, triglyceride_intracellular);
    Keq_r_0370 = 0.0999269; Vmax_r_0370 = 0.0120878; kmp_s_0514r_0370 = 0.549; kmp_s_0763_br_0370 = 0.549; kmp_s_1399r_0370 = 0.549; kms_s_0386r_0370 = 0.549; kms_s_0596r_0370 = 0.549;
  // GENE_ASSOCIATION:YDR284C
  r_0371: phosphatidate_intracellular + $s_1434_b -> diglyceride_intracellular + 2 $s_0763_b + $phosphate_intracellular; intracellular*function_94(Keq_r_0371, Vmax_r_0371, intracellular, kmp_s_0596r_0371, kmp_s_0763_br_0371, kmp_s_1207r_0371, kms_s_1215r_0371, kms_s_1434_br_0371, diglyceride_intracellular, s_0763_b, phosphate_intracellular, phosphatidate_intracellular, s_1434_b); r_0371 is "diacylglycerol pyrophosphate phosphatase";
    Keq_r_0371 = 0.331541; Vmax_r_0371 = 0.00525138; kmp_s_0596r_0371 = 0.549; kmp_s_0763_br_0371 = 0.549; kmp_s_1207r_0371 = 0.549; kms_s_1215r_0371 = 0.549; kms_s_1434_br_0371 = 0.549;
  // GENE_ASSOCIATION:YKL216W
  dihydoorotic_acid_dehydrogenase: S_dihydroorotate_intracellular + oxygen_intracellular -> hydrogen_peroxide_intracellular + orotate_intracellular; intracellular*function_95(Keq_r_0374, Vmax_r_0374, intracellular, kmp_s_0801r_0374, kmp_s_1154r_0374, kms_s_0064r_0374, kms_s_1160r_0374, S_dihydroorotate_intracellular, hydrogen_peroxide_intracellular, orotate_intracellular, oxygen_intracellular);
    Keq_r_0374 = 1.1; Vmax_r_0374 = 0.52591; kmp_s_0801r_0374 = 0.549; kmp_s_1154r_0374 = 0.549; kms_s_0064r_0374 = 0.549; kms_s_1160r_0374 = 0.549;
  // GENE_ASSOCIATION:YOR236W
  dihydrofolate_reductase: dihydrofolic_acid_intracellular + $s_0763_b + NADPH_intracellular -> s_0309 + NADP_intracellular; intracellular*function_96(Keq_r_0375, Vmax_r_0375, intracellular, kmp_s_0309r_0375, kmp_s_1091r_0375, kms_s_0601r_0375, kms_s_0763_br_0375, kms_s_1096r_0375, s_0309, dihydrofolic_acid_intracellular, s_0763_b, NADP_intracellular, NADPH_intracellular);
    Keq_r_0375 = 2.00364; Vmax_r_0375 = 0.0240791; kmp_s_0309r_0375 = 0.549; kmp_s_1091r_0375 = 0.549; kms_s_0601r_0375 = 0.549; kms_s_0763_br_0375 = 0.549; kms_s_1096r_0375 = 0.549;
  // GENE_ASSOCIATION:YLR420W
  dihydroorotase: $s_0763_b + s_1073 -> S_dihydroorotate_intracellular + $s_1434_b; intracellular*Function_for_dihydroorotase(Keq_r_0381, Vmax_r_0381, intracellular, kmp_s_0064r_0381, kmp_s_1434_br_0381, kms_s_0763_br_0381, kms_s_1073r_0381, S_dihydroorotate_intracellular, s_0763_b, s_1073, s_1434_b);
    Keq_r_0381 = 1.1; Vmax_r_0381 = 0.52591; kmp_s_0064r_0381 = 0.549; kmp_s_1434_br_0381 = 0.549; kms_s_0763_br_0381 = 0.549; kms_s_1073r_0381 = 0.549;
  // GENE_ASSOCIATION:YJR016C
  r_0384: s_0018 -> s_0238 + $s_1434_b; intracellular*function_98(Keq_r_0384, Vmax_r_0384, intracellular, kmp_s_0238r_0384, kmp_s_1434_br_0384, kms_s_0018r_0384, s_0018, s_0238, s_1434_b); r_0384 is "dihydroxy-acid dehydratase (2,3-dihydroxy-3-methylbutanoate)";
    Keq_r_0384 = 0.6039; Vmax_r_0384 = 1.55099; kmp_s_0238r_0384 = 0.549; kmp_s_1434_br_0384 = 0.549; kms_s_0018r_0384 = 0.549;
  // GENE_ASSOCIATION:YJR016C
  r_0385: s_0007 -> s_0058 + $s_1434_b; intracellular*function_99(Keq_r_0385, Vmax_r_0385, intracellular, kmp_s_0058r_0385, kmp_s_1434_br_0385, kms_s_0007r_0385, s_0007, s_0058, s_1434_b); r_0385 is "dihydroxy-acid dehydratase (2,3-dihydroxy-3-methylpentanoate)";
    Keq_r_0385 = 0.6039; Vmax_r_0385 = 0.523597; kmp_s_0058r_0385 = 0.549; kmp_s_1434_br_0385 = 0.549; kms_s_0007r_0385 = 0.549;
  // GENE_ASSOCIATION:(YFL053W or YML070W)
  dihydroxyacetone_kinase: ATP_intracellular + glycerone_intracellular -> ADP_intracellular + s_0735 + $s_0763_b; intracellular*function_100(Keq_r_0386, Vmax_r_0386, intracellular, kmp_s_0400r_0386, kmp_s_0735r_0386, kmp_s_0763_br_0386, kms_s_0446r_0386, kms_s_0734r_0386, ADP_intracellular, ATP_intracellular, glycerone_intracellular, s_0735, s_0763_b);
    Keq_r_0386 = 1.04217; Vmax_r_0386 = 5.48128; kmp_s_0400r_0386 = 1.71907; kmp_s_0735r_0386 = 0.601873; kmp_s_0763_br_0386 = 0.549; kms_s_0446r_0386 = 1.09208; kms_s_0734r_0386 = 0.549;
  // GENE_ASSOCIATION:YJL167W
  dimethylallyltranstransferase: s_0850 + prenyl_diphosphate_intracellular -> diphosphate_intracellular + s_0712; intracellular*function_101(Keq_r_0387, Vmax_r_0387, intracellular, kmp_s_0605r_0387, kmp_s_0712r_0387, kms_s_0850r_0387, kms_s_1257r_0387, diphosphate_intracellular, s_0712, s_0850, prenyl_diphosphate_intracellular);
    Keq_r_0387 = 1.1; Vmax_r_0387 = 0.058597; kmp_s_0605r_0387 = 0.549; kmp_s_0712r_0387 = 0.549; kms_s_0850r_0387 = 0.549; kms_s_1257r_0387 = 0.549;
  // GENE_ASSOCIATION:YPR183W
  r_0393: dolichyl_phosphate_intracellular + s_0710 -> s_0615 + GDP_intracellular; intracellular*function_102(Keq_r_0393, Vmax_r_0393, intracellular, kmp_s_0615r_0393, kmp_s_0706r_0393, kms_s_0616r_0393, kms_s_0710r_0393, s_0615, dolichyl_phosphate_intracellular, GDP_intracellular, s_0710); r_0393 is "dolichyl-phosphate D-mannosyltransferase";
    Keq_r_0393 = 1.1; Vmax_r_0393 = 3.5112; kmp_s_0615r_0393 = 0.549; kmp_s_0706r_0393 = 0.549; kms_s_0616r_0393 = 0.549; kms_s_0710r_0393 = 0.549;
  // GENE_ASSOCIATION:(YDL093W or YGR199W or YJR143C or YOR321W or (YAL023C and YDL095W))
  r_0394: s_0615 -> dolichyl_phosphate_intracellular + $s_0763_b + mannan_intracellular; intracellular*function_103(Keq_r_0394, Vmax_r_0394, intracellular, kmp_s_0616r_0394, kmp_s_0763_br_0394, kmp_s_1011r_0394, kms_s_0615r_0394, s_0615, dolichyl_phosphate_intracellular, s_0763_b, mannan_intracellular); r_0394 is "dolichyl-phosphate-mannose--protein mannosyltransferase";
    Keq_r_0394 = 0.331541; Vmax_r_0394 = 4.51436; kmp_s_0616r_0394 = 0.549; kmp_s_0763_br_0394 = 0.549; kmp_s_1011r_0394 = 0.549; kms_s_0615r_0394 = 0.549;
  // GENE_ASSOCIATION:(YGR254W or YHR174W)
  enolase: s_0193 -> s_1243 + $s_1434_b; intracellular*Function_for_enolase(Keq_r_0398, Vmax_r_0398, intracellular, kmp_s_1243r_0398, kmp_s_1434_br_0398, kms_s_0193r_0398, s_0193, s_1243, s_1434_b);
    Keq_r_0398 = 6500; Vmax_r_0398 = 6.15027; kmp_s_1243r_0398 = 0.0271093; kmp_s_1434_br_0398 = 0.549; kms_s_0193r_0398 = 0.0515066;
  // GENE_ASSOCIATION:(YGR037C and YKL182W and YNR016C and YPL231W)
  fatty_acid_synthase_n_C10_0: 3 $s_0763_b + malonyl_CoA_intracellular + 2 NADPH_intracellular + octanoate_intracellular -> carbon_dioxide_intracellular + coenzyme_A_intracellular + decanoate_intracellular + 2 NADP_intracellular + $s_1434_b; intracellular*function_105(Keq_r_0417, Vmax_r_0417, intracellular, kmp_s_0470r_0417, kmp_s_0514r_0417, kmp_s_0574r_0417, kmp_s_1091r_0417, kmp_s_1434_br_0417, kms_s_0763_br_0417, kms_s_1005r_0417, kms_s_1096r_0417, kms_s_1132r_0417, carbon_dioxide_intracellular, coenzyme_A_intracellular, decanoate_intracellular, s_0763_b, malonyl_CoA_intracellular, NADP_intracellular, NADPH_intracellular, octanoate_intracellular, s_1434_b); fatty_acid_synthase_n_C10_0 is "fatty acid synthase (n-C10:0)";
    Keq_r_0417 = 3.64962; Vmax_r_0417 = 0.00599719; kmp_s_0470r_0417 = 1; kmp_s_0514r_0417 = 0.549; kmp_s_0574r_0417 = 0.549; kmp_s_1091r_0417 = 0.549; kmp_s_1434_br_0417 = 0.549; kms_s_0763_br_0417 = 0.549; kms_s_1005r_0417 = 0.549; kms_s_1096r_0417 = 0.549; kms_s_1132r_0417 = 0.549;
  // GENE_ASSOCIATION:(YGR037C and YKL182W and YNR016C and YPL231W)
  fatty_acid_synthase_n_C12_0: decanoate_intracellular + 3 $s_0763_b + malonyl_CoA_intracellular + 2 NADPH_intracellular -> carbon_dioxide_intracellular + coenzyme_A_intracellular + laurate_intracellular + 2 NADP_intracellular + $s_1434_b; intracellular*function_106(Keq_r_0418, Vmax_r_0418, intracellular, kmp_s_0470r_0418, kmp_s_0514r_0418, kmp_s_0968r_0418, kmp_s_1091r_0418, kmp_s_1434_br_0418, kms_s_0574r_0418, kms_s_0763_br_0418, kms_s_1005r_0418, kms_s_1096r_0418, carbon_dioxide_intracellular, coenzyme_A_intracellular, decanoate_intracellular, s_0763_b, laurate_intracellular, malonyl_CoA_intracellular, NADP_intracellular, NADPH_intracellular, s_1434_b); fatty_acid_synthase_n_C12_0 is "fatty acid synthase (n-C12:0)";
    Keq_r_0418 = 3.64962; Vmax_r_0418 = 0.00599719; kmp_s_0470r_0418 = 1; kmp_s_0514r_0418 = 0.549; kmp_s_0968r_0418 = 0.549; kmp_s_1091r_0418 = 0.549; kmp_s_1434_br_0418 = 0.549; kms_s_0574r_0418 = 0.549; kms_s_0763_br_0418 = 0.549; kms_s_1005r_0418 = 0.549; kms_s_1096r_0418 = 0.549;
  // GENE_ASSOCIATION:(YGR037C and YKL182W and YNR016C and YPL231W)
  fatty_acid_synthase_n_C14_0: 3 $s_0763_b + laurate_intracellular + malonyl_CoA_intracellular + 2 NADPH_intracellular -> carbon_dioxide_intracellular + coenzyme_A_intracellular + myristate_intracellular + 2 NADP_intracellular + $s_1434_b; intracellular*function_107(Keq_r_0419, Vmax_r_0419, intracellular, kmp_s_0470r_0419, kmp_s_0514r_0419, kmp_s_1028r_0419, kmp_s_1091r_0419, kmp_s_1434_br_0419, kms_s_0763_br_0419, kms_s_0968r_0419, kms_s_1005r_0419, kms_s_1096r_0419, carbon_dioxide_intracellular, coenzyme_A_intracellular, s_0763_b, laurate_intracellular, malonyl_CoA_intracellular, myristate_intracellular, NADP_intracellular, NADPH_intracellular, s_1434_b); fatty_acid_synthase_n_C14_0 is "fatty acid synthase (n-C14:0)";
    Keq_r_0419 = 3.64962; Vmax_r_0419 = 0.00599719; kmp_s_0470r_0419 = 1; kmp_s_0514r_0419 = 0.549; kmp_s_1028r_0419 = 0.549; kmp_s_1091r_0419 = 0.549; kmp_s_1434_br_0419 = 0.549; kms_s_0763_br_0419 = 0.549; kms_s_0968r_0419 = 0.549; kms_s_1005r_0419 = 0.549; kms_s_1096r_0419 = 0.549;
  // GENE_ASSOCIATION:(YGR037C and YKL182W and YNR016C and YPL231W)
  fatty_acid_synthase_n_C16_0: 3 $s_0763_b + malonyl_CoA_intracellular + myristate_intracellular + 2 NADPH_intracellular -> carbon_dioxide_intracellular + coenzyme_A_intracellular + 2 NADP_intracellular + palmitate_intracellular + $s_1434_b; intracellular*function_108(Keq_r_0421, Vmax_r_0421, intracellular, kmp_s_0470r_0421, kmp_s_0514r_0421, kmp_s_1091r_0421, kmp_s_1170r_0421, kmp_s_1434_br_0421, kms_s_0763_br_0421, kms_s_1005r_0421, kms_s_1028r_0421, kms_s_1096r_0421, carbon_dioxide_intracellular, coenzyme_A_intracellular, s_0763_b, malonyl_CoA_intracellular, myristate_intracellular, NADP_intracellular, NADPH_intracellular, palmitate_intracellular, s_1434_b); fatty_acid_synthase_n_C16_0 is "fatty acid synthase (n-C16:0)";
    Keq_r_0421 = 3.64962; Vmax_r_0421 = 0.00599719; kmp_s_0470r_0421 = 1; kmp_s_0514r_0421 = 0.549; kmp_s_1091r_0421 = 0.549; kmp_s_1170r_0421 = 0.549; kmp_s_1434_br_0421 = 0.549; kms_s_0763_br_0421 = 0.549; kms_s_1005r_0421 = 0.549; kms_s_1028r_0421 = 0.549; kms_s_1096r_0421 = 0.549;
  // GENE_ASSOCIATION:(YGR037C and YKL182W and YNR016C and YPL231W)
  fatty_acid_synthase_n_C18_0: 3 $s_0763_b + malonyl_CoA_intracellular + 2 NADPH_intracellular + palmitate_intracellular -> carbon_dioxide_intracellular + coenzyme_A_intracellular + 2 NADP_intracellular + stearate_intracellular + $s_1434_b; intracellular*function_109(Keq_r_0423, Vmax_r_0423, intracellular, kmp_s_0470r_0423, kmp_s_0514r_0423, kmp_s_1091r_0423, kmp_s_1329r_0423, kmp_s_1434_br_0423, kms_s_0763_br_0423, kms_s_1005r_0423, kms_s_1096r_0423, kms_s_1170r_0423, carbon_dioxide_intracellular, coenzyme_A_intracellular, s_0763_b, malonyl_CoA_intracellular, NADP_intracellular, NADPH_intracellular, palmitate_intracellular, stearate_intracellular, s_1434_b); fatty_acid_synthase_n_C18_0 is "fatty acid synthase (n-C18:0)";
    Keq_r_0423 = 3.64962; Vmax_r_0423 = 0.00599718; kmp_s_0470r_0423 = 1; kmp_s_0514r_0423 = 0.549; kmp_s_1091r_0423 = 0.549; kmp_s_1329r_0423 = 0.549; kmp_s_1434_br_0423 = 0.549; kms_s_0763_br_0423 = 0.549; kms_s_1005r_0423 = 0.549; kms_s_1096r_0423 = 0.549; kms_s_1170r_0423 = 0.549;
  // GENE_ASSOCIATION:(YCR034W and YDL015C and YLR372W)
  r_0425: 9 $s_0763_b + 3 malonyl_CoA_intracellular + 6 NADPH_intracellular + stearate_intracellular -> 3 carbon_dioxide_intracellular + 3 coenzyme_A_intracellular + lignocerate_intracellular + 6 NADP_intracellular + 3 $s_1434_b; intracellular*function_110(Keq_r_0425, Vmax_r_0425, intracellular, kmp_s_0470r_0425, kmp_s_0514r_0425, kmp_s_0987r_0425, kmp_s_1091r_0425, kmp_s_1434_br_0425, kms_s_0763_br_0425, kms_s_1005r_0425, kms_s_1096r_0425, kms_s_1329r_0425, carbon_dioxide_intracellular, coenzyme_A_intracellular, s_0763_b, lignocerate_intracellular, malonyl_CoA_intracellular, NADP_intracellular, NADPH_intracellular, stearate_intracellular, s_1434_b); r_0425 is "fatty acid synthase (n-C24:0), lumped reaction";
    Keq_r_0425 = 40.2; Vmax_r_0425 = 0.0118696; kmp_s_0470r_0425 = 1; kmp_s_0514r_0425 = 0.549; kmp_s_0987r_0425 = 0.549; kmp_s_1091r_0425 = 0.549; kmp_s_1434_br_0425 = 0.549; kms_s_0763_br_0425 = 0.549; kms_s_1005r_0425 = 0.549; kms_s_1096r_0425 = 0.549; kms_s_1329r_0425 = 0.549;
  // GENE_ASSOCIATION:(YGR037C and YKL182W and YNR016C and YPL231W)
  r_0429: 3 $s_0763_b + malonyl_CoA_intracellular + 2 NADPH_intracellular + octanoyl_CoA_intracellular -> carbon_dioxide_intracellular + coenzyme_A_intracellular + decanoyl_CoA_intracellular + 2 NADP_intracellular + $s_1434_b; intracellular*function_111(Keq_r_0429, Vmax_r_0429, intracellular, kmp_s_0470r_0429, kmp_s_0514r_0429, kmp_s_0582r_0429, kmp_s_1091r_0429, kmp_s_1434_br_0429, kms_s_0763_br_0429, kms_s_1005r_0429, kms_s_1096r_0429, kms_s_1140r_0429, carbon_dioxide_intracellular, coenzyme_A_intracellular, decanoyl_CoA_intracellular, s_0763_b, malonyl_CoA_intracellular, NADP_intracellular, NADPH_intracellular, octanoyl_CoA_intracellular, s_1434_b); r_0429 is "fatty acyl-CoA synthase (n-C10:0CoA)";
    Keq_r_0429 = 3.64962; Vmax_r_0429 = 0.0179399; kmp_s_0470r_0429 = 1; kmp_s_0514r_0429 = 0.549; kmp_s_0582r_0429 = 0.549; kmp_s_1091r_0429 = 0.549; kmp_s_1434_br_0429 = 0.549; kms_s_0763_br_0429 = 0.549; kms_s_1005r_0429 = 0.549; kms_s_1096r_0429 = 0.549; kms_s_1140r_0429 = 0.549;
  // GENE_ASSOCIATION:(YGR037C and YKL182W and YNR016C and YPL231W)
  r_0430: acetyl_CoA_intracellular + 9 $s_0763_b + 3 malonyl_CoA_intracellular + 6 NADPH_intracellular -> 3 carbon_dioxide_intracellular + 3 coenzyme_A_intracellular + 6 NADP_intracellular + octanoyl_CoA_intracellular + 3 $s_1434_b; intracellular*function_112(Keq_r_0430, Vmax_r_0430, intracellular, kmp_s_0470r_0430, kmp_s_0514r_0430, kmp_s_1091r_0430, kmp_s_1140r_0430, kmp_s_1434_br_0430, kms_s_0380r_0430, kms_s_0763_br_0430, kms_s_1005r_0430, kms_s_1096r_0430, acetyl_CoA_intracellular, carbon_dioxide_intracellular, coenzyme_A_intracellular, s_0763_b, malonyl_CoA_intracellular, NADP_intracellular, NADPH_intracellular, octanoyl_CoA_intracellular, s_1434_b); r_0430 is "fatty acyl-CoA synthase (n-C8:0CoA), lumped reaction";
    Keq_r_0430 = 40.2; Vmax_r_0430 = 0.0237906; kmp_s_0470r_0430 = 1; kmp_s_0514r_0430 = 0.549; kmp_s_1091r_0430 = 0.549; kmp_s_1140r_0430 = 0.549; kmp_s_1434_br_0430 = 0.549; kms_s_0380r_0430 = 0.549; kms_s_0763_br_0430 = 0.549; kms_s_1005r_0430 = 0.549; kms_s_1096r_0430 = 0.549;
  // GENE_ASSOCIATION:YBR041W
  fatty_acid_CoA_ligase_n_C24_0: ATP_intracellular + coenzyme_A_intracellular + lignocerate_intracellular -> AMP_intracellular + diphosphate_intracellular + tetracosanoyl_CoA_intracellular; intracellular*function_113(Keq_r_0437, Vmax_r_0437, intracellular, kmp_s_0434r_0437, kmp_s_0605r_0437, kmp_s_1355r_0437, kms_s_0446r_0437, kms_s_0514r_0437, kms_s_0987r_0437, AMP_intracellular, ATP_intracellular, coenzyme_A_intracellular, diphosphate_intracellular, lignocerate_intracellular, tetracosanoyl_CoA_intracellular); fatty_acid_CoA_ligase_n_C24_0 is "fatty-acid--CoA ligase (n-C24:0)";
    Keq_r_0437 = 1.26869; Vmax_r_0437 = 0.0038115; kmp_s_0434r_0437 = 1.25956; kmp_s_0605r_0437 = 0.549; kmp_s_1355r_0437 = 0.549; kms_s_0446r_0437 = 1.09208; kms_s_0514r_0437 = 0.549; kms_s_0987r_0437 = 0.549;
  // GENE_ASSOCIATION:(YIL009W or YMR246W or YOR317W)
  r_0439: AMP_intracellular + diphosphate_intracellular + stearoyl_CoA_intracellular -> ATP_intracellular + coenzyme_A_intracellular + stearate_intracellular; intracellular*function_114(Keq_r_0439, Vmax_r_0439, intracellular, kmp_s_0446r_0439, kmp_s_0514r_0439, kmp_s_1329r_0439, kms_s_0434r_0439, kms_s_0605r_0439, kms_s_1334r_0439, AMP_intracellular, ATP_intracellular, coenzyme_A_intracellular, diphosphate_intracellular, stearate_intracellular, stearoyl_CoA_intracellular); r_0439 is "fatty-acid--CoA ligase (octadecanoate)";
    Keq_r_0439 = 0.953736; Vmax_r_0439 = 0.001914; kmp_s_0446r_0439 = 1.09208; kmp_s_0514r_0439 = 0.549; kmp_s_1329r_0439 = 0.549; kms_s_0434r_0439 = 1.25956; kms_s_0605r_0439 = 0.549; kms_s_1334r_0439 = 0.549;
  // GENE_ASSOCIATION:YER015W
  fatty_acid_CoA_ligase_octanoate: AMP_intracellular + diphosphate_intracellular + octanoyl_CoA_intracellular -> ATP_intracellular + coenzyme_A_intracellular + octanoate_intracellular; intracellular*function_115(Keq_r_0442, Vmax_r_0442, intracellular, kmp_s_0446r_0442, kmp_s_0514r_0442, kmp_s_1132r_0442, kms_s_0434r_0442, kms_s_0605r_0442, kms_s_1140r_0442, AMP_intracellular, ATP_intracellular, coenzyme_A_intracellular, diphosphate_intracellular, octanoate_intracellular, octanoyl_CoA_intracellular); fatty_acid_CoA_ligase_octanoate is "fatty-acid--CoA ligase (octanoate)";
    Keq_r_0442 = 0.953736; Vmax_r_0442 = 0.001914; kmp_s_0446r_0442 = 1.09208; kmp_s_0514r_0442 = 0.549; kmp_s_1132r_0442 = 0.549; kms_s_0434r_0442 = 1.25956; kms_s_0605r_0442 = 0.549; kms_s_1140r_0442 = 0.549;
  // GENE_ASSOCIATION:(YGR037C and YKL182W and YNR016C and YPL231W)
  r_0464: decanoyl_CoA_intracellular + 3 $s_0763_b + malonyl_CoA_intracellular + 2 NADPH_intracellular -> carbon_dioxide_intracellular + coenzyme_A_intracellular + lauroyl_CoA_intracellular + 2 NADP_intracellular + $s_1434_b; intracellular*function_116(Keq_r_0464, Vmax_r_0464, intracellular, kmp_s_0470r_0464, kmp_s_0514r_0464, kmp_s_0977r_0464, kmp_s_1091r_0464, kmp_s_1434_br_0464, kms_s_0582r_0464, kms_s_0763_br_0464, kms_s_1005r_0464, kms_s_1096r_0464, carbon_dioxide_intracellular, coenzyme_A_intracellular, decanoyl_CoA_intracellular, s_0763_b, lauroyl_CoA_intracellular, malonyl_CoA_intracellular, NADP_intracellular, NADPH_intracellular, s_1434_b); r_0464 is "fatty-acyl-CoA synthase (n-C12:0CoA)";
    Keq_r_0464 = 3.64962; Vmax_r_0464 = 0.0179399; kmp_s_0470r_0464 = 1; kmp_s_0514r_0464 = 0.549; kmp_s_0977r_0464 = 0.549; kmp_s_1091r_0464 = 0.549; kmp_s_1434_br_0464 = 0.549; kms_s_0582r_0464 = 0.549; kms_s_0763_br_0464 = 0.549; kms_s_1005r_0464 = 0.549; kms_s_1096r_0464 = 0.549;
  // GENE_ASSOCIATION:(YGR037C and YKL182W and YNR016C and YPL231W)
  r_0465: 3 $s_0763_b + lauroyl_CoA_intracellular + malonyl_CoA_intracellular + 2 NADPH_intracellular -> carbon_dioxide_intracellular + coenzyme_A_intracellular + myristoyl_CoA_intracellular + 2 NADP_intracellular + $s_1434_b; intracellular*function_117(Keq_r_0465, Vmax_r_0465, intracellular, kmp_s_0470r_0465, kmp_s_0514r_0465, kmp_s_1044r_0465, kmp_s_1091r_0465, kmp_s_1434_br_0465, kms_s_0763_br_0465, kms_s_0977r_0465, kms_s_1005r_0465, kms_s_1096r_0465, carbon_dioxide_intracellular, coenzyme_A_intracellular, s_0763_b, lauroyl_CoA_intracellular, malonyl_CoA_intracellular, myristoyl_CoA_intracellular, NADP_intracellular, NADPH_intracellular, s_1434_b); r_0465 is "fatty-acyl-CoA synthase (n-C14:0CoA)";
    Keq_r_0465 = 3.64962; Vmax_r_0465 = 0.0179399; kmp_s_0470r_0465 = 1; kmp_s_0514r_0465 = 0.549; kmp_s_1044r_0465 = 0.549; kmp_s_1091r_0465 = 0.549; kmp_s_1434_br_0465 = 0.549; kms_s_0763_br_0465 = 0.549; kms_s_0977r_0465 = 0.549; kms_s_1005r_0465 = 0.549; kms_s_1096r_0465 = 0.549;
  // GENE_ASSOCIATION:(YGR037C and YKL182W and YNR016C and YPL231W)
  r_0466: 3 $s_0763_b + malonyl_CoA_intracellular + myristoyl_CoA_intracellular + 2 NADPH_intracellular -> carbon_dioxide_intracellular + coenzyme_A_intracellular + 2 NADP_intracellular + palmitoyl_CoA_intracellular + $s_1434_b; intracellular*function_118(Keq_r_0466, Vmax_r_0466, intracellular, kmp_s_0470r_0466, kmp_s_0514r_0466, kmp_s_1091r_0466, kmp_s_1187r_0466, kmp_s_1434_br_0466, kms_s_0763_br_0466, kms_s_1005r_0466, kms_s_1044r_0466, kms_s_1096r_0466, carbon_dioxide_intracellular, coenzyme_A_intracellular, s_0763_b, malonyl_CoA_intracellular, myristoyl_CoA_intracellular, NADP_intracellular, NADPH_intracellular, palmitoyl_CoA_intracellular, s_1434_b); r_0466 is "fatty-acyl-CoA synthase (n-C16:0CoA)";
    Keq_r_0466 = 3.64962; Vmax_r_0466 = 0.0179399; kmp_s_0470r_0466 = 1; kmp_s_0514r_0466 = 0.549; kmp_s_1091r_0466 = 0.549; kmp_s_1187r_0466 = 0.549; kmp_s_1434_br_0466 = 0.549; kms_s_0763_br_0466 = 0.549; kms_s_1005r_0466 = 0.549; kms_s_1044r_0466 = 0.549; kms_s_1096r_0466 = 0.549;
  // GENE_ASSOCIATION:(YGR037C and YKL182W and YNR016C and YPL231W)
  r_0467: 3 $s_0763_b + malonyl_CoA_intracellular + 2 NADPH_intracellular + palmitoyl_CoA_intracellular -> carbon_dioxide_intracellular + coenzyme_A_intracellular + 2 NADP_intracellular + stearoyl_CoA_intracellular + $s_1434_b; intracellular*function_119(Keq_r_0467, Vmax_r_0467, intracellular, kmp_s_0470r_0467, kmp_s_0514r_0467, kmp_s_1091r_0467, kmp_s_1334r_0467, kmp_s_1434_br_0467, kms_s_0763_br_0467, kms_s_1005r_0467, kms_s_1096r_0467, kms_s_1187r_0467, carbon_dioxide_intracellular, coenzyme_A_intracellular, s_0763_b, malonyl_CoA_intracellular, NADP_intracellular, NADPH_intracellular, palmitoyl_CoA_intracellular, stearoyl_CoA_intracellular, s_1434_b); r_0467 is "fatty-acyl-CoA synthase (n-C18:0CoA)";
    Keq_r_0467 = 3.64962; Vmax_r_0467 = 0.00599719; kmp_s_0470r_0467 = 1; kmp_s_0514r_0467 = 0.549; kmp_s_1091r_0467 = 0.549; kmp_s_1334r_0467 = 0.549; kmp_s_1434_br_0467 = 0.549; kms_s_0763_br_0467 = 0.549; kms_s_1005r_0467 = 0.549; kms_s_1096r_0467 = 0.549; kms_s_1187r_0467 = 0.549;
  // GENE_ASSOCIATION:YGR204W or YBR084W
  formate_tetrahydrofolate_ligase: s_0309 + ATP_intracellular + formate_intracellular -> s_0122 + ADP_intracellular + $phosphate_intracellular; intracellular*function_120(Keq_r_0479, Vmax_r_0479, intracellular, kmp_s_0122r_0479, kmp_s_0400r_0479, kmp_s_1207r_0479, kms_s_0309r_0479, kms_s_0446r_0479, kms_s_0689r_0479, s_0122, s_0309, ADP_intracellular, ATP_intracellular, formate_intracellular, phosphate_intracellular); formate_tetrahydrofolate_ligase is "formate-tetrahydrofolate ligase";
    Keq_r_0479 = 1.73154; Vmax_r_0479 = 0.087285; kmp_s_0122r_0479 = 0.549; kmp_s_0400r_0479 = 1.71907; kmp_s_1207r_0479 = 0.549; kms_s_0309r_0479 = 0.549; kms_s_0446r_0479 = 1.09208; kms_s_0689r_0479 = 0.549;
  // GENE_ASSOCIATION:YKL060C
  fructose_bisphosphate_aldolase: s_0537 -> s_0731 + s_0735; intracellular*function_121(Keq_r_0484, Vmax_r_0484, intracellular, kmp_s_0731r_0484, kmp_s_0735r_0484, kms_s_0537r_0484, s_0537, s_0731, s_0735); fructose_bisphosphate_aldolase is "fructose-bisphosphate aldolase";
    Keq_r_0484 = 0.045; Vmax_r_0484 = 5.50982; kmp_s_0731r_0484 = 0.0436363; kmp_s_0735r_0484 = 0.601873; kms_s_0537r_0484 = 1.34278;
  // GENE_ASSOCIATION:YPL262W
  fumarase: S_malate_2_intracellular -> fumarate_2_intracellular + $s_1434_b; intracellular*Function_for_fumarase(Keq_r_0485, Vmax_r_0485, intracellular, kmp_s_0692r_0485, kmp_s_1434_br_0485, kms_s_0069r_0485, S_malate_2_intracellular, fumarate_2_intracellular, s_1434_b);
    Keq_r_0485 = 0.6039; Vmax_r_0485 = 2.08449; kmp_s_0692r_0485 = 0.549; kmp_s_1434_br_0485 = 0.549; kms_s_0069r_0485 = 0.549;
  // GENE_ASSOCIATION:(YJR051W or (YDR178W and YJL045W and YKL141W and YLL041C) or (YDR178W and YKL141W and YKL148C and YLL041C)) or YEL047C
  fumarate_reductase: FADH2_intracellular + fumarate_2_intracellular -> FAD_intracellular + succinate_2_intracellular; intracellular*Function_for_fumarate_reductase(Keq_r_0488, Vmax_r_0488, intracellular, kmp_s_0657r_0488, kmp_s_1338r_0488, kms_s_0659r_0488, kms_s_0692r_0488, FAD_intracellular, FADH2_intracellular, fumarate_2_intracellular, succinate_2_intracellular);
    Keq_r_0488 = 1.1; Vmax_r_0488 = 4.5199; kmp_s_0657r_0488 = 0.549; kmp_s_1338r_0488 = 0.549; kms_s_0659r_0488 = 0.549; kms_s_0692r_0488 = 0.549;
  // GENE_ASSOCIATION:YJL167W
  geranyltranstransferase: s_0712 + s_0850 -> s_0195 + diphosphate_intracellular; intracellular*function_124(Keq_r_0496, Vmax_r_0496, intracellular, kmp_s_0195r_0496, kmp_s_0605r_0496, kms_s_0712r_0496, kms_s_0850r_0496, s_0195, diphosphate_intracellular, s_0712, s_0850);
    Keq_r_0496 = 1.1; Vmax_r_0496 = 0.058597; kmp_s_0195r_0496 = 0.549; kmp_s_0605r_0496 = 0.549; kms_s_0712r_0496 = 0.549; kms_s_0850r_0496 = 0.549;
  // GENE_ASSOCIATION:YCL040W
  glucokinase: ATP_intracellular + D_glucose_intracellular -> ADP_intracellular + s_0455 + $s_0763_b; intracellular*Function_for_glucokinase(Keq_r_0499, Vmax_r_0499, intracellular, kmp_s_0400r_0499, kmp_s_0455r_0499, kmp_s_0763_br_0499, kms_s_0446r_0499, kms_s_0545r_0499, ADP_intracellular, ATP_intracellular, s_0455, D_glucose_intracellular, s_0763_b);
    Keq_r_0499 = 4.77829; Vmax_r_0499 = 72.4789; kmp_s_0400r_0499 = 1.71907; kmp_s_0455r_0499 = 0.496414; kmp_s_0763_br_0499 = 0.549; kms_s_0446r_0499 = 1.09208; kms_s_0545r_0499 = 0.0987587;
  // GENE_ASSOCIATION:YBR196C
  glucose_6_phosphate_isomerase: s_0455 -> s_0539; intracellular*function_126(Keq_r_0504, Vmax_r_0504, intracellular, kmp_s_0539r_0504, kms_s_0455r_0504, s_0455, s_0539); glucose_6_phosphate_isomerase is "glucose-6-phosphate isomerase";
    Keq_r_0504 = 0.29; Vmax_r_0504 = 6.56505; kmp_s_0539r_0504 = 0.104555; kms_s_0455r_0504 = 0.496414;
  // GENE_ASSOCIATION:YBR196C
  glucose_6_phosphate_isomerase_2: s_0410 -> s_0539; intracellular*function_127(Keq_r_0505, Vmax_r_0505, intracellular, kmp_s_0539r_0505, kms_s_0410r_0505, s_0410, s_0539); glucose_6_phosphate_isomerase_2 is "glucose-6-phosphate isomerase_2";
    Keq_r_0505 = 0.29; Vmax_r_0505 = 0.753302; kmp_s_0539r_0505 = 0.104555; kms_s_0410r_0505 = 0.549;
  // GENE_ASSOCIATION:YDR300C
  glutamate_5_kinase: ATP_intracellular + L_glutamate_intracellular -> ADP_intracellular + s_0894; intracellular*Function_for_glutamate_5_kinase(Keq_r_0506, Vmax_r_0506, intracellular, kmp_s_0400r_0506, kmp_s_0894r_0506, kms_s_0446r_0506, kms_s_0899r_0506, ADP_intracellular, ATP_intracellular, s_0894, L_glutamate_intracellular); glutamate_5_kinase is "glutamate 5-kinase";
    Keq_r_0506 = 1.73154; Vmax_r_0506 = 0.54978; kmp_s_0400r_0506 = 1.71907; kmp_s_0894r_0506 = 0.549; kms_s_0446r_0506 = 1.09208; kms_s_0899r_0506 = 0.549;
  // GENE_ASSOCIATION:(YAL062W or YOR375C)
  glutamate_dehydrogenase_NADP: _2_oxoglutarate_intracellular + ammonium_intracellular + $s_0763_b + NADPH_intracellular -> L_glutamate_intracellular + NADP_intracellular + $s_1434_b; intracellular*function_129(Keq_r_0509, Vmax_r_0509, intracellular, kmp_s_0899r_0509, kmp_s_1091r_0509, kmp_s_1434_br_0509, kms_s_0185r_0509, kms_s_0430r_0509, kms_s_0763_br_0509, kms_s_1096r_0509, _2_oxoglutarate_intracellular, ammonium_intracellular, s_0763_b, L_glutamate_intracellular, NADP_intracellular, NADPH_intracellular, s_1434_b); glutamate_dehydrogenase_NADP is "glutamate dehydrogenase (NADP)";
    Keq_r_0509 = 2.00364; Vmax_r_0509 = 38.2031; kmp_s_0899r_0509 = 0.549; kmp_s_1091r_0509 = 0.549; kmp_s_1434_br_0509 = 0.549; kms_s_0185r_0509 = 0.549; kms_s_0430r_0509 = 0.549; kms_s_0763_br_0509 = 0.549; kms_s_1096r_0509 = 0.549;
  // GENE_ASSOCIATION:YDL171C
  glutamate_synthase_NADH2: _2_oxoglutarate_intracellular + $s_0763_b + L_glutamine_intracellular + NADH_intracellular -> 2 L_glutamate_intracellular + NAD_intracellular; intracellular*function_130(Keq_r_0510, Vmax_r_0510, intracellular, kmp_s_0899r_0510, kmp_s_1082r_0510, kms_s_0185r_0510, kms_s_0763_br_0510, kms_s_0907r_0510, kms_s_1087r_0510, _2_oxoglutarate_intracellular, s_0763_b, L_glutamate_intracellular, L_glutamine_intracellular, NAD_intracellular, NADH_intracellular); glutamate_synthase_NADH2 is "glutamate synthase (NADH2)";
    Keq_r_0510 = 34.7263; Vmax_r_0510 = 31.5593; kmp_s_0899r_0510 = 0.549; kmp_s_1082r_0510 = 1.50326; kms_s_0185r_0510 = 0.549; kms_s_0763_br_0510 = 0.549; kms_s_0907r_0510 = 0.549; kms_s_1087r_0510 = 0.0867353;
  // GENE_ASSOCIATION:YOR323C
  r_0512: $s_0763_b + s_0894 + NADH_intracellular -> s_0905 + NAD_intracellular + $phosphate_intracellular; intracellular*function_131(Keq_r_0512, Vmax_r_0512, intracellular, kmp_s_0905r_0512, kmp_s_1082r_0512, kmp_s_1207r_0512, kms_s_0763_br_0512, kms_s_0894r_0512, kms_s_1087r_0512, s_0763_b, s_0894, s_0905, NAD_intracellular, NADH_intracellular, phosphate_intracellular); r_0512 is "glutamate-5-semialdehyde dehydrogenase";
    Keq_r_0512 = 19.0647; Vmax_r_0512 = 1.1781; kmp_s_0905r_0512 = 0.549; kmp_s_1082r_0512 = 1.50326; kmp_s_1207r_0512 = 0.549; kms_s_0763_br_0512 = 0.549; kms_s_0894r_0512 = 0.549; kms_s_1087r_0512 = 0.0867353;
  // GENE_ASSOCIATION:YMR300C
  r_0514: s_0331 + L_glutamine_intracellular + $s_1434_b -> s_0333 + diphosphate_intracellular + L_glutamate_intracellular; intracellular*function_132(Keq_r_0514, Vmax_r_0514, intracellular, kmp_s_0333r_0514, kmp_s_0605r_0514, kmp_s_0899r_0514, kms_s_0331r_0514, kms_s_0907r_0514, kms_s_1434_br_0514, s_0331, s_0333, diphosphate_intracellular, L_glutamate_intracellular, L_glutamine_intracellular, s_1434_b); r_0514 is "glutamine phosphoribosyldiphosphate amidotransferase";
    Keq_r_0514 = 1.1; Vmax_r_0514 = 1.00155; kmp_s_0333r_0514 = 0.549; kmp_s_0605r_0514 = 0.549; kmp_s_0899r_0514 = 0.549; kms_s_0331r_0514 = 0.549; kms_s_0907r_0514 = 0.549; kms_s_1434_br_0514 = 0.549;
  // GENE_ASSOCIATION:YPR035W
  glutamine_synthetase: ammonium_intracellular + ATP_intracellular + L_glutamate_intracellular -> ADP_intracellular + $s_0763_b + L_glutamine_intracellular + $phosphate_intracellular; intracellular*function_133(Keq_r_0515, Vmax_r_0515, intracellular, kmp_s_0400r_0515, kmp_s_0763_br_0515, kmp_s_0907r_0515, kmp_s_1207r_0515, kms_s_0430r_0515, kms_s_0446r_0515, kms_s_0899r_0515, ADP_intracellular, ammonium_intracellular, ATP_intracellular, s_0763_b, L_glutamate_intracellular, L_glutamine_intracellular, phosphate_intracellular);
    Keq_r_0515 = 0.950614; Vmax_r_0515 = 53.3829; kmp_s_0400r_0515 = 1.71907; kmp_s_0763_br_0515 = 0.549; kmp_s_0907r_0515 = 0.549; kmp_s_1207r_0515 = 0.549; kms_s_0430r_0515 = 0.549; kms_s_0446r_0515 = 1.09208; kms_s_0899r_0515 = 0.549;
  // GENE_ASSOCIATION:(YGR192C or YJL052W or YJR009C)
  r_0525: s_0731 + NAD_intracellular + $phosphate_intracellular -> s_0265 + $s_0763_b + NADH_intracellular; intracellular*function_134(Keq_r_0525, Vmax_r_0525, intracellular, kmp_s_0265r_0525, kmp_s_0763_br_0525, kmp_s_1087r_0525, kms_s_0731r_0525, kms_s_1082r_0525, kms_s_1207r_0525, s_0265, s_0731, s_0763_b, NAD_intracellular, NADH_intracellular, phosphate_intracellular); r_0525 is "glyceraldehyde-3-phosphate dehydrogenase";
    Keq_r_0525 = 3200; Vmax_r_0525 = 18.45; kmp_s_0265r_0525 = 0.000108759; kmp_s_0763_br_0525 = 0.549; kmp_s_1087r_0525 = 0.0867353; kms_s_0731r_0525 = 0.0436363; kms_s_1082r_0525 = 1.50326; kms_s_1207r_0525 = 0.549;
  // GENE_ASSOCIATION:YOR120W
  r_0526: glycerol_intracellular + NADP_intracellular -> glycerone_intracellular + $s_0763_b + NADPH_intracellular; intracellular*function_135(Keq_r_0526, Vmax_r_0526, intracellular, kmp_s_0734r_0526, kmp_s_0763_br_0526, kmp_s_1096r_0526, kms_s_0732r_0526, kms_s_1091r_0526, glycerol_intracellular, glycerone_intracellular, s_0763_b, NADP_intracellular, NADPH_intracellular); r_0526 is "glycerol dehydrogenase (NADP-dependent)";
    Keq_r_0526 = 2.21027; Vmax_r_0526 = 5.48128; kmp_s_0734r_0526 = 0.549; kmp_s_0763_br_0526 = 0.549; kmp_s_1096r_0526 = 0.549; kms_s_0732r_0526 = 0.15; kms_s_1091r_0526 = 0.549;
  // GENE_ASSOCIATION:(YER062C or YIL053W)
  glycerol_3_phosphatase: s_1315 + $s_1434_b -> glycerol_intracellular + $phosphate_intracellular; intracellular*function_136(Keq_r_0528, Vmax_r_0528, intracellular, kmp_s_0732r_0528, kmp_s_1207r_0528, kms_s_1315r_0528, kms_s_1434_br_0528, glycerol_intracellular, phosphate_intracellular, s_1315, s_1434_b); glycerol_3_phosphatase is "glycerol-3-phosphatase";
    Keq_r_0528 = 0.0128394; Vmax_r_0528 = 3.48809; kmp_s_0732r_0528 = 0.15; kmp_s_1207r_0528 = 0.549; kms_s_1315r_0528 = 12.8511; kms_s_1434_br_0528 = 0.549;
  // GENE_ASSOCIATION:YIL155C
  r_0529: FAD_intracellular + s_1315 -> FADH2_intracellular + s_0735; intracellular*function_137(Keq_r_0529, Vmax_r_0529, intracellular, kmp_s_0659r_0529, kmp_s_0735r_0529, kms_s_0657r_0529, kms_s_1315r_0529, FAD_intracellular, FADH2_intracellular, s_0735, s_1315); r_0529 is "glycerol-3-phosphate dehydrogenase (fad)";
    Keq_r_0529 = 0.0515178; Vmax_r_0529 = 4.51989; kmp_s_0659r_0529 = 0.549; kmp_s_0735r_0529 = 0.601873; kms_s_0657r_0529 = 0.549; kms_s_1315r_0529 = 12.8511;
  // GENE_ASSOCIATION:(YDL022W or YOL059W) or YOL059W
  r_0530: s_0735 + $s_0763_b + NADH_intracellular -> NAD_intracellular + s_1315; intracellular*function_138(Keq_r_0530, Vmax_r_0530, intracellular, kmp_s_1082r_0530, kmp_s_1315r_0530, kms_s_0735r_0530, kms_s_0763_br_0530, kms_s_1087r_0530, s_0735, s_0763_b, NAD_intracellular, NADH_intracellular, s_1315); r_0530 is "glycerol-3-phosphate dehydrogenase (NAD)";
    Keq_r_0530 = 741.47; Vmax_r_0530 = 12.5841; kmp_s_1082r_0530 = 1.50326; kmp_s_1315r_0530 = 12.8511; kms_s_0735r_0530 = 0.601873; kms_s_0763_br_0530 = 0.549; kms_s_1087r_0530 = 0.0867353;
  // GENE_ASSOCIATION:(YBL011W or YKR067W) or YKR067W
  r_0534: acyl_CoA_intracellular + s_1315 -> s_0083 + coenzyme_A_intracellular + 2 $s_0763_b; intracellular*function_139(Keq_r_0534, Vmax_r_0534, intracellular, kmp_s_0083r_0534, kmp_s_0514r_0534, kmp_s_0763_br_0534, kms_s_0386r_0534, kms_s_1315r_0534, s_0083, acyl_CoA_intracellular, coenzyme_A_intracellular, s_0763_b, s_1315); r_0534 is "glycerol-3-phosphate/dihydroxyacetone phosphate acyltransferase";
    Keq_r_0534 = 0.0141635; Vmax_r_0534 = 0.0421077; kmp_s_0083r_0534 = 0.549; kmp_s_0514r_0534 = 0.549; kmp_s_0763_br_0534 = 0.549; kms_s_0386r_0534 = 0.549; kms_s_1315r_0534 = 12.8511;
  // GENE_ASSOCIATION:(YAL044C and YDR019C and YFL018C and YMR189W)
  glycine_cleavage_system: s_0309 + glycine_intracellular + NAD_intracellular -> s_0307 + ammonium_intracellular + carbon_dioxide_intracellular + NADH_intracellular; intracellular*function_140(Keq_r_0538, Vmax_r_0538, intracellular, kmp_s_0307r_0538, kmp_s_0430r_0538, kmp_s_0470r_0538, kmp_s_1087r_0538, kms_s_0309r_0538, kms_s_0740r_0538, kms_s_1082r_0538, s_0307, s_0309, ammonium_intracellular, carbon_dioxide_intracellular, glycine_intracellular, NAD_intracellular, NADH_intracellular);
    Keq_r_0538 = 0.063468; Vmax_r_0538 = 9.5887; kmp_s_0307r_0538 = 0.549; kmp_s_0430r_0538 = 0.549; kmp_s_0470r_0538 = 1; kmp_s_1087r_0538 = 0.0867353; kms_s_0309r_0538 = 0.549; kms_s_0740r_0538 = 0.549; kms_s_1082r_0538 = 1.50326;
  // GENE_ASSOCIATION:YLR058C or YBR263W
  glycine_hydroxymethyltransferase: s_0307 + glycine_intracellular + $s_1434_b -> s_0309 + L_serine_intracellular; intracellular*function_141(Keq_r_0539, Vmax_r_0539, intracellular, kmp_s_0309r_0539, kmp_s_0943r_0539, kms_s_0307r_0539, kms_s_0740r_0539, kms_s_1434_br_0539, s_0307, s_0309, glycine_intracellular, L_serine_intracellular, s_1434_b);
    Keq_r_0539 = 2.00364; Vmax_r_0539 = 2.21431; kmp_s_0309r_0539 = 0.549; kmp_s_0943r_0539 = 0.549; kms_s_0307r_0539 = 0.549; kms_s_0740r_0539 = 0.549; kms_s_1434_br_0539 = 0.549;
  // GENE_ASSOCIATION:((YFR015C and YJL137C) or (YFR015C and YKR058W) or (YJL137C and YLR258W) or (YKR058W and YLR258W))
  glycogen_starch_synthase: UDP_D_glucose_intracellular + $s_1434_b -> amylose_intracellular + $s_0763_b + UDP_intracellular; intracellular*function_142(Keq_r_0547, Vmax_r_0547, intracellular, kmp_s_0438r_0547, kmp_s_0763_br_0547, kmp_s_1411r_0547, kms_s_1415r_0547, kms_s_1434_br_0547, amylose_intracellular, s_0763_b, UDP_intracellular, UDP_D_glucose_intracellular, s_1434_b); glycogen_starch_synthase is "glycogen (starch) synthase";
    Keq_r_0547 = 0.6039; Vmax_r_0547 = 3.48479; kmp_s_0438r_0547 = 0.549; kmp_s_0763_br_0547 = 0.549; kmp_s_1411r_0547 = 0.549; kms_s_1415r_0547 = 0.549; kms_s_1434_br_0547 = 0.549;
  // GENE_ASSOCIATION:YMR217W
  GMP_synthase: _5_xanthylic_acid_intracellular + ATP_intracellular + L_glutamine_intracellular + $s_1434_b -> AMP_intracellular + diphosphate_intracellular + GMP_intracellular + 2 $s_0763_b + L_glutamate_intracellular; intracellular*Function_for_GMP_synthase(Keq_r_0551, Vmax_r_0551, intracellular, kmp_s_0434r_0551, kmp_s_0605r_0551, kmp_s_0752r_0551, kmp_s_0763_br_0551, kmp_s_0899r_0551, kms_s_0306r_0551, kms_s_0446r_0551, kms_s_0907r_0551, kms_s_1434_br_0551, _5_xanthylic_acid_intracellular, AMP_intracellular, ATP_intracellular, diphosphate_intracellular, GMP_intracellular, s_0763_b, L_glutamate_intracellular, L_glutamine_intracellular, s_1434_b);
    Keq_r_0551 = 0.382386; Vmax_r_0551 = 1.57168; kmp_s_0434r_0551 = 1.25956; kmp_s_0605r_0551 = 0.549; kmp_s_0752r_0551 = 0.549; kmp_s_0763_br_0551 = 0.549; kmp_s_0899r_0551 = 0.549; kms_s_0306r_0551 = 0.549; kms_s_0446r_0551 = 1.09208; kms_s_0907r_0551 = 0.549; kms_s_1434_br_0551 = 0.549;
  // GENE_ASSOCIATION:YBL033C
  GTP_cyclohydrolase_II: GTP_intracellular + 3 $s_1434_b -> s_0145 + diphosphate_intracellular + formate_intracellular + 2 $s_0763_b; intracellular*function_144(Keq_r_0562, Vmax_r_0562, intracellular, kmp_s_0145r_0562, kmp_s_0605r_0562, kmp_s_0689r_0562, kmp_s_0763_br_0562, kms_s_0755r_0562, kms_s_1434_br_0562, s_0145, diphosphate_intracellular, formate_intracellular, GTP_intracellular, s_0763_b, s_1434_b);
    Keq_r_0562 = 0.6039; Vmax_r_0562 = 0.0104499; kmp_s_0145r_0562 = 0.549; kmp_s_0605r_0562 = 0.549; kmp_s_0689r_0562 = 0.549; kmp_s_0763_br_0562 = 0.549; kms_s_0755r_0562 = 0.549; kms_s_1434_br_0562 = 0.549;
  // GENE_ASSOCIATION:YDR454C
  guanylate_kinase_GMP_ATP: ATP_intracellular + GMP_intracellular -> ADP_intracellular + GDP_intracellular; intracellular*function_145(Keq_r_0567, Vmax_r_0567, intracellular, kmp_s_0400r_0567, kmp_s_0706r_0567, kms_s_0446r_0567, kms_s_0752r_0567, ADP_intracellular, ATP_intracellular, GDP_intracellular, GMP_intracellular); guanylate_kinase_GMP_ATP is "guanylate kinase (GMP:ATP)";
    Keq_r_0567 = 1.73154; Vmax_r_0567 = 0.008393; kmp_s_0400r_0567 = 1.71907; kmp_s_0706r_0567 = 0.549; kms_s_0446r_0567 = 1.09208; kms_s_0752r_0567 = 0.549;
  // GENE_ASSOCIATION:YDR454C
  guanylate_kinase_GMP_dATP: dATP_intracellular + GMP_intracellular -> dADP_intracellular + GDP_intracellular; intracellular*function_146(Keq_r_0568, Vmax_r_0568, intracellular, kmp_s_0562r_0568, kmp_s_0706r_0568, kms_s_0566r_0568, kms_s_0752r_0568, dADP_intracellular, dATP_intracellular, GDP_intracellular, GMP_intracellular); guanylate_kinase_GMP_dATP is "guanylate kinase (GMP:dATP)";
    Keq_r_0568 = 1.1; Vmax_r_0568 = 0.0076692; kmp_s_0562r_0568 = 0.549; kmp_s_0706r_0568 = 0.549; kms_s_0566r_0568 = 0.549; kms_s_0752r_0568 = 0.549;
  // GENE_ASSOCIATION:(YCL040W or YFR053C or YGL253W)
  hexokinase_D_glucose_ATP: ATP_intracellular + D_glucose_intracellular -> ADP_intracellular + s_0410 + $s_0763_b; intracellular*function_147(Keq_r_0573, Vmax_r_0573, intracellular, kmp_s_0400r_0573, kmp_s_0410r_0573, kmp_s_0763_br_0573, kms_s_0446r_0573, kms_s_0545r_0573, ADP_intracellular, s_0410, ATP_intracellular, D_glucose_intracellular, s_0763_b); hexokinase_D_glucose_ATP is "hexokinase (D-glucose:ATP)";
    Keq_r_0573 = 2000; Vmax_r_0573 = 1.99579; kmp_s_0400r_0573 = 1.71907; kmp_s_0410r_0573 = 0.549; kmp_s_0763_br_0573 = 0.549; kms_s_0446r_0573 = 1.09208; kms_s_0545r_0573 = 0.0987587;
  // GENE_ASSOCIATION:YCL030C
  histidinol_dehydrogenase: L_histidinol_intracellular + 2 NAD_intracellular + $s_1434_b -> 3 $s_0763_b + L_histidine_intracellular + 2 NADH_intracellular; intracellular*function_148(Keq_r_0575, Vmax_r_0575, intracellular, kmp_s_0763_br_0575, kmp_s_0911r_0575, kmp_s_1087r_0575, kms_s_0915r_0575, kms_s_1082r_0575, kms_s_1434_br_0575, s_0763_b, L_histidine_intracellular, L_histidinol_intracellular, NAD_intracellular, NADH_intracellular, s_1434_b);
    Keq_r_0575 = 0.00110373; Vmax_r_0575 = 0.688047; kmp_s_0763_br_0575 = 0.549; kmp_s_0911r_0575 = 0.549; kmp_s_1087r_0575 = 0.0867353; kms_s_0915r_0575 = 0.549; kms_s_1082r_0575 = 1.50326; kms_s_1434_br_0575 = 0.549;
  // GENE_ASSOCIATION:YFR025C
  histidinol_phosphatase: s_0916 + $s_1434_b -> L_histidinol_intracellular + $phosphate_intracellular; intracellular*function_149(Keq_r_0576, Vmax_r_0576, intracellular, kmp_s_0915r_0576, kmp_s_1207r_0576, kms_s_0916r_0576, kms_s_1434_br_0576, L_histidinol_intracellular, s_0916, phosphate_intracellular, s_1434_b); histidinol_phosphatase is "histidinol-phosphatase";
    Keq_r_0576 = 1.1; Vmax_r_0576 = 0.32109; kmp_s_0915r_0576 = 0.549; kmp_s_1207r_0576 = 0.549; kms_s_0916r_0576 = 0.549; kms_s_1434_br_0576 = 0.549;
  // GENE_ASSOCIATION:YIL116W
  r_0577: s_0212 + L_glutamate_intracellular -> _2_oxoglutarate_intracellular + s_0916; intracellular*function_150(Keq_r_0577, Vmax_r_0577, intracellular, kmp_s_0185r_0577, kmp_s_0916r_0577, kms_s_0212r_0577, kms_s_0899r_0577, _2_oxoglutarate_intracellular, s_0212, L_glutamate_intracellular, s_0916); r_0577 is "histidinol-phosphate transaminase";
    Keq_r_0577 = 1.1; Vmax_r_0577 = 0.32109; kmp_s_0185r_0577 = 0.549; kmp_s_0916r_0577 = 0.549; kms_s_0212r_0577 = 0.549; kms_s_0899r_0577 = 0.549;
  // GENE_ASSOCIATION:YDR234W
  homoacontinate_hydratase: s_0468 + $s_1434_b -> homoisocitrate_3_intracellular; intracellular*function_151(Keq_r_0581, Vmax_r_0581, intracellular, kmp_s_0800r_0581, kms_s_0468r_0581, kms_s_1434_br_0581, s_0468, homoisocitrate_3_intracellular, s_1434_b);
    Keq_r_0581 = 2.00364; Vmax_r_0581 = 0.731504; kmp_s_0800r_0581 = 0.549; kms_s_0468r_0581 = 0.549; kms_s_1434_br_0581 = 0.549;
  // GENE_ASSOCIATION: or (YDL131W or YDL182W)
  homocitrate_synthase: _2_oxoglutarate_intracellular + acetyl_CoA_intracellular + $s_1434_b -> coenzyme_A_intracellular + $s_0763_b + homocitrate_3_intracellular; intracellular*function_152(Keq_r_0582, Vmax_r_0582, intracellular, kmp_s_0514r_0582, kmp_s_0763_br_0582, kmp_s_0798r_0582, kms_s_0185r_0582, kms_s_0380r_0582, kms_s_1434_br_0582, _2_oxoglutarate_intracellular, acetyl_CoA_intracellular, coenzyme_A_intracellular, s_0763_b, homocitrate_3_intracellular, s_1434_b);  // isDescribedBy ECO:0000034
    Keq_r_0582 = 1.1; Vmax_r_0582 = 2.1945; kmp_s_0514r_0582 = 0.549; kmp_s_0763_br_0582 = 0.549; kmp_s_0798r_0582 = 0.549; kms_s_0185r_0582 = 0.549; kms_s_0380r_0582 = 0.549; kms_s_1434_br_0582 = 0.549;
  // GENE_ASSOCIATION:YIL094C
  homoisocitrate_dehydrogenase: homoisocitrate_3_intracellular + NAD_intracellular -> s_0180 + $s_0763_b + NADH_intracellular; intracellular*function_153(Keq_r_0585, Vmax_r_0585, intracellular, kmp_s_0180r_0585, kmp_s_0763_br_0585, kmp_s_1087r_0585, kms_s_0800r_0585, kms_s_1082r_0585, s_0180, s_0763_b, homoisocitrate_3_intracellular, NAD_intracellular, NADH_intracellular);
    Keq_r_0585 = 0.0348439; Vmax_r_0585 = 1.60929; kmp_s_0180r_0585 = 0.549; kmp_s_0763_br_0585 = 0.549; kmp_s_1087r_0585 = 0.0867353; kms_s_0800r_0585 = 0.549; kms_s_1082r_0585 = 1.50326;
  // GENE_ASSOCIATION:YJR139C
  homoserine_dehydrogenase_NADH: $s_0763_b + s_0886 + NADH_intracellular -> L_homoserine_intracellular + NAD_intracellular; intracellular*function_154(Keq_r_0586, Vmax_r_0586, intracellular, kmp_s_0919r_0586, kmp_s_1082r_0586, kms_s_0763_br_0586, kms_s_0886r_0586, kms_s_1087r_0586, s_0763_b, s_0886, L_homoserine_intracellular, NAD_intracellular, NADH_intracellular); homoserine_dehydrogenase_NADH is "homoserine dehydrogenase (NADH)";
    Keq_r_0586 = 34.7263; Vmax_r_0586 = 9.81316; kmp_s_0919r_0586 = 0.549; kmp_s_1082r_0586 = 1.50326; kms_s_0763_br_0586 = 0.549; kms_s_0886r_0586 = 0.549; kms_s_1087r_0586 = 0.0867353;
  // GENE_ASSOCIATION:YHR025W
  homoserine_kinase: ATP_intracellular + L_homoserine_intracellular -> ADP_intracellular + $s_0763_b + s_1122; intracellular*Function_for_homoserine_kinase(Keq_r_0588, Vmax_r_0588, intracellular, kmp_s_0400r_0588, kmp_s_0763_br_0588, kmp_s_1122r_0588, kms_s_0446r_0588, kms_s_0919r_0588, ADP_intracellular, ATP_intracellular, s_0763_b, L_homoserine_intracellular, s_1122);
    Keq_r_0588 = 0.950614; Vmax_r_0588 = 8.76037; kmp_s_0400r_0588 = 1.71907; kmp_s_0763_br_0588 = 0.549; kmp_s_1122r_0588 = 0.549; kms_s_0446r_0588 = 1.09208; kms_s_0919r_0588 = 0.549;
  // GENE_ASSOCIATION:YNL277W
  homoserine_O_trans_acetylase: acetyl_CoA_intracellular + L_homoserine_intracellular -> coenzyme_A_intracellular + s_1117; intracellular*function_156(Keq_r_0589, Vmax_r_0589, intracellular, kmp_s_0514r_0589, kmp_s_1117r_0589, kms_s_0380r_0589, kms_s_0919r_0589, acetyl_CoA_intracellular, coenzyme_A_intracellular, L_homoserine_intracellular, s_1117); homoserine_O_trans_acetylase is "homoserine O-trans-acetylase";
    Keq_r_0589 = 1.1; Vmax_r_0589 = 0.67221; kmp_s_0514r_0589 = 0.549; kmp_s_1117r_0589 = 0.549; kms_s_0380r_0589 = 0.549; kms_s_0919r_0589 = 0.549;
  // GENE_ASSOCIATION:(YLR450W or YML075C)
  r_0598: s_0225 + 2 $s_0763_b + 2 NADPH_intracellular -> R_mevalonate_intracellular + coenzyme_A_intracellular + 2 NADP_intracellular; intracellular*function_157(Keq_r_0598, Vmax_r_0598, intracellular, kmp_s_0031r_0598, kmp_s_0514r_0598, kmp_s_1091r_0598, kms_s_0225r_0598, kms_s_0763_br_0598, kms_s_1096r_0598, R_mevalonate_intracellular, s_0225, coenzyme_A_intracellular, s_0763_b, NADP_intracellular, NADPH_intracellular); r_0598 is "hydroxymethylglutaryl CoA reductase";
    Keq_r_0598 = 2.00364; Vmax_r_0598 = 0.3762; kmp_s_0031r_0598 = 0.549; kmp_s_0514r_0598 = 0.549; kmp_s_1091r_0598 = 0.549; kms_s_0225r_0598 = 0.549; kms_s_0763_br_0598 = 0.549; kms_s_1096r_0598 = 0.549;
  // GENE_ASSOCIATION:YML126C
  r_0599: acetoacetyl_CoA_intracellular + acetyl_CoA_intracellular + $s_1434_b -> s_0225 + coenzyme_A_intracellular + $s_0763_b; intracellular*function_158(Keq_r_0599, Vmax_r_0599, intracellular, kmp_s_0225r_0599, kmp_s_0514r_0599, kmp_s_0763_br_0599, kms_s_0374r_0599, kms_s_0380r_0599, kms_s_1434_br_0599, s_0225, acetoacetyl_CoA_intracellular, acetyl_CoA_intracellular, coenzyme_A_intracellular, s_0763_b, s_1434_b); r_0599 is "hydroxymethylglutaryl CoA synthase";
    Keq_r_0599 = 1.1; Vmax_r_0599 = 0.3762; kmp_s_0225r_0599 = 0.549; kmp_s_0514r_0599 = 0.549; kmp_s_0763_br_0599 = 0.549; kms_s_0374r_0599 = 0.549; kms_s_0380r_0599 = 0.549; kms_s_1434_br_0599 = 0.549;
  // GENE_ASSOCIATION:YBR248C
  r_0604: s_0315 + L_glutamine_intracellular -> s_0317 + s_0532 + $s_0763_b + L_glutamate_intracellular; intracellular*function_159(Keq_r_0604, Vmax_r_0604, intracellular, kmp_s_0317r_0604, kmp_s_0532r_0604, kmp_s_0763_br_0604, kmp_s_0899r_0604, kms_s_0315r_0604, kms_s_0907r_0604, s_0315, s_0317, s_0532, s_0763_b, L_glutamate_intracellular, L_glutamine_intracellular); r_0604 is "Imidazole-glycerol-3-phosphate synthase";
    Keq_r_0604 = 0.331541; Vmax_r_0604 = 0.871524; kmp_s_0317r_0604 = 0.549; kmp_s_0532r_0604 = 0.549; kmp_s_0763_br_0604 = 0.549; kmp_s_0899r_0604 = 0.549; kms_s_0315r_0604 = 0.549; kms_s_0907r_0604 = 0.549;
  // GENE_ASSOCIATION:YOR202W
  r_0605: s_0532 -> s_0212 + $s_1434_b; intracellular*function_160(Keq_r_0605, Vmax_r_0605, intracellular, kmp_s_0212r_0605, kmp_s_1434_br_0605, kms_s_0532r_0605, s_0212, s_0532, s_1434_b); r_0605 is "imidazoleglycerol-phosphate dehydratase";
    Keq_r_0605 = 0.6039; Vmax_r_0605 = 0.229349; kmp_s_0212r_0605 = 0.549; kmp_s_1434_br_0605 = 0.549; kms_s_0532r_0605 = 0.549;
  // GENE_ASSOCIATION:(YLR028C or YMR120C)
  IMP_cyclohydrolase: s_0325 -> IMP_intracellular + $s_1434_b; intracellular*Function_for_IMP_cyclohydrolase(Keq_r_0606, Vmax_r_0606, intracellular, kmp_s_0816r_0606, kmp_s_1434_br_0606, kms_s_0325r_0606, s_0325, IMP_intracellular, s_1434_b);
    Keq_r_0606 = 0.6039; Vmax_r_0606 = 0.560996; kmp_s_0816r_0606 = 0.549; kmp_s_1434_br_0606 = 0.549; kms_s_0325r_0606 = 0.549;
  // GENE_ASSOCIATION:(YHR216W or YLR432W)
  IMP_dehydrogenase: IMP_intracellular + NAD_intracellular + $s_1434_b -> _5_xanthylic_acid_intracellular + $s_0763_b + NADH_intracellular; intracellular*Function_for_IMP_dehydrogenase(Keq_r_0607, Vmax_r_0607, intracellular, kmp_s_0306r_0607, kmp_s_0763_br_0607, kmp_s_1087r_0607, kms_s_0816r_0607, kms_s_1082r_0607, kms_s_1434_br_0607, _5_xanthylic_acid_intracellular, s_0763_b, IMP_intracellular, NAD_intracellular, NADH_intracellular, s_1434_b);
    Keq_r_0607 = 0.063468; Vmax_r_0607 = 0.501598; kmp_s_0306r_0607 = 0.549; kmp_s_0763_br_0607 = 0.549; kmp_s_1087r_0607 = 0.0867353; kms_s_0816r_0607 = 0.549; kms_s_1082r_0607 = 1.50326; kms_s_1434_br_0607 = 0.549;
  // GENE_ASSOCIATION:YKL211C
  r_0608: s_0078 + $s_0763_b -> s_0088 + carbon_dioxide_intracellular + $s_1434_b; intracellular*function_163(Keq_r_0608, Vmax_r_0608, intracellular, kmp_s_0088r_0608, kmp_s_0470r_0608, kmp_s_1434_br_0608, kms_s_0078r_0608, kms_s_0763_br_0608, s_0078, s_0088, carbon_dioxide_intracellular, s_0763_b, s_1434_b); r_0608 is "indole-3-glycerol-phosphate synthase";
    Keq_r_0608 = 1.1; Vmax_r_0608 = 0.187549; kmp_s_0088r_0608 = 0.549; kmp_s_0470r_0608 = 1; kmp_s_1434_br_0608 = 0.549; kms_s_0078r_0608 = 0.549; kms_s_0763_br_0608 = 0.549;
  // GENE_ASSOCIATION:YBR011C or YMR267W
  inorganic_diphosphatase: diphosphate_intracellular + $s_1434_b -> $s_0763_b + 2 $phosphate_intracellular; intracellular*function_164(Keq_r_0610, Vmax_r_0610, intracellular, kmp_s_0763_br_0610, kmp_s_1207r_0610, kms_s_0605r_0610, kms_s_1434_br_0610, diphosphate_intracellular, s_0763_b, phosphate_intracellular, s_1434_b);
    Keq_r_0610 = 0.6039; Vmax_r_0610 = 3.2032; kmp_s_0763_br_0610 = 0.549; kmp_s_1207r_0610 = 0.549; kms_s_0605r_0610 = 0.549; kms_s_1434_br_0610 = 0.549;
  // GENE_ASSOCIATION:YDR072C
  inositolphosphotransferase: s_0128 + s_1013 -> s_0824; intracellular*function_165(Keq_r_0618, Vmax_r_0618, intracellular, kmp_s_0824r_0618, kms_s_0128r_0618, kms_s_1013r_0618, s_0128, s_0824, s_1013);
    Keq_r_0618 = 2.00364; Vmax_r_0618 = 0.00127051; kmp_s_0824r_0618 = 0.549; kms_s_0128r_0618 = 0.549; kms_s_1013r_0618 = 0.549;
  // GENE_ASSOCIATION:YKL004W
  IPC_synthase: s_0128 + s_1060 -> s_0828; intracellular*Function_for_IPC_synthase(Keq_r_0621, Vmax_r_0621, intracellular, kmp_s_0828r_0621, kms_s_0128r_0621, kms_s_1060r_0621, s_0128, s_0828, s_1060);
    Keq_r_0621 = 2.00364; Vmax_r_0621 = 0.00127051; kmp_s_0828r_0621 = 0.549; kms_s_0128r_0621 = 0.549; kms_s_1060r_0621 = 0.549;
  // GENE_ASSOCIATION:YLR174W or YDL066W or YNL009W
  isocitrate_dehydrogenase_NADP: isocitrate_3_intracellular + NADP_intracellular -> _2_oxoglutarate_intracellular + carbon_dioxide_intracellular + NADPH_intracellular; intracellular*function_167(Keq_r_0630, Vmax_r_0630, intracellular, kmp_s_0185r_0630, kmp_s_0470r_0630, kmp_s_1096r_0630, kms_s_0847r_0630, kms_s_1091r_0630, _2_oxoglutarate_intracellular, carbon_dioxide_intracellular, isocitrate_3_intracellular, NADP_intracellular, NADPH_intracellular); isocitrate_dehydrogenase_NADP is "isocitrate dehydrogenase (NADP)";
    Keq_r_0630 = 1.1; Vmax_r_0630 = 6.98167; kmp_s_0185r_0630 = 0.549; kmp_s_0470r_0630 = 1; kmp_s_1096r_0630 = 0.549; kms_s_0847r_0630 = 0.549; kms_s_1091r_0630 = 0.549;
  // GENE_ASSOCIATION:YER065C
  isocitrate_lyase: isocitrate_3_intracellular -> glyoxylate_intracellular + succinate_2_intracellular; intracellular*Function_for_isocitrate_lyase(Keq_r_0633, Vmax_r_0633, intracellular, kmp_s_0749r_0633, kmp_s_1338r_0633, kms_s_0847r_0633, glyoxylate_intracellular, isocitrate_3_intracellular, succinate_2_intracellular);
    Keq_r_0633 = 0.6039; Vmax_r_0633 = 1.22649; kmp_s_0749r_0633 = 0.549; kmp_s_1338r_0633 = 0.549; kms_s_0847r_0633 = 0.549;
  // GENE_ASSOCIATION:YJR148W or YHR208W
  isoleucine_transaminase: s_0058 + L_glutamate_intracellular -> _2_oxoglutarate_intracellular + L_isoleucine_intracellular; intracellular*function_169(Keq_r_0634, Vmax_r_0634, intracellular, kmp_s_0185r_0634, kmp_s_0920r_0634, kms_s_0058r_0634, kms_s_0899r_0634, s_0058, _2_oxoglutarate_intracellular, L_glutamate_intracellular, L_isoleucine_intracellular);
    Keq_r_0634 = 1.1; Vmax_r_0634 = 0.73304; kmp_s_0185r_0634 = 0.549; kmp_s_0920r_0634 = 0.549; kms_s_0058r_0634 = 0.549; kms_s_0899r_0634 = 0.549;
  // GENE_ASSOCIATION:YPL117C
  r_0638: s_0850 -> prenyl_diphosphate_intracellular; intracellular*function_170(Keq_r_0638, Vmax_r_0638, intracellular, kmp_s_1257r_0638, kms_s_0850r_0638, s_0850, prenyl_diphosphate_intracellular); r_0638 is "isopentenyl-diphosphate D-isomerase";
    Keq_r_0638 = 1.1; Vmax_r_0638 = 0.025113; kmp_s_1257r_0638 = 0.549; kms_s_0850r_0638 = 0.549;
  // GENE_ASSOCIATION:YLR355C
  r_0640: s_0042 + $s_0763_b + NADPH_intracellular -> s_0007 + NADP_intracellular; intracellular*function_171(Keq_r_0640, Vmax_r_0640, intracellular, kmp_s_0007r_0640, kmp_s_1091r_0640, kms_s_0042r_0640, kms_s_0763_br_0640, kms_s_1096r_0640, s_0007, s_0042, s_0763_b, NADP_intracellular, NADPH_intracellular); r_0640 is "ketol-acid reductoisomerase (2-aceto-2-hydroxybutanoate)";
    Keq_r_0640 = 2.00364; Vmax_r_0640 = 1.15192; kmp_s_0007r_0640 = 0.549; kmp_s_1091r_0640 = 0.549; kms_s_0042r_0640 = 0.549; kms_s_0763_br_0640 = 0.549; kms_s_1096r_0640 = 0.549;
  // GENE_ASSOCIATION:YLR089C
  L_alanine_transaminase: L_glutamate_intracellular + pyruvate_intracellular -> _2_oxoglutarate_intracellular + L_alanine_intracellular; intracellular*function_172(Keq_r_0647, Vmax_r_0647, intracellular, kmp_s_0185r_0647, kmp_s_0863r_0647, kms_s_0899r_0647, kms_s_1277r_0647, _2_oxoglutarate_intracellular, L_alanine_intracellular, L_glutamate_intracellular, pyruvate_intracellular); L_alanine_transaminase is "L-alanine transaminase";
    Keq_r_0647 = 9.96691; Vmax_r_0647 = 3.2494; kmp_s_0185r_0647 = 0.549; kmp_s_0863r_0647 = 0.549; kms_s_0899r_0647 = 0.549; kms_s_1277r_0647 = 0.0605905;
  // GENE_ASSOCIATION:(YBR115C and YGL154C)
  r_0650: ATP_intracellular + $s_0763_b + L_2_aminoadipate_2_intracellular + NADH_intracellular -> AMP_intracellular + diphosphate_intracellular + L_allysine_intracellular + NAD_intracellular; intracellular*function_173(Keq_r_0650, Vmax_r_0650, intracellular, kmp_s_0434r_0650, kmp_s_0605r_0650, kmp_s_0867r_0650, kmp_s_1082r_0650, kms_s_0446r_0650, kms_s_0763_br_0650, kms_s_0861r_0650, kms_s_1087r_0650, AMP_intracellular, ATP_intracellular, diphosphate_intracellular, s_0763_b, L_2_aminoadipate_2_intracellular, L_allysine_intracellular, NAD_intracellular, NADH_intracellular); r_0650 is "L-aminoadipate-semialdehyde dehydrogenase (NADH)";
    Keq_r_0650 = 21.9885; Vmax_r_0650 = 4.53532; kmp_s_0434r_0650 = 1.25956; kmp_s_0605r_0650 = 0.549; kmp_s_0867r_0650 = 0.549; kmp_s_1082r_0650 = 1.50326; kms_s_0446r_0650 = 1.09208; kms_s_0763_br_0650 = 0.549; kms_s_0861r_0650 = 0.549; kms_s_1087r_0650 = 0.0867353;
  r_0657: s_0905 -> s_0120 + $s_0763_b + $s_1434_b; intracellular*function_174(Keq_r_0657, Vmax_r_0657, intracellular, kmp_s_0120r_0657, kmp_s_0763_br_0657, kmp_s_1434_br_0657, kms_s_0905r_0657, s_0120, s_0763_b, s_0905, s_1434_b); r_0657 is "L-glutamate 5-semialdehyde dehydratase";  // isDescribedBy ECO:0000034
    Keq_r_0657 = 0.331541; Vmax_r_0657 = 0.706853; kmp_s_0120r_0657 = 0.549; kmp_s_0763_br_0657 = 0.549; kmp_s_1434_br_0657 = 0.549; kms_s_0905r_0657 = 0.549;
  // GENE_ASSOCIATION:YHR037W
  r_0660: NADP_intracellular + s_1379 -> s_0118 + 2 $s_0763_b + NADPH_intracellular; intracellular*function_175(Keq_r_0660, Vmax_r_0660, intracellular, kmp_s_0118r_0660, kmp_s_0763_br_0660, kmp_s_1096r_0660, kms_s_1091r_0660, kms_s_1379r_0660, s_0118, s_0763_b, NADP_intracellular, NADPH_intracellular, s_1379); r_0660 is "L-hydroxyproline dehydrogenase (NADP)";
    Keq_r_0660 = 0.331541; Vmax_r_0660 = 3.30329; kmp_s_0118r_0660 = 0.549; kmp_s_0763_br_0660 = 0.549; kmp_s_1096r_0660 = 0.549; kms_s_1091r_0660 = 0.549; kms_s_1379r_0660 = 0.549;
  // GENE_ASSOCIATION:YER023W
  L_hydroxyproline_reductase_NAD: s_0118 + 2 $s_0763_b + NADH_intracellular -> NAD_intracellular + s_1379; intracellular*function_176(Keq_r_0661, Vmax_r_0661, intracellular, kmp_s_1082r_0661, kmp_s_1379r_0661, kms_s_0118r_0661, kms_s_0763_br_0661, kms_s_1087r_0661, s_0118, s_0763_b, NAD_intracellular, NADH_intracellular, s_1379); L_hydroxyproline_reductase_NAD is "L-hydroxyproline reductase (NAD)";
    Keq_r_0661 = 63.2537; Vmax_r_0661 = 3.30332; kmp_s_1082r_0661 = 1.50326; kmp_s_1379r_0661 = 0.549; kms_s_0118r_0661 = 0.549; kms_s_0763_br_0661 = 0.549; kms_s_1087r_0661 = 0.0867353;
  // GENE_ASSOCIATION:YCL064C or YER086W
  L_threonine_deaminase: L_threonine_intracellular -> _2_oxobutanoate_intracellular + ammonium_intracellular; intracellular*function_177(Keq_r_0667, Vmax_r_0667, intracellular, kmp_s_0183r_0667, kmp_s_0430r_0667, kms_s_0949r_0667, _2_oxobutanoate_intracellular, ammonium_intracellular, L_threonine_intracellular); L_threonine_deaminase is "L-threonine deaminase";
    Keq_r_0667 = 0.331541; Vmax_r_0667 = 0.196349; kmp_s_0183r_0667 = 0.549; kmp_s_0430r_0667 = 0.549; kms_s_0949r_0667 = 1;
  // GENE_ASSOCIATION:YHR072W
  lanosterol_synthase: s_0040 -> lanosterol_intracellular; intracellular*Function_for_lanosterol_synthase(Keq_r_0673, Vmax_r_0673, intracellular, kmp_s_0963r_0673, kms_s_0040r_0673, s_0040, lanosterol_intracellular);
    Keq_r_0673 = 1.1; Vmax_r_0673 = 0.01254; kmp_s_0963r_0673 = 0.549; kms_s_0040r_0673 = 0.549;
  // GENE_ASSOCIATION:YJR148W or YHR208W
  leucine_transaminase: s_0297 + L_glutamate_intracellular -> _2_oxoglutarate_intracellular + L_leucine_intracellular; intracellular*function_179(Keq_r_0674, Vmax_r_0674, intracellular, kmp_s_0185r_0674, kmp_s_0925r_0674, kms_s_0297r_0674, kms_s_0899r_0674, _2_oxoglutarate_intracellular, s_0297, L_glutamate_intracellular, L_leucine_intracellular);
    Keq_r_0674 = 1.1; Vmax_r_0674 = 1.0703; kmp_s_0185r_0674 = 0.549; kmp_s_0925r_0674 = 0.549; kms_s_0297r_0674 = 0.549; kms_s_0899r_0674 = 0.549;
  // GENE_ASSOCIATION:YOL126C or YKL085W or YDL078C
  malate_dehydrogenase: $s_0763_b + NADH_intracellular + oxaloacetate_2_intracellular -> S_malate_2_intracellular + NAD_intracellular; intracellular*function_180(Keq_r_0688, Vmax_r_0688, intracellular, kmp_s_0069r_0688, kmp_s_1082r_0688, kms_s_0763_br_0688, kms_s_1087r_0688, kms_s_1156r_0688, S_malate_2_intracellular, s_0763_b, NAD_intracellular, NADH_intracellular, oxaloacetate_2_intracellular);
    Keq_r_0688 = 34.7263; Vmax_r_0688 = 4.58593; kmp_s_0069r_0688 = 0.549; kmp_s_1082r_0688 = 1.50326; kms_s_0763_br_0688 = 0.549; kms_s_1087r_0688 = 0.0867353; kms_s_1156r_0688 = 0.549;
  // GENE_ASSOCIATION:YDL055C
  r_0697: s_0553 + GTP_intracellular + $s_0763_b -> diphosphate_intracellular + s_0710; intracellular*function_181(Keq_r_0697, Vmax_r_0697, intracellular, kmp_s_0605r_0697, kmp_s_0710r_0697, kms_s_0553r_0697, kms_s_0755r_0697, kms_s_0763_br_0697, s_0553, diphosphate_intracellular, s_0710, GTP_intracellular, s_0763_b); r_0697 is "mannose-1-phosphate guanylyltransferase";
    Keq_r_0697 = 2.00364; Vmax_r_0697 = 5.51762; kmp_s_0605r_0697 = 0.549; kmp_s_0710r_0697 = 0.549; kms_s_0553r_0697 = 0.549; kms_s_0755r_0697 = 0.549; kms_s_0763_br_0697 = 0.549;
  // GENE_ASSOCIATION:YER003C
  mannose_6_phosphate_isomerase: s_0539 -> s_0554; intracellular*function_182(Keq_r_0698, Vmax_r_0698, intracellular, kmp_s_0554r_0698, kms_s_0539r_0698, s_0539, s_0554); mannose_6_phosphate_isomerase is "mannose-6-phosphate isomerase";
    Keq_r_0698 = 5.77591; Vmax_r_0698 = 1.5048; kmp_s_0554r_0698 = 0.549; kms_s_0539r_0698 = 0.104555;
  // GENE_ASSOCIATION:YBR084W or YGR204W
  r_0699: s_0015 + $s_1434_b -> s_0122 + $s_0763_b; intracellular*function_183(Keq_r_0699, Vmax_r_0699, intracellular, kmp_s_0122r_0699, kmp_s_0763_br_0699, kms_s_0015r_0699, kms_s_1434_br_0699, s_0015, s_0122, s_0763_b, s_1434_b); r_0699 is "methenyltetrahydrifikate cyclohydrolase";
    Keq_r_0699 = 1.1; Vmax_r_0699 = 1.2166; kmp_s_0122r_0699 = 0.549; kmp_s_0763_br_0699 = 0.549; kms_s_0015r_0699 = 0.549; kms_s_1434_br_0699 = 0.549;
  // GENE_ASSOCIATION:(YDR502C or YLR180W)
  methionine_adenosyltransferase: ATP_intracellular + L_methionine_intracellular + $s_1434_b -> diphosphate_intracellular + $phosphate_intracellular + s_1293; intracellular*function_184(Keq_r_0701, Vmax_r_0701, intracellular, kmp_s_0605r_0701, kmp_s_1207r_0701, kmp_s_1293r_0701, kms_s_0446r_0701, kms_s_0933r_0701, kms_s_1434_br_0701, ATP_intracellular, diphosphate_intracellular, L_methionine_intracellular, phosphate_intracellular, s_1293, s_1434_b);
    Keq_r_0701 = 0.552982; Vmax_r_0701 = 0.141075; kmp_s_0605r_0701 = 0.549; kmp_s_1207r_0701 = 0.549; kmp_s_1293r_0701 = 0.549; kms_s_0446r_0701 = 1.09208; kms_s_0933r_0701 = 0.549; kms_s_1434_br_0701 = 0.549;
  // GENE_ASSOCIATION:YER091C
  methionine_synthase: s_0328 + L_homocysteine_intracellular -> s_0309 + $s_0763_b + L_methionine_intracellular; intracellular*Function_for_methionine_synthase(Keq_r_0702, Vmax_r_0702, intracellular, kmp_s_0309r_0702, kmp_s_0763_br_0702, kmp_s_0933r_0702, kms_s_0328r_0702, kms_s_0917r_0702, s_0309, s_0328, s_0763_b, L_homocysteine_intracellular, L_methionine_intracellular);
    Keq_r_0702 = 0.6039; Vmax_r_0702 = 0.439228; kmp_s_0309r_0702 = 0.549; kmp_s_0763_br_0702 = 0.549; kmp_s_0933r_0702 = 0.549; kms_s_0328r_0702 = 0.549; kms_s_0917r_0702 = 0.549;
  // GENE_ASSOCIATION:YGR204W or YBR084W
  r_0707: s_0307 + NADP_intracellular -> s_0015 + NADPH_intracellular; intracellular*function_186(Keq_r_0707, Vmax_r_0707, intracellular, kmp_s_0015r_0707, kmp_s_1096r_0707, kms_s_0307r_0707, kms_s_1091r_0707, s_0015, s_0307, NADP_intracellular, NADPH_intracellular); r_0707 is "methylenetetrahydrofolate dehydrogenase (NADP)";
    Keq_r_0707 = 1.1; Vmax_r_0707 = 1.2166; kmp_s_0015r_0707 = 0.549; kmp_s_1096r_0707 = 0.549; kms_s_0307r_0707 = 0.549; kms_s_1091r_0707 = 0.549;
  // GENE_ASSOCIATION:YMR208W
  mevalonate_kinase_ctp: R_mevalonate_intracellular + CTP_intracellular -> s_0022 + CDP_intracellular + $s_0763_b; intracellular*function_187(Keq_r_0712, Vmax_r_0712, intracellular, kmp_s_0022r_0712, kmp_s_0481r_0712, kmp_s_0763_br_0712, kms_s_0031r_0712, kms_s_0521r_0712, s_0022, R_mevalonate_intracellular, CDP_intracellular, CTP_intracellular, s_0763_b); mevalonate_kinase_ctp is "mevalonate kinase (ctp)";
    Keq_r_0712 = 0.6039; Vmax_r_0712 = 0.275879; kmp_s_0022r_0712 = 0.549; kmp_s_0481r_0712 = 0.549; kmp_s_0763_br_0712 = 0.549; kms_s_0031r_0712 = 0.549; kms_s_0521r_0712 = 0.549;
  // GENE_ASSOCIATION:YNR043W
  r_0715: s_0021 + ATP_intracellular -> ADP_intracellular + carbon_dioxide_intracellular + s_0850 + $phosphate_intracellular; intracellular*function_188(Keq_r_0715, Vmax_r_0715, intracellular, kmp_s_0400r_0715, kmp_s_0470r_0715, kmp_s_0850r_0715, kmp_s_1207r_0715, kms_s_0021r_0715, kms_s_0446r_0715, s_0021, ADP_intracellular, ATP_intracellular, carbon_dioxide_intracellular, s_0850, phosphate_intracellular); r_0715 is "mevalonate pyrophoshate decarboxylase";
    Keq_r_0715 = 0.950614; Vmax_r_0715 = 0.476517; kmp_s_0400r_0715 = 1.71907; kmp_s_0470r_0715 = 1; kmp_s_0850r_0715 = 0.549; kmp_s_1207r_0715 = 0.549; kms_s_0021r_0715 = 0.549; kms_s_0446r_0715 = 1.09208;
  // GENE_ASSOCIATION:YBR159W
  microsomal_beta_keto_reductase: s_0046 + NADP_intracellular -> s_0247 + $s_0763_b + NADPH_intracellular; intracellular*function_189(Keq_r_0719, Vmax_r_0719, intracellular, kmp_s_0247r_0719, kmp_s_0763_br_0719, kmp_s_1096r_0719, kms_s_0046r_0719, kms_s_1091r_0719, s_0046, s_0247, s_0763_b, NADP_intracellular, NADPH_intracellular); microsomal_beta_keto_reductase is "microsomal beta-keto-reductase";
    Keq_r_0719 = 0.6039; Vmax_r_0719 = 3.30329; kmp_s_0247r_0719 = 0.549; kmp_s_0763_br_0719 = 0.549; kmp_s_1096r_0719 = 0.549; kms_s_0046r_0719 = 0.549; kms_s_1091r_0719 = 0.549;
  // GENE_ASSOCIATION:YBR159W
  microsomal_beta_keto_reductase_2: s_0052 + NADP_intracellular -> _3_oxopalmitoyl_CoA_intracellular + $s_0763_b + NADPH_intracellular; intracellular*function_190(Keq_r_0720, Vmax_r_0720, intracellular, kmp_s_0257r_0720, kmp_s_0763_br_0720, kmp_s_1096r_0720, kms_s_0052r_0720, kms_s_1091r_0720, s_0052, _3_oxopalmitoyl_CoA_intracellular, s_0763_b, NADP_intracellular, NADPH_intracellular); microsomal_beta_keto_reductase_2 is "microsomal beta-keto-reductase_2";
    Keq_r_0720 = 0.6039; Vmax_r_0720 = 3.30329; kmp_s_0257r_0720 = 0.549; kmp_s_0763_br_0720 = 0.549; kmp_s_1096r_0720 = 0.549; kms_s_0052r_0720 = 0.549; kms_s_1091r_0720 = 0.549;
  // GENE_ASSOCIATION:YBR159W
  microsomal_beta_keto_reductase_3: s_0234 + NADP_intracellular -> s_0254 + $s_0763_b + NADPH_intracellular; intracellular*function_191(Keq_r_0721, Vmax_r_0721, intracellular, kmp_s_0254r_0721, kmp_s_0763_br_0721, kmp_s_1096r_0721, kms_s_0234r_0721, kms_s_1091r_0721, s_0234, s_0254, s_0763_b, NADP_intracellular, NADPH_intracellular); microsomal_beta_keto_reductase_3 is "microsomal beta-keto-reductase_3";
    Keq_r_0721 = 0.6039; Vmax_r_0721 = 3.30329; kmp_s_0254r_0721 = 0.549; kmp_s_0763_br_0721 = 0.549; kmp_s_1096r_0721 = 0.549; kms_s_0234r_0721 = 0.549; kms_s_1091r_0721 = 0.549;
  // GENE_ASSOCIATION:YBR159W
  microsomal_beta_keto_reductase_4: s_0055 + NADP_intracellular -> s_0261 + $s_0763_b + NADPH_intracellular; intracellular*function_192(Keq_r_0722, Vmax_r_0722, intracellular, kmp_s_0261r_0722, kmp_s_0763_br_0722, kmp_s_1096r_0722, kms_s_0055r_0722, kms_s_1091r_0722, s_0055, s_0261, s_0763_b, NADP_intracellular, NADPH_intracellular); microsomal_beta_keto_reductase_4 is "microsomal beta-keto-reductase_4";
    Keq_r_0722 = 0.6039; Vmax_r_0722 = 3.30329; kmp_s_0261r_0722 = 0.549; kmp_s_0763_br_0722 = 0.549; kmp_s_1096r_0722 = 0.549; kms_s_0055r_0722 = 0.549; kms_s_1091r_0722 = 0.549;
  // GENE_ASSOCIATION:(YBR036C and YPL057C)
  MIPC_synthase: s_0710 + s_0828 -> s_1013; intracellular*Function_for_MIPC_synthase(Keq_r_0723, Vmax_r_0723, intracellular, kmp_s_1013r_0723, kms_s_0710r_0723, kms_s_0828r_0723, s_0710, s_0828, s_1013);
    Keq_r_0723 = 2.00364; Vmax_r_0723 = 0.00127051; kmp_s_1013r_0723 = 0.549; kms_s_0710r_0723 = 0.549; kms_s_0828r_0723 = 0.549;
  // GENE_ASSOCIATION:(YDR287W or YHR046C)
  myo_inositol_1_phosphatase: s_0128 + $s_1434_b -> myo_inositol_intracellular + $phosphate_intracellular; intracellular*function_194(Keq_r_0725, Vmax_r_0725, intracellular, kmp_s_1020r_0725, kmp_s_1207r_0725, kms_s_0128r_0725, kms_s_1434_br_0725, s_0128, myo_inositol_intracellular, phosphate_intracellular, s_1434_b); myo_inositol_1_phosphatase is "myo-inositol 1-phosphatase";
    Keq_r_0725 = 1.1; Vmax_r_0725 = 0.006545; kmp_s_1020r_0725 = 0.549; kmp_s_1207r_0725 = 0.549; kms_s_0128r_0725 = 0.549; kms_s_1434_br_0725 = 0.549;
  // GENE_ASSOCIATION:YJL153C
  r_0726: s_0410 -> s_0128; intracellular*function_195(Keq_r_0726, Vmax_r_0726, intracellular, kmp_s_0128r_0726, kms_s_0410r_0726, s_0128, s_0410); r_0726 is "myo-inositol-1-phosphate synthase";
    Keq_r_0726 = 1.1; Vmax_r_0726 = 0.004323; kmp_s_0128r_0726 = 0.549; kms_s_0410r_0726 = 0.549;
  // GENE_ASSOCIATION:YER069W
  r_0728: $s_0763_b + s_1070 + NADPH_intracellular -> s_0149 + NADP_intracellular + $phosphate_intracellular; intracellular*function_196(Keq_r_0728, Vmax_r_0728, intracellular, kmp_s_0149r_0728, kmp_s_1091r_0728, kmp_s_1207r_0728, kms_s_0763_br_0728, kms_s_1070r_0728, kms_s_1096r_0728, s_0149, s_0763_b, s_1070, NADP_intracellular, NADPH_intracellular, phosphate_intracellular); r_0728 is "N-acetyl-g-glutamyl-phosphate reductase";
    Keq_r_0728 = 1.1; Vmax_r_0728 = 1.2441; kmp_s_0149r_0728 = 0.549; kmp_s_1091r_0728 = 0.549; kmp_s_1207r_0728 = 0.549; kms_s_0763_br_0728 = 0.549; kms_s_1070r_0728 = 0.549; kms_s_1096r_0728 = 0.549;
  non_enzymatic_reaction: s_0180 + $s_0763_b -> _2_oxoadipic_acid_intracellular + carbon_dioxide_intracellular; intracellular*function_197(Keq_r_0765, Vmax_r_0765, intracellular, kmp_s_0181r_0765, kmp_s_0470r_0765, kms_s_0180r_0765, kms_s_0763_br_0765, s_0180, _2_oxoadipic_acid_intracellular, carbon_dioxide_intracellular, s_0763_b); non_enzymatic_reaction is "non-enzymatic reaction";  // isDescribedBy ECO:0000034
    Keq_r_0765 = 2.00364; Vmax_r_0765 = 1.0241; kmp_s_0181r_0765 = 0.549; kmp_s_0470r_0765 = 1; kms_s_0180r_0765 = 0.549; kms_s_0763_br_0765 = 0.549;
  // GENE_ASSOCIATION:YKL067W
  r_0771: ADP_intracellular + CTP_intracellular -> ATP_intracellular + CDP_intracellular; intracellular*function_198(Keq_r_0771, Vmax_r_0771, intracellular, kmp_s_0446r_0771, kmp_s_0481r_0771, kms_s_0400r_0771, kms_s_0521r_0771, ADP_intracellular, ATP_intracellular, CDP_intracellular, CTP_intracellular); r_0771 is "nucleoside-diphosphate kinase (ATP:CDP)";
    Keq_r_0771 = 0.698801; Vmax_r_0771 = 0.014553; kmp_s_0446r_0771 = 1.09208; kmp_s_0481r_0771 = 0.549; kms_s_0400r_0771 = 1.71907; kms_s_0521r_0771 = 0.549;
  // GENE_ASSOCIATION:YKL067W
  r_0779: ATP_intracellular + UDP_intracellular -> ADP_intracellular + UTP_intracellular; intracellular*function_199(Keq_r_0779, Vmax_r_0779, intracellular, kmp_s_0400r_0779, kmp_s_1430r_0779, kms_s_0446r_0779, kms_s_1411r_0779, ADP_intracellular, ATP_intracellular, UDP_intracellular, UTP_intracellular); r_0779 is "nucleoside-diphosphate kinase (ATP:UDP)";
    Keq_r_0779 = 1.73154; Vmax_r_0779 = 7.3843; kmp_s_0400r_0779 = 1.71907; kmp_s_1430r_0779 = 0.549; kms_s_0446r_0779 = 1.09208; kms_s_1411r_0779 = 0.549;
  // GENE_ASSOCIATION:YLR303W
  O_acetylhomoserine_thiol_lyase: hydrogen_sulfide_intracellular + s_1117 -> acetate_intracellular + $s_0763_b + L_homocysteine_intracellular; intracellular*function_200(Keq_r_0783, Vmax_r_0783, intracellular, kmp_s_0369r_0783, kmp_s_0763_br_0783, kmp_s_0917r_0783, kms_s_0805r_0783, kms_s_1117r_0783, acetate_intracellular, s_0763_b, hydrogen_sulfide_intracellular, L_homocysteine_intracellular, s_1117); O_acetylhomoserine_thiol_lyase is "O-acetylhomoserine (thiol)-lyase";
    Keq_r_0783 = 0.6039; Vmax_r_0783 = 0.624358; kmp_s_0369r_0783 = 0.549; kmp_s_0763_br_0783 = 0.549; kmp_s_0917r_0783 = 0.549; kms_s_0805r_0783 = 0.549; kms_s_1117r_0783 = 0.549;
  // GENE_ASSOCIATION:YJL088W
  ornithine_carbamoyltransferase: s_0469 + ornithine_intracellular -> $s_0763_b + L_citrulline_intracellular + $phosphate_intracellular; intracellular*function_201(Keq_r_0789, Vmax_r_0789, intracellular, kmp_s_0763_br_0789, kmp_s_0887r_0789, kmp_s_1207r_0789, kms_s_0469r_0789, kms_s_1151r_0789, s_0469, s_0763_b, L_citrulline_intracellular, ornithine_intracellular, phosphate_intracellular);
    Keq_r_0789 = 0.6039; Vmax_r_0789 = 0.912336; kmp_s_0763_br_0789 = 0.549; kmp_s_0887r_0789 = 0.549; kmp_s_1207r_0789 = 0.549; kms_s_0469r_0789 = 0.549; kms_s_1151r_0789 = 0.549;
  // GENE_ASSOCIATION:YMR062C
  ornithine_transacetylase: L_glutamate_intracellular + s_1051 -> s_1071 + ornithine_intracellular; intracellular*function_202(Keq_r_0791, Vmax_r_0791, intracellular, kmp_s_1071r_0791, kmp_s_1151r_0791, kms_s_0899r_0791, kms_s_1051r_0791, L_glutamate_intracellular, s_1051, s_1071, ornithine_intracellular);
    Keq_r_0791 = 1.1; Vmax_r_0791 = 0.58058; kmp_s_1071r_0791 = 0.549; kmp_s_1151r_0791 = 0.549; kms_s_0899r_0791 = 0.549; kms_s_1051r_0791 = 0.549;
  // GENE_ASSOCIATION:(YML106W or YMR271C)
  r_0793: s_0331 + orotate_intracellular -> diphosphate_intracellular + s_1155; intracellular*function_203(Keq_r_0793, Vmax_r_0793, intracellular, kmp_s_0605r_0793, kmp_s_1155r_0793, kms_s_0331r_0793, kms_s_1154r_0793, s_0331, diphosphate_intracellular, orotate_intracellular, s_1155); r_0793 is "orotate phosphoribosyltransferase";
    Keq_r_0793 = 1.1; Vmax_r_0793 = 0.52591; kmp_s_0605r_0793 = 0.549; kmp_s_1155r_0793 = 0.549; kms_s_0331r_0793 = 0.549; kms_s_1154r_0793 = 0.549;
  // GENE_ASSOCIATION:YEL021W
  r_0794: $s_0763_b + s_1155 -> carbon_dioxide_intracellular + UMP_intracellular; intracellular*function_204(Keq_r_0794, Vmax_r_0794, intracellular, kmp_s_0470r_0794, kmp_s_1417r_0794, kms_s_0763_br_0794, kms_s_1155r_0794, carbon_dioxide_intracellular, s_0763_b, s_1155, UMP_intracellular); r_0794 is "orotidine-5'-phosphate decarboxylase";
    Keq_r_0794 = 2.00364; Vmax_r_0794 = 0.52591; kmp_s_0470r_0794 = 1; kmp_s_1417r_0794 = 0.549; kms_s_0763_br_0794 = 0.549; kms_s_1155r_0794 = 0.549;
  // GENE_ASSOCIATION:(YGL202W or YHR137W)
  phenylalanine_transaminase: s_0859 + L_glutamate_intracellular -> _2_oxoglutarate_intracellular + L_phenylalanine_intracellular; intracellular*function_205(Keq_r_0825, Vmax_r_0825, intracellular, kmp_s_0185r_0825, kmp_s_0936r_0825, kms_s_0859r_0825, kms_s_0899r_0825, _2_oxoglutarate_intracellular, s_0859, L_glutamate_intracellular, L_phenylalanine_intracellular);
    Keq_r_0825 = 1.1; Vmax_r_0825 = 0.48895; kmp_s_0185r_0825 = 0.549; kmp_s_0936r_0825 = 0.549; kms_s_0859r_0825 = 0.549; kms_s_0899r_0825 = 0.549;
  // GENE_ASSOCIATION:YJR073C or YGR157W
  r_0831: s_1233 + s_1293 -> $s_0763_b + s_1226 + s_1290; intracellular*function_206(Keq_r_0831, Vmax_r_0831, intracellular, kmp_s_0763_br_0831, kmp_s_1226r_0831, kmp_s_1290r_0831, kms_s_1233r_0831, kms_s_1293r_0831, s_0763_b, s_1226, s_1233, s_1290, s_1293); r_0831 is "phosphatidylethanolamine methyltransferase";
    Keq_r_0831 = 0.6039; Vmax_r_0831 = 0.0193599; kmp_s_0763_br_0831 = 0.549; kmp_s_1226r_0831 = 0.549; kmp_s_1290r_0831 = 0.549; kms_s_1233r_0831 = 0.549; kms_s_1293r_0831 = 0.549;
  // GENE_ASSOCIATION:YPR113W
  phosphatidylinositol_synthase: CDP_diacylglycerol_intracellular + myo_inositol_intracellular -> s_0090 + CMP_intracellular + 2 $s_0763_b; intracellular*function_207(Keq_r_0847, Vmax_r_0847, intracellular, kmp_s_0090r_0847, kmp_s_0511r_0847, kmp_s_0763_br_0847, kms_s_0485r_0847, kms_s_1020r_0847, s_0090, CDP_diacylglycerol_intracellular, CMP_intracellular, s_0763_b, myo_inositol_intracellular);
    Keq_r_0847 = 0.331541; Vmax_r_0847 = 0.010285; kmp_s_0090r_0847 = 0.549; kmp_s_0511r_0847 = 0.549; kmp_s_0763_br_0847 = 0.549; kms_s_0485r_0847 = 0.549; kms_s_1020r_0847 = 0.549;
  // GENE_ASSOCIATION:YNL169C or YGR170W or YGR170W
  phosphatidylserine_decarboxylase: s_1219 -> carbon_dioxide_intracellular + s_1233; intracellular*function_208(Keq_r_0850, Vmax_r_0850, intracellular, kmp_s_0470r_0850, kmp_s_1233r_0850, kms_s_1219r_0850, carbon_dioxide_intracellular, s_1219, s_1233);
    Keq_r_0850 = 1.1; Vmax_r_0850 = 0.0109449; kmp_s_0470r_0850 = 1; kmp_s_1233r_0850 = 0.549; kms_s_1219r_0850 = 0.549;
  // GENE_ASSOCIATION:YER026C
  phosphatidylserine_synthase: CDP_diacylglycerol_intracellular + L_serine_intracellular -> CMP_intracellular + 2 $s_0763_b + s_1219; intracellular*function_209(Keq_r_0853, Vmax_r_0853, intracellular, kmp_s_0511r_0853, kmp_s_0763_br_0853, kmp_s_1219r_0853, kms_s_0485r_0853, kms_s_0943r_0853, CDP_diacylglycerol_intracellular, CMP_intracellular, s_0763_b, L_serine_intracellular, s_1219);
    Keq_r_0853 = 0.331541; Vmax_r_0853 = 0.0266199; kmp_s_0511r_0853 = 0.549; kmp_s_0763_br_0853 = 0.549; kmp_s_1219r_0853 = 0.549; kms_s_0485r_0853 = 0.549; kms_s_0943r_0853 = 0.549;
  // GENE_ASSOCIATION:((YGR209C and YPR167C) or (YLR043C and YPR167C))
  r_0856: s_0206 + s_1521 -> s_0397 + 2 $s_0763_b + sulphite_intracellular + s_1517; intracellular*function_210(Keq_r_0856, Vmax_r_0856, intracellular, kmp_s_0397r_0856, kmp_s_0763_br_0856, kmp_s_1349r_0856, kmp_s_1517r_0856, kms_s_0206r_0856, kms_s_1521r_0856, s_0206, s_0397, s_0763_b, sulphite_intracellular, s_1517, s_1521); r_0856 is "phosphoadenylyl-sulfate reductase (thioredoxin)";
    Keq_r_0856 = 0.182016; Vmax_r_0856 = 1.07843; kmp_s_0397r_0856 = 0.549; kmp_s_0763_br_0856 = 0.549; kmp_s_1349r_0856 = 0.549; kmp_s_1517r_0856 = 0.549; kms_s_0206r_0856 = 0.549; kms_s_1521r_0856 = 0.549;
  // GENE_ASSOCIATION:(YGR240C and YMR205C)
  phosphofructokinase: ATP_intracellular + s_0539 -> ADP_intracellular + s_0537 + $s_0763_b; intracellular*Function_for_phosphofructokinase(Keq_r_0859, Vmax_r_0859, intracellular, kmp_s_0400r_0859, kmp_s_0537r_0859, kmp_s_0763_br_0859, kms_s_0446r_0859, kms_s_0539r_0859, ADP_intracellular, ATP_intracellular, s_0537, s_0539, s_0763_b);
    Keq_r_0859 = 12.2086; Vmax_r_0859 = 75.3828; kmp_s_0400r_0859 = 1.71907; kmp_s_0537r_0859 = 1.34278; kmp_s_0763_br_0859 = 0.549; kms_s_0446r_0859 = 1.09208; kms_s_0539r_0859 = 0.104555;
  // GENE_ASSOCIATION:(YKL127W or YMR105C)
  phosphoglucomutase: s_0410 -> s_0549; intracellular*Function_for_phosphoglucomutase(Keq_r_0861, Vmax_r_0861, intracellular, kmp_s_0549r_0861, kms_s_0410r_0861, s_0410, s_0549);
    Keq_r_0861 = 1.1; Vmax_r_0861 = 3.0723; kmp_s_0549r_0861 = 0.549; kms_s_0410r_0861 = 0.549;
  // GENE_ASSOCIATION:YCR012W
  phosphoglycerate_kinase: s_0265 + ADP_intracellular -> s_0264 + ATP_intracellular; intracellular*function_213(Keq_r_0865, Vmax_r_0865, intracellular, kmp_s_0264r_0865, kmp_s_0446r_0865, kms_s_0265r_0865, kms_s_0400r_0865, s_0264, s_0265, ADP_intracellular, ATP_intracellular);
    Keq_r_0865 = 2334.85; Vmax_r_0865 = 94.7102; kmp_s_0264r_0865 = 0.363388; kmp_s_0446r_0865 = 1.09208; kms_s_0265r_0865 = 0.000108759; kms_s_0400r_0865 = 1.71907;
  // GENE_ASSOCIATION:YKL152C
  phosphoglycerate_mutase: s_0264 -> s_0193; intracellular*function_214(Keq_r_0866, Vmax_r_0866, intracellular, kmp_s_0193r_0866, kms_s_0264r_0866, s_0193, s_0264);
    Keq_r_0866 = 6.7; Vmax_r_0866 = 3.76975; kmp_s_0193r_0866 = 0.0515066; kms_s_0264r_0866 = 0.363388;
  // GENE_ASSOCIATION:YJR073C
  phospholipid_methyltransferase: s_1225 + s_1293 -> s_1228 + s_1290; intracellular*function_215(Keq_r_0873, Vmax_r_0873, intracellular, kmp_s_1228r_0873, kmp_s_1290r_0873, kms_s_1225r_0873, kms_s_1293r_0873, s_1225, s_1228, s_1290, s_1293);
    Keq_r_0873 = 1.1; Vmax_r_0873 = 0.01232; kmp_s_1228r_0873 = 0.549; kmp_s_1290r_0873 = 0.549; kms_s_1225r_0873 = 0.549; kms_s_1293r_0873 = 0.549;
  // GENE_ASSOCIATION:YJR073C
  phospholipid_methyltransferase_2: s_1226 + s_1293 -> $s_0763_b + s_1225 + s_1290; intracellular*function_216(Keq_r_0874, Vmax_r_0874, intracellular, kmp_s_0763_br_0874, kmp_s_1225r_0874, kmp_s_1290r_0874, kms_s_1226r_0874, kms_s_1293r_0874, s_0763_b, s_1225, s_1226, s_1290, s_1293);
    Keq_r_0874 = 0.6039; Vmax_r_0874 = 0.0193599; kmp_s_0763_br_0874 = 0.549; kmp_s_1225r_0874 = 0.549; kmp_s_1290r_0874 = 0.549; kms_s_1226r_0874 = 0.549; kms_s_1293r_0874 = 0.549;
  // GENE_ASSOCIATION:YFL045C
  phosphomannomutase: s_0554 -> s_0553; intracellular*Function_for_phosphomannomutase(Keq_r_0875, Vmax_r_0875, intracellular, kmp_s_0553r_0875, kms_s_0554r_0875, s_0553, s_0554);
    Keq_r_0875 = 1.1; Vmax_r_0875 = 1.5048; kmp_s_0553r_0875 = 0.549; kms_s_0554r_0875 = 0.549;
  // GENE_ASSOCIATION:YMR220W
  phosphomevalonate_kinase: s_0022 + ATP_intracellular -> s_0021 + ADP_intracellular; intracellular*function_218(Keq_r_0877, Vmax_r_0877, intracellular, kmp_s_0021r_0877, kmp_s_0400r_0877, kms_s_0022r_0877, kms_s_0446r_0877, s_0021, s_0022, ADP_intracellular, ATP_intracellular);
    Keq_r_0877 = 1.73154; Vmax_r_0877 = 0.17556; kmp_s_0021r_0877 = 0.549; kmp_s_0400r_0877 = 1.71907; kms_s_0022r_0877 = 0.549; kms_s_0446r_0877 = 1.09208;
  // GENE_ASSOCIATION:YCL030C
  r_0881: s_0080 + $s_1434_b -> s_0079; intracellular*function_219(Keq_r_0881, Vmax_r_0881, intracellular, kmp_s_0079r_0881, kms_s_0080r_0881, kms_s_1434_br_0881, s_0079, s_0080, s_1434_b); r_0881 is "phosphoribosyl-AMP cyclohydrolase";
    Keq_r_0881 = 2.00364; Vmax_r_0881 = 0.229351; kmp_s_0079r_0881 = 0.549; kms_s_0080r_0881 = 0.549; kms_s_1434_br_0881 = 0.549;
  // GENE_ASSOCIATION:YCL030C
  r_0882: s_0334 + $s_1434_b -> s_0080 + diphosphate_intracellular + $s_0763_b; intracellular*function_220(Keq_r_0882, Vmax_r_0882, intracellular, kmp_s_0080r_0882, kmp_s_0605r_0882, kmp_s_0763_br_0882, kms_s_0334r_0882, kms_s_1434_br_0882, s_0080, s_0334, diphosphate_intracellular, s_0763_b, s_1434_b); r_0882 is "phosphoribosyl-ATP pyrophosphatase";
    Keq_r_0882 = 0.6039; Vmax_r_0882 = 0.504568; kmp_s_0080r_0882 = 0.549; kmp_s_0605r_0882 = 0.549; kmp_s_0763_br_0882 = 0.549; kms_s_0334r_0882 = 0.549; kms_s_1434_br_0882 = 0.549;
  // GENE_ASSOCIATION:YOR128C
  r_0883: s_0316 + carbon_dioxide_intracellular -> s_0318 + $s_0763_b; intracellular*function_221(Keq_r_0883, Vmax_r_0883, intracellular, kmp_s_0318r_0883, kmp_s_0763_br_0883, kms_s_0316r_0883, kms_s_0470r_0883, s_0316, s_0318, carbon_dioxide_intracellular, s_0763_b); r_0883 is "phosphoribosylaminoimidazole carboxylase";
    Keq_r_0883 = 0.6039; Vmax_r_0883 = 0.46739; kmp_s_0318r_0883 = 0.549; kmp_s_0763_br_0883 = 0.549; kms_s_0316r_0883 = 0.549; kms_s_0470r_0883 = 1;
  // GENE_ASSOCIATION:YGL234W
  r_0884: s_0158 + ATP_intracellular -> s_0316 + ADP_intracellular + 2 $s_0763_b + $phosphate_intracellular; intracellular*function_222(Keq_r_0884, Vmax_r_0884, intracellular, kmp_s_0316r_0884, kmp_s_0400r_0884, kmp_s_0763_br_0884, kmp_s_1207r_0884, kms_s_0158r_0884, kms_s_0446r_0884, s_0158, s_0316, ADP_intracellular, ATP_intracellular, s_0763_b, phosphate_intracellular); r_0884 is "phosphoribosylaminoimidazole synthase";
    Keq_r_0884 = 0.286516; Vmax_r_0884 = 1.26862; kmp_s_0316r_0884 = 0.549; kmp_s_0400r_0884 = 1.71907; kmp_s_0763_br_0884 = 0.549; kmp_s_1207r_0884 = 0.549; kms_s_0158r_0884 = 0.549; kms_s_0446r_0884 = 1.09208;
  // GENE_ASSOCIATION:(YLR028C or YMR120C)
  r_0885: s_0122 + s_0317 -> s_0309 + s_0325; intracellular*function_223(Keq_r_0885, Vmax_r_0885, intracellular, kmp_s_0309r_0885, kmp_s_0325r_0885, kms_s_0122r_0885, kms_s_0317r_0885, s_0122, s_0309, s_0317, s_0325); r_0885 is "phosphoribosylaminoimidazolecarboxamide formyltransferase";
    Keq_r_0885 = 1.1; Vmax_r_0885 = 0.7854; kmp_s_0309r_0885 = 0.549; kmp_s_0325r_0885 = 0.549; kms_s_0122r_0885 = 0.549; kms_s_0317r_0885 = 0.549;
  // GENE_ASSOCIATION:YAR015W
  r_0886: s_0318 + ATP_intracellular + L_aspartate_intracellular -> s_0009 + ADP_intracellular + $s_0763_b + $phosphate_intracellular; intracellular*function_224(Keq_r_0886, Vmax_r_0886, intracellular, kmp_s_0009r_0886, kmp_s_0400r_0886, kmp_s_0763_br_0886, kmp_s_1207r_0886, kms_s_0318r_0886, kms_s_0446r_0886, kms_s_0881r_0886, s_0009, s_0318, ADP_intracellular, ATP_intracellular, s_0763_b, L_aspartate_intracellular, phosphate_intracellular); r_0886 is "phosphoribosylaminoimidazolesuccinocarboxamide synthase";
    Keq_r_0886 = 0.950614; Vmax_r_0886 = 1.53571; kmp_s_0009r_0886 = 0.549; kmp_s_0400r_0886 = 1.71907; kmp_s_0763_br_0886 = 0.549; kmp_s_1207r_0886 = 0.549; kms_s_0318r_0886 = 0.549; kms_s_0446r_0886 = 1.09208; kms_s_0881r_0886 = 0.549;
  // GENE_ASSOCIATION:YDR007W
  r_0887: s_1066 -> s_0078; intracellular*function_225(Keq_r_0887, Vmax_r_0887, intracellular, kmp_s_0078r_0887, kms_s_1066r_0887, s_0078, s_1066); r_0887 is "phosphoribosylanthranilate isomerase";
    Keq_r_0887 = 1.1; Vmax_r_0887 = 0.05115; kmp_s_0078r_0887 = 0.549; kms_s_1066r_0887 = 0.549;
  // GENE_ASSOCIATION:YGR061C
  r_0888: ATP_intracellular + L_glutamine_intracellular + s_1052 + $s_1434_b -> s_0158 + ADP_intracellular + $s_0763_b + L_glutamate_intracellular + $phosphate_intracellular; intracellular*function_226(Keq_r_0888, Vmax_r_0888, intracellular, kmp_s_0158r_0888, kmp_s_0400r_0888, kmp_s_0763_br_0888, kmp_s_0899r_0888, kmp_s_1207r_0888, kms_s_0446r_0888, kms_s_0907r_0888, kms_s_1052r_0888, kms_s_1434_br_0888, s_0158, ADP_intracellular, ATP_intracellular, s_0763_b, L_glutamate_intracellular, L_glutamine_intracellular, s_1052, phosphate_intracellular, s_1434_b); r_0888 is "phosphoribosylformylglycinamidine synthase";
    Keq_r_0888 = 0.950614; Vmax_r_0888 = 3.13818; kmp_s_0158r_0888 = 0.549; kmp_s_0400r_0888 = 1.71907; kmp_s_0763_br_0888 = 0.549; kmp_s_0899r_0888 = 0.549; kmp_s_1207r_0888 = 0.549; kms_s_0446r_0888 = 1.09208; kms_s_0907r_0888 = 0.549; kms_s_1052r_0888 = 0.549; kms_s_1434_br_0888 = 0.549;
  // GENE_ASSOCIATION:YDR408C
  r_0889: s_0122 + s_1048 -> s_0309 + $s_0763_b + s_1052; intracellular*function_227(Keq_r_0889, Vmax_r_0889, intracellular, kmp_s_0309r_0889, kmp_s_0763_br_0889, kmp_s_1052r_0889, kms_s_0122r_0889, kms_s_1048r_0889, s_0122, s_0309, s_0763_b, s_1048, s_1052); r_0889 is "phosphoribosylglycinamide formyltransferase";
    Keq_r_0889 = 0.6039; Vmax_r_0889 = 0.734467; kmp_s_0309r_0889 = 0.549; kmp_s_0763_br_0889 = 0.549; kmp_s_1052r_0889 = 0.549; kms_s_0122r_0889 = 0.549; kms_s_1048r_0889 = 0.549;
  // GENE_ASSOCIATION:YGL234W
  r_0890: s_0333 + ATP_intracellular + glycine_intracellular -> ADP_intracellular + $s_0763_b + s_1048 + $phosphate_intracellular; intracellular*function_228(Keq_r_0890, Vmax_r_0890, intracellular, kmp_s_0400r_0890, kmp_s_0763_br_0890, kmp_s_1048r_0890, kmp_s_1207r_0890, kms_s_0333r_0890, kms_s_0446r_0890, kms_s_0740r_0890, s_0333, ADP_intracellular, ATP_intracellular, glycine_intracellular, s_0763_b, s_1048, phosphate_intracellular); r_0890 is "phosphoribosylglycinamide synthase";
    Keq_r_0890 = 0.950614; Vmax_r_0890 = 1.53571; kmp_s_0400r_0890 = 1.71907; kmp_s_0763_br_0890 = 0.549; kmp_s_1048r_0890 = 0.549; kmp_s_1207r_0890 = 0.549; kms_s_0333r_0890 = 0.549; kms_s_0446r_0890 = 1.09208; kms_s_0740r_0890 = 0.549;
  // GENE_ASSOCIATION:(YBL068W or YER099C or YHL011C or YKL181W or YOL061W)
  r_0891: s_0427 + ATP_intracellular -> s_0331 + AMP_intracellular + $s_0763_b; intracellular*function_229(Keq_r_0891, Vmax_r_0891, intracellular, kmp_s_0331r_0891, kmp_s_0434r_0891, kmp_s_0763_br_0891, kms_s_0427r_0891, kms_s_0446r_0891, s_0331, s_0427, AMP_intracellular, ATP_intracellular, s_0763_b); r_0891 is "phosphoribosylpyrophosphate synthetase";
    Keq_r_0891 = 0.696514; Vmax_r_0891 = 2.25059; kmp_s_0331r_0891 = 0.549; kmp_s_0434r_0891 = 1.25956; kmp_s_0763_br_0891 = 0.549; kms_s_0427r_0891 = 0.549; kms_s_0446r_0891 = 1.09208;
  // GENE_ASSOCIATION:YNL316C
  prephenate_dehydratase: $s_0763_b + prephenate_2_intracellular -> carbon_dioxide_intracellular + s_0859 + $s_1434_b; intracellular*function_230(Keq_r_0911, Vmax_r_0911, intracellular, kmp_s_0470r_0911, kmp_s_0859r_0911, kmp_s_1434_br_0911, kms_s_0763_br_0911, kms_s_1258r_0911, carbon_dioxide_intracellular, s_0763_b, s_0859, prephenate_2_intracellular, s_1434_b);
    Keq_r_0911 = 1.1; Vmax_r_0911 = 0.768347; kmp_s_0470r_0911 = 1; kmp_s_0859r_0911 = 0.549; kmp_s_1434_br_0911 = 0.549; kms_s_0763_br_0911 = 0.549; kms_s_1258r_0911 = 0.549;
  // GENE_ASSOCIATION:YBR166C
  prephenate_dehydrogenase_NADP: NADP_intracellular + prephenate_2_intracellular -> s_0209 + carbon_dioxide_intracellular + NADPH_intracellular; intracellular*function_231(Keq_r_0913, Vmax_r_0913, intracellular, kmp_s_0209r_0913, kmp_s_0470r_0913, kmp_s_1096r_0913, kms_s_1091r_0913, kms_s_1258r_0913, s_0209, carbon_dioxide_intracellular, NADP_intracellular, NADPH_intracellular, prephenate_2_intracellular); prephenate_dehydrogenase_NADP is "prephenate dehydrogenase (NADP)";
    Keq_r_0913 = 1.1; Vmax_r_0913 = 0.648558; kmp_s_0209r_0913 = 0.549; kmp_s_0470r_0913 = 1; kmp_s_1096r_0913 = 0.549; kms_s_1091r_0913 = 0.549; kms_s_1258r_0913 = 0.549;
  pyrimidine_phosphatase: s_0319 + $s_1434_b -> s_0320 + $phosphate_intracellular; intracellular*function_232(Keq_r_0934, Vmax_r_0934, intracellular, kmp_s_0320r_0934, kmp_s_1207r_0934, kms_s_0319r_0934, kms_s_1434_br_0934, s_0319, s_0320, phosphate_intracellular, s_1434_b);  // isDescribedBy ECO:0000034
    Keq_r_0934 = 1.1; Vmax_r_0934 = 0.00385; kmp_s_0320r_0934 = 0.549; kmp_s_1207r_0934 = 0.549; kms_s_0319r_0934 = 0.549; kms_s_1434_br_0934 = 0.549;
  // GENE_ASSOCIATION:YER023W
  r_0936: s_0120 + 2 $s_0763_b + NADPH_intracellular -> L_proline_intracellular + NADP_intracellular; intracellular*function_233(Keq_r_0936, Vmax_r_0936, intracellular, kmp_s_0939r_0936, kmp_s_1091r_0936, kms_s_0120r_0936, kms_s_0763_br_0936, kms_s_1096r_0936, s_0120, s_0763_b, L_proline_intracellular, NADP_intracellular, NADPH_intracellular); r_0936 is "pyrroline-5-carboxylate reductase";
    Keq_r_0936 = 3.64962; Vmax_r_0936 = 0.863944; kmp_s_0939r_0936 = 0.549; kmp_s_1091r_0936 = 0.549; kms_s_0120r_0936 = 0.549; kms_s_0763_br_0936 = 0.549; kms_s_1096r_0936 = 0.549;
  // GENE_ASSOCIATION:(YBR218C or YGL062W)
  pyruvate_carboxylase: ATP_intracellular + bicarbonate_intracellular + pyruvate_intracellular -> ADP_intracellular + $s_0763_b + oxaloacetate_2_intracellular + $phosphate_intracellular; intracellular*function_234(Keq_r_0937, Vmax_r_0937, intracellular, kmp_s_0400r_0937, kmp_s_0763_br_0937, kmp_s_1156r_0937, kmp_s_1207r_0937, kms_s_0446r_0937, kms_s_0458r_0937, kms_s_1277r_0937, ADP_intracellular, ATP_intracellular, bicarbonate_intracellular, s_0763_b, oxaloacetate_2_intracellular, phosphate_intracellular, pyruvate_intracellular);
    Keq_r_0937 = 8.61335; Vmax_r_0937 = 62.2377; kmp_s_0400r_0937 = 1.71907; kmp_s_0763_br_0937 = 0.549; kmp_s_1156r_0937 = 0.549; kmp_s_1207r_0937 = 0.549; kms_s_0446r_0937 = 1.09208; kms_s_0458r_0937 = 0.549; kms_s_1277r_0937 = 0.0605905;
  // GENE_ASSOCIATION:(YGR087C or YLR044C or YLR134W)
  pyruvate_decarboxylase: $s_0763_b + pyruvate_intracellular -> acetaldehyde_intracellular + carbon_dioxide_intracellular; intracellular*function_235(Keq_r_0938, Vmax_r_0938, intracellular, kmp_s_0366r_0938, kmp_s_0470r_0938, kms_s_0763_br_0938, kms_s_1277r_0938, acetaldehyde_intracellular, carbon_dioxide_intracellular, s_0763_b, pyruvate_intracellular);
    Keq_r_0938 = 3.97167; Vmax_r_0938 = 62.986; kmp_s_0366r_0938 = 0.120104; kmp_s_0470r_0938 = 1; kms_s_0763_br_0938 = 0.549; kms_s_1277r_0938 = 0.0605905;
  // GENE_ASSOCIATION:(YBR221C and YER178W and YFL018C and YGR193C and YNL071W)
  pyruvate_dehydrogenase: coenzyme_A_intracellular + NAD_intracellular + pyruvate_intracellular -> acetyl_CoA_intracellular + carbon_dioxide_intracellular + NADH_intracellular; intracellular*function_236(Keq_r_0940, Vmax_r_0940, intracellular, kmp_s_0380r_0940, kmp_s_0470r_0940, kmp_s_1087r_0940, kms_s_0514r_0940, kms_s_1082r_0940, kms_s_1277r_0940, acetyl_CoA_intracellular, carbon_dioxide_intracellular, coenzyme_A_intracellular, NAD_intracellular, NADH_intracellular, pyruvate_intracellular);
    Keq_r_0940 = 1.04749; Vmax_r_0940 = 9.4545; kmp_s_0380r_0940 = 0.549; kmp_s_0470r_0940 = 1; kmp_s_1087r_0940 = 0.0867353; kms_s_0514r_0940 = 0.549; kms_s_1082r_0940 = 1.50326; kms_s_1277r_0940 = 0.0605905;
  // GENE_ASSOCIATION:(YAL038W or YOR347C)
  pyruvate_kinase: ADP_intracellular + $s_0763_b + s_1243 -> ATP_intracellular + pyruvate_intracellular; intracellular*Function_for_pyruvate_kinase(Keq_r_0941, Vmax_r_0941, intracellular, kmp_s_0446r_0941, kmp_s_1277r_0941, kms_s_0400r_0941, kms_s_0763_br_0941, kms_s_1243r_0941, ADP_intracellular, ATP_intracellular, s_0763_b, s_1243, pyruvate_intracellular);
    Keq_r_0941 = 2.8449; Vmax_r_0941 = 146.411; kmp_s_0446r_0941 = 1.09208; kmp_s_1277r_0941 = 0.0605905; kms_s_0400r_0941 = 1.71907; kms_s_0763_br_0941 = 0.549; kms_s_1243r_0941 = 0.0271093;
  // GENE_ASSOCIATION:YOL143C
  riboflavin_synthase: s_0163 + s_0320 -> s_0335 + $phosphate_intracellular + 2 $s_1434_b; intracellular*Function_for_riboflavin_synthase(Keq_r_0948, Vmax_r_0948, intracellular, kmp_s_0335r_0948, kmp_s_1207r_0948, kmp_s_1434_br_0948, kms_s_0163r_0948, kms_s_0320r_0948, s_0163, s_0320, s_0335, phosphate_intracellular, s_1434_b);
    Keq_r_0948 = 0.331541; Vmax_r_0948 = 0.0120878; kmp_s_0335r_0948 = 0.549; kmp_s_1207r_0948 = 0.549; kmp_s_1434_br_0948 = 0.549; kms_s_0163r_0948 = 0.549; kms_s_0320r_0948 = 0.549;
  // GENE_ASSOCIATION:YBR256C
  riboflavin_synthase_2: 2 s_0335 -> s_0320 + riboflavin_intracellular; intracellular*function_239(Keq_r_0949, Vmax_r_0949, intracellular, kmp_s_0320r_0949, kmp_s_1283r_0949, kms_s_0335r_0949, s_0320, s_0335, riboflavin_intracellular);
    Keq_r_0949 = 1.1; Vmax_r_0949 = 0.00274998; kmp_s_0320r_0949 = 0.549; kmp_s_1283r_0949 = 0.549; kms_s_0335r_0949 = 0.549;
  // GENE_ASSOCIATION:((YER070W and YGR180C and YGR209C) or (YER070W and YGR180C and YLR043C) or (YGR180C and YGR209C and YIL066C) or (YGR180C and YIL066C and YLR043C)) or ((YER070W and YGR209C and YJL026W) or (YER070W and YJL026W and YLR043C) or (YGR209C and YIL066C and YJL026W) or (YIL066C and YJL026W and YLR043C))
  r_0951: ADP_intracellular + s_1521 -> dADP_intracellular + $s_1434_b + s_1517; intracellular*function_240(Keq_r_0951, Vmax_r_0951, intracellular, kmp_s_0562r_0951, kmp_s_1434_br_0951, kmp_s_1517r_0951, kms_s_0400r_0951, kms_s_1521r_0951, ADP_intracellular, dADP_intracellular, s_1434_b, s_1517, s_1521); r_0951 is "ribonucleoside-diphosphate reductase";
    Keq_r_0951 = 0.192861; Vmax_r_0951 = 0.0120515; kmp_s_0562r_0951 = 0.549; kmp_s_1434_br_0951 = 0.549; kmp_s_1517r_0951 = 0.549; kms_s_0400r_0951 = 1.71907; kms_s_1521r_0951 = 0.549;
  // GENE_ASSOCIATION:((YER070W and YGR209C and YJL026W) or (YER070W and YJL026W and YLR043C)) or ((YER070W and YGR180C and YGR209C) or (YER070W and YGR180C and YLR043C))
  r_0955: GDP_intracellular + s_1521 -> dGDP_intracellular + $s_1434_b + s_1517; intracellular*function_241(Keq_r_0955, Vmax_r_0955, intracellular, kmp_s_0591r_0955, kmp_s_1434_br_0955, kmp_s_1517r_0955, kms_s_0706r_0955, kms_s_1521r_0955, dGDP_intracellular, GDP_intracellular, s_1434_b, s_1517, s_1521); r_0955 is "ribonucleoside-diphosphate reductase (GDP)";
    Keq_r_0955 = 0.6039; Vmax_r_0955 = 0.0163349; kmp_s_0591r_0955 = 0.549; kmp_s_1434_br_0955 = 0.549; kmp_s_1517r_0955 = 0.549; kms_s_0706r_0955 = 0.549; kms_s_1521r_0955 = 0.549;
  // GENE_ASSOCIATION:((YER070W and YGR209C and YJL026W) or (YER070W and YJL026W and YLR043C)) or ((YER070W and YGR180C and YGR209C) or (YER070W and YGR180C and YLR043C))
  r_0957: UDP_intracellular + s_1521 -> dUDP_intracellular + $s_1434_b + s_1517; intracellular*function_242(Keq_r_0957, Vmax_r_0957, intracellular, kmp_s_0622r_0957, kmp_s_1434_br_0957, kmp_s_1517r_0957, kms_s_1411r_0957, kms_s_1521r_0957, dUDP_intracellular, UDP_intracellular, s_1434_b, s_1517, s_1521); r_0957 is "ribonucleoside-diphosphate reductase (UDP)";
    Keq_r_0957 = 0.6039; Vmax_r_0957 = 0.0404138; kmp_s_0622r_0957 = 0.549; kmp_s_1434_br_0957 = 0.549; kmp_s_1517r_0957 = 0.549; kms_s_1411r_0957 = 0.549; kms_s_1521r_0957 = 0.549;
  // GENE_ASSOCIATION:(YGR209C or YLR043C)
  r_0959: ATP_intracellular + s_1521 -> dATP_intracellular + $s_1434_b + s_1517; intracellular*function_243(Keq_r_0959, Vmax_r_0959, intracellular, kmp_s_0566r_0959, kmp_s_1434_br_0959, kmp_s_1517r_0959, kms_s_0446r_0959, kms_s_1521r_0959, ATP_intracellular, dATP_intracellular, s_1434_b, s_1517, s_1521); r_0959 is "ribonucleoside-triphosphate reductase (ATP)";
    Keq_r_0959 = 0.303587; Vmax_r_0959 = 0.0120516; kmp_s_0566r_0959 = 0.549; kmp_s_1434_br_0959 = 0.549; kmp_s_1517r_0959 = 0.549; kms_s_0446r_0959 = 1.09208; kms_s_1521r_0959 = 0.549;
  // GENE_ASSOCIATION:YOR095C
  ribose_5_phosphate_isomerase: s_0557 -> s_0427; intracellular*function_244(Keq_r_0963, Vmax_r_0963, intracellular, kmp_s_0427r_0963, kms_s_0557r_0963, s_0427, s_0557); ribose_5_phosphate_isomerase is "ribose-5-phosphate isomerase";
    Keq_r_0963 = 1.1; Vmax_r_0963 = 0.5544; kmp_s_0427r_0963 = 0.549; kms_s_0557r_0963 = 0.549;
  // GENE_ASSOCIATION:YJL121C
  ribulose_5_phosphate_3_epimerase: s_0561 -> s_0557; intracellular*function_245(Keq_r_0965, Vmax_r_0965, intracellular, kmp_s_0557r_0965, kms_s_0561r_0965, s_0557, s_0561); ribulose_5_phosphate_3_epimerase is "ribulose 5-phosphate 3-epimerase";
    Keq_r_0965 = 1.1; Vmax_r_0965 = 0.5577; kmp_s_0557r_0965 = 0.549; kms_s_0561r_0965 = 0.549;
  // GENE_ASSOCIATION:YML008C
  r_0967: s_1293 + zymosterol_intracellular -> fecosterol_intracellular + $s_0763_b + s_1290; intracellular*function_246(Keq_r_0967, Vmax_r_0967, intracellular, kmp_s_0669r_0967, kmp_s_0763_br_0967, kmp_s_1290r_0967, kms_s_1293r_0967, kms_s_1447r_0967, fecosterol_intracellular, s_0763_b, s_1290, s_1293, zymosterol_intracellular); r_0967 is "S-adenosyl-methionine delta-24-sterol-c-methyltransferase";
    Keq_r_0967 = 0.6039; Vmax_r_0967 = 0.00141569; kmp_s_0669r_0967 = 0.549; kmp_s_0763_br_0967 = 0.549; kmp_s_1290r_0967 = 0.549; kms_s_1293r_0967 = 0.549; kms_s_1447r_0967 = 0.549;
  // GENE_ASSOCIATION:YIR034C
  r_0969: L_saccharopine_intracellular + NAD_intracellular + $s_1434_b -> _2_oxoglutarate_intracellular + $s_0763_b + L_lysine_intracellular + NADH_intracellular; intracellular*function_247(Keq_r_0969, Vmax_r_0969, intracellular, kmp_s_0185r_0969, kmp_s_0763_br_0969, kmp_s_0929r_0969, kmp_s_1087r_0969, kms_s_0942r_0969, kms_s_1082r_0969, kms_s_1434_br_0969, _2_oxoglutarate_intracellular, s_0763_b, L_lysine_intracellular, L_saccharopine_intracellular, NAD_intracellular, NADH_intracellular, s_1434_b); r_0969 is "saccharopine dehydrogenase (NAD, L-lysine forming)";
    Keq_r_0969 = 0.0348439; Vmax_r_0969 = 3.3649; kmp_s_0185r_0969 = 0.549; kmp_s_0763_br_0969 = 0.549; kmp_s_0929r_0969 = 0.549; kmp_s_1087r_0969 = 0.0867353; kms_s_0942r_0969 = 0.549; kms_s_1082r_0969 = 1.50326; kms_s_1434_br_0969 = 0.549;
  // GENE_ASSOCIATION:YNR050C
  r_0970: $s_0763_b + L_allysine_intracellular + L_glutamate_intracellular + NADPH_intracellular -> L_saccharopine_intracellular + NADP_intracellular + $s_1434_b; intracellular*function_248(Keq_r_0970, Vmax_r_0970, intracellular, kmp_s_0942r_0970, kmp_s_1091r_0970, kmp_s_1434_br_0970, kms_s_0763_br_0970, kms_s_0867r_0970, kms_s_0899r_0970, kms_s_1096r_0970, s_0763_b, L_allysine_intracellular, L_glutamate_intracellular, L_saccharopine_intracellular, NADP_intracellular, NADPH_intracellular, s_1434_b); r_0970 is "saccharopine dehydrogenase (NADP, L-glutamate forming)";
    Keq_r_0970 = 2.00364; Vmax_r_0970 = 3.3649; kmp_s_0942r_0970 = 0.549; kmp_s_1091r_0970 = 0.549; kmp_s_1434_br_0970 = 0.549; kms_s_0763_br_0970 = 0.549; kms_s_0867r_0970 = 0.549; kms_s_0899r_0970 = 0.549; kms_s_1096r_0970 = 0.549;
  // GENE_ASSOCIATION:(YDR062W or YMR296C)
  serine_C_palmitoyltransferase: L_serine_intracellular + palmitoyl_CoA_intracellular -> s_0218 + carbon_dioxide_intracellular + coenzyme_A_intracellular; intracellular*function_249(Keq_r_0972, Vmax_r_0972, intracellular, kmp_s_0218r_0972, kmp_s_0470r_0972, kmp_s_0514r_0972, kms_s_0943r_0972, kms_s_1187r_0972, s_0218, carbon_dioxide_intracellular, coenzyme_A_intracellular, L_serine_intracellular, palmitoyl_CoA_intracellular); serine_C_palmitoyltransferase is "serine C-palmitoyltransferase";
    Keq_r_0972 = 1.1; Vmax_r_0972 = 0.00279509; kmp_s_0218r_0972 = 0.549; kmp_s_0470r_0972 = 1; kmp_s_0514r_0972 = 0.549; kms_s_0943r_0972 = 0.549; kms_s_1187r_0972 = 0.549;
  // GENE_ASSOCIATION:YDR127W
  shikimate_dehydrogenase: _3_dehydroshikimate_intracellular + $s_0763_b + NADPH_intracellular -> NADP_intracellular + shikimate_intracellular; intracellular*function_250(Keq_r_0976, Vmax_r_0976, intracellular, kmp_s_1091r_0976, kmp_s_1306r_0976, kms_s_0217r_0976, kms_s_0763_br_0976, kms_s_1096r_0976, _3_dehydroshikimate_intracellular, s_0763_b, NADP_intracellular, NADPH_intracellular, shikimate_intracellular);
    Keq_r_0976 = 2.00364; Vmax_r_0976 = 1.60931; kmp_s_1091r_0976 = 0.549; kmp_s_1306r_0976 = 0.549; kms_s_0217r_0976 = 0.549; kms_s_0763_br_0976 = 0.549; kms_s_1096r_0976 = 0.549;
  // GENE_ASSOCIATION:YDR127W
  shikimate_kinase: ATP_intracellular + shikimate_intracellular -> s_0267 + ADP_intracellular + $s_0763_b; intracellular*Function_for_shikimate_kinase(Keq_r_0977, Vmax_r_0977, intracellular, kmp_s_0267r_0977, kmp_s_0400r_0977, kmp_s_0763_br_0977, kms_s_0446r_0977, kms_s_1306r_0977, s_0267, ADP_intracellular, ATP_intracellular, s_0763_b, shikimate_intracellular);
    Keq_r_0977 = 0.950614; Vmax_r_0977 = 1.60929; kmp_s_0267r_0977 = 0.549; kmp_s_0400r_0977 = 1.71907; kmp_s_0763_br_0977 = 0.549; kms_s_0446r_0977 = 1.09208; kms_s_1306r_0977 = 0.549;
  // GENE_ASSOCIATION:((YGR175C and YIL043C and YNL111C) or (YGR175C and YKL150W and YNL111C))
  squalene_epoxidase_NAD: $s_0763_b + NADH_intracellular + oxygen_intracellular + squalene_intracellular -> s_0040 + NAD_intracellular + $s_1434_b; intracellular*function_252(Keq_r_0991, Vmax_r_0991, intracellular, kmp_s_0040r_0991, kmp_s_1082r_0991, kmp_s_1434_br_0991, kms_s_0763_br_0991, kms_s_1087r_0991, kms_s_1160r_0991, kms_s_1327r_0991, s_0040, s_0763_b, NAD_intracellular, NADH_intracellular, oxygen_intracellular, squalene_intracellular, s_1434_b); squalene_epoxidase_NAD is "squalene epoxidase (NAD)";
    Keq_r_0991 = 34.7263; Vmax_r_0991 = 0.0961402; kmp_s_0040r_0991 = 0.549; kmp_s_1082r_0991 = 1.50326; kmp_s_1434_br_0991 = 0.549; kms_s_0763_br_0991 = 0.549; kms_s_1087r_0991 = 0.0867353; kms_s_1160r_0991 = 0.549; kms_s_1327r_0991 = 0.549;
  // GENE_ASSOCIATION:YHR190W
  squalene_synthase: 2 s_0195 + $s_0763_b + NADPH_intracellular -> 2 diphosphate_intracellular + NADP_intracellular + squalene_intracellular; intracellular*Function_for_squalene_synthase(Keq_r_0993, Vmax_r_0993, intracellular, kmp_s_0605r_0993, kmp_s_1091r_0993, kmp_s_1327r_0993, kms_s_0195r_0993, kms_s_0763_br_0993, kms_s_1096r_0993, s_0195, diphosphate_intracellular, s_0763_b, NADP_intracellular, NADPH_intracellular, squalene_intracellular);
    Keq_r_0993 = 1.1; Vmax_r_0993 = 0.0627; kmp_s_0605r_0993 = 0.549; kmp_s_1091r_0993 = 0.549; kmp_s_1327r_0993 = 0.549; kms_s_0195r_0993 = 0.549; kms_s_0763_br_0993 = 0.549; kms_s_1096r_0993 = 0.549;
  // GENE_ASSOCIATION:(YKL140W or YLL012W) or YLR020C
  steryl_ester_hydrolase: ergosterol_intracellular + fatty_acid_intracellular -> ergosterol_ester_intracellular + $s_1434_b; intracellular*function_254(Keq_r_0995, Vmax_r_0995, intracellular, kmp_s_0641r_0995, kmp_s_1434_br_0995, kms_s_0635r_0995, kms_s_0663r_0995, ergosterol_intracellular, ergosterol_ester_intracellular, fatty_acid_intracellular, s_1434_b);
    Keq_r_0995 = 1.1; Vmax_r_0995 = 0.0034727; kmp_s_0641r_0995 = 0.549; kmp_s_1434_br_0995 = 0.549; kms_s_0635r_0995 = 0.549; kms_s_0663r_0995 = 0.549;
  // GENE_ASSOCIATION:(YGR244C and YOR142W)
  succinate_CoA_ligase_ADP_forming: ATP_intracellular + coenzyme_A_intracellular + succinate_2_intracellular -> ADP_intracellular + $phosphate_intracellular + succinyl_CoA_intracellular; intracellular*function_255(Keq_r_1003, Vmax_r_1003, intracellular, kmp_s_0400r_1003, kmp_s_1207r_1003, kmp_s_1342r_1003, kms_s_0446r_1003, kms_s_0514r_1003, kms_s_1338r_1003, ADP_intracellular, ATP_intracellular, coenzyme_A_intracellular, phosphate_intracellular, succinate_2_intracellular, succinyl_CoA_intracellular); succinate_CoA_ligase_ADP_forming is "succinate-CoA ligase (ADP-forming)";
    Keq_r_1003 = 1.73154; Vmax_r_1003 = 0.13134; kmp_s_0400r_1003 = 1.71907; kmp_s_1207r_1003 = 0.549; kmp_s_1342r_1003 = 0.549; kms_s_0446r_1003 = 1.09208; kms_s_0514r_1003 = 0.549; kms_s_1338r_1003 = 0.549;
  // GENE_ASSOCIATION:YCL050C
  sulfate_adenylyltransferase_ADP: ADP_intracellular + $s_0763_b + sulphate_intracellular -> _5_adenylyl_sulfate_intracellular + $phosphate_intracellular; intracellular*function_256(Keq_r_1007, Vmax_r_1007, intracellular, kmp_s_0304r_1007, kmp_s_1207r_1007, kms_s_0400r_1007, kms_s_0763_br_1007, kms_s_1347r_1007, _5_adenylyl_sulfate_intracellular, ADP_intracellular, s_0763_b, phosphate_intracellular, sulphate_intracellular); sulfate_adenylyltransferase_ADP is "sulfate adenylyltransferase (ADP)";
    Keq_r_1007 = 0.639881; Vmax_r_1007 = 0.624362; kmp_s_0304r_1007 = 0.549; kmp_s_1207r_1007 = 0.549; kms_s_0400r_1007 = 1.71907; kms_s_0763_br_1007 = 0.549; kms_s_1347r_1007 = 0.549;
  // GENE_ASSOCIATION:(YFR030W or YJR137C)
  sulfite_reductase_NADPH2: 5 $s_0763_b + 3 NADPH_intracellular + sulphite_intracellular -> hydrogen_sulfide_intracellular + 3 NADP_intracellular + 3 $s_1434_b; intracellular*function_257(Keq_r_1008, Vmax_r_1008, intracellular, kmp_s_0805r_1008, kmp_s_1091r_1008, kmp_s_1434_br_1008, kms_s_0763_br_1008, kms_s_1096r_1008, kms_s_1349r_1008, s_0763_b, hydrogen_sulfide_intracellular, NADP_intracellular, NADPH_intracellular, sulphite_intracellular, s_1434_b); sulfite_reductase_NADPH2 is "sulfite reductase (NADPH2)";
    Keq_r_1008 = 3.64962; Vmax_r_1008 = 0.851402; kmp_s_0805r_1008 = 0.549; kmp_s_1091r_1008 = 0.549; kmp_s_1434_br_1008 = 0.549; kms_s_0763_br_1008 = 0.549; kms_s_1096r_1008 = 0.549; kms_s_1349r_1008 = 0.549;
  // GENE_ASSOCIATION:(YDR353W or (YDR353W and YGR209C) or (YDR353W and YLR043C)) or ((YCR083W and YHR106W) or (YCR083W and YPL091W))
  thioredoxin_reductase_NADPH: $s_0763_b + NADPH_intracellular + s_1517 -> NADP_intracellular + s_1521; intracellular*function_258(Keq_r_1024, Vmax_r_1024, intracellular, kmp_s_1091r_1024, kmp_s_1521r_1024, kms_s_0763_br_1024, kms_s_1096r_1024, kms_s_1517r_1024, s_0763_b, NADP_intracellular, NADPH_intracellular, s_1517, s_1521); thioredoxin_reductase_NADPH is "thioredoxin reductase (NADPH)";
    Keq_r_1024 = 2.00364; Vmax_r_1024 = 0.705433; kmp_s_1091r_1024 = 0.549; kmp_s_1521r_1024 = 0.549; kms_s_0763_br_1024 = 0.549; kms_s_1096r_1024 = 0.549; kms_s_1517r_1024 = 0.549;
  // GENE_ASSOCIATION:YEL046C
  threonine_aldolase: L_threonine_intracellular -> acetaldehyde_intracellular + glycine_intracellular; intracellular*Function_for_threonine_aldolase(Keq_r_1026, Vmax_r_1026, intracellular, kmp_s_0366r_1026, kmp_s_0740r_1026, kms_s_0949r_1026, acetaldehyde_intracellular, glycine_intracellular, L_threonine_intracellular);
    Keq_r_1026 = 0.0725309; Vmax_r_1026 = 3.18448; kmp_s_0366r_1026 = 0.120104; kmp_s_0740r_1026 = 0.549; kms_s_0949r_1026 = 1;
  // GENE_ASSOCIATION:YCR053W
  threonine_synthase: s_1122 + $s_1434_b -> L_threonine_intracellular + $phosphate_intracellular; intracellular*Function_for_threonine_synthase(Keq_r_1027, Vmax_r_1027, intracellular, kmp_s_0949r_1027, kmp_s_1207r_1027, kms_s_1122r_1027, kms_s_1434_br_1027, L_threonine_intracellular, s_1122, phosphate_intracellular, s_1434_b);
    Keq_r_1027 = 2.00364; Vmax_r_1027 = 5.5748; kmp_s_0949r_1027 = 1; kmp_s_1207r_1027 = 0.549; kms_s_1122r_1027 = 0.549; kms_s_1434_br_1027 = 0.549;
  // GENE_ASSOCIATION:YOR074C
  thymidylate_synthase: s_0307 + dUMP_intracellular -> dihydrofolic_acid_intracellular + dTMP_intracellular; intracellular*function_261(Keq_r_1032, Vmax_r_1032, intracellular, kmp_s_0601r_1032, kmp_s_0619r_1032, kms_s_0307r_1032, kms_s_0624r_1032, s_0307, dihydrofolic_acid_intracellular, dTMP_intracellular, dUMP_intracellular);
    Keq_r_1032 = 1.1; Vmax_r_1032 = 0.015323; kmp_s_0601r_1032 = 0.549; kmp_s_0619r_1032 = 0.549; kms_s_0307r_1032 = 0.549; kms_s_0624r_1032 = 0.549;
  // GENE_ASSOCIATION:YLR354C
  transaldolase: s_0533 + s_0539 -> s_0731 + s_1304; intracellular*Function_for_transaldolase(Keq_r_1035, Vmax_r_1035, intracellular, kmp_s_0731r_1035, kmp_s_1304r_1035, kms_s_0533r_1035, kms_s_0539r_1035, s_0533, s_0539, s_0731, s_1304);
    Keq_r_1035 = 0.459088; Vmax_r_1035 = 0.14014; kmp_s_0731r_1035 = 0.0436363; kmp_s_1304r_1035 = 0.549; kms_s_0533r_1035 = 0.549; kms_s_0539r_1035 = 0.104555;
  // GENE_ASSOCIATION:(YBR117C or YPR074C)
  transketolase: s_0731 + s_1304 -> s_0427 + s_0561; intracellular*Function_for_transketolase(Keq_r_1036, Vmax_r_1036, intracellular, kmp_s_0427r_1036, kmp_s_0561r_1036, kms_s_0731r_1036, kms_s_1304r_1036, s_0427, s_0561, s_0731, s_1304);
    Keq_r_1036 = 13.8394; Vmax_r_1036 = 0.14014; kmp_s_0427r_1036 = 0.549; kmp_s_0561r_1036 = 0.549; kms_s_0731r_1036 = 0.0436363; kms_s_1304r_1036 = 0.549;
  // GENE_ASSOCIATION:(YBR117C or YPR074C)
  transketolase_2: s_0539 + s_0731 -> s_0533 + s_0561; intracellular*Function_for_transketolase_2(Keq_r_1037, Vmax_r_1037, intracellular, kmp_s_0533r_1037, kmp_s_0561r_1037, kms_s_0539r_1037, kms_s_0731r_1037, s_0533, s_0539, s_0561, s_0731);
    Keq_r_1037 = 72.6682; Vmax_r_1037 = 1.1627; kmp_s_0533r_1037 = 0.549; kmp_s_0561r_1037 = 0.549; kms_s_0539r_1037 = 0.104555; kms_s_0731r_1037 = 0.0436363;
  // GENE_ASSOCIATION:YDR074W
  trehalose_phosphatase: s_0419 + $s_1434_b -> s_0416 + $phosphate_intracellular; intracellular*function_265(Keq_r_1038, Vmax_r_1038, intracellular, kmp_s_0416r_1038, kmp_s_1207r_1038, kms_s_0419r_1038, kms_s_1434_br_1038, s_0416, s_0419, phosphate_intracellular, s_1434_b); trehalose_phosphatase is "trehalose-phosphatase";
    Keq_r_1038 = 1.1; Vmax_r_1038 = 0.1001; kmp_s_0416r_1038 = 0.549; kmp_s_1207r_1038 = 0.549; kms_s_0419r_1038 = 0.549; kms_s_1434_br_1038 = 0.549;
  // GENE_ASSOCIATION:(YKR089C or YMR313C or YOR081C)
  triacylglycerol_lipase: $triglyceride_intracellular + $s_1434_b -> diglyceride_intracellular + fatty_acid_intracellular; intracellular*function_266(Keq_r_1040, Vmax_r_1040, intracellular, kmp_s_0596r_1040, kmp_s_0663r_1040, kms_s_1399r_1040, kms_s_1434_br_1040, diglyceride_intracellular, fatty_acid_intracellular, triglyceride_intracellular, s_1434_b);
    Keq_r_1040 = 1.1; Vmax_r_1040 = 0.0043505; kmp_s_0596r_1040 = 0.549; kmp_s_0663r_1040 = 0.549; kms_s_1399r_1040 = 0.549; kms_s_1434_br_1040 = 0.549;
  // GENE_ASSOCIATION:YDR050C
  triose_phosphate_isomerase: s_0735 -> s_0731; intracellular*function_267(Keq_r_1041, Vmax_r_1041, intracellular, kmp_s_0731r_1041, kms_s_0735r_1041, s_0731, s_0735); triose_phosphate_isomerase is "triose-phosphate isomerase";
    Keq_r_1041 = 0.0797509; Vmax_r_1041 = 20.559; kmp_s_0731r_1041 = 0.0436363; kms_s_0735r_1041 = 0.601873;
  // GENE_ASSOCIATION:YGL026C
  r_1042: s_0088 + L_serine_intracellular -> s_0731 + L_tryptophan_intracellular + $s_1434_b; intracellular*function_268(Keq_r_1042, Vmax_r_1042, intracellular, kmp_s_0731r_1042, kmp_s_0952r_1042, kmp_s_1434_br_1042, kms_s_0088r_1042, kms_s_0943r_1042, s_0088, s_0731, L_serine_intracellular, L_tryptophan_intracellular, s_1434_b); r_1042 is "tryptophan synthase (indoleglycerol phosphate)";
    Keq_r_1042 = 0.0874316; Vmax_r_1042 = 0.187549; kmp_s_0731r_1042 = 0.0436363; kmp_s_0952r_1042 = 1; kmp_s_1434_br_1042 = 0.549; kms_s_0088r_1042 = 0.549; kms_s_0943r_1042 = 0.549;
  // GENE_ASSOCIATION:(YGL202W or YHR137W) or YKL106W or YLR027C
  tyrosine_transaminase: s_0209 + L_glutamate_intracellular -> _2_oxoglutarate_intracellular + L_tyrosine_intracellular; intracellular*function_269(Keq_r_1050, Vmax_r_1050, intracellular, kmp_s_0185r_1050, kmp_s_0955r_1050, kms_s_0209r_1050, kms_s_0899r_1050, _2_oxoglutarate_intracellular, s_0209, L_glutamate_intracellular, L_tyrosine_intracellular);
    Keq_r_1050 = 1.1; Vmax_r_1050 = 0.41272; kmp_s_0185r_1050 = 0.549; kmp_s_0955r_1050 = 0.549; kms_s_0209r_1050 = 0.549; kms_s_0899r_1050 = 0.549;
  // GENE_ASSOCIATION:YKL024C
  UMP_kinase: ATP_intracellular + UMP_intracellular -> ADP_intracellular + UDP_intracellular; intracellular*Function_for_UMP_kinase(Keq_r_1059, Vmax_r_1059, intracellular, kmp_s_0400r_1059, kmp_s_1411r_1059, kms_s_0446r_1059, kms_s_1417r_1059, ADP_intracellular, ATP_intracellular, UDP_intracellular, UMP_intracellular);
    Keq_r_1059 = 1.73154; Vmax_r_1059 = 0.23947; kmp_s_0400r_1059 = 1.71907; kmp_s_1411r_1059 = 0.549; kms_s_0446r_1059 = 1.09208; kms_s_1417r_1059 = 0.549;
  // GENE_ASSOCIATION:YKL024C
  uridylate_kinase_dUMP: ADP_intracellular + dUDP_intracellular -> ATP_intracellular + dUMP_intracellular; intracellular*function_271(Keq_r_1066, Vmax_r_1066, intracellular, kmp_s_0446r_1066, kmp_s_0624r_1066, kms_s_0400r_1066, kms_s_0622r_1066, ADP_intracellular, ATP_intracellular, dUDP_intracellular, dUMP_intracellular); uridylate_kinase_dUMP is "uridylate kinase (dUMP)";
    Keq_r_1066 = 0.698801; Vmax_r_1066 = 0.025718; kmp_s_0446r_1066 = 1.09208; kmp_s_0624r_1066 = 0.549; kms_s_0400r_1066 = 1.71907; kms_s_0622r_1066 = 0.549;
  // GENE_ASSOCIATION:YKL035W
  r_1072: s_0549 + $s_0763_b + UTP_intracellular -> diphosphate_intracellular + UDP_D_glucose_intracellular; intracellular*function_272(Keq_r_1072, Vmax_r_1072, intracellular, kmp_s_0605r_1072, kmp_s_1415r_1072, kms_s_0549r_1072, kms_s_0763_br_1072, kms_s_1430r_1072, s_0549, diphosphate_intracellular, s_0763_b, UDP_D_glucose_intracellular, UTP_intracellular); r_1072 is "UTP-glucose-1-phosphate uridylyltransferase";
    Keq_r_1072 = 2.00364; Vmax_r_1072 = 11.2651; kmp_s_0605r_1072 = 0.549; kmp_s_1415r_1072 = 0.549; kms_s_0549r_1072 = 0.549; kms_s_0763_br_1072 = 0.549; kms_s_1430r_1072 = 0.549;
  // GENE_ASSOCIATION:YJR148W or YHR208W
  valine_transaminase: s_0238 + L_glutamate_intracellular -> _2_oxoglutarate_intracellular + L_valine_intracellular; intracellular*Function_for_valine_transaminase(Keq_r_1073, Vmax_r_1073, intracellular, kmp_s_0185r_1073, kmp_s_0960r_1073, kms_s_0238r_1073, kms_s_0899r_1073, _2_oxoglutarate_intracellular, s_0238, L_glutamate_intracellular, L_valine_intracellular);
    Keq_r_1073 = 2.00364; Vmax_r_1073 = 1.1011; kmp_s_0185r_1073 = 0.549; kmp_s_0960r_1073 = 1; kms_s_0238r_1073 = 0.549; kms_s_0899r_1073 = 0.549;
  // GENE_ASSOCIATION:(YDR384C or YGR121C or YNL142W or YPR138C)
  ammonia_transport: $s_0431_b -> ammonium_intracellular; Function_for_ammonia_transport(Keq_r_1157, Vmax_r_1157, kmp_s_0430r_1157, kms_s_0431_br_1157, ammonium_intracellular, s_0431_b);
    Keq_r_1157 = 1; Vmax_r_1157 = 0.964941; kmp_s_0430r_1157 = 0.549; kms_s_0431_br_1157 = 38;
  CO2_transport: carbon_dioxide_intracellular -> $s_0472_b; Function_for_CO2_transport(Keq_r_1194, Vmax_r_1194, kmp_s_0472_br_1194, kms_s_0470r_1194, carbon_dioxide_intracellular, s_0472_b);  // isDescribedBy ECO:0000034
    Keq_r_1194 = 1; Vmax_r_1194 = 2.37902; kmp_s_0472_br_1194 = 1e-5; kms_s_0470r_1194 = 1;
  ethanol_transport: ethanol_intracellular -> $s_0651_b; Function_for_ethanol_transport(Keq_r_1247, Vmax_r_1247, kmp_s_0651_br_1247, kms_s_0650r_1247, ethanol_intracellular, s_0651_b);  // isDescribedBy ECO:0000034
    Keq_r_1247 = 1; Vmax_r_1247 = 4.81765; kmp_s_0651_br_1247 = 24.5; kms_s_0650r_1247 = 50;
  // GENE_ASSOCIATION:(YDL245C or YDR342C or YDR343C or YDR345C or YDR536W or YEL069C or YFL011W or YHR092C or YHR094C or YHR096C or YJL214W or YJL219W or YJR158W or YLR081W or YMR011W or YNR072W or YOL156W)
  glucose_transport: $s_0547_b -> D_glucose_intracellular; Function_for_glucose_transport(Keq_r_1293, Vmax_r_1293, kmp_s_0545r_1293, kms_s_0547_br_1293, D_glucose_intracellular, s_0547_b);
    Keq_r_1293 = 1; Vmax_r_1293 = 2.36101; kmp_s_0545r_1293 = 0.0987587; kms_s_0547_br_1293 = 11.1;
  O2_transport: $s_1162_b -> oxygen_intracellular; Function_for_O2_transport(Keq_r_1435, Vmax_r_1435, kmp_s_1160r_1435, kms_s_1162_br_1435, oxygen_intracellular, s_1162_b);  // isDescribedBy ECO:0000034
    Keq_r_1435 = 1; Vmax_r_1435 = 0.0232306; kmp_s_1160r_1435 = 0.549; kms_s_1162_br_1435 = 24.5;
  // GENE_ASSOCIATION:(YBR296C or YCR037C or YJL198W or YML123C or YNR013C)
  phosphate_transport: $s_0766_b + $s_1209_b -> $s_0763_b + $phosphate_intracellular; Function_for_phosphate_transport(Keq_r_1461, Vmax_r_1461, kmp_s_0763_br_1461, kmp_s_1207r_1461, kms_s_0766_br_1461, kms_s_1209_br_1461, s_0763_b, s_0766_b, phosphate_intracellular, s_1209_b);
    Keq_r_1461 = 1; Vmax_r_1461 = 0.0925906; kmp_s_0763_br_1461 = 0.549; kmp_s_1207r_1461 = 0.549; kms_s_0766_br_1461 = 0.1; kms_s_1209_br_1461 = 24.5;
  succinate_transport: $s_0763_b + succinate_2_intracellular -> $s_0766_b + $s_1339_b; Function_for_succinate_transport(Keq_r_1503, Vmax_r_1503, kmp_s_0766_br_1503, kmp_s_1339_br_1503, kms_s_0763_br_1503, kms_s_1338r_1503, s_0763_b, s_0766_b, succinate_2_intracellular, s_1339_b);  // isDescribedBy ECO:0000034
    Keq_r_1503 = 1; Vmax_r_1503 = 0.840147; kmp_s_0766_br_1503 = 0.1; kmp_s_1339_br_1503 = 1; kms_s_0763_br_1503 = 0.549; kms_s_1338r_1503 = 0.549;
  // GENE_ASSOCIATION:(YBR294W or YLR092W)
  sulfate_uniport: $s_1348_b -> sulphate_intracellular; Function_for_sulfate_uniport(Keq_r_1507, Vmax_r_1507, kmp_s_1347r_1507, kms_s_1348_br_1507, sulphate_intracellular, s_1348_b);
    Keq_r_1507 = 1; Vmax_r_1507 = 0.0190579; kmp_s_1347r_1507 = 0.549; kms_s_1348_br_1507 = 42.2;
  isa_acyl_CoA: succinyl_CoA_intracellular => acyl_CoA_intracellular; intracellular*Function_for_isa_acyl_CoA(Keq_r_1672, Vmax_r_1672, intracellular, kmp_s_0386r_1672, kms_s_1342r_1672, acyl_CoA_intracellular, succinyl_CoA_intracellular); isa_acyl_CoA is "isa acyl-CoA";
    Keq_r_1672 = 1.1; Vmax_r_1672 = 0.026268; kmp_s_0386r_1672 = 0.549; kms_s_1342r_1672 = 0.549;
  biomass_production: 1.1358 _1_3_beta_D_glucan_intracellular + 0.023371 s_0416 + 0.051 AMP_intracellular + 59.276 ATP_intracellular + 0.05 CMP_intracellular + 0.003587 dAMP_intracellular + 0.002432 dCMP_intracellular + 0.002432 dGMP_intracellular + 0.003587 dTMP_intracellular + 0.32518 glycine_intracellular + 0.51852 glycogen_intracellular + 0.051 GMP_intracellular + 0.35734 L_alanine_intracellular + 0.13579 L_arginine_intracellular + 0.17152 L_asparagine_intracellular + 0.17152 L_aspartate_intracellular + 0.04288 L_cysteine_intracellular + 0.268 L_glutamate_intracellular + 0.268 L_glutamine_intracellular + 0.075041 L_histidine_intracellular + 0.17152 L_isoleucine_intracellular + 0.25014 L_leucine_intracellular + 0.23942 L_lysine_intracellular + 0.050027 L_methionine_intracellular + 0.11435 L_phenylalanine_intracellular + 0.12864 L_proline_intracellular + 0.25371 L_serine_intracellular + 0.19653 L_threonine_intracellular + 0.028 L_tryptophan_intracellular + 0.096481 L_tyrosine_intracellular + 0.25728 L_valine_intracellular + $lipid_intracellular + 0.82099 mannan_intracellular + 0.02 sulphate_intracellular + 0.067 UMP_intracellular + 0.0009 riboflavin_intracellular => 59.276 ADP_intracellular + biomass_intracellular + 59.305 $phosphate_intracellular; intracellular*Function_for_biomass_production(biomass_production_V_o, a_s_0001r_1812, a_s_0416r_1812, a_s_0434r_1812, a_s_0446r_1812, a_s_0511r_1812, a_s_0564r_1812, a_s_0569r_1812, a_s_0593r_1812, a_s_0619r_1812, a_s_0740r_1812, a_s_0743r_1812, a_s_0752r_1812, a_s_0863r_1812, a_s_0873r_1812, a_s_0877r_1812, a_s_0881r_1812, a_s_0889r_1812, a_s_0899r_1812, a_s_0907r_1812, a_s_0911r_1812, a_s_0920r_1812, a_s_0925r_1812, a_s_0929r_1812, a_s_0933r_1812, a_s_0936r_1812, a_s_0939r_1812, a_s_0943r_1812, a_s_0949r_1812, a_s_0952r_1812, a_s_0955r_1812, a_s_0960r_1812, a_s_1000r_1812, a_s_1011r_1812, a_s_1283r_1812, a_s_1347r_1812, a_s_1417r_1812, intracellular, _1_3_beta_D_glucan_intracellular, s_0001_or_1812, s_0416, s_0416_or_1812, AMP_intracellular, s_0434_or_1812, ATP_intracellular, s_0446_or_1812, CMP_intracellular, s_0511_or_1812, dAMP_intracellular, s_0564_or_1812, dCMP_intracellular, s_0569_or_1812, dGMP_intracellular, s_0593_or_1812, dTMP_intracellular, s_0619_or_1812, glycine_intracellular, s_0740_or_1812, glycogen_intracellular, s_0743_or_1812, GMP_intracellular, s_0752_or_1812, L_alanine_intracellular, s_0863_or_1812, L_arginine_intracellular, s_0873_or_1812, L_asparagine_intracellular, s_0877_or_1812, L_aspartate_intracellular, s_0881_or_1812, L_cysteine_intracellular, s_0889_or_1812, L_glutamate_intracellular, s_0899_or_1812, L_glutamine_intracellular, s_0907_or_1812, L_histidine_intracellular, s_0911_or_1812, L_isoleucine_intracellular, s_0920_or_1812, L_leucine_intracellular, s_0925_or_1812, L_lysine_intracellular, s_0929_or_1812, L_methionine_intracellular, s_0933_or_1812, L_phenylalanine_intracellular, s_0936_or_1812, L_proline_intracellular, s_0939_or_1812, L_serine_intracellular, s_0943_or_1812, L_threonine_intracellular, s_0949_or_1812, L_tryptophan_intracellular, s_0952_or_1812, L_tyrosine_intracellular, s_0955_or_1812, L_valine_intracellular, s_0960_or_1812, lipid_intracellular, s_1000_or_1812, mannan_intracellular, s_1011_or_1812, riboflavin_intracellular, s_1283_or_1812, sulphate_intracellular, s_1347_or_1812, UMP_intracellular, s_1417_or_1812, biomass_production_zero_flux);  // modifiers: s_0547_b
    biomass_production_V_o = 0.0555; a_s_0001r_1812 = 1.1358; a_s_0416r_1812 = 0.023371; a_s_0434r_1812 = 0.051; a_s_0446r_1812 = 59.276; a_s_0511r_1812 = 0.05; a_s_0564r_1812 = 0.003587; a_s_0569r_1812 = 0.002432; a_s_0593r_1812 = 0.002432; a_s_0619r_1812 = 0.003587; a_s_0740r_1812 = 0.32518; a_s_0743r_1812 = 0.51852; a_s_0752r_1812 = 0.051; a_s_0863r_1812 = 0.35734; a_s_0873r_1812 = 0.13579; a_s_0877r_1812 = 0.17152; a_s_0881r_1812 = 0.17152; a_s_0889r_1812 = 0.04288; a_s_0899r_1812 = 0.268; a_s_0907r_1812 = 0.268; a_s_0911r_1812 = 0.075041; a_s_0920r_1812 = 0.17152; a_s_0925r_1812 = 0.25014; a_s_0929r_1812 = 0.23942; a_s_0933r_1812 = 0.050027; a_s_0936r_1812 = 0.11435; a_s_0939r_1812 = 0.12864; a_s_0943r_1812 = 0.25371; a_s_0949r_1812 = 0.19653; a_s_0952r_1812 = 0.028; a_s_0955r_1812 = 0.096481; a_s_0960r_1812 = 0.25728; a_s_1000r_1812 = 1; a_s_1011r_1812 = 0.82099; a_s_1283r_1812 = 0.0009; a_s_1347r_1812 = 0.02; a_s_1417r_1812 = 0.067; s_0001_or_1812 = 0.549; s_0416_or_1812 = 0.549; s_0434_or_1812 = 1.25956; s_0446_or_1812 = 1.09208; s_0511_or_1812 = 0.549; s_0564_or_1812 = 0.549; s_0569_or_1812 = 0.549; s_0593_or_1812 = 0.549; s_0619_or_1812 = 0.549; s_0740_or_1812 = 0.549; s_0743_or_1812 = 0.549; s_0752_or_1812 = 0.549; s_0863_or_1812 = 0.549; s_0873_or_1812 = 0.549; s_0877_or_1812 = 0.549; s_0881_or_1812 = 0.549; s_0889_or_1812 = 0.549; s_0899_or_1812 = 0.549; s_0907_or_1812 = 0.549; s_0911_or_1812 = 0.549; s_0920_or_1812 = 0.549; s_0925_or_1812 = 0.549; s_0929_or_1812 = 0.549; s_0933_or_1812 = 0.549; s_0936_or_1812 = 0.549; s_0939_or_1812 = 0.549; s_0943_or_1812 = 0.549; s_0949_or_1812 = 1; s_0952_or_1812 = 1; s_0955_or_1812 = 0.549; s_0960_or_1812 = 1; s_1000_or_1812 = 0.549; s_1011_or_1812 = 0.549; s_1283_or_1812 = 0.549; s_1347_or_1812 = 0.549; s_1417_or_1812 = 0.549; biomass_production_zero_flux = 0;
  growth: biomass_intracellular => $s_0464_b; Function_for_growth_1(growth_V_o, a_s_0463r_1814, biomass_intracellular, s_0463_or_1814, growth_zero_flux);  // modifiers: s_0547_b; isDescribedBy ECO:0000035
    growth_V_o = 0.0555; a_s_0463r_1814 = 1; s_0463_or_1814 = 0.549; growth_zero_flux = 0;
  lipid_production: 0.001531 s_0090 + 5.6e-5 s_0124 + 9.6e-5 episterol_intracellular + 0.000125 s_0632 + 0.005603 ergosterol_intracellular + 0.000812 ergosterol_ester_intracellular + 0.000206 fatty_acid_intracellular + 0.000114 fecosterol_intracellular + 0.000417 s_0824 + 3.2e-5 lanosterol_intracellular + 0.000373 s_1219 + 0.002884 s_1228 + 0.000697 s_1233 + 0.000781 $triglyceride_intracellular + 1.5e-5 zymosterol_intracellular => $lipid_intracellular; intracellular*Function_for_lipid_production_1(lipid_production_V_o, a_s_0090r_1816, a_s_0124r_1816, a_s_0627r_1816, a_s_0632r_1816, a_s_0635r_1816, a_s_0641r_1816, a_s_0663r_1816, a_s_0669r_1816, a_s_0824r_1816, a_s_0963r_1816, a_s_1219r_1816, a_s_1228r_1816, a_s_1233r_1816, a_s_1399r_1816, a_s_1447r_1816, intracellular, s_0090, s_0090_or_1816, s_0124, s_0124_or_1816, episterol_intracellular, s_0627_or_1816, s_0632, s_0632_or_1816, ergosterol_intracellular, s_0635_or_1816, ergosterol_ester_intracellular, s_0641_or_1816, fatty_acid_intracellular, s_0663_or_1816, fecosterol_intracellular, s_0669_or_1816, s_0824, s_0824_or_1816, lanosterol_intracellular, s_0963_or_1816, s_1219, s_1219_or_1816, s_1228, s_1228_or_1816, s_1233, s_1233_or_1816, triglyceride_intracellular, s_1399_or_1816, zymosterol_intracellular, s_1447_or_1816, lipid_production_zero_flux);  // modifiers: s_0547_b; isDescribedBy ECO:0000035
    lipid_production_V_o = 0.0555; a_s_0090r_1816 = 0.001531; a_s_0124r_1816 = 5.6e-5; a_s_0627r_1816 = 9.6e-5; a_s_0632r_1816 = 0.000125; a_s_0635r_1816 = 0.005603; a_s_0641r_1816 = 0.000812; a_s_0663r_1816 = 0.000206; a_s_0669r_1816 = 0.000114; a_s_0824r_1816 = 0.000417; a_s_0963r_1816 = 3.2e-5; a_s_1219r_1816 = 0.000373; a_s_1228r_1816 = 0.002884; a_s_1233r_1816 = 0.000697; a_s_1399r_1816 = 0.000781; a_s_1447r_1816 = 1.5e-5; s_0090_or_1816 = 0.549; s_0124_or_1816 = 0.549; s_0627_or_1816 = 0.549; s_0632_or_1816 = 0.549; s_0635_or_1816 = 0.549; s_0641_or_1816 = 0.549; s_0663_or_1816 = 0.549; s_0669_or_1816 = 0.549; s_0824_or_1816 = 0.549; s_0963_or_1816 = 0.549; s_1219_or_1816 = 0.549; s_1228_or_1816 = 0.549; s_1233_or_1816 = 0.549; s_1399_or_1816 = 0.549; s_1447_or_1816 = 0.549; lipid_production_zero_flux = 0;

  // Events:
  event_1: at (time > 1000): s_0547_b = 7.77;
end
