// SBML level 2 version 4

function Constant_flux__irreversible(v)
  v;
end
Constant_flux__irreversible is "Constant flux (irreversible)";

function Loss_of_intracellular_choline_0(k1, a, b)
  k1*a*b;
end

function Effect_of_extracellular_ACh_0(k3, a)
  k3*a;
end

function Decrease_in_the_extracellular_concentration_of_beta_amyloid_0(k4, b)
  k4*b;
end
Decrease_in_the_extracellular_concentration_of_beta_amyloid_0 is "Decrease in the extracellular concentration of beta-amyloid";

model MODEL1410200000()
  // Ehrenstein1997 - The choline-leakage hypothesis in Alzheimer's disease
  // This model is described in the article:
  // The choline-leakage hypothesis for the loss of acetylcholine in Alzheimer's disease.
  // Ehrenstein G, Galdzicki Z, Lange GD.
  // Biophys. J. 1997 Sep; 73(3): 1276-1280
  // Abstract:
  // We present a hypothesis for the loss of acetylcholine in Alzheimer's disease that is based on two recent experimental results: that beta-amyloid causes leakage of choline across cell membranes and that decreased production of acetylcholine increases the production of beta-amyloid. According to the hypothesis, an increase in beta-amyloid concentration caused by proteolysis of the amyloid precursor protein results in an increase in the leakage of choline out of cells. This leads to a reduction in intracellular choline concentration and hence a reduction in acetylcholine production. The reduction in acetylcholine production, in turn, causes an increase in the concentration of beta-amyloid. The resultant positive feedback between decreased acetylcholine and increased beta-amyloid accelerates the loss of acetylcholine. We compare the predictions of the choline-leakage hypothesis with a number of experimental observations. We also approximate it with a pair of ordinary differential equations. The solutions of these equations indicate that the loss of acetylcholine is very sensitive to the initial rate of beta-amyloid production.
  // This model is hosted on BioModels Database and identified by: BIOMD0000000553.
  // To cite BioModels Database, please use: BioModels Database: An enhanced, curated and annotated resource for published quantitative kinetic models.
  // To the extent possible under law, all copyright and related or neighbouring rights to this encoded model have been dedicated to the public domain worldwide. Please refer to CC0 Public Domain Dedication for more information.
  // biomodels.db:MODEL1410200000
  // biomodels.db:BIOMD0000000553
  // isDescribedBy pubmed:9284295
  // hasTaxon taxonomy:9606
  // isVersionOf GO:0008292
  // hasVersion DOID:10652

  // Compartments:
  compartment Brain = 1;  // BTO:0000142

  // Species:
  // Extracellular concentration of Acetylcholine (ACh)
  species a in Brain = 50;  // CHEBI:15355
  // Extracellular concentration of β-amyloid
  species b in Brain = 0;  // uniprot:P05067
  // Relative concentration of Acetylcholine
  species $aRel in Brain;  // CHEBI:15355

  // Parameters:
  // Production rate of ACh
  k1 = 0.007;
  // Formation of β-amyloid from APP
  k2 = 0.33;
  // Effect of extracellular ACh
  k3 = 0.0042;
  // Intracellular concentration of β-amyloid rate
  k4 = 0.01;

  // Assignment rules:
  aRel := a/50;

  // Reactions:
  Loss_of_intracellular_choline: a => ; Brain*Loss_of_intracellular_choline_0(k1, a, b);  // modifiers: b
  Abeta_formation_from_APP: => b; Brain*Constant_flux__irreversible(k2);
  Effect_of_extracellular_ACh: b => ; Brain*Effect_of_extracellular_ACh_0(k3, a);  // modifiers: a
  Decrease_in_the_extracellular_concentration_of_beta_amyloid: b => ; Brain*Decrease_in_the_extracellular_concentration_of_beta_amyloid_0(k4, b); Decrease_in_the_extracellular_concentration_of_beta_amyloid is "Decrease in the extracellular concentration of beta-amyloid";

  // Unit definitions:
  unit volume = 1e-3 litre;
  unit time = 86400 second;
  unit substance = 1e-3 mole;
end
