// SBML level 2 version 4

function Function_for_v17f()
  0;
end

function function_4_v22(Fps1r, Hog1PP, Turgor, kv22_1, kv22_2, kv22_3)
  kv22_1*(-Turgor)/(kv22_3 + (-Turgor))*1.5*(1 - Hog1PP/(Hog1PP + kv22_2)) - kv22_1*Fps1r;
end

function Function_for_v6()
  0;
end

function function_4_v14_1(G6P, OsmoE, cellvol, kv14_1, kv14_2, kv14_3, kv14_4, kv14_5)
  kv14_1*cellvol^kv14_3/(cellvol^kv14_3 + kv14_2)*(1 - OsmoE/(OsmoE + kv14_4))*G6P/kv14_5/(1 + G6P/kv14_5);
end

function function_4_v10Batch_1(cellnum, initcellnum, v10speed)
  v10speed*cellnum/initcellnum - v10speed;
end

function function_4_vVG6P_1(G6P, cellvol, volchangespeed)
  G6P*volchangespeed/cellvol;
end

function function_4_vVgluci_1(cellvol, glucose_i, volchangespeed)
  glucose_i*volchangespeed/cellvol;
end

function function_4_vVStl1_1(Stl1, cellvol, volchangespeed)
  Stl1*volchangespeed/cellvol;
end

function function_4_v4_1(F26DP, G6P, kv4_1, kv4_2, kv4_3, kv4_4, kv4_5)
  (kv4_2*(1 - F26DP^kv4_5/(F26DP + kv4_3)^kv4_5) + kv4_1*F26DP^kv4_5/(F26DP + kv4_3)^kv4_5)*(G6P/kv4_4)^2/(1 + (G6P/kv4_4)^2);
end

function function_4_vVpyruvate_1(cellvol, pyruvate, volchangespeed)
  pyruvate*volchangespeed/cellvol;
end

function function_4_vVPfk2627a_1(Pfk2627a, cellvol, volchangespeed)
  Pfk2627a*volchangespeed/cellvol;
end

function function_4_vVstl1mRNA_1(cellvol, stl1mRNA, volchangespeed)
  stl1mRNA*volchangespeed/cellvol;
end

function function_4_v1Batch_1(cellnum, initcellnum, v1speed)
  v1speed*cellnum/initcellnum - v1speed;
end

function function_4_vVcin_1(cellvol, cin, volchangespeed)
  cin*volchangespeed/cellvol;
end

function function_4_vVos_1(CellSurface, OsmoE, Turgor, cin, glycerol_e, glycerol_i, vV_1, vV_2, vV_R, vV_T)
  vV_1*CellSurface*(Turgor - vV_2*vV_R*vV_T*(glycerol_e + OsmoE - (glycerol_i + cin)));
end

function function_4_vVethanol_i_1(cellvol, ethanol_i, volchangespeed)
  ethanol_i*volchangespeed/cellvol;
end

function function_4_vVF16DP_1(F16DP, cellvol, volchangespeed)
  F16DP*volchangespeed/cellvol;
end

function function_4_vVtrioseP_1(cellvol, trioseP, volchangespeed)
  trioseP*volchangespeed/cellvol;
end

function function_4_vVPfk2627i_1(Pfk2627i, cellvol, volchangespeed)
  Pfk2627i*volchangespeed/cellvol;
end

function function_4_v13a_1(CellSurface, Fps1r, glycerol_e, glycerol_i, kDiff, kv13a_1)
  kv13a_1*CellSurface*Fps1r*(glycerol_i - kDiff*glycerol_e);
end

function function_4_v13b_1(Stl1, glycerol_e, kv13b_1, kv13b_2)
  glycerol_e*kv13b_1*Stl1/(kv13b_2 + glycerol_e);
end

function function_4_v18f_1(gpd1mRNA, kv18f_1)
  kv18f_1*gpd1mRNA;
end

function function_4_v11_1(CellSurface, acetate_e, acetate_i, kv11_1, kv11_2)
  kv11_1*CellSurface*(acetate_i - kv11_2*acetate_e);
end

function function_4_v20f_1(Hog1PP, kv20f_1, kv20f_2, kv20f_3, kv20f_x)
  kv20f_1*Hog1PP^kv20f_x/(Hog1PP^kv20f_x + kv20f_2) + kv20f_3;
end

function function_4_v16f_1(Hog1, OsmoE, Vm, kv16f_1, kv16f_2, kv16f_3)
  Hog1*kv16f_1*OsmoE*(kv16f_2/Vm)^kv16f_3;
end

function function_4_v21f_1(kv21f_1, stl1mRNA)
  kv21f_1*stl1mRNA;
end

function function_4_v23f_1(AOGi, Vm, kv23f_1, kv23f_2, kv23f_3)
  AOGi*kv23f_1*(kv23f_2/Vm)^kv23f_3;
end

function function_4_v3_1(G6P, kv3_1, kv3_2, kv3_3, kv3_4, trehalose)
  (kv3_1*G6P/kv3_2 - kv3_3*trehalose/kv3_4)/(1 + G6P/kv3_2 + trehalose/kv3_4);
end

function function_4_v13aBatch_1(cellnum, initcellnum, v13aspeed)
  v13aspeed*cellnum/initcellnum - v13aspeed;
end

function function_4_v13bBatch_1(cellnum, initcellnum, v13bspeed)
  v13bspeed*cellnum/initcellnum - v13bspeed;
end

function function_4_v12_1(CellSurface, ethanol_e, ethanol_i, kv12_1, kv12_2)
  kv12_1*CellSurface*(ethanol_i - kv12_2*ethanol_e);
end

function function_4_v5_1(F16DP, kv5_1, kv5_2, kv5_3, kv5_4, trioseP)
  kv5_1*F16DP/kv5_2/(1 + F16DP/kv5_2) - kv5_3*trioseP/kv5_4/(1 + trioseP/kv5_4);
end

function function_4_vVGpd1_1(Gpd1, cellvol, volchangespeed)
  Gpd1*volchangespeed/cellvol;
end

function function_4_vVtrehalose_1(cellvol, trehalose, volchangespeed)
  trehalose*volchangespeed/cellvol;
end

function function_4_vVgpd1mRNA_1(cellvol, gpd1mRNA, volchangespeed)
  gpd1mRNA*volchangespeed/cellvol;
end

function function_4_v10_1(CellSurface, kv10_1, kv10_2, trehalose, trehalose_e)
  kv10_1*CellSurface*(trehalose - kv10_2*trehalose_e);
end

function function_4_v12Batch_1(cellnum, initcellnum, v12speed)
  v12speed*cellnum/initcellnum - v12speed;
end

function function_4_v11Batch_1(cellnum, initcellnum, v11speed)
  v11speed*cellnum/initcellnum - v11speed;
end

function function_4_vVHog1_1(Hog1, cellvol, volchangespeed)
  Hog1*volchangespeed/cellvol;
end

function function_4_vVacetate_i_1(acetate_i, cellvol, volchangespeed)
  acetate_i*volchangespeed/cellvol;
end

function Henri_Michaelis_Menten__irreversible__1(glucose_e, kv1_1, kv1_2)
  kv1_1*glucose_e/(kv1_2 + glucose_e);
end
Henri_Michaelis_Menten__irreversible__1 is "Henri-Michaelis-Menten (irreversible)_1";

function function_4_v6b_1_1(kv6b_4, kv6b_5, kv6b_x, trioseP)
  kv6b_x*kv6b_4*trioseP^2/kv6b_5/(1 + trioseP^2/kv6b_5);
end

function function_4_vVStl1_1_1(cellvol, glycerol_i, volchangespeed)
  glycerol_i*volchangespeed/cellvol;
end

function function_4_vVtrioseP_1_1(Hog1PP, cellvol, volchangespeed)
  Hog1PP*volchangespeed/cellvol;
end

function function_4_v19f_1(Hog1PP, Pfk2627i, kv19f_1)
  kv19f_1*Hog1PP*Pfk2627i;
end

function function_4_v15f_1(G6P, Pfk2627a, kv15f_1, kv15f_2)
  G6P*kv15f_1*Pfk2627a/(kv15f_2 + G6P);
end

function Henri_Michaelis_Menten__irreversible__2(F26DP, kv15r_1, kv15r_2)
  kv15r_1*F26DP/(kv15r_2 + F26DP);
end
Henri_Michaelis_Menten__irreversible__2 is "Henri-Michaelis-Menten (irreversible)_2";

function Henri_Michaelis_Menten__irreversible__3(glucose_i, kv2_1, kv2_2)
  kv2_1*glucose_i/(kv2_2 + glucose_i);
end
Henri_Michaelis_Menten__irreversible__3 is "Henri-Michaelis-Menten (irreversible)_3";

function Henri_Michaelis_Menten__irreversible__4(kv7_1, kv7_2, trioseP)
  kv7_1*trioseP/(kv7_2 + trioseP);
end
Henri_Michaelis_Menten__irreversible__4 is "Henri-Michaelis-Menten (irreversible)_4";

function Henri_Michaelis_Menten__irreversible__5(kv8_1, kv8_2, pyruvate)
  kv8_1*pyruvate/(kv8_2 + pyruvate);
end
Henri_Michaelis_Menten__irreversible__5 is "Henri-Michaelis-Menten (irreversible)_5";

function Henri_Michaelis_Menten__irreversible__6(kv9_1, kv9_2, pyruvate)
  kv9_1*pyruvate/(kv9_2 + pyruvate);
end
Henri_Michaelis_Menten__irreversible__6 is "Henri-Michaelis-Menten (irreversible)_6";

model PetelenzKuehn_osmoadaptation_gpd1D()
  // Petelenz-Kurdziel2013 - Osmo adaptation gpd1D
  // Petelenz-kurdzeil2013 - Osmo adaptation gpd1D
  // This model is described in the article:
  // Quantitative analysis of glycerol accumulation, glycolysis and growth under hyper osmotic stress.
  // Petelenz-Kurdziel E, Kuehn C, Nordlander B, Klein D, Hong KK, Jacobson T, Dahl P, Schaber J, Nielsen J, Hohmann S, Klipp E.
  // PLoS Comput. Biol. 2013; 9(6): e1003084
  // Abstract:
  // We provide an integrated dynamic view on a eukaryotic osmolyte system, linking signaling with regulation of gene expression, metabolic control and growth. Adaptation to osmotic changes enables cells to adjust cellular activity and turgor pressure to an altered environment. The yeast Saccharomyces cerevisiae adapts to hyperosmotic stress by activating the HOG signaling cascade, which controls glycerol accumulation. The Hog1 kinase stimulates transcription of genes encoding enzymes required for glycerol production (Gpd1, Gpp2) and glycerol import (Stl1) and activates a regulatory enzyme in glycolysis (Pfk26/27). In addition, glycerol outflow is prevented by closure of the Fps1 glycerol facilitator. In order to better understand the contributions to glycerol accumulation of these different mechanisms and how redox and energy metabolism as well as biomass production are maintained under such conditions we collected an extensive dataset. Over a period of 180 min after hyperosmotic shock we monitored in wild type and different mutant cells the concentrations of key metabolites and proteins relevant for osmoadaptation. The dataset was used to parameterize an ODE model that reproduces the generated data very well. A detailed computational analysis using time-dependent response coefficients showed that Pfk26/27 contributes to rerouting glycolytic flux towards lower glycolysis. The transient growth arrest following hyperosmotic shock further adds to redirecting almost all glycolytic flux from biomass towards glycerol production. Osmoadaptation is robust to loss of individual adaptation pathways because of the existence and upregulation of alternative routes of glycerol accumulation. For instance, the Stl1 glycerol importer contributes to glycerol accumulation in a mutant with diminished glycerol production capacity. In addition, our observations suggest a role for trehalose accumulation in osmoadaptation and that Hog1 probably directly contributes to the regulation of the Fps1 glycerol facilitator. Taken together, we elucidated how different metabolic adaptation mechanisms cooperate and provide hypotheses for further experimental studies.
  // This model is hosted on BioModels Database and identified by: BIOMD0000000610.
  // To cite BioModels Database, please use: BioModels Database: An enhanced, curated and annotated resource for published quantitative kinetic models.
  // To the extent possible under law, all copyright and related or neighbouring rights to this encoded model have been dedicated to the public domain worldwide. Please refer to CC0 Public Domain Dedication for more information.
  // biomodels.db:MODEL1204190004
  // biomodels.db:BIOMD0000000610
  // isDescribedBy pubmed:23762021
  // isDerivedFrom pubmed:10951190 pubmed:16025103 pubmed:18793130 pubmed:20563574
  // hasTaxon taxonomy:4932
  // isVersionOf GO:0071470

  // Compartments:
  compartment intra = 0.00025;  // GO:0005737; isPartOf GO:0044424
  compartment extra = 0.5;  // GO:0005576

  // Species:
  species glycerol_i in intra = 0.112096;  // CHEBI:17754
  species cin in intra = 0.651922;  // CHEBI:25728
  species glucose_i in intra = 2.77983;  // CHEBI:17234; occursIn GO:0005622
  species G6P in intra = 1.37587;  // CHEBI:17665
  species trehalose in intra = 0.00309562;  // CHEBI:27082
  species F16DP in intra = 0.328796;  // CHEBI:16905
  species F26DP in intra = 0.000150228;  // pubchem.compound:105021
  species trioseP in intra = 0.635777;  // hasPart pubchem.compound:4643300; hasPart pubchem.compound:729
  species Gpd1 in intra = 0;  // uniprot:Q00055
  species pyruvate in intra = 0.0113917;  // CHEBI:15361
  species acetate_i in intra = 0.949708;  // CHEBI:30089
  species ethanol_i in intra = 9.65129;  // CHEBI:16236
  species Hog1 in intra = 0.420913;  // isVersionOf uniprot:P32485
  species Hog1PP in intra = 0.0178316;  // isVersionOf uniprot:P32485
  species Pfk2627a in intra = 0.108018;  // isVersionOf sgd:S000005496; isVersionOf sgd:S000001369
  species Pfk2627i in intra = 0.485158;  // isVersionOf sgd:S000005496; isVersionOf sgd:S000001369
  species AOG in intra = 0.000850262;  // encodes GO:0045893
  species gpd1mRNA in intra = 0;  // isEncodedBy sgd:S000002180
  species stl1mRNA in intra = 0.00418601;  // isEncodedBy sgd:S000002944
  species Stl1 in intra = 0.000125486;  // isVersionOf uniprot:P39932
  species AOGi in intra = 0.0168496;  // encodes GO:0045893
  species Fps1r in intra = 2.43688;  // isVersionOf uniprot:P23900
  species biomass in intra = 4.23631;
  species cellvol in intra = 0.00024;
  species glycerol_e in extra = 0.00144282;  // CHEBI:17754
  species glucose_e in extra = 0.106197;  // CHEBI:17234
  species acetate_e in extra = 0.0032412;  // CHEBI:30089
  species ethanol_e in extra = 0.0293241;  // CHEBI:16236
  species trehalose_e in extra = 0.000163972;  // CHEBI:27082

  // Parameters:
  cellvol_init = 0.00024;
  kv19f_1 = 0.299127;
  kv19r_1 = 0.0605655;
  kv17f_1 = 0.000411446;
  kv17f_3 = 0.421394;
  kv17f_6 = 7.85767e-9;
  parameter_97 = 0.8;
  vV_1 = 3.56294e-5;
  vV_2 = 0.00116532;
  vV_R = 8.314;
  vV_T = 298.5;
  t_stress = 3600;
  kv1_1 = 5.05249e-6;
  kv1_2 = 0.899814;
  initcellnum = 6954722;
  kv2_1 = 0.00303855;
  kv2_2 = 0.40864;
  kv3_1 = 6.17387e-6;
  kv3_2 = 0.81114;
  kv3_3 = 0.000737808;
  kv3_4 = 0.166996;
  kv4_1 = 0.0628885;
  kv4_2 = 0.00230714;
  kv4_3 = 0.00171631;
  kv4_4 = 2.67143;
  kv4_5 = 0.583865;
  kv5_1 = 0.00383315;
  kv5_2 = 1.74463;
  kv5_3 = 0.00656128;
  kv5_4 = 1.13994;
  kv6_1 = 0.0118992;
  kv6_2 = 0.230864;
  kv6_3 = 1.76504;
  kv6b_1 = 0.859104;
  kv6b_2 = 0.0307535;
  kv6b_3 = 1.20045;
  kv6b_4 = 4.61918e-5;
  kv6b_5 = 0.292627;
  kv7_1 = 0.00983997;
  kv7_2 = 0.317879;
  kv8_1 = 0.0135676;
  kv8_2 = 1.50827;
  kv9_1 = 0.214937;
  kv9_2 = 0.923665;
  kv16f_1 = 0.156118;
  kv16f_2 = 0.000452424;
  kv16f_3 = 14.9448;
  kv16r_1 = 0.588072;
  kv15f_1 = 4.99507e-5;
  kv15f_2 = 6.95877;
  kv15r_1 = 1.84829e-7;
  kv15r_2 = 3.3187e-5;
  kv17f_2 = 0.547886;
  kv17f_4 = 6.86959e-10;
  kv17f_5 = 18.9989;
  kv17r_1 = 0.00151498;
  kv18f_1 = 0.00646553;
  kv18r_1 = 0.000132549;
  kv20f_1 = 9.81887e-5;
  kv20f_2 = 0.0167845;
  kv20f_3 = 4.05843e-6;
  kv20f_x = 1.55858;
  kv20r_1 = 0.000705933;
  kv21f_1 = 0.00121673;
  kv21r_1 = 0.000214247;
  kv23f_1 = 8.80535e-6;
  kv23f_2 = 0.00051235;
  kv23f_3 = 6.95727;
  kv23r_1 = 0.000209875;
  kv22_1 = 8.0075;
  kv22_2 = 0.0215179;
  kv22_3 = 0.0554729;
  kv14_1 = 0.808051;
  kv14_2 = 6.05922e-6;
  kv14_3 = 2.05157;
  kv14_4 = 0.420621;
  kv14_5 = 1.23049;
  kv10_1 = 1.83291e-7;
  kv10_2 = 4.26512;
  kv11_1 = 3.2863e-6;
  kv11_2 = 1.17279;
  kv12_1 = 1.00927e-5;
  kv12_2 = 0.148586;
  kv13a_1 = 6.28899e-6;
  kv13b_1 = 1.27001e-7;
  kv13b_2 = 3.69196e-7;
  kx1 = 1.97771;
  kx2 = 5.37171;
  kv22_4_Hog1A = 1.25187;
  v = 1;
  kv22_Hog1D_t = 5536;
  kv22_Hog1D_fT = 0.0256901;
  kv22_Hog1D_d = 0.000294357;
  v15f_v = 1;
  v15r_v = 1;
  v19r_v = 1;
  quantity = 0;
  kv6b_x = 28.5;

  // Assignment rules:
  Vm := cellvol + 0.00024;
  CellSurface := (36*pi)^(1/3)*Vm^(2/3);
  v11speed := kv11_1*CellSurface*(acetate_i - kv11_2*acetate_e);
  v13aspeed := Fps1r*kv13a_1*CellSurface*(glycerol_i - glycerol_e);
  v12speed := kv12_1*CellSurface*(ethanol_i - kv12_2*ethanol_e);
  v10speed := kv10_1*CellSurface*(trehalose - kv10_2*trehalose_e);
  input := piecewise(0, time < t_stress, piecewise((time - t_stress)/5, time < t_stress + 5, 1));
  Turgor := piecewise(-2.9*(1 - (0.00025 - (Vm - 0.00025))/(0.00025 - 0.00025*0.9)), Vm > 0.00025*0.9 + 0.00025, 0);
  OsmoE := 0.355586 + parameter_97*input;
  volchangespeed := vV_1*CellSurface*(Turgor - vV_2*vV_R*vV_T*(glycerol_e + OsmoE - (glycerol_i + cin)));
  relVM := Vm/0.00048;
  OD := 2.94557e-9*time^2 + 6.49182e-5*time + 0.595608;
  cellnum := -6548240*OD^2 + 30565100*OD - 4727510;
  v1speed := kv1_1*glucose_e/(kv1_2 + glucose_e);
  v13bspeed := glycerol_e*kv13b_1*Stl1/(kv13b_2 + glycerol_e);
  kv16r_1VARIABLE := piecewise(0.444296, time < 4800, 0.444296*(time/4800)^3);
  glycerol_measured := glycerol_i*cellvol/cellvol_init;
  Hog1PP_measured := Hog1PP*cellvol/cellvol_init;
  Gpd1_measured := Gpd1*cellvol/cellvol_init;
  gpd1mRNA_measured := gpd1mRNA*cellvol/cellvol_init;
  glucose_measured := glucose_i*cellvol/cellvol_init;
  pyruvate_measured := pyruvate*cellvol/cellvol_init;
  acetate_measured := acetate_i*cellvol/cellvol_init;
  ethanol_measured := ethanol_i*cellvol/cellvol_init;
  trehalose_measured := trehalose*cellvol/cellvol_init;
  F16DP_measured := F16DP*cellvol/cellvol_init;
  stl1mRNA_measured := stl1mRNA*cellvol/cellvol_init;
  trioseP_measured := trioseP*cellvol/cellvol_init;

  // Reactions:
  v1: glucose_e => glucose_i; Henri_Michaelis_Menten__irreversible__1(glucose_e, kv1_1, kv1_2);  // GO:0046323
  v10: trehalose -> trehalose_e; function_4_v10_1(CellSurface, kv10_1, kv10_2, trehalose, trehalose_e);  // GO:0015771
  v10Batch: -> trehalose_e; extra*function_4_v10Batch_1(cellnum, initcellnum, v10speed);  // GO:0051049
  v11: acetate_i -> acetate_e; function_4_v11_1(CellSurface, acetate_e, acetate_i, kv11_1, kv11_2);  // GO:0006846
  v11Batch: -> acetate_e; extra*function_4_v11Batch_1(cellnum, initcellnum, v11speed);  // GO:0051049
  v12: ethanol_i -> ethanol_e; function_4_v12_1(CellSurface, ethanol_e, ethanol_i, kv12_1, kv12_2);  // GO:0005215
  v12Batch: -> ethanol_e; extra*function_4_v12Batch_1(cellnum, initcellnum, v12speed);  // GO:0051049
  v13a: glycerol_i -> glycerol_e; function_4_v13a_1(CellSurface, Fps1r, glycerol_e, glycerol_i, kDiff, kv13a_1);  // modifiers: Fps1r; GO:0015793
    kDiff = 1;
  v13aBatch: -> glycerol_e; extra*function_4_v13aBatch_1(cellnum, initcellnum, v13aspeed);  // GO:0051049
  v13b: glycerol_e => glycerol_i; function_4_v13b_1(Stl1, glycerol_e, kv13b_1, kv13b_2);  // modifiers: Stl1; GO:0015793
  v13bBatch: glycerol_e => ; extra*function_4_v13bBatch_1(cellnum, initcellnum, v13bspeed);  // GO:0051049
  v14: G6P => biomass; intra*function_4_v14_1(G6P, OsmoE, cellvol, kv14_1, kv14_2, kv14_3, kv14_4, kv14_5);  // modifiers: cellvol; isPartOf GO:0016049
  v15f: G6P => F26DP; intra*function_4_v15f_1(G6P, Pfk2627a, kv15f_1, kv15f_2);  // modifiers: Pfk2627a; GO:0003873
  v15r: F26DP => G6P; intra*Henri_Michaelis_Menten__irreversible__2(F26DP, kv15r_1, kv15r_2);  // GO:0004331
  v16f: Hog1 => Hog1PP; intra*function_4_v16f_1(Hog1, OsmoE, Vm, kv16f_1, kv16f_2, kv16f_3);  // GO:0016310
  v16r: Hog1PP => Hog1; intra*kv16r_1VARIABLE*Hog1PP;  // GO:0016311
  v17f: => gpd1mRNA; intra*Function_for_v17f();  // modifiers: Hog1PP, AOG; GO:0006351
  v17r: gpd1mRNA => ; intra*kv17r_1*gpd1mRNA;  // GO:0006402
  v18f: => Gpd1; intra*function_4_v18f_1(gpd1mRNA, kv18f_1);  // modifiers: gpd1mRNA; GO:0006412
  v18r: Gpd1 => ; intra*kv18r_1*Gpd1;  // GO:0030163
  v19f: Pfk2627i => Pfk2627a; intra*function_4_v19f_1(Hog1PP, Pfk2627i, kv19f_1);  // modifiers: Hog1PP; GO:0043085
  v19r: Pfk2627a => Pfk2627i; intra*kv19r_1*Pfk2627a;  // GO:0043086
  v1Batch: glucose_e => ; extra*function_4_v1Batch_1(cellnum, initcellnum, v1speed);  // GO:0051049
  v2: glucose_i => G6P; intra*Henri_Michaelis_Menten__irreversible__3(glucose_i, kv2_1, kv2_2);  // isVersionOf GO:0004340
  v20f: => stl1mRNA; intra*function_4_v20f_1(Hog1PP, kv20f_1, kv20f_2, kv20f_3, kv20f_x);  // modifiers: Hog1PP; GO:0006351
  v20r: stl1mRNA => ; intra*kv20r_1*stl1mRNA;  // GO:0006402
  v21f: => Stl1; intra*function_4_v21f_1(kv21f_1, stl1mRNA);  // modifiers: stl1mRNA; GO:0006412
  v21r: Stl1 => ; intra*kv21r_1*Stl1;  // GO:0030163
  v22: => Fps1r; intra*function_4_v22(Fps1r, Hog1PP, Turgor, kv22_1, kv22_2, kv22_3);  // modifiers: Hog1PP; GO:0051049
  v23f: AOGi => AOG; intra*function_4_v23f_1(AOGi, Vm, kv23f_1, kv23f_2, kv23f_3);  // GO:0043085
  v23r: AOG => AOGi; intra*kv23r_1*AOG;  // GO:0043086
  v3: 2 G6P -> trehalose; intra*function_4_v3_1(G6P, kv3_1, kv3_2, kv3_3, kv3_4, trehalose);  // GO:0005992
  v4: G6P => F16DP; intra*function_4_v4_1(F26DP, G6P, kv4_1, kv4_2, kv4_3, kv4_4, kv4_5);  // modifiers: F26DP; hasPart GO:0004347; hasPart GO:0003872
  v5: F16DP -> 2 trioseP; intra*function_4_v5_1(F16DP, kv5_1, kv5_2, kv5_3, kv5_4, trioseP);  // isVersionOf GO:0004332
  v6: trioseP => glycerol_i; intra*Function_for_v6();  // modifiers: Gpd1; hasPart GO:0004367; hasPart GO:0043136
  v6b: trioseP => glycerol_i; intra*function_4_v6b_1_1(kv6b_4, kv6b_5, kv6b_x, trioseP);  // GO:0006114
  v7: trioseP => pyruvate; intra*Henri_Michaelis_Menten__irreversible__4(kv7_1, kv7_2, trioseP);  // GO:0042866
  v8: pyruvate => acetate_i; intra*Henri_Michaelis_Menten__irreversible__5(kv8_1, kv8_2, pyruvate);  // GO:0019413
  v9: pyruvate => ethanol_i; intra*Henri_Michaelis_Menten__irreversible__6(kv9_1, kv9_2, pyruvate);  // GO:0006115
  vVacetate_i: acetate_i -> ; intra*function_4_vVacetate_i_1(acetate_i, cellvol, volchangespeed);  // modifiers: cellvol; isPartOf GO:0008361
  vVcin: cin -> ; intra*function_4_vVcin_1(cellvol, cin, volchangespeed);  // modifiers: cellvol; isPartOf GO:0008361
  vVethanol_i: ethanol_i -> ; intra*function_4_vVethanol_i_1(cellvol, ethanol_i, volchangespeed);  // modifiers: cellvol; isPartOf GO:0008361
  vVF16DP: F16DP -> ; intra*function_4_vVF16DP_1(F16DP, cellvol, volchangespeed);  // modifiers: cellvol; isPartOf GO:0008361
  vVG6P: G6P -> ; intra*function_4_vVG6P_1(G6P, cellvol, volchangespeed);  // modifiers: cellvol; isPartOf GO:0008361
  vVgluci: glucose_i -> ; intra*function_4_vVgluci_1(cellvol, glucose_i, volchangespeed);  // modifiers: cellvol; isPartOf GO:0008361
  vVGpd1: Gpd1 -> ; intra*function_4_vVGpd1_1(Gpd1, cellvol, volchangespeed);  // modifiers: cellvol; isPartOf GO:0008361
  vVgpd1mRNA: gpd1mRNA -> ; intra*function_4_vVgpd1mRNA_1(cellvol, gpd1mRNA, volchangespeed);  // modifiers: cellvol; isPartOf GO:0008361
  vVHog1: Hog1 -> ; intra*function_4_vVHog1_1(Hog1, cellvol, volchangespeed);  // modifiers: cellvol; isPartOf GO:0008361
  vVos: -> cellvol; intra*function_4_vVos_1(CellSurface, OsmoE, Turgor, cin, glycerol_e, glycerol_i, vV_1, vV_2, vV_R, vV_T);  // modifiers: glycerol_e, glycerol_i, cin; isPartOf GO:0008361
  vVPfk2627a: Pfk2627a -> ; intra*function_4_vVPfk2627a_1(Pfk2627a, cellvol, volchangespeed);  // modifiers: cellvol; isPartOf GO:0008361
  vVPfk2627i: Pfk2627i -> ; intra*function_4_vVPfk2627i_1(Pfk2627i, cellvol, volchangespeed);  // modifiers: cellvol; isPartOf GO:0008361
  vVpyruvate: pyruvate -> ; intra*function_4_vVpyruvate_1(cellvol, pyruvate, volchangespeed);  // modifiers: cellvol; isPartOf GO:0008361
  vVStl1: Stl1 -> ; intra*function_4_vVStl1_1(Stl1, cellvol, volchangespeed);  // modifiers: cellvol; isPartOf GO:0008361
  vVstl1mRNA: stl1mRNA -> ; intra*function_4_vVstl1mRNA_1(cellvol, stl1mRNA, volchangespeed);  // modifiers: cellvol; isPartOf GO:0008361
  vVtrehalose: trehalose -> ; intra*function_4_vVtrehalose_1(cellvol, trehalose, volchangespeed);  // modifiers: cellvol; isPartOf GO:0008361
  vVtrioseP: trioseP -> ; intra*function_4_vVtrioseP_1(cellvol, trioseP, volchangespeed);  // modifiers: cellvol; isPartOf GO:0008361
  vVglyci: glycerol_i -> ; intra*function_4_vVStl1_1_1(cellvol, glycerol_i, volchangespeed);  // modifiers: cellvol; isPartOf GO:0008361
  vVHog1PP: Hog1PP -> ; intra*function_4_vVtrioseP_1_1(Hog1PP, cellvol, volchangespeed);  // modifiers: cellvol; isPartOf GO:0008361

  // Unit definitions:
  unit volume = 1e-3 litre;
end
