// SBML level 2 version 4

model MODEL1611040000()
  // Palmer2014 - Effect of IL-1β-Blocking therapies in T2DM - Healthy Condition
  // This is the model with healthy state initial conditions. A few changes were made to the model equations in order to bypass the circular dependencies apparent in SBML. Coupled algebraic equations for the species Glucose, Insulin and Proinsulin were changed to reactions which represent the ordinary differential equations found in a previously published model by De Gaetano et al (2008), [MODEL1112110003]. This reference was used by the present authors for the algebraic equations. The original Mathematica code, obtained from the supplementary material of the article can be downloaded from the link below: [Palmer2014_notebook.nb].
  // This model is described in the article:
  // Effects of IL-1β-Blocking Therapies in Type 2 Diabetes Mellitus: A Quantitative Systems Pharmacology Modeling Approach to Explore Underlying Mechanisms.
  // Palmér R, Nyman E, Penney M, Marley A, Cedersund G, Agoram B.
  // CPT Pharmacometrics Syst Pharmacol. 2014 Jun 11;3:e118.
  // Abstract:
  // Recent clinical studies suggest sustained treatment effects of interleukin-1β (IL-1β)-blocking therapies in type 2 diabetes mellitus. The underlying mechanisms of these effects, however, remain underexplored. Using a quantitative systems pharmacology modeling approach, we combined ex vivo data of IL-1β effects on β-cell function and turnover with a disease progression model of the long-term interactions between insulin, glucose, and β-cell mass in type 2 diabetes mellitus. We then simulated treatment effects of the IL-1 receptor antagonist anakinra. The result was a substantial and partly sustained symptomatic improvement in β-cell function, and hence also in HbA1C, fasting plasma glucose, and proinsulin-insulin ratio, and a small increase in β-cell mass. We propose that improved β-cell function, rather than mass, is likely to explain the main IL-1β-blocking effects seen in current clinical data, but that improved β-cell mass might result in disease-modifying effects not clearly distinguishable until >1 year after treatment.
  // This model is hosted on BioModels Database and identified by: MODEL1604270002.
  // To cite BioModels Database, please use: BioModels: Content, Features, Functionality and Use.
  // To the extent possible under law, all copyright and related or neighbouring rights to this encoded model have been dedicated to the public domain worldwide. Please refer to CC0 Public Domain Dedication for more information.
  // biomodels.db:MODEL1611040000
  // biomodels.db:BIOMD0000000621
  // isDescribedBy pubmed:24918743
  // isDerivedFrom biomodels.db:MODEL1112110003
  // hasTaxon taxonomy:9606
  // isVersionOf DOID:9352

  // Compartments:
  compartment default_compartment = 1;

  // Species:
  // Units: ng / ml
  species IL1b in default_compartment = 0.05;  // isVersionOf uniprot:P01584
  // Units: ng / ml
  species IL1Ra in default_compartment = 25;  // isVersionOf uniprot:P18510
  species Anakinra in default_compartment = 0;  // isHomologTo uniprot:P18510; hasProperty CHEBI:52217
  // Units: pM
  species Proinsulin in default_compartment = 6.5;  // isVersionOf uniprot:P01308
  // Units: pM
  species Insulin in default_compartment = 50;  // isVersionOf uniprot:P01308
  // Units: pM min-1 (% beta-cells)-1
  species TigB in default_compartment = 0.29;  // isVersionOf GO:0030073
  // Units: % of healthy
  species B in default_compartment = 100;  // isVersionOf BTO:0000783
  species f in default_compartment = 0.0427776;  // isPartOf GO:0030073
  species Anakinrasc in default_compartment = 0;  // isVersionOf uniprot:P18510
  // Units: pM
  species Glucose in default_compartment = 5;  // isVersionOf CHEBI:17234
  species a1c1 in default_compartment = 0.122997;  // isPartOf EFO:0004541
  species rbc1 in default_compartment = 8.627;  // isVersionOf CL:0000232
  species a1c2 in default_compartment = 0.244266;  // isPartOf EFO:0004541
  species rbc2 in default_compartment = 8.50573;  // isVersionOf CL:0000232
  species a1c3 in default_compartment = 0.363829;  // isPartOf EFO:0004541
  species rbc3 in default_compartment = 8.38617;  // isVersionOf CL:0000232
  species a1c4 in default_compartment = 0.481712;  // isPartOf EFO:0004541
  species rbc4 in default_compartment = 8.26829;  // isVersionOf CL:0000232
  species a1c5 in default_compartment = 0.597938;  // isPartOf EFO:0004541
  species rbc5 in default_compartment = 8.15206;  // isVersionOf CL:0000232
  species a1c6 in default_compartment = 0.71253;  // isPartOf EFO:0004541
  species rbc6 in default_compartment = 8.03747;  // isVersionOf CL:0000232
  species a1c7 in default_compartment = 0.825512;  // isPartOf EFO:0004541
  species rbc7 in default_compartment = 7.92449;  // isVersionOf CL:0000232
  species a1c8 in default_compartment = 0.936905;  // isPartOf EFO:0004541
  species rbc8 in default_compartment = 7.8131;  // isVersionOf CL:0000232
  species a1c9 in default_compartment = 1.04673;  // isPartOf EFO:0004541
  species rbc9 in default_compartment = 7.70327;  // isVersionOf CL:0000232
  species a1c10 in default_compartment = 1.15502;  // isPartOf EFO:0004541
  species rbc10 in default_compartment = 7.59498;  // isVersionOf CL:0000232
  species a1c11 in default_compartment = 1.26178;  // isPartOf EFO:0004541
  species rbc11 in default_compartment = 7.48822;  // isVersionOf CL:0000232
  species a1c12 in default_compartment = 1.36704;  // isPartOf EFO:0004541
  species rbc12 in default_compartment = 7.38296;  // isVersionOf CL:0000232
  species $hba1c in default_compartment;  // isVersionOf EFO:0004541

  // Parameters:
  // Units: min-1
  Kxg = 1.6e-5;
  // Units: min-1
  Kxi = 0.05;
  // Units: mM
  Gh = 9;
  vh = 4;
  Ktr = 0.12;
  Kin = 1.05;
  lambda = 0.743;
  Kglucose = 0.000292;
  vs = 0.7;
  kms = 0.021;
  // Units: day-1
  taus = 0.5;
  kmf = 0.021;
  // Units: day-1
  tauf = 0.5;
  vfg = 4;
  xfg = 4;
  // Units: mM
  kmfg = 9;
  vf = 0.4;
  vlr = 1.8;
  kmlr = 0.0011;
  xlr = 3;
  vhr = 2.7;
  kmhr = 0.018;
  xhr = 0.5;
  vla = 0.65;
  kmla = 0.00018;
  xla = 3;
  vha = 4.6;
  kmha = 0.155;
  xha = 0.6666667;
  // Units: ng / ml
  km = 8.5;
  // Units: ng / ml
  ki = 1.7;
  // Units: day-1
  ka = 0.000552022;
  // Units: day-1
  kr = 0.000376393;
  kf = 0.00957754;
  // Units: pM min-1 (% beta-cells)-1
  ks = 0.291008;
  // Units: mM / min
  Tgl = 0.025405;
  // Units: pM-1 min-1
  Kxgi = 0.0001;
  // Units: ng / ml
  il1bH = 0.05;
  // Units: ng / ml
  il1b0 = 0.05;
  // Units: ng ml-1 day-1
  kplacebo = 0.00137;
  // Units: day-1
  k1 = 0.2;
  // Units: day-1
  k2 = 0.0025;
  // Units: day-1
  kab = 3.94;
  // Units: L day-1
  CL = 432;
  // Units: L
  Vp = 48;
  // Additional parameter: Binary switch for anakinra or not
  Ana_on = 1;
  // Additional parameter: Binary switch for placebo or treatment
  placebo_on = 0;
  // Additional parameter: Position of each daily dose and initial dose.
  Anakinra_dose_counter = 0.5;

  // Assignment rules:
  hba1c := 100*(a1c1 + a1c2 + a1c3 + a1c4 + a1c5 + a1c6 + a1c7 + a1c8 + a1c9 + a1c10 + a1c11 + a1c12)/(a1c1 + a1c2 + a1c3 + a1c4 + a1c5 + a1c6 + a1c7 + a1c8 + a1c9 + a1c10 + a1c11 + a1c12 + rbc1 + rbc2 + rbc3 + rbc4 + rbc5 + rbc6 + rbc7 + rbc8 + rbc9 + rbc10 + rbc11 + rbc12);
  apoptosis := ka*(1 + vha*IL1R^xha/(kmha^xha + IL1R^xha) - vla*IL1R^xla/(kmla^xla + IL1R^xla));
  IL1R := IL1b/(IL1b + km*(1 + (IL1Ra + Anakinra)/ki));
  replication := kr*(1 - vhr*IL1R^xhr/(kmhr^xhr + IL1R^xhr) + vlr*IL1R^xlr/(kmlr^xlr + IL1R^xlr));
  PI_I := Proinsulin/Insulin;

  // Rate rules:
  a1c1' = Kglucose*Glucose^lambda*rbc1 - Ktr*a1c1;
  rbc1' = Kin - Ktr*rbc1 - Kglucose*Glucose^lambda*rbc1;
  a1c2' = Kglucose*Glucose^lambda*rbc2 + Ktr*a1c1 - Ktr*a1c2;
  rbc2' = Ktr*rbc1 - Ktr*rbc2 - Kglucose*Glucose^lambda*rbc2;
  a1c3' = Kglucose*Glucose^lambda*rbc3 + Ktr*a1c2 - Ktr*a1c3;
  rbc3' = Ktr*rbc2 - Ktr*rbc3 - Kglucose*Glucose^lambda*rbc3;
  a1c4' = Kglucose*Glucose^lambda*rbc4 + Ktr*a1c3 - Ktr*a1c4;
  rbc4' = Ktr*rbc3 - Ktr*rbc4 - Kglucose*Glucose^lambda*rbc4;
  a1c5' = Kglucose*Glucose^lambda*rbc5 + Ktr*a1c4 - Ktr*a1c5;
  rbc5' = Ktr*rbc4 - Ktr*rbc5 - Kglucose*Glucose^lambda*rbc5;
  a1c6' = Kglucose*Glucose^lambda*rbc6 + Ktr*a1c5 - Ktr*a1c6;
  rbc6' = Ktr*rbc5 - Ktr*rbc6 - Kglucose*Glucose^lambda*rbc6;
  a1c7' = Kglucose*Glucose^lambda*rbc7 + Ktr*a1c6 - Ktr*a1c7;
  rbc7' = Ktr*rbc6 - Ktr*rbc7 - Kglucose*Glucose^lambda*rbc7;
  a1c8' = Kglucose*Glucose^lambda*rbc8 + Ktr*a1c7 - Ktr*a1c8;
  rbc8' = Ktr*rbc7 - Ktr*rbc8 - Kglucose*Glucose^lambda*rbc8;
  a1c9' = Kglucose*Glucose^lambda*rbc9 + Ktr*a1c8 - Ktr*a1c9;
  rbc9' = Ktr*rbc8 - Ktr*rbc9 - Kglucose*Glucose^lambda*rbc9;
  a1c10' = Kglucose*Glucose^lambda*rbc10 + Ktr*a1c9 - Ktr*a1c10;
  rbc10' = Ktr*rbc9 - Ktr*rbc10 - Kglucose*Glucose^lambda*rbc10;
  a1c11' = Kglucose*Glucose^lambda*rbc11 + Ktr*a1c10 - Ktr*a1c11;
  rbc11' = Ktr*rbc10 - Ktr*rbc11 - Kglucose*Glucose^lambda*rbc11;
  a1c12' = Kglucose*Glucose^lambda*rbc12 + Ktr*a1c11 - Ktr*a1c12;
  rbc12' = Ktr*rbc11 - Ktr*rbc12 - Kglucose*Glucose^lambda*rbc12;

  // Reactions:
  TigB_up: => TigB; taus*ks*(1 - vs*IL1R/(kms + IL1R));
  TigB_down: TigB => ; taus*TigB;
  Bcell_replication: => B; replication*B;
  Bcell_apoptosis: B => ; apoptosis*B;
  proinsulin_sec_up: => f; tauf*kf*(1 + vfg*Glucose^xfg/(kmfg^xfg + Glucose^xfg))*(1 + vf*IL1R/(kmf + IL1R));  // modifiers: Glucose
  proinsulin_sec_down: f => ; tauf*f;
  IL1b_treatment: => IL1b; piecewise((1 - placebo_on)*k1*il1bH, time < 91, (1 - placebo_on)*k2*(il1b0 + kplacebo*time));
  IL1b_degradation: IL1b => ; piecewise((1 - placebo_on)*k1*IL1b, time < 91, (1 - placebo_on)*k2*IL1b);
  IL1b_placebo: => IL1b; placebo_on*kplacebo;
  AnakinraSC_elimination: Anakinrasc => ; kab*Anakinrasc;
  Anakinra_absorption: => Anakinra; kab*Anakinrasc/Vp;  // modifiers: Anakinrasc
  Anakinra_elimination: Anakinra => ; CL/Vp*Anakinra;
  Glucose_production: => Glucose; Tgl;
  Basal_glucose_uptake: Glucose => ; Kxg*Glucose;
  Insulin_dependent_glucose_uptake: Glucose => ; Kxgi*Insulin*Glucose;  // modifiers: Insulin
  Proinsulin_dependent_glucose_uptake: Glucose => ; 0.1*Kxgi*Proinsulin*Glucose;  // modifiers: Proinsulin
  Glucose_dependent_insulin_secretion: => Insulin; (Glucose/Gh)^vh/(1 + (Glucose/Gh)^vh)*TigB*B;  // modifiers: TigB, B, Glucose
  Insulin_elimination: Insulin => ; Kxi*Insulin;
  Glucose_dependent_proinsulin_secretion: => Proinsulin; f*(Glucose/Gh)^vh/(1 + (Glucose/Gh)^vh)*TigB*B;  // modifiers: TigB, B, f, Glucose
  Proinsulin_elimination: Proinsulin => ; 0.1*Kxi*Proinsulin;

  // Events:
  // Dose event for anakinra. The value for the dose is considered to be 100mg which is assumed to be converted into ng / ml.
  Anakinra_Administration_event: at ((time == Anakinra_dose_counter) && (Anakinra_dose_counter < 91)): Anakinrasc = Anakinrasc + 100000*Ana_on, Anakinra_dose_counter = Anakinra_dose_counter + 1;

  // Unit definitions:
  unit volume = litre;
  unit substance = mole;
  unit time_unit = 86400 second;
end
