// SBML level 2 version 4

function MAX(a, b)
  piecewise(a, a >= b, b);
end

function Constant_flux_irreversible(v)
  v;
end
Constant_flux_irreversible is "Constant flux (irreversible)";

function Function_for_Ca_pump(Ca, km, vmax)
  vmax*(Ca/(Ca + km));
end

model MODEL1703070000()
  // Li2012 Calcium mediated synaptic plasticity
  // This model is an extension of BIOMD0000000183.
  // This model is described in the article:
  // Calcium input frequency, duration and amplitude differentially modulate the relative activation of calcineurin and CaMKII.
  // Li L, Stefan MI, Le Novère N.
  // PLoS ONE 2012; 7(9): e43810
  // Abstract:
  // NMDA receptor dependent long-term potentiation (LTP) and long-term depression (LTD) are two prominent forms of synaptic plasticity, both of which are triggered by post-synaptic calcium elevation. To understand how calcium selectively stimulates two opposing processes, we developed a detailed computational model and performed simulations with different calcium input frequencies, amplitudes, and durations. We show that with a total amount of calcium ions kept constant, high frequencies of calcium pulses stimulate calmodulin more efficiently. Calcium input activates both calcineurin and Ca(2+)/calmodulin-dependent protein kinase II (CaMKII) at all frequencies, but increased frequencies shift the relative activation from calcineurin to CaMKII. Irrespective of amplitude and duration of the inputs, the total amount of calcium ions injected adjusts the sensitivity of the system to calcium input frequencies. At a given frequency, the quantity of CaMKII activated is proportional to the total amount of calcium. Thus, an input of a small amount of calcium at high frequencies can induce the same activation of CaMKII as a larger amount, at lower frequencies. Finally, the extent of activation of CaMKII signals with high calcium frequency is further controlled by other factors, including the availability of calmodulin, and by the potency of phosphatase inhibitors.
  // This model is hosted on BioModels Database and identified by: BIOMD0000000628.
  // To cite BioModels Database, please use: BioModels Database: An enhanced, curated and annotated resource for published quantitative kinetic models.
  // To the extent possible under law, all copyright and related or neighbouring rights to this encoded model have been dedicated to the public domain worldwide. Please refer to CC0 Public Domain Dedication for more information.
  // biomodels.db:MODEL1703070000
  // biomodels.db:BIOMD0000000628
  // isDescribedBy pubmed:22962589
  // isDerivedFrom biomodels.db:BIOMD0000000183
  // isPartOf kegg.pathway:ko04720 reactome:REACT_9053.2
  // hasTaxon taxonomy:40674

  // Compartments:
  compartment Spine = 1e-15;  // isDescribedBy pubmed:11826272; FMA:67488; isVersionOf GO:0043197

  // Species:
  species CamR in Spine = 1.45e-9;  // isVersionOf uniprot:P62158
  species CamT in Spine = 3e-5;  // isVersionOf uniprot:P62158
  species Ca in Spine = 1e-8;  // CHEBI:29108
  species CaMKII in Spine = 7e-5;  // isVersionOf uniprot:Q9UQM7
  species PP2B in Spine = 0;  // isVersionOf reactome:R-HSA-140202; hasPart uniprot:Q08209 uniprot:P16298 uniprot:P48454
  species D in Spine = 3e-6;  // isVersionOf uniprot:Q9UD71
  species PKA in Spine = 1.2e-8;  // hasPart uniprot:P17612
  species PP1a in Spine = 2e-6;  // isVersionOf uniprot:P49593
  species CBPfast in Spine = 8e-5; CBPfast is "CBP_fast";  // hasProperty GO:0048306
  species CBPmedia in Spine = 8e-5; CBPmedia is "CBP_media";  // hasProperty GO:0048306
  species CBPslow in Spine = 2e-5; CBPslow is "CBP_slow";  // hasProperty GO:0048306
  species CBPvslow in Spine = 2e-5; CBPvslow is "CBP_vslow";  // hasProperty GO:0048306
  species CBPfastCa in Spine = 0; CBPfastCa is "CBP_fast_Ca";  // hasPart CHEBI:29108; hasProperty GO:0048306
  species CBPmediaCa in Spine = 0; CBPmediaCa is "CBP_media_Ca";  // hasPart CHEBI:29108; hasProperty GO:0048306
  species CBPslowCa in Spine = 0; CBPslowCa is "CBP_slow_Ca";  // hasPart CHEBI:29108; hasProperty GO:0048306
  species CBPvslowCa in Spine = 0; CBPvslowCa is "CBP_vslow_Ca";  // hasPart CHEBI:29108; hasProperty GO:0048306
  species CamR_Ca1_A in Spine = 0;  // hasPart CHEBI:29108 uniprot:P62158
  species CamR_Ca1_B in Spine = 0;
  species CamR_Ca1_C in Spine = 0;
  species CamR_Ca1_D in Spine = 0;
  species CamR_Ca2_AB in Spine = 0;  // hasPart CHEBI:29108 uniprot:P62158
  species CamR_Ca2_AC in Spine = 0;
  species CamR_Ca2_AD in Spine = 0;
  species CamR_Ca2_BC in Spine = 0;
  species CamR_Ca2_BD in Spine = 0;
  species CamR_Ca2_CD in Spine = 0;
  species CamR_Ca3_ABC in Spine = 0;  // hasPart CHEBI:29108 uniprot:P62158
  species CamR_Ca3_ABD in Spine = 0;
  species CamR_Ca3_ACD in Spine = 0;
  species CamR_Ca3_BCD in Spine = 0;
  species CamR_Ca4_ABCD in Spine = 0;  // hasPart CHEBI:29108 uniprot:P62158
  species CamT_Ca1_A in Spine = 0;  // hasPart CHEBI:29108 uniprot:P62158
  species CamT_Ca1_B in Spine = 0;
  species CamT_Ca1_C in Spine = 0;
  species CamT_Ca1_D in Spine = 0;
  species CamT_Ca2_AB in Spine = 0;  // hasPart CHEBI:29108 uniprot:P62158
  species CamT_Ca2_AC in Spine = 0;
  species CamT_Ca2_AD in Spine = 0;  // hasPart CHEBI:29108 uniprot:P62158
  species CamT_Ca2_BC in Spine = 0;
  species CamT_Ca2_BD in Spine = 0;
  species CamT_Ca2_CD in Spine = 0;
  species CamT_Ca3_ABC in Spine = 0;  // hasPart CHEBI:29108 uniprot:P62158
  species CamT_Ca3_ABD in Spine = 0;
  species CamT_Ca3_ACD in Spine = 0;
  species CamT_Ca3_BCD in Spine = 0;
  species CamT_Ca4_ABCD in Spine = 0;  // hasPart CHEBI:29108 uniprot:P62158
  species CamR_CaMKII in Spine = 0;  // hasPart CHEBI:29108 uniprot:Q9UQM7
  species CamR_Ca1_A_CaMKII in Spine = 0;  // hasPart CHEBI:29108 uniprot:Q9UQM7 uniprot:P62158
  species CamR_Ca1_B_CaMKII in Spine = 0;  // hasPart CHEBI:29108 uniprot:Q9UQM7 uniprot:P62158
  species CamR_Ca1_C_CaMKII in Spine = 0;
  species CamR_Ca1_D_CaMKII in Spine = 0;
  species CamR_Ca2_AB_CaMKII in Spine = 0;  // hasPart CHEBI:29108 uniprot:Q9UQM7 uniprot:P62158
  species CamR_Ca2_AC_CaMKII in Spine = 0;
  species CamR_Ca2_AD_CaMKII in Spine = 0;
  species CamR_Ca2_BC_CaMKII in Spine = 0;
  species CamR_Ca2_BD_CaMKII in Spine = 0;
  species CamR_Ca2_CD_CaMKII in Spine = 0;
  species CamR_Ca3_ABC_CaMKII in Spine = 0;  // hasPart CHEBI:29108 uniprot:Q9UQM7 uniprot:P62158
  species CamR_Ca3_ABD_CaMKII in Spine = 0;
  species CamR_Ca3_ACD_CaMKII in Spine = 0;
  species CamR_Ca3_BCD_CaMKII in Spine = 0;
  species CamR_Ca4_ABCD_CaMKII in Spine = 0;  // hasPart CHEBI:29108 uniprot:Q9UQM7 uniprot:P62158
  species CamR_PP2B in Spine = 0;  // hasPart uniprot:P62158 reactome:R-HSA-140202
  species CamR_Ca1_A_PP2B in Spine = 0;  // hasPart CHEBI:29108 uniprot:P62158 reactome:R-HSA-140202
  species CamR_Ca1_B_PP2B in Spine = 0;
  species CamR_Ca1_C_PP2B in Spine = 0;
  species CamR_Ca1_D_PP2B in Spine = 0;
  species CamR_Ca2_AB_PP2B in Spine = 0;  // hasPart CHEBI:29108 uniprot:P62158 reactome:R-HSA-140202
  species CamR_Ca2_AC_PP2B in Spine = 0;
  species CamR_Ca2_AD_PP2B in Spine = 0;
  species CamR_Ca2_BC_PP2B in Spine = 0;
  species CamR_Ca2_BD_PP2B in Spine = 0;
  species CamR_Ca2_CD_PP2B in Spine = 0;
  species CamR_Ca3_ABC_PP2B in Spine = 0;  // hasPart CHEBI:29108 uniprot:P62158 reactome:R-HSA-140202
  species CamR_Ca3_ABD_PP2B in Spine = 0;
  species CamR_Ca3_ACD_PP2B in Spine = 0;
  species CamR_Ca3_BCD_PP2B in Spine = 0;
  species CamR_Ca4_ABCD_PP2B in Spine = 0;  // hasPart CHEBI:29108 uniprot:P62158 reactome:R-HSA-140202
  species CaMKIIp in Spine = 0;  // hasProperty kegg:C00562; isVersionOf uniprot:Q9UQM7
  species CamR_CaMKIIp in Spine = 0;  // hasProperty kegg:C00562; hasPart uniprot:Q9UQM7 uniprot:P62158
  species CamR_Ca1_A_CaMKIIp in Spine = 0;  // hasProperty kegg:C00562; hasPart CHEBI:29108 uniprot:Q9UQM7 uniprot:P62158
  species CamR_Ca1_B_CaMKIIp in Spine = 0;
  species CamR_Ca1_C_CaMKIIp in Spine = 0;
  species CamR_Ca1_D_CaMKIIp in Spine = 0;
  species CamR_Ca2_AB_CaMKIIp in Spine = 0;  // hasProperty kegg:C00562; hasPart CHEBI:29108 uniprot:Q9UQM7 uniprot:P62158
  species CamR_Ca2_AC_CaMKIIp in Spine = 0;
  species CamR_Ca2_AD_CaMKIIp in Spine = 0;
  species CamR_Ca2_BC_CaMKIIp in Spine = 0;
  species CamR_Ca2_BD_CaMKIIp in Spine = 0;
  species CamR_Ca2_CD_CaMKIIp in Spine = 0;
  species CamR_Ca3_ABC_CaMKIIp in Spine = 0;
  species CamR_Ca3_ABD_CaMKIIp in Spine = 0;
  species CamR_Ca3_ACD_CaMKIIp in Spine = 0;
  species CamR_Ca3_BCD_CaMKIIp in Spine = 0;
  species CamR_Ca4_ABCD_CaMKIIp in Spine = 0;  // hasProperty kegg:C00562; hasPart CHEBI:29108 uniprot:Q9UQM7 uniprot:P62158
  species Dp in Spine = 0;  // hasProperty kegg:C00562; isVersionOf uniprot:Q9UD71
  species D_PKA in Spine = 0;  // hasPart uniprot:P17612 uniprot:Q9UD71
  species Dp_CamR_PP2B in Spine = 0;  // hasProperty kegg:C00562; hasPart uniprot:Q9UD71 uniprot:P62158 reactome:R-HSA-140202
  species Dp_CamR_Ca1_A_PP2B in Spine = 0;  // hasProperty kegg:C00562; hasPart CHEBI:29108 uniprot:Q9UD71; isVersionOf uniprot:P62158 reactome:R-HSA-140202
  species Dp_CamR_Ca1_B_PP2B in Spine = 0;
  species Dp_CamR_Ca1_C_PP2B in Spine = 0;
  species Dp_CamR_Ca1_D_PP2B in Spine = 0;
  species Dp_CamR_Ca2_AB_PP2B in Spine = 0;  // hasProperty kegg:C00562; hasPart CHEBI:29108 uniprot:Q9UD71; isVersionOf uniprot:P62158 reactome:R-HSA-140202
  species Dp_CamR_Ca2_AC_PP2B in Spine = 0;
  species Dp_CamR_Ca2_AD_PP2B in Spine = 0;
  species Dp_CamR_Ca2_BC_PP2B in Spine = 0;
  species Dp_CamR_Ca2_BD_PP2B in Spine = 0;
  species Dp_CamR_Ca2_CD_PP2B in Spine = 0;
  species Dp_CamR_Ca3_ABC_PP2B in Spine = 0;  // hasProperty kegg:C00562; hasPart CHEBI:29108 uniprot:Q9UD71; isVersionOf uniprot:P62158 reactome:R-HSA-140202
  species Dp_CamR_Ca3_ABD_PP2B in Spine = 0;
  species Dp_CamR_Ca3_ACD_PP2B in Spine = 0;
  species Dp_CamR_Ca3_BCD_PP2B in Spine = 0;
  species Dp_CamR_Ca4_ABCD_PP2B in Spine = 0;  // hasProperty kegg:C00562; hasPart CHEBI:29108 uniprot:Q9UD71 uniprot:P62158 reactome:R-HSA-140202
  species PP1a_Dp in Spine = 0;  // hasProperty kegg:C00562; hasPart uniprot:Q9UD71 uniprot:P49593
  species CaMKIIp_PP1a in Spine = 0;  // hasProperty kegg:C00562; hasPart CHEBI:29108 uniprot:Q9UQM7 uniprot:P49593
  species CamR_CaMKIIp_PP1a in Spine = 0;  // hasProperty kegg:C00562; hasPart uniprot:Q9UQM7 uniprot:P62158 uniprot:P49593
  species CamR_Ca1_A_CaMKIIp_PP1a in Spine = 0;  // hasProperty kegg:C00562; hasPart CHEBI:29108 uniprot:Q9UQM7 uniprot:P62158 uniprot:P49593
  species CamR_Ca1_B_CaMKIIp_PP1a in Spine = 0;
  species CamR_Ca1_C_CaMKIIp_PP1a in Spine = 0;
  species CamR_Ca1_D_CaMKIIp_PP1a in Spine = 0;
  species CamR_Ca2_AB_CaMKIIp_PP1a in Spine = 0;  // hasProperty kegg:C00562; hasPart CHEBI:29108 uniprot:Q9UQM7 uniprot:P62158 uniprot:P49593
  species CamR_Ca2_AC_CaMKIIp_PP1a in Spine = 0;
  species CamR_Ca2_AD_CaMKIIp_PP1a in Spine = 0;
  species CamR_Ca2_BC_CaMKIIp_PP1a in Spine = 0;
  species CamR_Ca2_BD_CaMKIIp_PP1a in Spine = 0;
  species CamR_Ca2_CD_CaMKIIp_PP1a in Spine = 0;
  species CamR_Ca3_ABC_CaMKIIp_PP1a in Spine = 0;  // hasProperty kegg:C00562; hasPart CHEBI:29108 uniprot:Q9UQM7 uniprot:P62158 uniprot:P49593
  species CamR_Ca3_ABD_CaMKIIp_PP1a in Spine = 0;
  species CamR_Ca3_ACD_CaMKIIp_PP1a in Spine = 0;
  species CamR_Ca3_BCD_CaMKIIp_PP1a in Spine = 0;
  species CamR_Ca4_ABCD_CaMKIIp_PP1a in Spine = 0;  // hasProperty kegg:C00562; hasPart CHEBI:29108 uniprot:Q9UQM7 uniprot:P62158 uniprot:P49593
  species PP2Bi in Spine = 6e-6;  // hasPart uniprot:Q08209 uniprot:P16298 uniprot:P48454 reactome:R-HSA-140202
  species PP2Bi_Ca1 in Spine = 0;  // hasPart CHEBI:29108 reactome:R-HSA-140202
  species PP2Bi_Ca2 in Spine = 0;
  species PP2Bi_Ca3 in Spine = 0;

  // Parameters:
  var Cam_Ca0_total_0;
  Cam_total = 3.000145e-5;
  var Dp_0_PP2B_CamR_Ca1; Dp_0_PP2B_CamR_Ca1 is "Dp_boundOrnot_PP2B_CamR_Ca1";
  var Dp_0_PP2B_CamR_Ca2; Dp_0_PP2B_CamR_Ca2 is "Dp_boundOrnot_PP2B_CamR_Ca2";
  var Dp_0_PP2B_CamR_Ca3; Dp_0_PP2B_CamR_Ca3 is "Dp_boundOrnot_PP2B_CamR_Ca3";
  PKA_total = 1.2e-6;  // isDescribedBy pubmed:7682336
  K_CBPslow_Ca_off = 10; K_CBPslow_Ca_off is "koff_CBPslow_Ca";
  K_CamR_CaMKII_p_on = 3200000; K_CamR_CaMKII_p_on is "kon_CamR_CaMKII";
  K_D_PKA_off_p = 2.7; K_D_PKA_off_p is "kcat_D_PKA";
  K_CamMKIIp_PP1a_on = 3000000; K_CamMKIIp_PP1a_on is "kon_CamMKIIp_PP1a";
  K_CamMKIIp_PP1a_off = 0.5; K_CamMKIIp_PP1a_off is "koff_CamMKIIp_PP1a";
  K_CamMKIIp_PP1a_p_off = 2; K_CamMKIIp_PP1a_p_off is "kcat_CaMKIIp_PP1a";
  K_CBPslow_Ca_on = 10000000; K_CBPslow_Ca_on is "kon_CBPslow_Ca";
  K_CBPvslow_Ca_off = 1; K_CBPvslow_Ca_off is "koff_CBPvslow_Ca";
  K_CBPvslow_Ca_on = 1000000; K_CBPvslow_Ca_on is "kon_CBPvslow_Ca";
  K_Cam_Ca_on = 1400000; K_Cam_Ca_on is "kon_Cam_Ca";
  var K_CamT_Ca_A_off; K_CamT_Ca_A_off is "koff_CamT_Ca_A";
  var K_CamT_Ca_B_off; K_CamT_Ca_B_off is "koff_CamT_Ca_B";
  var K_CamT_Ca_C_off; K_CamT_Ca_C_off is "koff_CamT_Ca_C";
  var K_CamT_Ca_D_off; K_CamT_Ca_D_off is "koff_CamT_Ca_D";
  var K_CamR_T; K_CamR_T is "k_CamR_T";
  K_CamT_R = 48.379294; K_CamT_R is "k_CamT_R";
  K_CamR_CaMKII_off = 0.343; K_CamR_CaMKII_off is "koff_CamR_CaMKII";
  K_CamR_PP2B_on = 46000000; K_CamR_PP2B_on is "kon_CamR_PP2B";
  K_CamR_PP2B_off = 0.4; K_CamR_PP2B_off is "koff_CamR_PP2B";
  var K_CamR_Ca_C_off; K_CamR_Ca_C_off is "koff_CamR_Ca_C";
  var K_CamR_Ca_D_off; K_CamR_Ca_D_off is "koff_CamR_Ca_D";
  var K_CamR_Ca_A_off; K_CamR_Ca_A_off is "koff_CamR_Ca_A";
  var K_CamR_Ca_B_off; K_CamR_Ca_B_off is "koff_CamR_Ca_B";
  K_CamR_CaMKIIp_off = 0.001; K_CamR_CaMKIIp_off is "koff_CamR_CaMKIIp";
  K_D_PKA_on = 5600000; K_D_PKA_on is "kon_D_PKA";
  K_D_PKA_off = 10.8; K_D_PKA_off is "koff_D_PKA";
  K_CamR_PP2B_Dp_on = 4100000; K_CamR_PP2B_Dp_on is "kon_CamR_PP2B_Dp";
  K_CamR_PP2B_Dp_off = 6.4; K_CamR_PP2B_Dp_off is "koff_CamR_PP2B_Dp";
  K_CamR_PP2B_D_off = 0.2; K_CamR_PP2B_D_off is "kcat_CamR_PP2B_Dp";
  K_PP1a_Dp_on = 4000000; K_PP1a_Dp_on is "kon_PP1a_Dp";
  K_PP1a_Dp_off = 0.4; K_PP1a_Dp_off is "koff_PP1a_Dp";
  K_CBP_fast_on = 1000000000; K_CBP_fast_on is "kon_CBPfast_Ca";
  K_CBP_fast_off = 1000; K_CBP_fast_off is "koff_CBPfast_Ca";
  K_CBP_media_on = 100000000; K_CBP_media_on is "kon_CBPmedia_Ca";
  K_CBP_media_off = 100; K_CBP_media_off is "koff_CBPmedia_Ca";
  K_PP2Bi_Ca_on = 20000000; K_PP2Bi_Ca_on is "kon_PP2Bi_Ca";
  K_PP2Bi_Ca1_Ca_off = 0.0092; K_PP2Bi_Ca1_Ca_off is "koff_PP2Bi_Ca";
  K_PP2Bi_Ca2_Ca_off = 0.0312; K_PP2Bi_Ca2_Ca_off is "koff_PP2Bi_Ca1_Ca";
  K_PP2Bi_Ca3_Ca_off = 0.352; K_PP2Bi_Ca3_Ca_off is "koff_PP2Bi_Ca2_Ca";
  K_PP2B_Ca_off = 0.9; K_PP2B_Ca_off is "koff_PP2Bi_Ca3_Ca";
  var K_CamR_to_T_Ca2; K_CamR_to_T_Ca2 is "k_CamR_to_T_Ca2";
  C_A_B_C_D = 0.00396; C_A_B_C_D is "C_ABCD";
  var K_CamT_to_R_Ca2; K_CamT_to_R_Ca2 is "k_CamT_to_R_Ca2";
  var K_CamR_to_T_Ca1; K_CamR_to_T_Ca1 is "k_CamR_to_T_Ca1";
  var K_CamT_to_R_Ca1; K_CamT_to_R_Ca1 is "k_CamT_to_R_Ca1";
  var K_CamR_to_T_Ca3; K_CamR_to_T_Ca3 is "k_CamR_to_T_Ca3";
  var K_CamT_to_R_Ca3; K_CamT_to_R_Ca3 is "k_CamT_to_R_Ca3";
  var K_CamR_to_T_Ca4; K_CamR_to_T_Ca4 is "k_CamR_to_T_Ca4";
  var K_CamT_to_R_Ca4; K_CamT_to_R_Ca4 is "k_CamT_to_R_Ca4";
  var K_CaMKII_autoPhosphorylation; K_CaMKII_autoPhosphorylation is "k_CaMKII_autoPhosphorylation";
  k_for_CaMKII_autophosphorylation = 6.3; k_for_CaMKII_autophosphorylation is "kmax_CaMKII_autophosphorylation";
  k_Ca_in = 0;
  // The time required for running till equilibrium, before starting calcium spikes.
  equilibriumTime = 300;
  spikeCounter = 0;
  // define number of Calcium spikes in total.
  spikeNumber = 100;
  // define the frequency of calcium spikes, in the unit of Hz (spike per 1s)
  spikeFrequency = 52.8;
  spikeOn = 0;
  startTime = 0;
  // define the reaction rate for calcium influx, in the unit of µM/s
  // In original Paper, each calcium spike is composed of 34560 molecules in the duration of 8 milli-seconds.
  // Therefore, the unit of input is (34560/0.008)/(6.02e23*1e-15) = 0.00717
  var spikeInput;
  var spikeInputDuration;
  KRA = 8.32e-6;
  KRB = 1.66e-8;
  KRC = 1.74e-5;
  KRD = 1.45e-8;
  L = 20670;
  Initial_for_CBP_fast = CBPfast;
  Initial_for_CBP_media = CBPmedia;
  Initial_for_CBP_slow = CBPslow;
  Initial_for_CBP_vslow = CBPvslow;
  Initial_for_PKA = PKA;
  Initial_for_equilibriumTime = equilibriumTime;
  Initial_for_spikeFrequency = spikeFrequency;
  Initial_for_spikeNumber = spikeNumber;

  // Assignment rules:
  Cam_Ca0_total_0 := CamR + CamT + CamR_CaMKIIp + CamR_CaMKII + CamR_PP2B + Dp_CamR_PP2B + CamR_CaMKIIp_PP1a;
  Cam_Ca0_total_ratio := Cam_Ca0_total_0/Cam_total;
  Cam_Ca4_total := CamR_Ca4_ABCD + CamT_Ca4_ABCD + CamR_Ca4_ABCD_CaMKII + CamR_Ca4_ABCD_PP2B + CamR_Ca4_ABCD_CaMKIIp + Dp_CamR_Ca4_ABCD_PP2B + CamR_Ca4_ABCD_CaMKIIp_PP1a;
  Cam_Ca4_total_ratio := Cam_Ca4_total/Cam_total;
  CaMKII_CamR_Ca1_total := CamR_Ca1_A_CaMKII + CamR_Ca1_B_CaMKII + CamR_Ca1_C_CaMKII + CamR_Ca1_D_CaMKII + CamR_Ca1_A_CaMKIIp + CamR_Ca1_B_CaMKIIp + CamR_Ca1_C_CaMKIIp + CamR_Ca1_D_CaMKIIp + CamR_Ca1_A_CaMKIIp_PP1a + CamR_Ca1_B_CaMKIIp_PP1a + CamR_Ca1_C_CaMKIIp_PP1a + CamR_Ca1_D_CaMKIIp_PP1a;
  CaMKII_CamR_Ca2_total := CamR_Ca2_AB_CaMKII + CamR_Ca2_AC_CaMKII + CamR_Ca2_AD_CaMKII + CamR_Ca2_BC_CaMKII + CamR_Ca2_BD_CaMKII + CamR_Ca2_CD_CaMKII + CamR_Ca2_AB_CaMKIIp + CamR_Ca2_AC_CaMKIIp + CamR_Ca2_AD_CaMKIIp + CamR_Ca2_BC_CaMKIIp + CamR_Ca2_BD_CaMKIIp + CamR_Ca2_CD_CaMKIIp + CamR_Ca2_AB_CaMKIIp_PP1a + CamR_Ca2_AC_CaMKIIp_PP1a + CamR_Ca2_AD_CaMKIIp_PP1a + CamR_Ca2_BC_CaMKIIp_PP1a + CamR_Ca2_BD_CaMKIIp_PP1a + CamR_Ca2_CD_CaMKIIp_PP1a;
  CaMKII_CamR_Ca3_total := CamR_Ca3_ABC_CaMKII + CamR_Ca3_ABD_CaMKII + CamR_Ca3_ACD_CaMKII + CamR_Ca3_BCD_CaMKII + CamR_Ca3_ABC_CaMKIIp + CamR_Ca3_ABD_CaMKIIp + CamR_Ca3_ACD_CaMKIIp + CamR_Ca3_BCD_CaMKIIp + CamR_Ca3_ABC_CaMKIIp_PP1a + CamR_Ca3_ABD_CaMKIIp_PP1a + CamR_Ca3_ACD_CaMKIIp_PP1a + CamR_Ca3_BCD_CaMKIIp_PP1a;
  CamR_Ca0_total := CamR + CamR_CaMKII + CamR_PP2B + CamR_CaMKIIp + Dp_CamR_PP2B + CamR_CaMKIIp_PP1a;
  CamR_Ca0_ratio := CamR_Ca0_total/Cam_total;
  CamR_Ca4_total := CamR_Ca4_ABCD + CamR_Ca4_ABCD_CaMKII + CamR_Ca4_ABCD_PP2B + CamR_Ca4_ABCD_CaMKIIp + Dp_CamR_Ca4_ABCD_PP2B + CamR_Ca4_ABCD_CaMKIIp_PP1a;
  CamR_Ca4_ratio := CamR_Ca4_total/Cam_total;
  CamR_unbound := CamR + CamR_Ca1_A + CamR_Ca1_B + CamR_Ca1_C + CamR_Ca1_D + CamR_Ca2_AB + CamR_Ca2_AC + CamR_Ca2_AD + CamR_Ca2_BC + CamR_Ca2_BD + CamR_Ca2_CD + CamR_Ca3_ABC + CamR_Ca3_ABD + CamR_Ca3_ACD + CamR_Ca3_BCD + CamR_Ca4_ABCD;
  CBP_fast_total := Initial_for_CBP_fast;
  CBP_fast_bar := CBPfastCa/CBP_fast_total;
  CBP_media_total := Initial_for_CBP_media;
  CBP_media_bar := CBPmediaCa/CBP_media_total;
  CBP_slow_total := Initial_for_CBP_slow;
  CBP_slow_bar := CBPslowCa/CBP_slow_total;
  CBP_vslow_total := Initial_for_CBP_vslow;
  CBP_vslow_bar := CBPvslowCa/CBP_vslow_total;
  Epsilon := CamR/(CamR + CamT);
  Free_Cam_Ca0_total := CamR + CamT;
  Free_Cam_Ca4_total := CamR_Ca4_ABCD + CamT_Ca4_ABCD;
  Free_CamR_Ca1_total := CamR_Ca1_A + CamR_Ca1_B + CamR_Ca1_C + CamR_Ca1_D;
  Free_CamR_Ca2_total := CamR_Ca2_AB + CamR_Ca2_AC + CamR_Ca2_AD + CamR_Ca2_BC + CamR_Ca2_BD + CamR_Ca2_CD;
  Free_CamR_Ca3_total := CamR_Ca3_ABC + CamR_Ca3_ABD + CamR_Ca3_ACD + CamR_Ca3_BCD;
  Free_CamT_Ca1_total := CamT_Ca1_A + CamT_Ca1_B + CamT_Ca1_C + CamT_Ca1_D;
  Free_Cam_Ca1_total := Free_CamR_Ca1_total + Free_CamT_Ca1_total;
  Free_CamT_Ca2_total := CamT_Ca2_AB + CamT_Ca2_AC + CamT_Ca2_AD + CamT_Ca2_BC + CamT_Ca2_BD + CamT_Ca2_CD;
  Free_Cam_Ca2_total := Free_CamR_Ca2_total + Free_CamT_Ca2_total;
  Free_CamT_Ca3_total := CamT_Ca3_ABC + CamT_Ca3_ABD + CamT_Ca3_ACD + CamT_Ca3_BCD;
  Free_Cam_Ca3_total := Free_CamR_Ca3_total + Free_CamT_Ca3_total;
  PKA_inmodel := PKA + D_PKA;
  PKA_bar := PKA_inmodel/PKA_total;
  Dp_0_PP2B_CamR_Ca1 := CamR_Ca1_A_PP2B + CamR_Ca1_B_PP2B + CamR_Ca1_C_PP2B + CamR_Ca1_D_PP2B + Dp_CamR_Ca1_A_PP2B + Dp_CamR_Ca1_B_PP2B + Dp_CamR_Ca1_C_PP2B + Dp_CamR_Ca1_D_PP2B;
  Cam_Ca1_total := Free_Cam_Ca1_total + CaMKII_CamR_Ca1_total + Dp_0_PP2B_CamR_Ca1;
  Cam_Ca1_total_ratio := Cam_Ca1_total/Cam_total;
  Dp_0_PP2B_CamR_Ca2 := CamR_Ca2_AB_PP2B + CamR_Ca2_AC_PP2B + CamR_Ca2_AD_PP2B + CamR_Ca2_BC_PP2B + CamR_Ca2_BD_PP2B + CamR_Ca2_CD_PP2B + Dp_CamR_Ca2_AB_PP2B + Dp_CamR_Ca2_AC_PP2B + Dp_CamR_Ca2_AD_PP2B + Dp_CamR_Ca2_BC_PP2B + Dp_CamR_Ca2_BD_PP2B + Dp_CamR_Ca2_CD_PP2B;
  Cam_Ca2_total := Free_Cam_Ca2_total + CaMKII_CamR_Ca2_total + Dp_0_PP2B_CamR_Ca2;
  Cam_Ca2_total_ratio := Cam_Ca2_total/Cam_total;
  CamR_Ca2_total := Free_CamR_Ca2_total + CaMKII_CamR_Ca2_total + Dp_0_PP2B_CamR_Ca2;
  CamR_Ca2_ratio := CamR_Ca2_total/Cam_total;
  Dp_0_PP2B_CamR_Ca3 := CamR_Ca3_ABC_PP2B + CamR_Ca3_ABD_PP2B + CamR_Ca3_ACD_PP2B + CamR_Ca3_BCD_PP2B + Dp_CamR_Ca3_ABC_PP2B + Dp_CamR_Ca3_ABD_PP2B + Dp_CamR_Ca3_ACD_PP2B + Dp_CamR_Ca3_BCD_PP2B;
  Cam_Ca3_total := Free_CamR_Ca3_total + Dp_0_PP2B_CamR_Ca3 + CaMKII_CamR_Ca3_total;
  Cam_Ca3_total_ratio := Cam_Ca3_total/Cam_total;
  CamR_Ca3_total := Free_CamR_Ca3_total + Dp_0_PP2B_CamR_Ca3 + CaMKII_CamR_Ca3_total;
  CamR_Ca3_ratio := CamR_Ca3_total/Cam_total;
  moles_bound_Ca_per_moles_Cam := (4*Cam_Ca4_total + 3*Cam_Ca3_total + 2*Cam_Ca2_total + Cam_Ca1_total)/Cam_total;
  CaMKII_bound_total := CamR_CaMKII + CaMKII_CamR_Ca1_total + CaMKII_CamR_Ca2_total + CaMKII_CamR_Ca3_total + CamR_Ca4_ABCD_CaMKII + CamR_CaMKIIp + CamR_CaMKIIp_PP1a + CamR_Ca4_ABCD_CaMKIIp + CamR_Ca4_ABCD_CaMKIIp_PP1a;
  CamCaMKII_bar := CaMKII_bound_total/Cam_total;
  CaMKIIp_total := CaMKIIp + CaMKIIp_PP1a + CamR_CaMKIIp + CamR_CaMKIIp_PP1a + CamR_Ca1_A_CaMKIIp + CamR_Ca1_B_CaMKIIp + CamR_Ca1_C_CaMKIIp + CamR_Ca1_D_CaMKIIp + CamR_Ca1_A_CaMKIIp_PP1a + CamR_Ca1_B_CaMKIIp_PP1a + CamR_Ca1_C_CaMKIIp_PP1a + CamR_Ca1_D_CaMKIIp_PP1a + CamR_Ca2_AB_CaMKIIp + CamR_Ca2_AC_CaMKIIp + CamR_Ca2_AD_CaMKIIp + CamR_Ca2_BC_CaMKIIp + CamR_Ca2_BD_CaMKIIp + CamR_Ca2_CD_CaMKIIp + CamR_Ca2_AB_CaMKIIp_PP1a + CamR_Ca2_AC_CaMKIIp_PP1a + CamR_Ca2_AD_CaMKIIp_PP1a + CamR_Ca2_BC_CaMKIIp_PP1a + CamR_Ca2_BD_CaMKIIp_PP1a + CamR_Ca2_CD_CaMKIIp_PP1a + CamR_Ca3_ABC_CaMKIIp + CamR_Ca3_ABD_CaMKIIp + CamR_Ca3_ACD_CaMKIIp + CamR_Ca3_BCD_CaMKIIp + CamR_Ca3_ABC_CaMKIIp_PP1a + CamR_Ca3_ABD_CaMKIIp_PP1a + CamR_Ca3_ACD_CaMKIIp_PP1a + CamR_Ca3_BCD_CaMKIIp_PP1a + CamR_Ca4_ABCD_CaMKIIp + CamR_Ca4_ABCD_CaMKIIp_PP1a;
  PP2B_bound_total := CamR_PP2B + Dp_0_PP2B_CamR_Ca1 + Dp_0_PP2B_CamR_Ca2 + Dp_0_PP2B_CamR_Ca3 + CamR_Ca4_ABCD_PP2B + Dp_CamR_PP2B + Dp_CamR_Ca4_ABCD_PP2B;
  CamPP2B_bar := PP2B_bound_total/Cam_total;
  CamR_total := CamR_unbound + CaMKII_bound_total + PP2B_bound_total;
  CamT_total := CamT + CamT_Ca1_A + CamT_Ca1_B + CamT_Ca1_C + CamT_Ca1_D + CamT_Ca2_AB + CamT_Ca2_AC + CamT_Ca2_AD + CamT_Ca2_BC + CamT_Ca2_BD + CamT_Ca2_CD + CamT_Ca3_ABC + CamT_Ca3_ABD + CamT_Ca3_ACD + CamT_Ca3_BCD + CamT_Ca4_ABCD;
  CamR_ratio := CamR_total/(CamR_total + CamT_total);
  PP2B_total := PP2B + PP2Bi_Ca1 + PP2Bi + PP2Bi_Ca2 + PP2Bi_Ca3 + PP2B_bound_total;
  PP2B_bar := PP2B_bound_total/PP2B_total;
  D_total := D + PP1a_Dp + Dp + D_PKA + Dp_CamR_PP2B + Dp_CamR_Ca1_A_PP2B + Dp_CamR_Ca1_B_PP2B + Dp_CamR_Ca1_C_PP2B + Dp_CamR_Ca1_D_PP2B + Dp_CamR_Ca2_AB_PP2B + Dp_CamR_Ca2_AC_PP2B + Dp_CamR_Ca2_AD_PP2B + Dp_CamR_Ca2_BC_PP2B + Dp_CamR_Ca2_BD_PP2B + Dp_CamR_Ca2_CD_PP2B + Dp_CamR_Ca3_ABC_PP2B + Dp_CamR_Ca3_ABD_PP2B + Dp_CamR_Ca3_ACD_PP2B + Dp_CamR_Ca3_BCD_PP2B + Dp_CamR_Ca4_ABCD_PP2B;
  Dp_total := Dp + PP1a_Dp + Dp_CamR_PP2B + Dp_CamR_Ca1_A_PP2B + Dp_CamR_Ca1_B_PP2B + Dp_CamR_Ca1_C_PP2B + Dp_CamR_Ca1_D_PP2B + Dp_CamR_Ca2_AB_PP2B + Dp_CamR_Ca2_AC_PP2B + Dp_CamR_Ca2_AD_PP2B + Dp_CamR_Ca2_BC_PP2B + Dp_CamR_Ca2_BD_PP2B + Dp_CamR_Ca2_CD_PP2B + Dp_CamR_Ca3_ABC_PP2B + Dp_CamR_Ca3_ABD_PP2B + Dp_CamR_Ca3_ACD_PP2B + Dp_CamR_Ca3_BCD_PP2B + Dp_CamR_Ca4_ABCD_PP2B;
  Dp_bar := Dp_total/D_total;
  PP1a_total := PP1a + CaMKIIp_PP1a + CamR_CaMKIIp_PP1a + CamR_Ca1_A_CaMKIIp_PP1a + CamR_Ca1_B_CaMKIIp_PP1a + CamR_Ca1_C_CaMKIIp_PP1a + CamR_Ca1_D_CaMKIIp_PP1a + CamR_Ca2_AB_CaMKIIp_PP1a + CamR_Ca2_AC_CaMKIIp_PP1a + CamR_Ca2_AD_CaMKIIp_PP1a + CamR_Ca2_BC_CaMKIIp_PP1a + CamR_Ca2_BD_CaMKIIp_PP1a + CamR_Ca2_CD_CaMKIIp_PP1a + CamR_Ca3_ABC_CaMKIIp_PP1a + CamR_Ca3_ABD_CaMKIIp_PP1a + CamR_Ca3_ACD_CaMKIIp_PP1a + CamR_Ca3_BCD_CaMKIIp_PP1a + CamR_Ca4_ABCD_CaMKIIp_PP1a;
  y_bar := moles_bound_Ca_per_moles_Cam/4;
  y_bar_div_1_minus_ybar := y_bar/(1 - y_bar);
  CamR_Ca1_total := Free_CamR_Ca1_total + CaMKII_CamR_Ca1_total + Dp_0_PP2B_CamR_Ca1;
  CamR_Ca1_ratio := CamR_Ca1_total/Cam_total;
  PP1_total := PP1a + PP1a_Dp + CaMKIIp_PP1a + CamR_CaMKIIp_PP1a + CamR_Ca1_A_CaMKIIp_PP1a + CamR_Ca1_B_CaMKIIp_PP1a + CamR_Ca1_C_CaMKIIp_PP1a + CamR_Ca1_D_CaMKIIp_PP1a + CamR_Ca2_AB_CaMKIIp_PP1a + CamR_Ca2_AC_CaMKIIp_PP1a + CamR_Ca2_AD_CaMKIIp_PP1a + CamR_Ca2_BC_CaMKIIp_PP1a + CamR_Ca2_BD_CaMKIIp_PP1a + CamR_Ca2_CD_CaMKIIp_PP1a + CamR_Ca3_ABC_CaMKIIp_PP1a + CamR_Ca3_ABD_CaMKIIp_PP1a + CamR_Ca3_ACD_CaMKIIp_PP1a + CamR_Ca3_BCD_CaMKIIp_PP1a + CamR_Ca4_ABCD_CaMKIIp_PP1a;
  PP1a_bar := PP1a_total/PP1_total;
  K_CamR_T := K_CamT_R*L;
  K_CamR_Ca_C_off := KRC*K_Cam_Ca_on;
  K_CamT_Ca_C_off := K_CamR_Ca_C_off/C_A_B_C_D;
  K_CamR_Ca_D_off := KRD*K_Cam_Ca_on;
  K_CamT_Ca_D_off := K_CamR_Ca_D_off/C_A_B_C_D;
  K_CamR_Ca_A_off := KRA*K_Cam_Ca_on;
  K_CamT_Ca_A_off := K_CamR_Ca_A_off/C_A_B_C_D;
  K_CamR_Ca_B_off := KRB*K_Cam_Ca_on;
  K_CamT_Ca_B_off := K_CamR_Ca_B_off/C_A_B_C_D;
  K_CamR_to_T_Ca2 := C_A_B_C_D*K_CamR_T;
  K_CamT_to_R_Ca2 := K_CamT_R/C_A_B_C_D;
  K_CamR_to_T_Ca1 := K_CamR_T*C_A_B_C_D^(1/2);
  K_CamT_to_R_Ca1 := K_CamT_R/C_A_B_C_D^(1/2);
  K_CamR_to_T_Ca3 := K_CamR_T*C_A_B_C_D^(3/2);
  K_CamT_to_R_Ca3 := K_CamT_R/C_A_B_C_D^(3/2);
  K_CamR_to_T_Ca4 := K_CamR_T*C_A_B_C_D^2;
  K_CamT_to_R_Ca4 := K_CamT_R/C_A_B_C_D^2;
  PKA_initial := Initial_for_PKA;
  CaMKII_total := CamR_CaMKII + CamR_Ca1_A_CaMKII + CamR_Ca1_B_CaMKII + CamR_Ca1_C_CaMKII + CamR_Ca1_D_CaMKII + CamR_Ca1_A_CaMKIIp + CamR_Ca1_B_CaMKIIp + CamR_Ca1_C_CaMKIIp + CamR_Ca1_D_CaMKIIp + CamR_Ca1_A_CaMKIIp_PP1a + CamR_Ca1_B_CaMKIIp_PP1a + CamR_Ca1_C_CaMKIIp_PP1a + CamR_Ca1_D_CaMKIIp_PP1a + CamR_Ca2_AB_CaMKII + CamR_Ca2_AC_CaMKII + CamR_Ca2_AD_CaMKII + CamR_Ca2_BC_CaMKII + CamR_Ca2_BD_CaMKII + CamR_Ca2_CD_CaMKII + CamR_Ca2_AB_CaMKIIp + CamR_Ca2_AC_CaMKIIp + CamR_Ca2_AD_CaMKIIp + CamR_Ca2_BC_CaMKIIp + CamR_Ca2_BD_CaMKIIp + CamR_Ca2_CD_CaMKIIp + CamR_Ca2_AB_CaMKIIp_PP1a + CamR_Ca2_AC_CaMKIIp_PP1a + CamR_Ca2_AD_CaMKIIp_PP1a + CamR_Ca2_BC_CaMKIIp_PP1a + CamR_Ca2_BD_CaMKIIp_PP1a + CamR_Ca2_CD_CaMKIIp_PP1a + CamR_Ca3_ABC_CaMKII + CamR_Ca3_ABD_CaMKII + CamR_Ca3_ACD_CaMKII + CamR_Ca3_BCD_CaMKII + CamR_Ca3_ABC_CaMKIIp + CamR_Ca3_ABD_CaMKIIp + CamR_Ca3_ACD_CaMKIIp + CamR_Ca3_BCD_CaMKIIp + CamR_Ca3_ABC_CaMKIIp_PP1a + CamR_Ca3_ABD_CaMKIIp_PP1a + CamR_Ca3_ACD_CaMKIIp_PP1a + CamR_Ca3_BCD_CaMKIIp_PP1a + CamR_Ca4_ABCD_CaMKII + CamR_CaMKIIp + CamR_CaMKIIp_PP1a + CamR_Ca4_ABCD_CaMKIIp + CamR_Ca4_ABCD_CaMKIIp_PP1a + CaMKII + CaMKIIp + CaMKIIp_PP1a;
  CaMKIIp_bar := CaMKIIp_total/CaMKII_total;
  CaMKII_active_total := CamR_CaMKII + CamR_Ca1_A_CaMKII + CamR_Ca1_B_CaMKII + CamR_Ca1_C_CaMKII + CamR_Ca1_D_CaMKII + CamR_Ca1_A_CaMKIIp + CamR_Ca1_B_CaMKIIp + CamR_Ca1_C_CaMKIIp + CamR_Ca1_D_CaMKIIp + CamR_Ca1_A_CaMKIIp_PP1a + CamR_Ca1_B_CaMKIIp_PP1a + CamR_Ca1_C_CaMKIIp_PP1a + CamR_Ca1_D_CaMKIIp_PP1a + CamR_Ca2_AB_CaMKII + CamR_Ca2_AC_CaMKII + CamR_Ca2_AD_CaMKII + CamR_Ca2_BC_CaMKII + CamR_Ca2_BD_CaMKII + CamR_Ca2_CD_CaMKII + CamR_Ca2_AB_CaMKIIp + CamR_Ca2_AC_CaMKIIp + CamR_Ca2_AD_CaMKIIp + CamR_Ca2_BC_CaMKIIp + CamR_Ca2_BD_CaMKIIp + CamR_Ca2_CD_CaMKIIp + CamR_Ca2_AB_CaMKIIp_PP1a + CamR_Ca2_AC_CaMKIIp_PP1a + CamR_Ca2_AD_CaMKIIp_PP1a + CamR_Ca2_BC_CaMKIIp_PP1a + CamR_Ca2_BD_CaMKIIp_PP1a + CamR_Ca2_CD_CaMKIIp_PP1a + CamR_Ca3_ABC_CaMKII + CamR_Ca3_ABD_CaMKII + CamR_Ca3_ACD_CaMKII + CamR_Ca3_BCD_CaMKII + CamR_Ca3_ABC_CaMKIIp + CamR_Ca3_ABD_CaMKIIp + CamR_Ca3_ACD_CaMKIIp + CamR_Ca3_BCD_CaMKIIp + CamR_Ca3_ABC_CaMKIIp_PP1a + CamR_Ca3_ABD_CaMKIIp_PP1a + CamR_Ca3_ACD_CaMKIIp_PP1a + CamR_Ca3_BCD_CaMKIIp_PP1a + CamR_Ca4_ABCD_CaMKII + CamR_CaMKIIp + CamR_CaMKIIp_PP1a + CamR_Ca4_ABCD_CaMKIIp + CamR_Ca4_ABCD_CaMKIIp_PP1a + CaMKIIp + CaMKIIp_PP1a;
  CaMKII_active_ratio := CaMKII_active_total/CaMKII_total;
  K_CaMKII_autoPhosphorylation := MAX(-0.929*CaMKII_active_ratio^5 + 3.128*CaMKII_active_ratio^4 - 4.249*CaMKII_active_ratio^3 + 2.998*CaMKII_active_ratio^2 + 0.05152*CaMKII_active_ratio - 0.001008, 0)*k_for_CaMKII_autophosphorylation;
  PP2B_non_i := PP2B_total - PP2Bi_Ca1 - PP2Bi_Ca2 - PP2Bi_Ca3 - PP2Bi;
  spikeInputDuration := piecewise(1/spikeFrequency, 1/spikeFrequency < 0.008, 0.008);
  spikeInput := piecewise(0.00717*0.008*spikeFrequency, 1/spikeFrequency < 0.008, 0.00717);

  // Reactions:
  Ca_pump: Ca => ; Spine*Function_for_Ca_pump(Ca, km, vmax);
    km = 1e-6; vmax = 0.004;
  Ca_leak: => Ca; Spine*Constant_flux_irreversible(v);
    v = 4e-5;
  CBPslow_Ca_on: CBPslow + Ca => CBPslowCa; Spine*K_CBPslow_Ca_on*CBPslow*Ca; CBPslow_Ca_on is "Ca binding to CBPslow";
  CBPslow_Ca_off: CBPslowCa => CBPslow + Ca; Spine*K_CBPslow_Ca_off*CBPslowCa; CBPslow_Ca_off is "Ca dissociating from CBPslow_Ca";
  CBPvslow_Ca_on: CBPvslow + Ca => CBPvslowCa; Spine*K_CBPvslow_Ca_on*CBPvslow*Ca; CBPvslow_Ca_on is "Ca binding to CBPvslow";
  CBPvslow_Ca_off: CBPvslowCa => CBPvslow + Ca; Spine*K_CBPvslow_Ca_off*CBPvslowCa; CBPvslow_Ca_off is "Ca dissociating from CBPvslow_Ca";
  Ca_binding_to_CamR_site_A: CamR + Ca => CamR_Ca1_A; Spine*K_Cam_Ca_on*CamR*Ca;
  Ca_binding_to_CamR_site_B: CamR + Ca => CamR_Ca1_B; Spine*K_Cam_Ca_on*CamR*Ca;
  Ca_binding_to_CamR_site_C: CamR + Ca => CamR_Ca1_C; Spine*K_Cam_Ca_on*CamR*Ca;
  Ca_binding_to_CamR_site_D: CamR + Ca => CamR_Ca1_D; Spine*K_Cam_Ca_on*CamR*Ca;
  reaction_4: CamR_Ca1_A => CamR + Ca; Spine*K_CamR_Ca_A_off*CamR_Ca1_A; reaction_4 is "Ca dissociating from CamR_Ca1_A site A";
  reaction_5: CamR_Ca1_B => CamR + Ca; Spine*K_CamR_Ca_B_off*CamR_Ca1_B; reaction_5 is "Ca dissociating from CamR_Ca1_B site B";
  reaction_6: CamR_Ca1_C => CamR + Ca; Spine*K_CamR_Ca_C_off*CamR_Ca1_C; reaction_6 is "Ca dissociating from CamR_Ca1_C site C";
  reaction_7: CamR_Ca1_D => CamR + Ca; Spine*K_CamR_Ca_D_off*CamR_Ca1_D; reaction_7 is "Ca dissociating from CamR_Ca1_D site D";
  Ca_binding_to_CamR_Ca1_A_site_B: CamR_Ca1_A + Ca => CamR_Ca2_AB; Spine*K_Cam_Ca_on*CamR_Ca1_A*Ca;
  Ca_binding_to_CamR_Ca1_A_site_C: CamR_Ca1_A + Ca => CamR_Ca2_AC; Spine*K_Cam_Ca_on*CamR_Ca1_A*Ca;
  Ca_binding_to_CamR_Ca1_A_site_D: CamR_Ca1_A + Ca => CamR_Ca2_AD; Spine*K_Cam_Ca_on*CamR_Ca1_A*Ca;
  Ca_binding_to_CamR_Ca1_B_site_A: CamR_Ca1_B + Ca => CamR_Ca2_AB; Spine*K_Cam_Ca_on*CamR_Ca1_B*Ca;
  Ca_binding_to_CamR_Ca1_B_site_C: CamR_Ca1_B + Ca => CamR_Ca2_BC; Spine*K_Cam_Ca_on*CamR_Ca1_B*Ca;
  Ca_binding_to_CamR_Ca1_B_site_D: CamR_Ca1_B + Ca => CamR_Ca2_BD; Spine*K_Cam_Ca_on*CamR_Ca1_B*Ca;
  Ca_binding_to_CamR_Ca1_C_site_A: CamR_Ca1_C + Ca => CamR_Ca2_AC; Spine*K_Cam_Ca_on*CamR_Ca1_C*Ca;
  Ca_binding_to_CamR_Ca1_C_site_B: CamR_Ca1_C + Ca => CamR_Ca2_BC; Spine*K_Cam_Ca_on*CamR_Ca1_C*Ca;
  Ca_binding_to_CamR_Ca1_C_site_D: CamR_Ca1_C + Ca => CamR_Ca2_CD; Spine*K_Cam_Ca_on*CamR_Ca1_C*Ca;
  Ca_binding_to_CamR_Ca1_D_site_A: CamR_Ca1_D + Ca => CamR_Ca2_AD; Spine*K_Cam_Ca_on*CamR_Ca1_D*Ca;
  Ca_binding_to_CamR_Ca1_D_site_B: CamR_Ca1_D + Ca => CamR_Ca2_BD; Spine*K_Cam_Ca_on*CamR_Ca1_D*Ca;
  Ca_binding_to_CamR_Ca1_D_site_C: CamR_Ca1_D + Ca => CamR_Ca2_CD; Spine*K_Cam_Ca_on*CamR_Ca1_D*Ca;
  reaction_20: CamR_Ca2_AB => CamR_Ca1_A + Ca; Spine*K_CamR_Ca_B_off*CamR_Ca2_AB; reaction_20 is "Ca dissociating from CamR_Ca2_AB site B";
  reaction_21: CamR_Ca2_AC => CamR_Ca1_A + Ca; Spine*K_CamR_Ca_C_off*CamR_Ca2_AC; reaction_21 is "Ca dissociating from CamR_Ca2_AC site C";
  reaction_22: CamR_Ca2_AD => CamR_Ca1_A + Ca; Spine*K_CamR_Ca_D_off*CamR_Ca2_AD; reaction_22 is "Ca dissociating from CamR_Ca2_AD site D";
  reaction_23: CamR_Ca2_AB => CamR_Ca1_B + Ca; Spine*K_CamR_Ca_A_off*CamR_Ca2_AB; reaction_23 is "Ca dissociating from CamR_Ca2_AB site A";
  reaction_24: CamR_Ca2_BC => CamR_Ca1_B + Ca; Spine*K_CamR_Ca_C_off*CamR_Ca2_BC; reaction_24 is "Ca dissociating from CamR_Ca2_BC site C";
  reaction_25: CamR_Ca2_BD => CamR_Ca1_B + Ca; Spine*K_CamR_Ca_D_off*CamR_Ca2_BD; reaction_25 is "Ca dissociating from CamR_Ca2_BD site D";
  reaction_26: CamR_Ca2_AC => CamR_Ca1_C + Ca; Spine*K_CamR_Ca_A_off*CamR_Ca2_AC; reaction_26 is "Ca dissociating from CamR_Ca2_AC site A";
  reaction_27: CamR_Ca2_BC => CamR_Ca1_C + Ca; Spine*K_CamR_Ca_B_off*CamR_Ca2_BC; reaction_27 is "Ca dissociating from CamR_Ca2_BC site B";
  reaction_28: CamR_Ca2_CD => CamR_Ca1_C + Ca; Spine*K_CamR_Ca_D_off*CamR_Ca2_CD; reaction_28 is "Ca dissociating from CamR_Ca2_CD site D";
  reaction_29: CamR_Ca2_AD => CamR_Ca1_D + Ca; Spine*K_CamR_Ca_A_off*CamR_Ca2_AD; reaction_29 is "Ca dissociating from CamR_Ca2_AD site A";
  reaction_30: CamR_Ca2_BD => CamR_Ca1_D + Ca; Spine*K_CamR_Ca_B_off*CamR_Ca2_BD; reaction_30 is "Ca dissociating from CamR_Ca2_BD site B";
  reaction_31: CamR_Ca2_CD => CamR_Ca1_D + Ca; Spine*K_CamR_Ca_C_off*CamR_Ca2_CD; reaction_31 is "Ca dissociating from CamR_Ca2_CD site C";
  Ca_binding_to_CamR_Ca2_AB_site_C: CamR_Ca2_AB + Ca => CamR_Ca3_ABC; Spine*K_Cam_Ca_on*CamR_Ca2_AB*Ca;
  Ca_binding_to_CamR_Ca2_AB_site_D: CamR_Ca2_AB + Ca => CamR_Ca3_ABD; Spine*K_Cam_Ca_on*CamR_Ca2_AB*Ca;
  Ca_binding_to_CamR_Ca2_AC_site_B: CamR_Ca2_AC + Ca => CamR_Ca3_ABC; Spine*K_Cam_Ca_on*CamR_Ca2_AC*Ca;
  Ca_binding_to_CamR_Ca2_AC_site_D: CamR_Ca2_AC + Ca => CamR_Ca3_ACD; Spine*K_Cam_Ca_on*CamR_Ca2_AC*Ca;
  Ca_binding_to_CamR_Ca2_AD_site_B: CamR_Ca2_AD + Ca => CamR_Ca3_ABD; Spine*K_Cam_Ca_on*CamR_Ca2_AD*Ca;
  Ca_binding_to_CamR_Ca2_AD_site_C: CamR_Ca2_AD + Ca => CamR_Ca3_ACD; Spine*K_Cam_Ca_on*CamR_Ca2_AD*Ca;
  Ca_binding_to_CamR_Ca2_BC_site_A: CamR_Ca2_BC + Ca => CamR_Ca3_ABC; Spine*K_Cam_Ca_on*CamR_Ca2_BC*Ca;
  Ca_binding_to_CamR_Ca2_BC_site_D: CamR_Ca2_BC + Ca => CamR_Ca3_BCD; Spine*K_Cam_Ca_on*CamR_Ca2_BC*Ca;
  Ca_binding_to_CamR_Ca2_BD_site_A: CamR_Ca2_BD + Ca => CamR_Ca3_ABD; Spine*K_Cam_Ca_on*CamR_Ca2_BD*Ca;
  Ca_binding_to_CamR_Ca2_BD_site_C: CamR_Ca2_BD + Ca => CamR_Ca3_BCD; Spine*K_Cam_Ca_on*CamR_Ca2_BD*Ca;
  Ca_binding_to_CamR_Ca2_CD_site_A: CamR_Ca2_CD + Ca => CamR_Ca3_ACD; Spine*K_Cam_Ca_on*CamR_Ca2_CD*Ca;
  Ca_binding_to_CamR_Ca2_CD_site_B: CamR_Ca2_CD + Ca => CamR_Ca3_BCD; Spine*K_Cam_Ca_on*CamR_Ca2_CD*Ca;
  reaction_44: CamR_Ca3_ABC => CamR_Ca2_BC + Ca; Spine*K_CamR_Ca_A_off*CamR_Ca3_ABC; reaction_44 is "Ca dissociating from CamR_Ca3_ABC site A";
  reaction_45: CamR_Ca3_ABC => CamR_Ca2_AC + Ca; Spine*K_CamR_Ca_B_off*CamR_Ca3_ABC; reaction_45 is "Ca dissociating from CamR_Ca3_ABC site B";
  reaction_46: CamR_Ca3_ABC => CamR_Ca2_AB + Ca; Spine*K_CamR_Ca_C_off*CamR_Ca3_ABC; reaction_46 is "Ca dissociating from CamR_Ca3_ABC site C";
  reaction_47: CamR_Ca3_ABD => CamR_Ca2_BD + Ca; Spine*K_CamR_Ca_A_off*CamR_Ca3_ABD; reaction_47 is "Ca dissociating from CamR_Ca3_ABD site A";
  reaction_48: CamR_Ca3_ABD => CamR_Ca2_AD + Ca; Spine*K_CamR_Ca_B_off*CamR_Ca3_ABD; reaction_48 is "Ca dissociating from CamR_Ca3_ABD site B";
  reaction_49: CamR_Ca3_ABD => CamR_Ca2_AB + Ca; Spine*K_CamR_Ca_D_off*CamR_Ca3_ABD; reaction_49 is "Ca dissociating from CamR_Ca3_ABD site D";
  reaction_50: CamR_Ca3_ACD => CamR_Ca2_CD + Ca; Spine*K_CamR_Ca_A_off*CamR_Ca3_ACD; reaction_50 is "Ca dissociating from CamR_Ca3_ACD site A";
  reaction_51: CamR_Ca3_ACD => CamR_Ca2_AD + Ca; Spine*K_CamR_Ca_C_off*CamR_Ca3_ACD; reaction_51 is "Ca dissociating from CamR_Ca3_ACD site C";
  reaction_52: CamR_Ca3_ACD => CamR_Ca2_AC + Ca; Spine*K_CamR_Ca_D_off*CamR_Ca3_ACD; reaction_52 is "Ca dissociating from CamR_Ca3_ACD site D";
  reaction_53: CamR_Ca3_BCD => CamR_Ca2_CD + Ca; Spine*K_CamR_Ca_B_off*CamR_Ca3_BCD; reaction_53 is "Ca dissociating from CamR_Ca3_BCD site B";
  reaction_54: CamR_Ca3_BCD => CamR_Ca2_BD + Ca; Spine*K_CamR_Ca_C_off*CamR_Ca3_BCD; reaction_54 is "Ca dissociating from CamR_Ca3_BCD site C";
  reaction_55: CamR_Ca3_BCD => CamR_Ca2_BC + Ca; Spine*K_CamR_Ca_D_off*CamR_Ca3_BCD; reaction_55 is "Ca dissociating from CamR_Ca3_BCD site D";
  reaction_56: CamR_Ca3_ABC + Ca => CamR_Ca4_ABCD; Spine*K_Cam_Ca_on*CamR_Ca3_ABC*Ca; reaction_56 is "Ca binding to CamR_Ca3_ABC site D";
  reaction_57: CamR_Ca3_ABD + Ca => CamR_Ca4_ABCD; Spine*K_Cam_Ca_on*CamR_Ca3_ABD*Ca; reaction_57 is "Ca binding to CamR_Ca3_ABD site C";
  reaction_58: CamR_Ca3_ACD + Ca => CamR_Ca4_ABCD; Spine*K_Cam_Ca_on*CamR_Ca3_ACD*Ca; reaction_58 is "Ca binding to CamR_Ca3_ACD site B";
  reaction_59: CamR_Ca3_BCD + Ca => CamR_Ca4_ABCD; Spine*K_Cam_Ca_on*CamR_Ca3_BCD*Ca; reaction_59 is "Ca binding to CamR_Ca3_BCD site A";
  reaction_60: CamR_Ca4_ABCD => CamR_Ca3_ABC + Ca; Spine*K_CamR_Ca_D_off*CamR_Ca4_ABCD; reaction_60 is "Ca dissociating from CamR_Ca4_ABCD site D";
  reaction_61: CamR_Ca4_ABCD => CamR_Ca3_ABD + Ca; Spine*K_CamR_Ca_C_off*CamR_Ca4_ABCD; reaction_61 is "Ca dissociating from CamR_Ca4_ABCD site C";
  reaction_62: CamR_Ca4_ABCD => CamR_Ca3_ACD + Ca; Spine*K_CamR_Ca_B_off*CamR_Ca4_ABCD; reaction_62 is "Ca dissociating from CamR_Ca4_ABCD site B";
  reaction_63: CamR_Ca4_ABCD => CamR_Ca3_BCD + Ca; Spine*K_CamR_Ca_A_off*CamR_Ca4_ABCD; reaction_63 is "Ca dissociating from CamR_Ca4_ABCD site A";
  Ca_binding_to_camT_site_A: CamT + Ca => CamT_Ca1_A; Spine*K_Cam_Ca_on*CamT*Ca;
  Ca_binding_to_camT_site_B: CamT + Ca => CamT_Ca1_B; Spine*K_Cam_Ca_on*CamT*Ca;
  Ca_binding_to_camT_site_C: CamT + Ca => CamT_Ca1_C; Spine*K_Cam_Ca_on*CamT*Ca;
  Ca_binding_to_camT_site_D: CamT + Ca => CamT_Ca1_D; Spine*K_Cam_Ca_on*CamT*Ca;
  reaction_68: CamT_Ca1_A => CamT + Ca; Spine*K_CamT_Ca_A_off*CamT_Ca1_A; reaction_68 is "Ca dissociating from camT_ca1_A site A";
  reaction_69: CamT_Ca1_B => CamT + Ca; Spine*K_CamT_Ca_B_off*CamT_Ca1_B; reaction_69 is "Ca dissociating from camT_ca1_B site B";
  reaction_70: CamT_Ca1_C => CamT + Ca; Spine*K_CamT_Ca_C_off*CamT_Ca1_C; reaction_70 is "Ca dissociating from camT_ca1_C site C";
  reaction_71: CamT_Ca1_D => CamT + Ca; Spine*K_CamT_Ca_D_off*CamT_Ca1_D; reaction_71 is "Ca dissociating from camT_ca1_D site D";
  Ca_binding_to_camT_ca1_A_site_B: CamT_Ca1_A + Ca => CamT_Ca2_AB; Spine*K_Cam_Ca_on*CamT_Ca1_A*Ca;
  Ca_binding_to_camT_ca1_A_site_C: CamT_Ca1_A + Ca => CamT_Ca2_AC; Spine*K_Cam_Ca_on*CamT_Ca1_A*Ca;
  Ca_binding_to_camT_ca1_A_site_D: CamT_Ca1_A + Ca => CamT_Ca2_AD; Spine*K_Cam_Ca_on*CamT_Ca1_A*Ca;
  Ca_binding_to_camT_ca1_B_site_A: CamT_Ca1_B + Ca => CamT_Ca2_AB; Spine*K_Cam_Ca_on*CamT_Ca1_B*Ca;
  Ca_binding_to_camT_ca1_B_site_C: CamT_Ca1_B + Ca => CamT_Ca2_BC; Spine*K_Cam_Ca_on*CamT_Ca1_B*Ca;
  Ca_binding_to_camT_ca1_B_site_D: CamT_Ca1_B + Ca => CamT_Ca2_BD; Spine*K_Cam_Ca_on*CamT_Ca1_B*Ca;
  Ca_binding_to_camT_ca1_C_site_A: CamT_Ca1_C + Ca => CamT_Ca2_AC; Spine*K_Cam_Ca_on*CamT_Ca1_C*Ca;
  Ca_binding_to_camT_ca1_C_site_B: CamT_Ca1_C + Ca => CamT_Ca2_BC; Spine*K_Cam_Ca_on*CamT_Ca1_C*Ca;
  Ca_binding_to_CamT_ca1_C_site_D: CamT_Ca1_C + Ca => CamT_Ca2_CD; Spine*K_Cam_Ca_on*CamT_Ca1_C*Ca;
  Ca_binding_to_CamT_ca1_D_site_A: CamT_Ca1_D + Ca => CamT_Ca2_AD; Spine*K_Cam_Ca_on*CamT_Ca1_D*Ca;
  Ca_binding_to_CamT_ca1_D_site_B: CamT_Ca1_D + Ca => CamT_Ca2_BD; Spine*K_Cam_Ca_on*CamT_Ca1_D*Ca;
  Ca_binding_to_CamT_ca1_D_site_C: CamT_Ca1_D + Ca => CamT_Ca2_CD; Spine*K_Cam_Ca_on*CamT_Ca1_D*Ca;
  reaction_84: CamT_Ca2_AB => CamT_Ca1_B + Ca; Spine*K_CamT_Ca_A_off*CamT_Ca2_AB; reaction_84 is "Ca dissociating from CamT_ca2_AB site A";
  reaction_85: CamT_Ca2_AB => CamT_Ca1_A + Ca; Spine*K_CamT_Ca_B_off*CamT_Ca2_AB; reaction_85 is "Ca dissociating from CamT_ca2_AB site B";
  reaction_86: CamT_Ca2_AC => CamT_Ca1_C + Ca; Spine*K_CamT_Ca_A_off*CamT_Ca2_AC; reaction_86 is "Ca dissociating from CamT_ca2_AC site A";
  reaction_87: CamT_Ca2_AC => CamT_Ca1_A + Ca; Spine*K_CamT_Ca_C_off*CamT_Ca2_AC; reaction_87 is "Ca dissociating from CamT_ca2_AC site C";
  reaction_88: CamT_Ca2_AD => CamT_Ca1_D + Ca; Spine*K_CamT_Ca_A_off*CamT_Ca2_AD; reaction_88 is "Ca dissociating from CamT_ca2_AD site A";
  reaction_89: CamT_Ca2_AD => CamT_Ca1_A + Ca; Spine*K_CamT_Ca_D_off*CamT_Ca2_AD; reaction_89 is "Ca dissociating from CamT_ca2_AD site D";
  reaction_90: CamT_Ca2_BC => CamT_Ca1_C + Ca; Spine*K_CamT_Ca_B_off*CamT_Ca2_BC; reaction_90 is "Ca dissociating from CamT_ca2_BC site B";
  reaction_91: CamT_Ca2_BC => CamT_Ca1_B + Ca; Spine*K_CamT_Ca_C_off*CamT_Ca2_BC; reaction_91 is "Ca dissociating from CamT_ca2_BC site C";
  reaction_92: CamT_Ca2_BD => CamT_Ca1_D + Ca; Spine*K_CamT_Ca_B_off*CamT_Ca2_BD; reaction_92 is "Ca dissociating from CamT_ca2_BD site B";
  reaction_93: CamT_Ca2_BD => CamT_Ca1_B + Ca; Spine*K_CamT_Ca_D_off*CamT_Ca2_BD; reaction_93 is "Ca dissociating from CamT_ca2_BD site D";
  reaction_94: CamT_Ca2_CD => CamT_Ca1_D + Ca; Spine*K_CamT_Ca_C_off*CamT_Ca2_CD; reaction_94 is "Ca dissociating from CamT_ca2_CD site C";
  reaction_95: CamT_Ca2_CD => CamT_Ca1_C + Ca; Spine*K_CamT_Ca_D_off*CamT_Ca2_CD; reaction_95 is "Ca dissociating from CamT_ca2_CD site D";
  Ca_binding_to_CamT_ca2_AB_site_C: CamT_Ca2_AB + Ca => CamT_Ca3_ABC; Spine*K_Cam_Ca_on*CamT_Ca2_AB*Ca;
  Ca_binding_to_CamT_ca2_AB_site_D: CamT_Ca2_AB + Ca => CamT_Ca3_ABD; Spine*K_Cam_Ca_on*CamT_Ca2_AB*Ca;
  Ca_binding_to_CamT_ca2_AC_site_B: CamT_Ca2_AC + Ca => CamT_Ca3_ABC; Spine*K_Cam_Ca_on*CamT_Ca2_AC*Ca;
  Ca_binding_to_CamT_ca2_AC_site_D: CamT_Ca2_AC + Ca => CamT_Ca3_ACD; Spine*K_Cam_Ca_on*CamT_Ca2_AC*Ca;
  Ca_binding_to_CamT_Ca2_AD_site_B: CamT_Ca2_AD + Ca => CamT_Ca3_ABD; Spine*K_Cam_Ca_on*CamT_Ca2_AD*Ca;
  Ca_binding_to_CamT_Ca2_AD_site_C: CamT_Ca2_AD + Ca => CamT_Ca3_ACD; Spine*K_Cam_Ca_on*CamT_Ca2_AD*Ca;
  Ca_binding_to_CamT_Ca2_BC_site_A: CamT_Ca2_BC + Ca => CamT_Ca3_ABC; Spine*K_Cam_Ca_on*CamT_Ca2_BC*Ca;
  Ca_binding_to_CamT_Ca2_BC_site_D: CamT_Ca2_BC + Ca => CamT_Ca3_BCD; Spine*K_Cam_Ca_on*CamT_Ca2_BC*Ca;
  Ca_binding_to_CamT_Ca2_BD_site_A: CamT_Ca2_BD + Ca => CamT_Ca3_ABD; Spine*K_Cam_Ca_on*CamT_Ca2_BD*Ca;
  Ca_binding_to_CamT_Ca2_BD_site_C: CamT_Ca2_BD + Ca => CamT_Ca3_BCD; Spine*K_Cam_Ca_on*CamT_Ca2_BD*Ca;
  Ca_binding_to_CamT_Ca2_CD_site_A: CamT_Ca2_CD + Ca => CamT_Ca3_ACD; Spine*K_Cam_Ca_on*CamT_Ca2_CD*Ca;
  Ca_binding_to_CamT_Ca2_CD_site_B: CamT_Ca2_CD + Ca => CamT_Ca3_BCD; Spine*K_Cam_Ca_on*CamT_Ca2_CD*Ca;
  reaction_108: CamT_Ca3_ABC => CamT_Ca2_AC + Ca; Spine*K_CamT_Ca_B_off*CamT_Ca3_ABC; reaction_108 is "Ca dissociating from CamT_Ca3_ABC site B";
  reaction_109: CamT_Ca3_ABC => CamT_Ca2_BC + Ca; Spine*K_CamT_Ca_A_off*CamT_Ca3_ABC; reaction_109 is "Ca dissociating from CamT_Ca3_ABC site A";
  reaction_110: CamT_Ca3_ABD => CamT_Ca2_AB + Ca; Spine*K_CamT_Ca_D_off*CamT_Ca3_ABD; reaction_110 is "Ca dissociating from CamT_Ca3_ABD site D";
  reaction_111: CamT_Ca3_ABD => CamT_Ca2_AD + Ca; Spine*K_CamT_Ca_B_off*CamT_Ca3_ABD; reaction_111 is "Ca dissociating from CamT_Ca3_ABD site B";
  reaction_112: CamT_Ca3_ABD => CamT_Ca2_BD + Ca; Spine*K_CamT_Ca_A_off*CamT_Ca3_ABD; reaction_112 is "Ca dissociating from CamT_Ca3_ABD site A";
  reaction_113: CamT_Ca3_ACD => CamT_Ca2_AC + Ca; Spine*K_CamT_Ca_D_off*CamT_Ca3_ACD; reaction_113 is "Ca dissociating from CamT_Ca3_ACD site D";
  reaction_114: CamT_Ca3_ACD => CamT_Ca2_AD + Ca; Spine*K_CamT_Ca_C_off*CamT_Ca3_ACD; reaction_114 is "Ca dissociating from CamT_Ca3_ACD site C";
  reaction_115: CamT_Ca3_ACD => CamT_Ca2_CD + Ca; Spine*K_CamT_Ca_A_off*CamT_Ca3_ACD; reaction_115 is "Ca dissociating from CamT_Ca3_ACD site A";
  reaction_116: CamT_Ca3_BCD => CamT_Ca2_BC + Ca; Spine*K_CamT_Ca_D_off*CamT_Ca3_BCD; reaction_116 is "Ca dissociating from CamT_Ca3_BCD site D";
  reaction_117: CamT_Ca3_BCD => CamT_Ca2_BD + Ca; Spine*K_CamT_Ca_C_off*CamT_Ca3_BCD; reaction_117 is "Ca dissociating from CamT_Ca3_BCD site C";
  reaction_118: CamT_Ca3_BCD => CamT_Ca2_CD + Ca; Spine*K_CamT_Ca_B_off*CamT_Ca3_BCD; reaction_118 is "Ca dissociating from CamT_Ca3_BCD site B";
  reaction_119: CamT_Ca3_ABC + Ca => CamT_Ca4_ABCD; Spine*K_Cam_Ca_on*CamT_Ca3_ABC*Ca; reaction_119 is "Ca binding to CamT_Ca3_ABC site D";
  reaction_120: CamT_Ca3_ABD + Ca => CamT_Ca4_ABCD; Spine*K_Cam_Ca_on*CamT_Ca3_ABD*Ca; reaction_120 is "Ca binding to CamT_Ca3_ABD site C";
  reaction_121: CamT_Ca3_ACD + Ca => CamT_Ca4_ABCD; Spine*K_Cam_Ca_on*CamT_Ca3_ACD*Ca; reaction_121 is "Ca binding to CamT_Ca3_ACD site B";
  reaction_122: CamT_Ca3_BCD + Ca => CamT_Ca4_ABCD; Spine*K_Cam_Ca_on*CamT_Ca3_BCD*Ca; reaction_122 is "Ca binding to CamT_Ca3_BCD site A";
  reaction_123: CamT_Ca4_ABCD => CamT_Ca3_ABC + Ca; Spine*K_CamT_Ca_D_off*CamT_Ca4_ABCD; reaction_123 is "Ca dissociating from CamT_Ca4_ABCD site D";
  reaction_124: CamT_Ca4_ABCD => CamT_Ca3_ABD + Ca; Spine*K_CamT_Ca_C_off*CamT_Ca4_ABCD; reaction_124 is "Ca dissociating from CamT_Ca4_ABCD site C";
  reaction_125: CamT_Ca4_ABCD => CamT_Ca3_ACD + Ca; Spine*K_CamT_Ca_B_off*CamT_Ca4_ABCD; reaction_125 is "Ca dissociating from CamT_Ca4_ABCD site B";
  reaction_126: CamT_Ca4_ABCD => CamT_Ca3_BCD + Ca; Spine*K_CamT_Ca_A_off*CamT_Ca4_ABCD; reaction_126 is "Ca dissociating from CamT_Ca4_ABCD site A";
  Transition_CamR_to_CamT: CamR => CamT; Spine*K_CamR_T*CamR;
  Transition_CamT_to_CamR: CamT => CamR; Spine*K_CamT_R*CamT;
  reaction_129: CamR_Ca1_A => CamT_Ca1_A; Spine*K_CamR_to_T_Ca1*CamR_Ca1_A; reaction_129 is "Transition CamR_Ca1_A to CamT_Ca1_A";
  reaction_130: CamR_Ca1_B => CamT_Ca1_B; Spine*K_CamR_to_T_Ca1*CamR_Ca1_B; reaction_130 is "Transition CamR_Ca1_B to CamT_Ca1_B";
  reaction_131: CamR_Ca1_C => CamT_Ca1_C; Spine*K_CamR_to_T_Ca1*CamR_Ca1_C; reaction_131 is "Transition CamR_Ca1_C to CamT_Ca1_C";
  reaction_132: CamR_Ca1_D => CamT_Ca1_D; Spine*K_CamR_to_T_Ca1*CamR_Ca1_D; reaction_132 is "Transition CamR_Ca1_D to CamT_Ca1_D";
  reaction_133: CamT_Ca1_A => CamR_Ca1_A; Spine*K_CamT_to_R_Ca1*CamT_Ca1_A; reaction_133 is "Transition CamT_Ca1_A to CamR_Ca1_A";
  reaction_134: CamT_Ca1_B => CamR_Ca1_B; Spine*K_CamT_to_R_Ca1*CamT_Ca1_B; reaction_134 is "Transition CamT_Ca1_B to CamR_Ca1_B";
  reaction_135: CamT_Ca1_C => CamR_Ca1_C; Spine*K_CamT_to_R_Ca1*CamT_Ca1_C; reaction_135 is "Transition CamT_Ca1_C to CamR_Ca1_C";
  reaction_136: CamT_Ca1_D => CamR_Ca1_D; Spine*K_CamT_to_R_Ca1*CamT_Ca1_D; reaction_136 is "Transition CamT_Ca1_D to CamR_Ca1_D";
  reaction_137: CamR_Ca2_AB => CamT_Ca2_AB; Spine*K_CamR_to_T_Ca2*CamR_Ca2_AB; reaction_137 is "Transition CamR_Ca2_AB to CamT_Ca2_AB";
  reaction_138: CamR_Ca2_AC => CamT_Ca2_AC; Spine*K_CamR_to_T_Ca2*CamR_Ca2_AC; reaction_138 is "Transition CamR_Ca2_AC to CamT_Ca2_AC";
  reaction_139: CamR_Ca2_AD => CamT_Ca2_AD; Spine*K_CamR_to_T_Ca2*CamR_Ca2_AD; reaction_139 is "Transition CamR_Ca2_AD to CamT_Ca2_AD";
  reaction_140: CamR_Ca2_BC => CamT_Ca2_BC; Spine*K_CamR_to_T_Ca2*CamR_Ca2_BC; reaction_140 is "Transition CamR_Ca2_BC to CamT_Ca2_BC";
  reaction_141: CamR_Ca2_BD => CamT_Ca2_BD; Spine*K_CamR_to_T_Ca2*CamR_Ca2_BD; reaction_141 is "Transition CamR_Ca2_BD to CamT_Ca2_BD";
  reaction_142: CamR_Ca2_CD => CamT_Ca2_CD; Spine*K_CamR_to_T_Ca2*CamR_Ca2_CD; reaction_142 is "Transition CamR_Ca2_CD to CamT_Ca2_CD";
  reaction_143: CamT_Ca2_AB => CamR_Ca2_AB; Spine*K_CamT_to_R_Ca2*CamT_Ca2_AB; reaction_143 is "Transition CamT_Ca2_AB to CamR_Ca2_AB";
  reaction_144: CamT_Ca2_AC => CamR_Ca2_AC; Spine*K_CamT_to_R_Ca2*CamT_Ca2_AC; reaction_144 is "Transition CamT_Ca2_AC to CamR_Ca2_AC";
  reaction_145: CamT_Ca2_AD => CamR_Ca2_AD; Spine*K_CamT_to_R_Ca2*CamT_Ca2_AD; reaction_145 is "Transition CamT_Ca2_AD to CamR_Ca2_AD";
  reaction_146: CamT_Ca2_BC => CamR_Ca2_BC; Spine*K_CamT_to_R_Ca2*CamT_Ca2_BC; reaction_146 is "Transition CamT_Ca2_BC to CamR_Ca2_BC";
  reaction_147: CamT_Ca2_BD => CamR_Ca2_BD; Spine*K_CamT_to_R_Ca2*CamT_Ca2_BD; reaction_147 is "Transition CamT_Ca2_BD to CamR_Ca2_BD";
  reaction_148: CamT_Ca2_CD => CamR_Ca2_CD; Spine*K_CamT_to_R_Ca2*CamT_Ca2_CD; reaction_148 is "Transition CamT_Ca2_CD to CamR_Ca2_CD";
  reaction_149: CamR_Ca3_ABC => CamT_Ca3_ABC; Spine*K_CamR_to_T_Ca3*CamR_Ca3_ABC; reaction_149 is "Transition CamR_Ca3_ABC to CamT_Ca3_ABC";
  reaction_150: CamR_Ca3_ABD => CamT_Ca3_ABD; Spine*K_CamR_to_T_Ca3*CamR_Ca3_ABD; reaction_150 is "Transition CamR_Ca3_ABD to CamT_Ca3_ABD";
  reaction_151: CamR_Ca3_ACD => CamT_Ca3_ACD; Spine*K_CamR_to_T_Ca3*CamR_Ca3_ACD; reaction_151 is "Transition CamR_Ca3_ACD to CamT_Ca3_ACD";
  reaction_152: CamR_Ca3_BCD => CamT_Ca3_BCD; Spine*K_CamR_to_T_Ca3*CamR_Ca3_BCD; reaction_152 is "Transition CamR_Ca3_BCD to CamT_Ca3_BCD";
  reaction_153: CamT_Ca3_ABC => CamR_Ca3_ABC; Spine*K_CamT_to_R_Ca3*CamT_Ca3_ABC; reaction_153 is "Transition CamT_Ca3_ABC to CamR_Ca3_ABC";
  reaction_154: CamT_Ca3_ABD => CamR_Ca3_ABD; Spine*K_CamT_to_R_Ca3*CamT_Ca3_ABD; reaction_154 is "Transition CamT_Ca3_ABD to CamR_Ca3_ABD";
  reaction_155: CamT_Ca3_ACD => CamR_Ca3_ACD; Spine*K_CamT_to_R_Ca3*CamT_Ca3_ACD; reaction_155 is "Transition CamT_Ca3_ACD to CamR_Ca3_ACD";
  reaction_156: CamT_Ca3_BCD => CamR_Ca3_BCD; Spine*K_CamT_to_R_Ca3*CamT_Ca3_BCD; reaction_156 is "Transition CamT_Ca3_BCD to CamR_Ca3_BCD";
  reaction_157: CamR_Ca4_ABCD => CamT_Ca4_ABCD; Spine*K_CamR_to_T_Ca4*CamR_Ca4_ABCD; reaction_157 is "Transition CamR_Ca4_ABCD to CamT_Ca4_ABCD";
  reaction_158: CamT_Ca4_ABCD => CamR_Ca4_ABCD; Spine*K_CamT_to_R_Ca4*CamT_Ca4_ABCD; reaction_158 is "Transition CamT_Ca4_ABCD to CamR_Ca4_ABCD";
  CamKII_binding_to_CamR: CamR + CaMKII => CamR_CaMKII; Spine*K_CamR_CaMKII_p_on*CamR*CaMKII;
  CamKII_binding_to_CamR_Ca1_A: CamR_Ca1_A + CaMKII => CamR_Ca1_A_CaMKII; Spine*K_CamR_CaMKII_p_on*CamR_Ca1_A*CaMKII;
  CamKII_binding_to_CamR_Ca1_B: CamR_Ca1_B + CaMKII => CamR_Ca1_B_CaMKII; Spine*K_CamR_CaMKII_p_on*CamR_Ca1_B*CaMKII;
  CamKII_binding_to_CamR_Ca1_C: CamR_Ca1_C + CaMKII => CamR_Ca1_C_CaMKII; Spine*K_CamR_CaMKII_p_on*CamR_Ca1_C*CaMKII;
  CamKII_binding_to_CamR_Ca1_D: CamR_Ca1_D + CaMKII => CamR_Ca1_D_CaMKII; Spine*K_CamR_CaMKII_p_on*CamR_Ca1_D*CaMKII;
  CamKII_binding_to_CamR_Ca2_AB: CamR_Ca2_AB + CaMKII => CamR_Ca2_AB_CaMKII; Spine*K_CamR_CaMKII_p_on*CamR_Ca2_AB*CaMKII;
  CamKII_binding_to_CamR_Ca2_AC: CamR_Ca2_AC + CaMKII => CamR_Ca2_AC_CaMKII; Spine*K_CamR_CaMKII_p_on*CamR_Ca2_AC*CaMKII;
  CamKII_binding_to_CamR_Ca2_AD: CamR_Ca2_AD + CaMKII => CamR_Ca2_AD_CaMKII; Spine*K_CamR_CaMKII_p_on*CamR_Ca2_AD*CaMKII;
  CamKII_binding_to_CamR_Ca2_BC: CamR_Ca2_BC + CaMKII => CamR_Ca2_BC_CaMKII; Spine*K_CamR_CaMKII_p_on*CamR_Ca2_BC*CaMKII;
  CamKII_binding_to_CamR_Ca2_BD: CamR_Ca2_BD + CaMKII => CamR_Ca2_BD_CaMKII; Spine*K_CamR_CaMKII_p_on*CamR_Ca2_BD*CaMKII;
  CamKII_binding_to_CamR_Ca2_CD: CamR_Ca2_CD + CaMKII => CamR_Ca2_CD_CaMKII; Spine*K_CamR_CaMKII_p_on*CamR_Ca2_CD*CaMKII;
  CamKII_binding_to_CamR_Ca3_ABC: CamR_Ca3_ABC + CaMKII => CamR_Ca3_ABC_CaMKII; Spine*K_CamR_CaMKII_p_on*CamR_Ca3_ABC*CaMKII;
  CamKII_binding_to_CamR_Ca3_ABD: CamR_Ca3_ABD + CaMKII => CamR_Ca3_ABD_CaMKII; Spine*K_CamR_CaMKII_p_on*CamR_Ca3_ABD*CaMKII;
  CamKII_binding_to_CamR_Ca3_ACD: CamR_Ca3_ACD + CaMKII => CamR_Ca3_ACD_CaMKII; Spine*K_CamR_CaMKII_p_on*CamR_Ca3_ACD*CaMKII;
  CamKII_binding_to_CamR_Ca3_BCD: CamR_Ca3_BCD + CaMKII => CamR_Ca3_BCD_CaMKII; Spine*K_CamR_CaMKII_p_on*CamR_Ca3_BCD*CaMKII;
  CamKII_binding_to_CamR_Ca4_ABCD: CamR_Ca4_ABCD + CaMKII => CamR_Ca4_ABCD_CaMKII; Spine*K_CamR_CaMKII_p_on*CamR_Ca4_ABCD*CaMKII;
  CamKII_dissociating_from_CamR: CamR_CaMKII => CamR + CaMKII; Spine*K_CamR_CaMKII_off*CamR_CaMKII;
  reaction_176: CamR_Ca1_A_CaMKII => CamR_Ca1_A + CaMKII; Spine*K_CamR_CaMKII_off*CamR_Ca1_A_CaMKII; reaction_176 is "CamKII dissociating from CamR_Ca1_A";
  reaction_177: CamR_Ca1_B_CaMKII => CamR_Ca1_B + CaMKII; Spine*K_CamR_CaMKII_off*CamR_Ca1_B_CaMKII; reaction_177 is "CamKII dissociating from CamR_Ca1_B";
  reaction_178: CamR_Ca1_C_CaMKII => CamR_Ca1_C + CaMKII; Spine*K_CamR_CaMKII_off*CamR_Ca1_C_CaMKII; reaction_178 is "CamKII dissociating from CamR_Ca1_C";
  reaction_179: CamR_Ca1_D_CaMKII => CamR_Ca1_D + CaMKII; Spine*K_CamR_CaMKII_off*CamR_Ca1_D_CaMKII; reaction_179 is "CamKII dissociating from CamR_Ca1_D";
  reaction_180: CamR_Ca2_AB_CaMKII => CamR_Ca2_AB + CaMKII; Spine*K_CamR_CaMKII_off*CamR_Ca2_AB_CaMKII; reaction_180 is "CamKII dissociating from CamR_Ca2_AB";
  reaction_181: CamR_Ca2_AC_CaMKII => CamR_Ca2_AC + CaMKII; Spine*K_CamR_CaMKII_off*CamR_Ca2_AC_CaMKII; reaction_181 is "CamKII dissociating from CamR_Ca2_AC";
  reaction_182: CamR_Ca2_AD_CaMKII => CamR_Ca2_AD + CaMKII; Spine*K_CamR_CaMKII_off*CamR_Ca2_AD_CaMKII; reaction_182 is "CamKII dissociating from CamR_Ca2_AD";
  reaction_183: CamR_Ca2_BC_CaMKII => CamR_Ca2_BC + CaMKII; Spine*K_CamR_CaMKII_off*CamR_Ca2_BC_CaMKII; reaction_183 is "CamKII dissociating from CamR_Ca2_BC";
  reaction_184: CamR_Ca2_BD_CaMKII => CamR_Ca2_BD + CaMKII; Spine*K_CamR_CaMKII_off*CamR_Ca2_BD_CaMKII; reaction_184 is "CamKII dissociating from CamR_Ca2_BD";
  reaction_185: CamR_Ca2_CD_CaMKII => CamR_Ca2_CD + CaMKII; Spine*K_CamR_CaMKII_off*CamR_Ca2_CD_CaMKII; reaction_185 is "CamKII dissociating from CamR_Ca2_CD";
  reaction_186: CamR_Ca3_ABC_CaMKII => CamR_Ca3_ABC + CaMKII; Spine*K_CamR_CaMKII_off*CamR_Ca3_ABC_CaMKII; reaction_186 is "CamKII dissociating from CamR_Ca3_ABC";
  reaction_187: CamR_Ca3_ABD_CaMKII => CamR_Ca3_ABD + CaMKII; Spine*K_CamR_CaMKII_off*CamR_Ca3_ABD_CaMKII; reaction_187 is "CamKII dissociating from CamR_Ca3_ABD";
  reaction_188: CamR_Ca3_ACD_CaMKII => CamR_Ca3_ACD + CaMKII; Spine*K_CamR_CaMKII_off*CamR_Ca3_ACD_CaMKII; reaction_188 is "CamKII dissociating from CamR_Ca3_ACD";
  reaction_189: CamR_Ca3_BCD_CaMKII => CamR_Ca3_BCD + CaMKII; Spine*K_CamR_CaMKII_off*CamR_Ca3_BCD_CaMKII; reaction_189 is "CamKII dissociating from CamR_Ca3_BCD";
  reaction_190: CamR_Ca4_ABCD_CaMKII => CamR_Ca4_ABCD + CaMKII; Spine*K_CamR_CaMKII_off*CamR_Ca4_ABCD_CaMKII; reaction_190 is "CamKII dissociating from CamR_Ca4_ABCD";
  PP2B_binding_to_CamR: CamR + PP2B => CamR_PP2B; Spine*K_CamR_PP2B_on*CamR*PP2B;
  PP2B_binding_to_CamR_Ca1_A: CamR_Ca1_A + PP2B => CamR_Ca1_A_PP2B; Spine*K_CamR_PP2B_on*CamR_Ca1_A*PP2B;
  PP2B_binding_to_CamR_Ca1_B: CamR_Ca1_B + PP2B => CamR_Ca1_B_PP2B; Spine*K_CamR_PP2B_on*CamR_Ca1_B*PP2B;
  PP2B_binding_to_CamR_Ca1_C: CamR_Ca1_C + PP2B => CamR_Ca1_C_PP2B; Spine*K_CamR_PP2B_on*CamR_Ca1_C*PP2B;
  PP2B_binding_to_CamR_Ca1_D: CamR_Ca1_D + PP2B => CamR_Ca1_D_PP2B; Spine*K_CamR_PP2B_on*CamR_Ca1_D*PP2B;
  PP2B_binding_to_CamR_Ca2_AB: CamR_Ca2_AB + PP2B => CamR_Ca2_AB_PP2B; Spine*K_CamR_PP2B_on*CamR_Ca2_AB*PP2B;
  PP2B_binding_to_CamR_Ca2_AD: CamR_Ca2_AD + PP2B => CamR_Ca2_AD_PP2B; Spine*K_CamR_PP2B_on*CamR_Ca2_AD*PP2B;
  PP2B_binding_to_CamR_Ca2_BC: CamR_Ca2_BC + PP2B => CamR_Ca2_BC_PP2B; Spine*K_CamR_PP2B_on*CamR_Ca2_BC*PP2B;
  PP2B_binding_to_CamR_Ca2_BD: CamR_Ca2_BD + PP2B => CamR_Ca2_BD_PP2B; Spine*K_CamR_PP2B_on*CamR_Ca2_BD*PP2B;
  PP2B_binding_to_CamR_Ca2_CD: CamR_Ca2_CD + PP2B => CamR_Ca2_CD_PP2B; Spine*K_CamR_PP2B_on*CamR_Ca2_CD*PP2B;
  PP2B_binding_to_CamR_Ca3_ABC: CamR_Ca3_ABC + PP2B => CamR_Ca3_ABC_PP2B; Spine*K_CamR_PP2B_on*CamR_Ca3_ABC*PP2B;
  PP2B_binding_to_CamR_Ca3_ABD: CamR_Ca3_ABD + PP2B => CamR_Ca3_ABD_PP2B; Spine*K_CamR_PP2B_on*CamR_Ca3_ABD*PP2B;
  PP2B_binding_to_CamR_Ca3_ACD: CamR_Ca3_ACD + PP2B => CamR_Ca3_ACD_PP2B; Spine*K_CamR_PP2B_on*CamR_Ca3_ACD*PP2B;
  PP2B_binding_to_CamR_Ca3_BCD: CamR_Ca3_BCD + PP2B => CamR_Ca3_BCD_PP2B; Spine*K_CamR_PP2B_on*CamR_Ca3_BCD*PP2B;
  PP2B_binding_to_CamR_Ca4_ABCD: CamR_Ca4_ABCD + PP2B => CamR_Ca4_ABCD_PP2B; Spine*K_CamR_PP2B_on*CamR_Ca4_ABCD*PP2B;
  PP2B_dissociating_from_CamR: CamR_PP2B => CamR + PP2B; Spine*K_CamR_PP2B_off*CamR_PP2B;
  reaction_208: CamR_Ca1_A_PP2B => CamR_Ca1_A + PP2B; Spine*K_CamR_PP2B_off*CamR_Ca1_A_PP2B; reaction_208 is "PP2B dissociating from CamR_Ca1_A";
  reaction_209: CamR_Ca1_B_PP2B => CamR_Ca1_B + PP2B; Spine*K_CamR_PP2B_off*CamR_Ca1_B_PP2B; reaction_209 is "PP2B dissociating from CamR_Ca1_B";
  reaction_210: CamR_Ca1_C_PP2B => CamR_Ca1_C + PP2B; Spine*K_CamR_PP2B_off*CamR_Ca1_C_PP2B; reaction_210 is "PP2B dissociating from CamR_Ca1_C";
  reaction_211: CamR_Ca1_D_PP2B => CamR_Ca1_D + PP2B; Spine*K_CamR_PP2B_off*CamR_Ca1_D_PP2B; reaction_211 is "PP2B dissociating from CamR_Ca1_D";
  reaction_212: CamR_Ca2_AB_PP2B => CamR_Ca2_AB + PP2B; Spine*K_CamR_PP2B_off*CamR_Ca2_AB_PP2B; reaction_212 is "PP2B dissociating from CamR_Ca2_AB";
  reaction_213: CamR_Ca2_AC_PP2B => CamR_Ca2_AC + PP2B; Spine*K_CamR_PP2B_off*CamR_Ca2_AC_PP2B; reaction_213 is "PP2B dissociating from CamR_Ca2_AC";
  reaction_214: CamR_Ca2_AD_PP2B => CamR_Ca2_AD + PP2B; Spine*K_CamR_PP2B_off*CamR_Ca2_AD_PP2B; reaction_214 is "PP2B dissociating from CamR_Ca2_AD";
  reaction_215: CamR_Ca2_BC_PP2B => CamR_Ca2_BC + PP2B; Spine*K_CamR_PP2B_off*CamR_Ca2_BC_PP2B; reaction_215 is "PP2B dissociating from CamR_Ca2_BC";
  reaction_216: CamR_Ca2_BD_PP2B => CamR_Ca2_BD + PP2B; Spine*K_CamR_PP2B_off*CamR_Ca2_BD_PP2B; reaction_216 is "PP2B dissociating from CamR_Ca2_BD";
  reaction_217: CamR_Ca2_CD_PP2B => CamR_Ca2_CD + PP2B; Spine*K_CamR_PP2B_off*CamR_Ca2_CD_PP2B; reaction_217 is "PP2B dissociating from CamR_Ca2_CD";
  reaction_218: CamR_Ca3_ABC_PP2B => CamR_Ca3_ABC + PP2B; Spine*K_CamR_PP2B_off*CamR_Ca3_ABC_PP2B; reaction_218 is "PP2B dissociating from CamR_Ca3_ABC";
  reaction_219: CamR_Ca3_ABD_PP2B => CamR_Ca3_ABD + PP2B; Spine*K_CamR_PP2B_off*CamR_Ca3_ABD_PP2B; reaction_219 is "PP2B dissociating from CamR_Ca3_ABD";
  reaction_220: CamR_Ca3_ACD_PP2B => CamR_Ca3_ACD + PP2B; Spine*K_CamR_PP2B_off*CamR_Ca3_ACD_PP2B; reaction_220 is "PP2B dissociating from CamR_Ca3_ACD";
  reaction_221: CamR_Ca3_BCD_PP2B => CamR_Ca3_BCD + PP2B; Spine*K_CamR_PP2B_off*CamR_Ca3_BCD_PP2B; reaction_221 is "PP2B dissociating from CamR_Ca3_BCD";
  reaction_222: CamR_Ca4_ABCD_PP2B => CamR_Ca4_ABCD + PP2B; Spine*K_CamR_PP2B_off*CamR_Ca4_ABCD_PP2B; reaction_222 is "PP2B dissociating from CamR_Ca4_ABCD";
  Ca_binding_to_CamR_CamKII_site_A: CamR_CaMKII + Ca => CamR_Ca1_A_CaMKII; Spine*K_Cam_Ca_on*CamR_CaMKII*Ca;
  Ca_binding_to_CamR_CamKII_site_B: CamR_CaMKII + Ca => CamR_Ca1_B_CaMKII; Spine*K_Cam_Ca_on*CamR_CaMKII*Ca;
  Ca_binding_to_CamR_CamKII_site_C: CamR_CaMKII + Ca => CamR_Ca1_C_CaMKII; Spine*K_Cam_Ca_on*CamR_CaMKII*Ca;
  Ca_binding_to_CamR_CamKII_site_D: CamR_CaMKII + Ca => CamR_Ca1_D_CaMKII; Spine*K_Cam_Ca_on*CamR_CaMKII*Ca;
  reaction_227: CamR_Ca1_A_CaMKII => CamR_CaMKII + Ca; Spine*K_CamR_Ca_A_off*CamR_Ca1_A_CaMKII; reaction_227 is "Ca dissociating from CamR_Ca1_CamKII site A";
  reaction_228: CamR_Ca1_C_CaMKII => CamR_CaMKII + Ca; Spine*K_CamR_Ca_C_off*CamR_Ca1_C_CaMKII; reaction_228 is "Ca dissociating from CamR_Ca1_CamKII site C";
  reaction_229: CamR_Ca1_D_CaMKII => CamR_CaMKII + Ca; Spine*K_CamR_Ca_D_off*CamR_Ca1_D_CaMKII; reaction_229 is "Ca dissociating from CamR_Ca1_CamKII site D";
  reaction_230: CamR_Ca1_A_CaMKII + Ca => CamR_Ca2_AB_CaMKII; Spine*K_Cam_Ca_on*CamR_Ca1_A_CaMKII*Ca; reaction_230 is "Ca binding to CamR_Ca1_A_CamKII site B";
  reaction_231: CamR_Ca1_A_CaMKII + Ca => CamR_Ca2_AC_CaMKII; Spine*K_Cam_Ca_on*CamR_Ca1_A_CaMKII*Ca; reaction_231 is "Ca binding to CamR_Ca1_A_CamKII site C";
  reaction_232: CamR_Ca1_A_CaMKII + Ca => CamR_Ca2_AD_CaMKII; Spine*K_Cam_Ca_on*CamR_Ca1_A_CaMKII*Ca; reaction_232 is "Ca binding to CamR_Ca1_A_CamKII site D";
  reaction_233: CamR_Ca1_B_CaMKII + Ca => CamR_Ca2_AB_CaMKII; Spine*K_Cam_Ca_on*CamR_Ca1_B_CaMKII*Ca; reaction_233 is "Ca binding to CamR_Ca1_B_CamKII site A";
  reaction_234: CamR_Ca1_B_CaMKII + Ca => CamR_Ca2_BC_CaMKII; Spine*K_Cam_Ca_on*CamR_Ca1_B_CaMKII*Ca; reaction_234 is "Ca binding to CamR_Ca1_B_CamKII site C";
  reaction_235: CamR_Ca1_B_CaMKII + Ca => CamR_Ca2_BD_CaMKII; Spine*K_Cam_Ca_on*CamR_Ca1_B_CaMKII*Ca; reaction_235 is "Ca binding to CamR_Ca1_B_CamKII site D";
  reaction_236: CamR_Ca1_C_CaMKII + Ca => CamR_Ca2_AC_CaMKII; Spine*K_Cam_Ca_on*CamR_Ca1_C_CaMKII*Ca; reaction_236 is "Ca binding to CamR_Ca1_C_CamKII site A";
  reaction_237: CamR_Ca1_C_CaMKII + Ca => CamR_Ca2_BC_CaMKII; Spine*K_Cam_Ca_on*CamR_Ca1_C_CaMKII*Ca; reaction_237 is "Ca binding to CamR_Ca1_C_CamKII site B";
  reaction_238: CamR_Ca1_C_CaMKII + Ca => CamR_Ca2_CD_CaMKII; Spine*K_Cam_Ca_on*CamR_Ca1_C_CaMKII*Ca; reaction_238 is "Ca binding to CamR_Ca1_C_CamKII site D";
  reaction_239: CamR_Ca1_D_CaMKII + Ca => CamR_Ca2_AD_CaMKII; Spine*K_Cam_Ca_on*CamR_Ca1_D_CaMKII*Ca; reaction_239 is "Ca binding to CamR_Ca1_D_CamKII site A";
  reaction_240: CamR_Ca1_D_CaMKII + Ca => CamR_Ca2_BD_CaMKII; Spine*K_Cam_Ca_on*CamR_Ca1_D_CaMKII*Ca; reaction_240 is "Ca binding to CamR_Ca1_D_CamKII site B";
  reaction_241: CamR_Ca1_D_CaMKII + Ca => CamR_Ca2_CD_CaMKII; Spine*K_Cam_Ca_on*CamR_Ca1_D_CaMKII*Ca; reaction_241 is "Ca binding to CamR_Ca1_D_CamKII site C";
  reaction_242: CamR_Ca2_AB_CaMKII => CamR_Ca1_B_CaMKII + Ca; Spine*K_CamR_Ca_A_off*CamR_Ca2_AB_CaMKII; reaction_242 is "Ca dissociating from CamR_Ca2_AB_CamKII site A";
  reaction_243: CamR_Ca2_AB_CaMKII => CamR_Ca1_A_CaMKII + Ca; Spine*K_CamR_Ca_B_off*CamR_Ca2_AB_CaMKII; reaction_243 is "Ca dissociating from CamR_Ca2_AB_CamKII site B";
  reaction_244: CamR_Ca2_AC_CaMKII => CamR_Ca1_C_CaMKII + Ca; Spine*K_CamR_Ca_A_off*CamR_Ca2_AC_CaMKII; reaction_244 is "Ca dissociating from CamR_Ca2_AC_CamKII site A";
  reaction_245: CamR_Ca2_AC_CaMKII => CamR_Ca1_A_CaMKII + Ca; Spine*K_CamR_Ca_C_off*CamR_Ca2_AC_CaMKII; reaction_245 is "Ca dissociating from CamR_Ca2_AC_CamKII site C";
  reaction_246: CamR_Ca2_AD_CaMKII => CamR_Ca1_D_CaMKII + Ca; Spine*K_CamR_Ca_A_off*CamR_Ca2_AD_CaMKII; reaction_246 is "Ca dissociating from CamR_Ca2_AD_CamKII site A";
  reaction_247: CamR_Ca2_AD_CaMKII => CamR_Ca1_A_CaMKII + Ca; Spine*K_CamR_Ca_D_off*CamR_Ca2_AD_CaMKII; reaction_247 is "Ca dissociating from CamR_Ca2_AD_CamKII site D";
  reaction_248: CamR_Ca2_BC_CaMKII => CamR_Ca1_C_CaMKII + Ca; Spine*K_CamR_Ca_B_off*CamR_Ca2_BC_CaMKII; reaction_248 is "Ca dissociating from CamR_Ca2_BC_CamKII site B";
  reaction_249: CamR_Ca2_BC_CaMKII => CamR_Ca1_B_CaMKII + Ca; Spine*K_CamR_Ca_C_off*CamR_Ca2_BC_CaMKII; reaction_249 is "Ca dissociating from CamR_Ca2_BC_CamKII site C";
  reaction_250: CamR_Ca2_BD_CaMKII => CamR_Ca1_D_CaMKII + Ca; Spine*K_CamR_Ca_B_off*CamR_Ca2_BD_CaMKII; reaction_250 is "Ca dissociating from CamR_Ca2_BD_CamKII site B";
  reaction_251: CamR_Ca2_BD_CaMKII => CamR_Ca1_B_CaMKII + Ca; Spine*K_CamR_Ca_D_off*CamR_Ca2_BD_CaMKII; reaction_251 is "Ca dissociating from CamR_Ca2_BD_CamKII site D";
  reaction_252: CamR_Ca2_CD_CaMKII => CamR_Ca1_D_CaMKII + Ca; Spine*K_CamR_Ca_C_off*CamR_Ca2_CD_CaMKII; reaction_252 is "Ca dissociating from CamR_Ca2_CD_CamKII site C";
  reaction_253: CamR_Ca2_CD_CaMKII => CamR_Ca1_C_CaMKII + Ca; Spine*K_CamR_Ca_D_off*CamR_Ca2_CD_CaMKII; reaction_253 is "Ca dissociating from CamR_Ca2_CD_CamKII site D";
  reaction_254: CamR_Ca2_AB_CaMKII + Ca => CamR_Ca3_ABC_CaMKII; Spine*K_Cam_Ca_on*CamR_Ca2_AB_CaMKII*Ca; reaction_254 is "Ca binding to CamR_Ca2_AB_CamKII site C";
  reaction_255: CamR_Ca2_AB_CaMKII + Ca => CamR_Ca3_ABD_CaMKII; Spine*K_Cam_Ca_on*CamR_Ca2_AB_CaMKII*Ca; reaction_255 is "Ca binding to CamR_Ca2_AB_CamKII site D";
  reaction_256: CamR_Ca2_AC_CaMKII + Ca => CamR_Ca3_ABC_CaMKII; Spine*K_Cam_Ca_on*CamR_Ca2_AC_CaMKII*Ca; reaction_256 is "Ca binding to CamR_Ca2_AC_CamKII site B";
  reaction_257: CamR_Ca2_AC_CaMKII + Ca => CamR_Ca3_ACD_CaMKII; Spine*K_Cam_Ca_on*CamR_Ca2_AC_CaMKII*Ca; reaction_257 is "Ca binding to CamR_Ca2_AC_CamKII site D";
  reaction_258: CamR_Ca2_AD_CaMKII + Ca => CamR_Ca3_ABD_CaMKII; Spine*K_Cam_Ca_on*CamR_Ca2_AD_CaMKII*Ca; reaction_258 is "Ca binding to CamR_Ca2_AD_CamKII site B";
  reaction_259: CamR_Ca2_AD_CaMKII + Ca => CamR_Ca3_ACD_CaMKII; Spine*K_Cam_Ca_on*CamR_Ca2_AD_CaMKII*Ca; reaction_259 is "Ca binding to CamR_Ca2_AD_CamKII site C";
  reaction_260: CamR_Ca2_BC_CaMKII + Ca => CamR_Ca3_ABC_CaMKII; Spine*K_Cam_Ca_on*CamR_Ca2_BC_CaMKII*Ca; reaction_260 is "Ca binding to CamR_Ca2_BC_CamKII site A";
  reaction_261: CamR_Ca2_BC_CaMKII + Ca => CamR_Ca3_BCD_CaMKII; Spine*K_Cam_Ca_on*CamR_Ca2_BC_CaMKII*Ca; reaction_261 is "Ca binding to CamR_Ca2_BC_CamKII site D";
  reaction_262: CamR_Ca2_BD_CaMKII + Ca => CamR_Ca3_ABD_CaMKII; Spine*K_Cam_Ca_on*CamR_Ca2_BD_CaMKII*Ca; reaction_262 is "Ca binding to CamR_Ca2_BD_CamKII site A";
  reaction_263: CamR_Ca2_BD_CaMKII + Ca => CamR_Ca3_BCD_CaMKII; Spine*K_Cam_Ca_on*CamR_Ca2_BD_CaMKII*Ca; reaction_263 is "Ca binding to CamR_Ca2_BD_CamKII site C";
  reaction_264: CamR_Ca2_CD_CaMKII + Ca => CamR_Ca3_ACD_CaMKII; Spine*K_Cam_Ca_on*CamR_Ca2_CD_CaMKII*Ca; reaction_264 is "Ca binding to CamR_Ca2_CD_CamKII site A";
  reaction_265: CamR_Ca2_CD_CaMKII + Ca => CamR_Ca3_BCD_CaMKII; Spine*K_Cam_Ca_on*CamR_Ca2_CD_CaMKII*Ca; reaction_265 is "Ca binding to CamR_Ca2_CD_CamKII site B";
  reaction_266: CamR_Ca3_ABC_CaMKII => CamR_Ca2_AB_CaMKII + Ca; Spine*K_CamR_Ca_C_off*CamR_Ca3_ABC_CaMKII; reaction_266 is "Ca dissociating from CamR_Ca3_ABC_CamKII site C";
  reaction_267: CamR_Ca3_ABC_CaMKII => CamR_Ca2_AC_CaMKII + Ca; Spine*K_CamR_Ca_B_off*CamR_Ca3_ABC_CaMKII; reaction_267 is "Ca dissociating from CamR_Ca3_ABC_CamKII site B";
  reaction_268: CamR_Ca3_ABC_CaMKII => CamR_Ca2_BC_CaMKII + Ca; Spine*K_CamR_Ca_A_off*CamR_Ca3_ABC_CaMKII; reaction_268 is "Ca dissociating from CamR_Ca3_ABC_CamKII site A";
  reaction_269: CamR_Ca3_ABD_CaMKII => CamR_Ca2_AB_CaMKII + Ca; Spine*K_CamR_Ca_D_off*CamR_Ca3_ABD_CaMKII; reaction_269 is "Ca dissociating from CamR_Ca3_ABD_CamKII site D";
  reaction_270: CamR_Ca3_ABD_CaMKII => CamR_Ca2_AD_CaMKII + Ca; Spine*K_CamR_Ca_B_off*CamR_Ca3_ABD_CaMKII; reaction_270 is "Ca dissociating from CamR_Ca3_ABD_CamKII site B";
  reaction_271: CamR_Ca3_ABD_CaMKII => CamR_Ca2_BD_CaMKII + Ca; Spine*K_CamR_Ca_A_off*CamR_Ca3_ABD_CaMKII; reaction_271 is "Ca dissociating from CamR_Ca3_ABD_CamKII site A";
  reaction_272: CamR_Ca3_ACD_CaMKII => CamR_Ca2_AC_CaMKII + Ca; Spine*K_CamR_Ca_D_off*CamR_Ca3_ACD_CaMKII; reaction_272 is "Ca dissociating from CamR_Ca3_ACD_CamKII site D";
  reaction_273: CamR_Ca3_ACD_CaMKII => CamR_Ca2_AD_CaMKII + Ca; Spine*K_CamR_Ca_C_off*CamR_Ca3_ACD_CaMKII; reaction_273 is "Ca dissociating from CamR_Ca3_ACD_CamKII site C";
  reaction_274: CamR_Ca3_ACD_CaMKII => CamR_Ca2_CD_CaMKII + Ca; Spine*K_CamR_Ca_A_off*CamR_Ca3_ACD_CaMKII; reaction_274 is "Ca dissociating from CamR_Ca3_ACD_CamKII site A";
  reaction_275: CamR_Ca3_BCD_CaMKII => CamR_Ca2_BC_CaMKII + Ca; Spine*K_CamR_Ca_D_off*CamR_Ca3_BCD_CaMKII; reaction_275 is "Ca dissociating from CamR_Ca3_BCD_CamKII site D";
  reaction_276: CamR_Ca3_BCD_CaMKII => CamR_Ca2_BD_CaMKII + Ca; Spine*K_CamR_Ca_C_off*CamR_Ca3_BCD_CaMKII; reaction_276 is "Ca dissociating from CamR_Ca3_BCD_CamKII site C";
  reaction_277: CamR_Ca3_BCD_CaMKII => CamR_Ca2_CD_CaMKII + Ca; Spine*K_CamR_Ca_B_off*CamR_Ca3_BCD_CaMKII; reaction_277 is "Ca dissociating from CamR_Ca3_BCD_CamKII site B";
  reaction_278: CamR_Ca3_BCD_CaMKII + Ca => CamR_Ca4_ABCD_CaMKII; Spine*K_Cam_Ca_on*CamR_Ca3_BCD_CaMKII*Ca; reaction_278 is "Ca binding to CamR_Ca3_BCD_CamKII site A";
  reaction_279: CamR_Ca3_ACD_CaMKII + Ca => CamR_Ca4_ABCD_CaMKII; Spine*K_Cam_Ca_on*CamR_Ca3_ACD_CaMKII*Ca; reaction_279 is "Ca binding to CamR_Ca3_ACD_CamKII site B";
  reaction_280: CamR_Ca3_ABD_CaMKII + Ca => CamR_Ca4_ABCD_CaMKII; Spine*K_Cam_Ca_on*CamR_Ca3_ABD_CaMKII*Ca; reaction_280 is "Ca binding to CamR_Ca3_ABD_CamKII site C";
  reaction_281: CamR_Ca3_ABC_CaMKII + Ca => CamR_Ca4_ABCD_CaMKII; Spine*K_Cam_Ca_on*CamR_Ca3_ABC_CaMKII*Ca; reaction_281 is "Ca binding to CamR_Ca3_ABC_CamKII site D";
  reaction_282: CamR_Ca4_ABCD_CaMKII => CamR_Ca3_BCD_CaMKII + Ca; Spine*K_CamR_Ca_A_off*CamR_Ca4_ABCD_CaMKII; reaction_282 is "Ca dissociating from CamR_Ca4_ABCD_CamKII site A";
  reaction_283: CamR_Ca4_ABCD_CaMKII => CamR_Ca3_ACD_CaMKII + Ca; Spine*K_CamR_Ca_B_off*CamR_Ca4_ABCD_CaMKII; reaction_283 is "Ca dissociating from CamR_Ca4_ABCD_CamKII site B";
  reaction_284: CamR_Ca4_ABCD_CaMKII => CamR_Ca3_ABD_CaMKII + Ca; Spine*K_CamR_Ca_C_off*CamR_Ca4_ABCD_CaMKII; reaction_284 is "Ca dissociating from CamR_Ca4_ABCD_CamKII site C";
  reaction_285: CamR_Ca4_ABCD_CaMKII => CamR_Ca3_ABC_CaMKII + Ca; Spine*K_CamR_Ca_D_off*CamR_Ca4_ABCD_CaMKII; reaction_285 is "Ca dissociating from CamR_Ca4_ABCD_CamKII site D";
  Ca_binding_to_CamR_PP2B_site_A: CamR_PP2B + Ca => CamR_Ca1_A_PP2B; Spine*K_Cam_Ca_on*CamR_PP2B*Ca;
  Ca_binding_to_CamR_PP2B_site_B: CamR_PP2B + Ca => CamR_Ca1_B_PP2B; Spine*K_Cam_Ca_on*CamR_PP2B*Ca;
  Ca_binding_to_CamR_PP2B_site_C: CamR_PP2B + Ca => CamR_Ca1_C_PP2B; Spine*K_Cam_Ca_on*CamR_PP2B*Ca;
  Ca_binding_to_CamR_PP2B_site_D: CamR_PP2B + Ca => CamR_Ca1_D_PP2B; Spine*K_Cam_Ca_on*CamR_PP2B*Ca;
  reaction_290: CamR_Ca1_A_PP2B => CamR_PP2B + Ca; Spine*K_CamR_Ca_A_off*CamR_Ca1_A_PP2B; reaction_290 is "Ca dissociating from CamR_Ca1_A_PP2B site A";
  reaction_291: CamR_Ca1_B_PP2B => CamR_PP2B + Ca; Spine*K_CamR_Ca_B_off*CamR_Ca1_B_PP2B; reaction_291 is "Ca dissociating from CamR_Ca1_B_PP2B site B";
  reaction_292: CamR_Ca1_C_PP2B => CamR_PP2B + Ca; Spine*K_CamR_Ca_C_off*CamR_Ca1_C_PP2B; reaction_292 is "Ca dissociating from CamR_Ca1_C_PP2B site C";
  reaction_293: CamR_Ca1_D_PP2B => CamR_PP2B + Ca; Spine*K_CamR_Ca_D_off*CamR_Ca1_D_PP2B; reaction_293 is "Ca dissociating from CamR_Ca1_D_PP2B site D";
  reaction_294: CamR_Ca1_A_PP2B + Ca => CamR_Ca2_AB_PP2B; Spine*K_Cam_Ca_on*CamR_Ca1_A_PP2B*Ca; reaction_294 is "Ca binding to CamR_Ca1_A_PP2B site B";
  reaction_295: CamR_Ca1_A_PP2B + Ca => CamR_Ca2_AC_PP2B; Spine*K_Cam_Ca_on*CamR_Ca1_A_PP2B*Ca; reaction_295 is "Ca binding to CamR_Ca1_A_PP2B site C";
  reaction_296: CamR_Ca1_A_PP2B + Ca => CamR_Ca2_AD_PP2B; Spine*K_Cam_Ca_on*CamR_Ca1_A_PP2B*Ca; reaction_296 is "Ca binding to CamR_Ca1_A_PP2B site D";
  reaction_297: CamR_Ca1_B_PP2B + Ca => CamR_Ca2_AB_PP2B; Spine*K_Cam_Ca_on*CamR_Ca1_B_PP2B*Ca; reaction_297 is "Ca binding to CamR_Ca1_B_PP2B site A";
  reaction_298: CamR_Ca1_B_PP2B + Ca => CamR_Ca2_BC_PP2B; Spine*K_Cam_Ca_on*CamR_Ca1_B_PP2B*Ca; reaction_298 is "Ca binding to CamR_Ca1_B_PP2B site C";
  reaction_299: CamR_Ca1_B_PP2B + Ca => CamR_Ca2_BD_PP2B; Spine*K_Cam_Ca_on*CamR_Ca1_B_PP2B*Ca; reaction_299 is "Ca binding to CamR_Ca1_B_PP2B site D";
  reaction_300: CamR_Ca1_C_PP2B + Ca => CamR_Ca2_AC_PP2B; Spine*K_Cam_Ca_on*CamR_Ca1_C_PP2B*Ca; reaction_300 is "Ca binding to CamR_Ca1_C_PP2B site A";
  reaction_301: CamR_Ca1_C_PP2B + Ca => CamR_Ca2_BC_PP2B; Spine*K_Cam_Ca_on*CamR_Ca1_C_PP2B*Ca; reaction_301 is "Ca binding to CamR_Ca1_C_PP2B site B";
  reaction_302: CamR_Ca1_C_PP2B + Ca => CamR_Ca2_CD_PP2B; Spine*K_Cam_Ca_on*CamR_Ca1_C_PP2B*Ca; reaction_302 is "Ca binding to CamR_Ca1_C_PP2B site D";
  reaction_303: CamR_Ca1_D_PP2B + Ca => CamR_Ca2_AD_PP2B; Spine*K_Cam_Ca_on*CamR_Ca1_D_PP2B*Ca; reaction_303 is "Ca binding to CamR_Ca1_D_PP2B site A";
  reaction_304: CamR_Ca1_D_PP2B + Ca => CamR_Ca2_BD_PP2B; Spine*K_Cam_Ca_on*CamR_Ca1_D_PP2B*Ca; reaction_304 is "Ca binding to CamR_Ca1_D_PP2B site B";
  reaction_305: CamR_Ca1_D_PP2B + Ca => CamR_Ca2_CD_PP2B; Spine*K_Cam_Ca_on*CamR_Ca1_D_PP2B*Ca; reaction_305 is "Ca binding to CamR_Ca1_D_PP2B site C";
  reaction_306: CamR_Ca2_AB_PP2B => CamR_Ca1_B_PP2B + Ca; Spine*K_CamR_Ca_A_off*CamR_Ca2_AB_PP2B; reaction_306 is "Ca dissociating from CamR_Ca2_AB_PP2B site A";
  reaction_307: CamR_Ca2_AB_PP2B => CamR_Ca1_A_PP2B + Ca; Spine*K_CamR_Ca_B_off*CamR_Ca2_AB_PP2B; reaction_307 is "Ca dissociating from CamR_Ca2_AB_PP2B site B";
  reaction_308: CamR_Ca2_AC_PP2B => CamR_Ca1_C_PP2B + Ca; Spine*K_CamR_Ca_A_off*CamR_Ca2_AC_PP2B; reaction_308 is "Ca dissociating from CamR_Ca2_AC_PP2B site A";
  reaction_309: CamR_Ca2_AC_PP2B => CamR_Ca1_A_PP2B + Ca; Spine*K_CamR_Ca_C_off*CamR_Ca2_AC_PP2B; reaction_309 is "Ca dissociating from CamR_Ca2_AC_PP2B site C";
  reaction_310: CamR_Ca2_AD_PP2B => CamR_Ca1_D_PP2B + Ca; Spine*K_CamR_Ca_A_off*CamR_Ca2_AD_PP2B; reaction_310 is "Ca dissociating from CamR_Ca2_AD_PP2B site A";
  reaction_311: CamR_Ca2_AD_PP2B => CamR_Ca1_A_PP2B + Ca; Spine*K_CamR_Ca_D_off*CamR_Ca2_AD_PP2B; reaction_311 is "Ca dissociating from CamR_Ca2_AD_PP2B site D";
  reaction_312: CamR_Ca2_BC_PP2B => CamR_Ca1_C_PP2B + Ca; Spine*K_CamR_Ca_B_off*CamR_Ca2_BC_PP2B; reaction_312 is "Ca dissociating from CamR_Ca2_BC_PP2B site B";
  reaction_313: CamR_Ca2_BC_PP2B => CamR_Ca1_B_PP2B + Ca; Spine*K_CamR_Ca_C_off*CamR_Ca2_BC_PP2B; reaction_313 is "Ca dissociating from CamR_Ca2_BC_PP2B site C";
  reaction_314: CamR_Ca2_BD_PP2B => CamR_Ca1_D_PP2B + Ca; Spine*K_CamR_Ca_B_off*CamR_Ca2_BD_PP2B; reaction_314 is "Ca dissociating from CamR_Ca2_BD_PP2B site B";
  reaction_315: CamR_Ca2_BD_PP2B => CamR_Ca1_B_PP2B + Ca; Spine*K_CamR_Ca_D_off*CamR_Ca2_BD_PP2B; reaction_315 is "Ca dissociating from CamR_Ca2_BD_PP2B site D";
  reaction_316: CamR_Ca2_CD_PP2B => CamR_Ca1_D_PP2B + Ca; Spine*K_CamR_Ca_C_off*CamR_Ca2_CD_PP2B; reaction_316 is "Ca dissociating from CamR_Ca2_CD_PP2B site C";
  reaction_317: CamR_Ca2_CD_PP2B => CamR_Ca1_C_PP2B + Ca; Spine*K_CamR_Ca_D_off*CamR_Ca2_CD_PP2B; reaction_317 is "Ca dissociating from CamR_Ca2_CD_PP2B site D";
  reaction_318: CamR_Ca2_AB_PP2B + Ca => CamR_Ca3_ABC_PP2B; Spine*K_Cam_Ca_on*CamR_Ca2_AB_PP2B*Ca; reaction_318 is "Ca binding to CamR_Ca2_AB_PP2B site C";
  reaction_319: CamR_Ca2_AB_PP2B + Ca => CamR_Ca3_ABD_PP2B; Spine*K_Cam_Ca_on*CamR_Ca2_AB_PP2B*Ca; reaction_319 is "Ca binding to CamR_Ca2_AB_PP2B site D";
  reaction_320: CamR_Ca2_AC_PP2B + Ca => CamR_Ca3_ABC_PP2B; Spine*K_Cam_Ca_on*CamR_Ca2_AC_PP2B*Ca; reaction_320 is "Ca binding to CamR_Ca2_AC_PP2B site B";
  reaction_321: CamR_Ca2_AC_PP2B + Ca => CamR_Ca3_ACD_PP2B; Spine*K_Cam_Ca_on*CamR_Ca2_AC_PP2B*Ca; reaction_321 is "Ca binding to CamR_Ca2_AC_PP2B site D";
  reaction_322: CamR_Ca2_AD_PP2B + Ca => CamR_Ca3_ABD_PP2B; Spine*K_Cam_Ca_on*CamR_Ca2_AD_PP2B*Ca; reaction_322 is "Ca binding to CamR_Ca2_AD_PP2B site B";
  reaction_323: CamR_Ca2_AD_PP2B + Ca => CamR_Ca3_ACD_PP2B; Spine*K_Cam_Ca_on*CamR_Ca2_AD_PP2B*Ca; reaction_323 is "Ca binding to CamR_Ca2_AD_PP2B site C";
  reaction_324: CamR_Ca2_BC_PP2B + Ca => CamR_Ca3_ABC_PP2B; Spine*K_Cam_Ca_on*CamR_Ca2_BC_PP2B*Ca; reaction_324 is "Ca binding to CamR_Ca2_BC_PP2B site A";
  reaction_325: CamR_Ca2_BC_PP2B + Ca => CamR_Ca3_BCD_PP2B; Spine*K_Cam_Ca_on*CamR_Ca2_BC_PP2B*Ca; reaction_325 is "Ca binding to CamR_Ca2_BC_PP2B site D";
  reaction_326: CamR_Ca2_BD_PP2B + Ca => CamR_Ca3_ABD_PP2B; Spine*K_Cam_Ca_on*CamR_Ca2_BD_PP2B*Ca; reaction_326 is "Ca binding to CamR_Ca2_BD_PP2B site A";
  reaction_327: CamR_Ca2_BD_PP2B + Ca => CamR_Ca3_BCD_PP2B; Spine*K_Cam_Ca_on*CamR_Ca2_BD_PP2B*Ca; reaction_327 is "Ca binding to CamR_Ca2_BD_PP2B site C";
  reaction_328: CamR_Ca2_CD_PP2B + Ca => CamR_Ca3_ACD_PP2B; Spine*K_Cam_Ca_on*CamR_Ca2_CD_PP2B*Ca; reaction_328 is "Ca binding to CamR_Ca2_CD_PP2B site A";
  reaction_329: CamR_Ca2_CD_PP2B + Ca => CamR_Ca3_BCD_PP2B; Spine*K_Cam_Ca_on*CamR_Ca2_CD_PP2B*Ca; reaction_329 is "Ca binding to CamR_Ca2_CD_PP2B site B";
  reaction_330: CamR_Ca3_ABC_PP2B => CamR_Ca2_BC_PP2B + Ca; Spine*K_CamR_Ca_A_off*CamR_Ca3_ABC_PP2B; reaction_330 is "Ca dissociating from CamR_Ca3_ABC_PP2B site A";
  reaction_331: CamR_Ca3_ABC_PP2B => CamR_Ca2_AC_PP2B + Ca; Spine*K_CamR_Ca_B_off*CamR_Ca3_ABC_PP2B; reaction_331 is "Ca dissociating from CamR_Ca3_ABC_PP2B site B";
  reaction_332: CamR_Ca3_ABC_PP2B => CamR_Ca2_AB_PP2B + Ca; Spine*K_CamR_Ca_C_off*CamR_Ca3_ABC_PP2B; reaction_332 is "Ca dissociating from CamR_Ca3_ABC_PP2B site C";
  reaction_333: CamR_Ca3_ABD_PP2B => CamR_Ca2_BD_PP2B + Ca; Spine*K_CamR_Ca_A_off*CamR_Ca3_ABD_PP2B; reaction_333 is "Ca dissociating from CamR_Ca3_ABD_PP2B site A";
  reaction_334: CamR_Ca3_ABD_PP2B => CamR_Ca2_AD_PP2B + Ca; Spine*K_CamR_Ca_B_off*CamR_Ca3_ABD_PP2B; reaction_334 is "Ca dissociating from CamR_Ca3_ABD_PP2B site B";
  reaction_335: CamR_Ca3_ABD_PP2B => CamR_Ca2_AB_PP2B + Ca; Spine*K_CamR_Ca_D_off*CamR_Ca3_ABD_PP2B; reaction_335 is "Ca dissociating from CamR_Ca3_ABD_PP2B site D";
  reaction_336: CamR_Ca3_ACD_PP2B => CamR_Ca2_CD_PP2B + Ca; Spine*K_CamR_Ca_A_off*CamR_Ca3_ACD_PP2B; reaction_336 is "Ca dissociating from CamR_Ca3_ACD_PP2B site A";
  reaction_337: CamR_Ca3_ACD_PP2B => CamR_Ca2_AD_PP2B + Ca; Spine*K_CamR_Ca_C_off*CamR_Ca3_ACD_PP2B; reaction_337 is "Ca dissociating from CamR_Ca3_ACD_PP2B site C";
  reaction_338: CamR_Ca3_ACD_PP2B => CamR_Ca2_AC_PP2B + Ca; Spine*K_CamR_Ca_D_off*CamR_Ca3_ACD_PP2B; reaction_338 is "Ca dissociating from CamR_Ca3_ACD_PP2B site D";
  reaction_339: CamR_Ca3_BCD_PP2B => CamR_Ca2_CD_PP2B + Ca; Spine*K_CamR_Ca_B_off*CamR_Ca3_BCD_PP2B; reaction_339 is "Ca dissociating from CamR_Ca3_BCD_PP2B site B";
  reaction_340: CamR_Ca3_BCD_PP2B => CamR_Ca2_BD_PP2B + Ca; Spine*K_CamR_Ca_C_off*CamR_Ca3_BCD_PP2B; reaction_340 is "Ca dissociating from CamR_Ca3_BCD_PP2B site C";
  reaction_341: CamR_Ca3_BCD_PP2B => CamR_Ca2_BC_PP2B + Ca; Spine*K_CamR_Ca_D_off*CamR_Ca3_BCD_PP2B; reaction_341 is "Ca dissociating from CamR_Ca3_BCD_PP2B site D";
  reaction_342: CamR_Ca3_ABC_PP2B + Ca => CamR_Ca4_ABCD_PP2B; Spine*K_Cam_Ca_on*CamR_Ca3_ABC_PP2B*Ca; reaction_342 is "Ca binding to CamR_Ca3_ABC_PP2B site D";
  reaction_343: CamR_Ca3_ABD_PP2B + Ca => CamR_Ca4_ABCD_PP2B; Spine*K_Cam_Ca_on*CamR_Ca3_ABD_PP2B*Ca; reaction_343 is "Ca binding to CamR_Ca3_ABD_PP2B site C";
  reaction_344: CamR_Ca3_ACD_PP2B + Ca => CamR_Ca4_ABCD_PP2B; Spine*K_Cam_Ca_on*CamR_Ca3_ACD_PP2B*Ca; reaction_344 is "Ca binding to CamR_Ca3_ACD_PP2B site B";
  reaction_345: CamR_Ca3_BCD_PP2B + Ca => CamR_Ca4_ABCD_PP2B; Spine*K_Cam_Ca_on*CamR_Ca3_BCD_PP2B*Ca; reaction_345 is "Ca binding to CamR_Ca3_BCD_PP2B site A";
  reaction_346: CamR_Ca4_ABCD_PP2B => CamR_Ca3_BCD_PP2B + Ca; Spine*K_CamR_Ca_A_off*CamR_Ca4_ABCD_PP2B; reaction_346 is "Ca dissociating from CamR_Ca4_ABCD_PP2B site A";
  reaction_347: CamR_Ca4_ABCD_PP2B => CamR_Ca3_ACD_PP2B + Ca; Spine*K_CamR_Ca_B_off*CamR_Ca4_ABCD_PP2B; reaction_347 is "Ca dissociating from CamR_Ca4_ABCD_PP2B site B";
  reaction_348: CamR_Ca4_ABCD_PP2B => CamR_Ca3_ABD_PP2B + Ca; Spine*K_CamR_Ca_C_off*CamR_Ca4_ABCD_PP2B; reaction_348 is "Ca dissociating from CamR_Ca4_ABCD_PP2B site C";
  reaction_349: CamR_Ca4_ABCD_PP2B => CamR_Ca3_ABC_PP2B + Ca; Spine*K_CamR_Ca_D_off*CamR_Ca4_ABCD_PP2B; reaction_349 is "Ca dissociating from CamR_Ca4_ABCD_PP2B site D";
  reaction_350: CamR_Ca1_B_CaMKII => CamR_CaMKII + Ca; Spine*K_CamR_Ca_B_off*CamR_Ca1_B_CaMKII; reaction_350 is "Ca dissociating from CamR_Ca1_CamKII site B";
  reaction_351: CamT_Ca3_ABC => CamT_Ca2_AB + Ca; Spine*K_CamT_Ca_C_off*CamT_Ca3_ABC; reaction_351 is "Ca dissociating from CamT_Ca3_ABC site C";
  CamR_CaMKII_Phosphorylation: CamR_CaMKII => CamR_CaMKIIp; Spine*K_CaMKII_autoPhosphorylation*CamR_CaMKII;
  reaction_353: CamR_Ca1_A_CaMKII => CamR_Ca1_A_CaMKIIp; Spine*K_CaMKII_autoPhosphorylation*CamR_Ca1_A_CaMKII; reaction_353 is "CamR_Ca1_A_CaMKII phosphorylation";
  reaction_354: CamR_Ca1_B_CaMKII => CamR_Ca1_B_CaMKIIp; Spine*K_CaMKII_autoPhosphorylation*CamR_Ca1_B_CaMKII; reaction_354 is "CamR_Ca1_B_CaMKII Phosphorylation";
  reaction_355: CamR_Ca1_C_CaMKII => CamR_Ca1_C_CaMKIIp; Spine*K_CaMKII_autoPhosphorylation*CamR_Ca1_C_CaMKII; reaction_355 is "CamR_Ca1_C_CaMKII phosphorylation";
  reaction_356: CamR_Ca1_D_CaMKII => CamR_Ca1_D_CaMKIIp; Spine*K_CaMKII_autoPhosphorylation*CamR_Ca1_D_CaMKII; reaction_356 is "CamR_Ca1_D_CaMKII phosphorylation";
  reaction_357: CamR_Ca2_AB_CaMKII => CamR_Ca2_AB_CaMKIIp; Spine*K_CaMKII_autoPhosphorylation*CamR_Ca2_AB_CaMKII; reaction_357 is "CamR_Ca2_AB_CaMKII phosphorylation";
  reaction_358: CamR_Ca2_AC_CaMKII => CamR_Ca2_AC_CaMKIIp; Spine*K_CaMKII_autoPhosphorylation*CamR_Ca2_AC_CaMKII; reaction_358 is "CamR_Ca2_AC_CaMKII phosphorylation";
  reaction_359: CamR_Ca2_AD_CaMKII => CamR_Ca2_AD_CaMKIIp; Spine*K_CaMKII_autoPhosphorylation*CamR_Ca2_AD_CaMKII; reaction_359 is "CamR_Ca2_AD_CaMKII phosphorylation";
  reaction_360: CamR_Ca2_BC_CaMKII => CamR_Ca2_BC_CaMKIIp; Spine*K_CaMKII_autoPhosphorylation*CamR_Ca2_BC_CaMKII; reaction_360 is "CamR_Ca2_BC_CaMKII phosphorylation";
  reaction_361: CamR_Ca2_BD_CaMKII => CamR_Ca2_BD_CaMKIIp; Spine*K_CaMKII_autoPhosphorylation*CamR_Ca2_BD_CaMKII; reaction_361 is "CamR_Ca2_BD_CaMKII phosphorylation";
  reaction_362: CamR_Ca2_CD_CaMKII => CamR_Ca2_CD_CaMKIIp; Spine*K_CaMKII_autoPhosphorylation*CamR_Ca2_CD_CaMKII; reaction_362 is "CamR_Ca2_CD_CaMKII phosphorylation";
  reaction_363: CamR_Ca3_ABC_CaMKII => CamR_Ca3_ABC_CaMKIIp; Spine*K_CaMKII_autoPhosphorylation*CamR_Ca3_ABC_CaMKII; reaction_363 is "CamR_Ca3_ABC_CaMKII phosphorylation";
  reaction_364: CamR_Ca3_ABD_CaMKII => CamR_Ca3_ABD_CaMKIIp; Spine*K_CaMKII_autoPhosphorylation*CamR_Ca3_ABD_CaMKII; reaction_364 is "CamR_Ca3_ABD_CaMKII phosphorylation";
  reaction_365: CamR_Ca3_ACD_CaMKII => CamR_Ca3_ACD_CaMKIIp; Spine*K_CaMKII_autoPhosphorylation*CamR_Ca3_ACD_CaMKII; reaction_365 is "CamR_Ca3_ACD_CaMKII phosphorylation";
  reaction_366: CamR_Ca3_BCD_CaMKII => CamR_Ca3_BCD_CaMKIIp; Spine*K_CaMKII_autoPhosphorylation*CamR_Ca3_BCD_CaMKII; reaction_366 is "CamR_Ca3_BCD_CaMKII phosphorylation";
  reaction_367: CamR_Ca4_ABCD_CaMKII => CamR_Ca4_ABCD_CaMKIIp; Spine*K_CaMKII_autoPhosphorylation*CamR_Ca4_ABCD_CaMKII; reaction_367 is "CamR_Ca4_ABCD_CaMKII phosphorylation";
  CaMKIIp_binding_to_CamR: CamR + CaMKIIp => CamR_CaMKIIp; Spine*K_CamR_CaMKII_p_on*CamR*CaMKIIp;
  reaction_369: CamR_CaMKIIp => CamR + CaMKIIp; Spine*K_CamR_CaMKIIp_off*CamR_CaMKIIp; reaction_369 is "CaMKIIp dissociating from CamR_CaMKIIp";
  CaMKIIp_binding_to_CamR_Ca1_A: CamR_Ca1_A + CaMKIIp => CamR_Ca1_A_CaMKIIp; Spine*K_CamR_CaMKII_p_on*CamR_Ca1_A*CaMKIIp;
  reaction_371: CamR_Ca1_A_CaMKIIp => CamR_Ca1_A + CaMKIIp; Spine*K_CamR_CaMKIIp_off*CamR_Ca1_A_CaMKIIp; reaction_371 is "CaMKIIp dissociating from CamR_Ca1_A_CaMKIIp";
  CaMKIIp_binding_to_CamR_Ca1_B: CamR_Ca1_B + CaMKIIp => CamR_Ca1_B_CaMKIIp; Spine*K_CamR_CaMKII_p_on*CamR_Ca1_B*CaMKIIp;
  reaction_373: CamR_Ca1_B_CaMKIIp => CamR_Ca1_B + CaMKIIp; Spine*K_CamR_CaMKIIp_off*CamR_Ca1_B_CaMKIIp; reaction_373 is "CaMKIIp dissociating from CamR_Ca1_B_CaMKIIp";
  CaMKIIp_binding_to_CamR_Ca1_C: CamR_Ca1_C + CaMKIIp => CamR_Ca1_C_CaMKIIp; Spine*K_CamR_CaMKII_p_on*CamR_Ca1_C*CaMKIIp;
  reaction_375: CamR_Ca1_C_CaMKIIp => CamR_Ca1_C + CaMKIIp; Spine*K_CamR_CaMKIIp_off*CamR_Ca1_C_CaMKIIp; reaction_375 is "CaMKIIp dissociating from CamR_Ca1_C_CaMKIIp";
  CaMKIIp_binding_to_CamR_Ca1_D: CamR_Ca1_D + CaMKIIp => CamR_Ca1_D_CaMKIIp; Spine*K_CamR_CaMKII_p_on*CamR_Ca1_D*CaMKIIp;
  reaction_377: CamR_Ca1_D_CaMKIIp => CamR_Ca1_D + CaMKIIp; Spine*K_CamR_CaMKIIp_off*CamR_Ca1_D_CaMKIIp; reaction_377 is "CaMKIIp dissociating from CamR_Ca1_D_CaMKIIp";
  CaMKIIp_binding_to_CamR_Ca2_AB: CamR_Ca2_AB + CaMKIIp => CamR_Ca2_AB_CaMKIIp; Spine*K_CamR_CaMKII_p_on*CamR_Ca2_AB*CaMKIIp;
  reaction_379: CamR_Ca2_AB_CaMKIIp => CamR_Ca2_AB + CaMKIIp; Spine*K_CamR_CaMKIIp_off*CamR_Ca2_AB_CaMKIIp; reaction_379 is "CaMKIIp dissociating from CamR_Ca2_AB_CaMKIIp";
  CaMKIIp_binding_to_CamR_Ca2_AC: CamR_Ca2_AC + CaMKIIp => CamR_Ca2_AC_CaMKIIp; Spine*K_CamR_CaMKII_p_on*CamR_Ca2_AC*CaMKIIp;
  reaction_381: CamR_Ca2_AC_CaMKIIp => CamR_Ca2_AC + CaMKIIp; Spine*K_CamR_CaMKIIp_off*CamR_Ca2_AC_CaMKIIp; reaction_381 is "CaMKIIp dissociating from CamR_Ca2_AC_CaMKIIp";
  CaMKIIp_binding_to_CamR_Ca2_AD: CamR_Ca2_AD + CaMKIIp => CamR_Ca2_AD_CaMKIIp; Spine*K_CamR_CaMKII_p_on*CamR_Ca2_AD*CaMKIIp;
  reaction_383: CamR_Ca2_AD_CaMKIIp => CamR_Ca2_AD + CaMKIIp; Spine*K_CamR_CaMKIIp_off*CamR_Ca2_AD_CaMKIIp; reaction_383 is "CaMKIIp dissociating from CamR_Ca2_AD_CaMKIIp";
  CaMKIIp_binding_to_CamR_Ca2_BC: CamR_Ca2_BC + CaMKIIp => CamR_Ca2_BC_CaMKIIp; Spine*K_CamR_CaMKII_p_on*CamR_Ca2_BC*CaMKIIp;
  reaction_385: CamR_Ca2_BC_CaMKIIp => CamR_Ca2_BC + CaMKIIp; Spine*K_CamR_CaMKIIp_off*CamR_Ca2_BC_CaMKIIp; reaction_385 is "CaMKIIp dissociating from CamR_Ca2_BC_CaMKIIp";
  CaMKIIp_binding_to_CamR_Ca2_BD: CamR_Ca2_BD + CaMKIIp => CamR_Ca2_BD_CaMKIIp; Spine*K_CamR_CaMKII_p_on*CamR_Ca2_BD*CaMKIIp;
  reaction_387: CamR_Ca2_BD_CaMKIIp => CamR_Ca2_BD + CaMKIIp; Spine*K_CamR_CaMKIIp_off*CamR_Ca2_BD_CaMKIIp; reaction_387 is "CaMKIIp dissociating from CamR_Ca2_BD_CaMKIIp";
  CaMKIIp_binding_to_CamR_Ca2_CD: CamR_Ca2_CD + CaMKIIp => CamR_Ca2_CD_CaMKIIp; Spine*K_CamR_CaMKII_p_on*CamR_Ca2_CD*CaMKIIp;
  reaction_389: CamR_Ca2_CD_CaMKIIp => CamR_Ca2_CD + CaMKIIp; Spine*K_CamR_CaMKIIp_off*CamR_Ca2_CD_CaMKIIp; reaction_389 is "CaMKIIp dissociating from CamR_Ca2_CD_CaMKIIp";
  CaMKIIp_binding_to_CamR_Ca3_ABC: CamR_Ca3_ABC + CaMKIIp => CamR_Ca3_ABC_CaMKIIp; Spine*K_CamR_CaMKII_p_on*CamR_Ca3_ABC*CaMKIIp;
  reaction_391: CamR_Ca3_ABC_CaMKIIp => CamR_Ca3_ABC + CaMKIIp; Spine*K_CamR_CaMKIIp_off*CamR_Ca3_ABC_CaMKIIp; reaction_391 is "CaMKIIp dissociating from CamR_Ca3_ABC_CaMKIIp";
  CaMKIIp_binding_to_CamR_Ca3_ABD: CamR_Ca3_ABD + CaMKIIp => CamR_Ca3_ABD_CaMKIIp; Spine*K_CamR_CaMKII_p_on*CamR_Ca3_ABD*CaMKIIp;
  reaction_393: CamR_Ca3_ABD_CaMKIIp => CamR_Ca3_ABD + CaMKIIp; Spine*K_CamR_CaMKIIp_off*CamR_Ca3_ABD_CaMKIIp; reaction_393 is "CaMKIIp dissociating from CamR_Ca3_ABD_CaMKIIp";
  CaMKIIp_binding_to_CamR_Ca3_ACD: CamR_Ca3_ACD + CaMKIIp => CamR_Ca3_ACD_CaMKIIp; Spine*K_CamR_CaMKII_p_on*CamR_Ca3_ACD*CaMKIIp;
  reaction_395: CamR_Ca3_ACD_CaMKIIp => CamR_Ca3_ACD + CaMKIIp; Spine*K_CamR_CaMKIIp_off*CamR_Ca3_ACD_CaMKIIp; reaction_395 is "CaMKIIp dissociating from CamR_Ca3_ACD_CaMKIIp";
  CaMKIIp_binding_to_CamR_Ca3_BCD: CamR_Ca3_BCD + CaMKIIp => CamR_Ca3_BCD_CaMKIIp; Spine*K_CamR_CaMKII_p_on*CamR_Ca3_BCD*CaMKIIp;
  reaction_397: CamR_Ca3_BCD_CaMKIIp => CamR_Ca3_BCD + CaMKIIp; Spine*K_CamR_CaMKIIp_off*CamR_Ca3_BCD_CaMKIIp; reaction_397 is "CaMKIIp dissociating from CamR_Ca3_BCD_CaMKIIp";
  CaMKIIp_binding_to_CamR_Ca4_ABCD: CamR_Ca4_ABCD + CaMKIIp => CamR_Ca4_ABCD_CaMKIIp; Spine*K_CamR_CaMKII_p_on*CamR_Ca4_ABCD*CaMKIIp;
  reaction_399: CamR_Ca4_ABCD_CaMKIIp => CamR_Ca4_ABCD + CaMKIIp; Spine*K_CamR_CaMKIIp_off*CamR_Ca4_ABCD_CaMKIIp; reaction_399 is "CaMKIIp dissociating from CamR_Ca4_ABCD_CaMKIIp";
  reaction_504: CamR_CaMKIIp + Ca => CamR_Ca1_A_CaMKIIp; Spine*K_Cam_Ca_on*CamR_CaMKIIp*Ca; reaction_504 is "Ca binding to CamR_CaMKIIp site A";
  reaction_505: CamR_CaMKIIp + Ca => CamR_Ca1_B_CaMKIIp; Spine*K_Cam_Ca_on*CamR_CaMKIIp*Ca; reaction_505 is "Ca binding to CamR_CaMKIIp site B";
  reaction_506: CamR_CaMKIIp + Ca => CamR_Ca1_C_CaMKIIp; Spine*K_Cam_Ca_on*CamR_CaMKIIp*Ca; reaction_506 is "Ca binding to CamR_CaMKIIp site C";
  reaction_507: CamR_CaMKIIp + Ca => CamR_Ca1_D_CaMKIIp; Spine*K_Cam_Ca_on*CamR_CaMKIIp*Ca; reaction_507 is "Ca binding to CamR_CaMKIIp site D";
  reaction_508: CamR_Ca1_A_CaMKIIp => CamR_CaMKIIp + Ca; Spine*K_CamR_Ca_A_off*CamR_Ca1_A_CaMKIIp; reaction_508 is "Ca dissociating from CamR_Ca1_A_CaMKIIp site A";
  reaction_567: CamR_Ca1_B_CaMKIIp => CamR_CaMKIIp + Ca; Spine*K_CamR_Ca_B_off*CamR_Ca1_B_CaMKIIp; reaction_567 is "Ca dissociating from CamR_Ca1_B_CaMKIIp site B";
  reaction_509: CamR_Ca1_C_CaMKIIp => CamR_CaMKIIp + Ca; Spine*K_CamR_Ca_C_off*CamR_Ca1_C_CaMKIIp; reaction_509 is "Ca dissociating from CamR_Ca1_C_CaMKIIp site C";
  reaction_510: CamR_Ca1_D_CaMKIIp => CamR_CaMKIIp + Ca; Spine*K_CamR_Ca_D_off*CamR_Ca1_D_CaMKIIp; reaction_510 is "Ca dissociating from CamR_Ca1_D_CaMKIIp site D";
  reaction_511: CamR_Ca1_A_CaMKIIp + Ca => CamR_Ca2_AB_CaMKIIp; Spine*K_Cam_Ca_on*CamR_Ca1_A_CaMKIIp*Ca; reaction_511 is "Ca binding to CamR_Ca1_A_CaMKIIp site B";
  reaction_512: CamR_Ca1_A_CaMKIIp + Ca => CamR_Ca2_AC_CaMKIIp; Spine*K_Cam_Ca_on*CamR_Ca1_A_CaMKIIp*Ca; reaction_512 is "Ca binding to CamR_Ca1_A_CaMKIIp site C";
  reaction_513: CamR_Ca1_A_CaMKIIp + Ca => CamR_Ca2_AD_CaMKIIp; Spine*K_Cam_Ca_on*CamR_Ca1_A_CaMKIIp*Ca; reaction_513 is "Ca binding to CamR_Ca1_A_CaMKIIp site D";
  reaction_514: CamR_Ca1_B_CaMKIIp + Ca => CamR_Ca2_AB_CaMKIIp; Spine*K_Cam_Ca_on*CamR_Ca1_B_CaMKIIp*Ca; reaction_514 is "Ca binding to CamR_Ca1_B_CaMKIIp site A";
  reaction_515: CamR_Ca1_B_CaMKIIp + Ca => CamR_Ca2_BC_CaMKIIp; Spine*K_Cam_Ca_on*CamR_Ca1_B_CaMKIIp*Ca; reaction_515 is "Ca binding to CamR_Ca1_B_CaMKIIp site C";
  reaction_516: CamR_Ca1_B_CaMKIIp + Ca => CamR_Ca2_BD_CaMKIIp; Spine*K_Cam_Ca_on*CamR_Ca1_B_CaMKIIp*Ca; reaction_516 is "Ca binding to CamR_Ca1_B_CaMKIIp site D";
  reaction_517: CamR_Ca1_C_CaMKIIp + Ca => CamR_Ca2_AC_CaMKIIp; Spine*K_Cam_Ca_on*CamR_Ca1_C_CaMKIIp*Ca; reaction_517 is "Ca binding to CamR_Ca1_C_CaMKIIp site A";
  reaction_518: CamR_Ca1_C_CaMKIIp + Ca => CamR_Ca2_BC_CaMKIIp; Spine*K_Cam_Ca_on*CamR_Ca1_C_CaMKIIp*Ca; reaction_518 is "Ca binding to CamR_Ca1_C_CaMKIIp site B";
  reaction_519: CamR_Ca1_C_CaMKIIp + Ca => CamR_Ca2_CD_CaMKIIp; Spine*K_Cam_Ca_on*CamR_Ca1_C_CaMKIIp*Ca; reaction_519 is "Ca binding to CamR_Ca1_C_CaMKIIp site D";
  reaction_520: CamR_Ca1_D_CaMKIIp + Ca => CamR_Ca2_AD_CaMKIIp; Spine*K_Cam_Ca_on*CamR_Ca1_D_CaMKIIp*Ca; reaction_520 is "Ca binding to CamR_Ca1_D_CaMKIIp site A";
  reaction_521: CamR_Ca1_D_CaMKIIp + Ca => CamR_Ca2_BD_CaMKIIp; Spine*K_Cam_Ca_on*CamR_Ca1_D_CaMKIIp*Ca; reaction_521 is "Ca binding to CamR_Ca1_D_CaMKIIp site B";
  reaction_522: CamR_Ca1_D_CaMKIIp + Ca => CamR_Ca2_CD_CaMKIIp; Spine*K_Cam_Ca_on*CamR_Ca1_D_CaMKIIp*Ca; reaction_522 is "Ca binding to CamR_Ca1_D_CaMKIIp site C";
  reaction_523: CamR_Ca2_AB_CaMKIIp => CamR_Ca1_B_CaMKIIp + Ca; Spine*K_CamR_Ca_A_off*CamR_Ca2_AB_CaMKIIp; reaction_523 is "Ca dissociating from CamR_Ca2_AB_CaMKIIp site A";
  reaction_524: CamR_Ca2_AB_CaMKIIp => CamR_Ca1_A_CaMKIIp + Ca; Spine*K_CamR_Ca_B_off*CamR_Ca2_AB_CaMKIIp; reaction_524 is "Ca dissociating from CamR_Ca2_AB_CaMKIIp site B";
  reaction_525: CamR_Ca2_AC_CaMKIIp => CamR_Ca1_C_CaMKIIp + Ca; Spine*K_CamR_Ca_A_off*CamR_Ca2_AC_CaMKIIp; reaction_525 is "Ca dissociating from CamR_Ca2_AC_CaMKIIp site A";
  reaction_526: CamR_Ca2_AC_CaMKIIp => CamR_Ca1_A_CaMKIIp + Ca; Spine*K_CamR_Ca_C_off*CamR_Ca2_AC_CaMKIIp; reaction_526 is "Ca dissociating from CamR_Ca2_AC_CaMKIIp site C";
  reaction_527: CamR_Ca2_AD_CaMKIIp => CamR_Ca1_D_CaMKIIp + Ca; Spine*K_CamR_Ca_A_off*CamR_Ca2_AD_CaMKIIp; reaction_527 is "Ca dissociating from CamR_Ca2_AD_CaMKIIp site A";
  reaction_528: CamR_Ca2_AD_CaMKIIp => CamR_Ca1_A_CaMKIIp + Ca; Spine*K_CamR_Ca_D_off*CamR_Ca2_AD_CaMKIIp; reaction_528 is "Ca dissociating from CamR_Ca2_AD_CaMKIIp site D";
  reaction_529: CamR_Ca2_BC_CaMKIIp => CamR_Ca1_C_CaMKIIp + Ca; Spine*K_CamR_Ca_B_off*CamR_Ca2_BC_CaMKIIp; reaction_529 is "Ca dissociating from CamR_Ca2_BC_CaMKIIp site B";
  reaction_530: CamR_Ca2_BC_CaMKIIp => CamR_Ca1_B_CaMKIIp + Ca; Spine*K_CamR_Ca_C_off*CamR_Ca2_BC_CaMKIIp; reaction_530 is "Ca dissociating from CamR_Ca2_BC_CaMKIIp site C";
  reaction_531: CamR_Ca2_BD_CaMKIIp => CamR_Ca1_D_CaMKIIp + Ca; Spine*K_CamR_Ca_B_off*CamR_Ca2_BD_CaMKIIp; reaction_531 is "Ca dissociating from CamR_Ca2_BD_CaMKIIp site B";
  reaction_532: CamR_Ca2_BD_CaMKIIp => CamR_Ca1_B_CaMKIIp + Ca; Spine*K_CamR_Ca_D_off*CamR_Ca2_BD_CaMKIIp; reaction_532 is "Ca dissociating from CamR_Ca2_BD_CaMKIIp site D";
  reaction_533: CamR_Ca2_CD_CaMKIIp => CamR_Ca1_D_CaMKIIp + Ca; Spine*K_CamR_Ca_C_off*CamR_Ca2_CD_CaMKIIp; reaction_533 is "Ca dissociating from CamR_Ca2_CD_CaMKIIp site C";
  reaction_534: CamR_Ca2_CD_CaMKIIp => CamR_Ca1_C_CaMKIIp + Ca; Spine*K_CamR_Ca_D_off*CamR_Ca2_CD_CaMKIIp; reaction_534 is "Ca dissociating from CamR_Ca2_CD_CaMKIIp site D";
  reaction_535: CamR_Ca2_AB_CaMKIIp + Ca => CamR_Ca3_ABC_CaMKIIp; Spine*K_Cam_Ca_on*CamR_Ca2_AB_CaMKIIp*Ca; reaction_535 is "Ca binding to CamR_Ca2_AB_CaMKIIp site C";
  reaction_536: CamR_Ca2_AB_CaMKIIp + Ca => CamR_Ca3_ABD_CaMKIIp; Spine*K_Cam_Ca_on*CamR_Ca2_AB_CaMKIIp*Ca; reaction_536 is "Ca binding to CamR_Ca2_AB_CaMKIIp site D";
  reaction_537: CamR_Ca2_AC_CaMKIIp + Ca => CamR_Ca3_ABC_CaMKIIp; Spine*K_Cam_Ca_on*CamR_Ca2_AC_CaMKIIp*Ca; reaction_537 is "Ca binding to CamR_Ca2_AC_CaMKIIp site B";
  reaction_538: CamR_Ca2_AC_CaMKIIp + Ca => CamR_Ca3_ACD_CaMKIIp; Spine*K_Cam_Ca_on*CamR_Ca2_AC_CaMKIIp*Ca; reaction_538 is "Ca binding to CamR_Ca2_AC_CaMKIIp site D";
  reaction_539: CamR_Ca2_AD_CaMKIIp + Ca => CamR_Ca3_ABD_CaMKIIp; Spine*K_Cam_Ca_on*CamR_Ca2_AD_CaMKIIp*Ca; reaction_539 is "Ca binding to CamR_Ca2_AD_CaMKIIp site B";
  reaction_540: CamR_Ca2_AD_CaMKIIp + Ca => CamR_Ca3_ACD_CaMKIIp; Spine*K_Cam_Ca_on*CamR_Ca2_AD_CaMKIIp*Ca; reaction_540 is "Ca binding to CamR_Ca2_AD_CaMKIIp site C";
  reaction_541: CamR_Ca2_BC_CaMKIIp + Ca => CamR_Ca3_ABC_CaMKIIp; Spine*K_Cam_Ca_on*CamR_Ca2_BC_CaMKIIp*Ca; reaction_541 is "Ca binding to CamR_Ca2_BC_CaMKIIp site A";
  reaction_542: CamR_Ca2_BC_CaMKIIp + Ca => CamR_Ca3_BCD_CaMKIIp; Spine*K_Cam_Ca_on*CamR_Ca2_BC_CaMKIIp*Ca; reaction_542 is "Ca binding to CamR_Ca2_BC_CaMKIIp site D";
  reaction_543: CamR_Ca2_BD_CaMKIIp + Ca => CamR_Ca3_ABD_CaMKIIp; Spine*K_Cam_Ca_on*CamR_Ca2_BD_CaMKIIp*Ca; reaction_543 is "Ca binding to CamR_Ca2_BD_CaMKIIp site A";
  reaction_544: CamR_Ca2_BD_CaMKIIp + Ca => CamR_Ca3_BCD_CaMKIIp; Spine*K_Cam_Ca_on*CamR_Ca2_BD_CaMKIIp*Ca; reaction_544 is "Ca binding to CamR_Ca2_BD_CaMKIIp site C";
  reaction_545: CamR_Ca2_CD_CaMKIIp + Ca => CamR_Ca3_ACD_CaMKIIp; Spine*K_Cam_Ca_on*CamR_Ca2_CD_CaMKIIp*Ca; reaction_545 is "Ca binding to CamR_Ca2_CD_CaMKIIp site A";
  reaction_546: CamR_Ca2_CD_CaMKIIp + Ca => CamR_Ca3_BCD_CaMKIIp; Spine*K_Cam_Ca_on*CamR_Ca2_CD_CaMKIIp*Ca; reaction_546 is "Ca binding to CamR_Ca2_CD_CaMKIIp site B";
  reaction_547: CamR_Ca3_ABC_CaMKIIp => CamR_Ca2_AB_CaMKIIp + Ca; Spine*K_CamR_Ca_C_off*CamR_Ca3_ABC_CaMKIIp; reaction_547 is "Ca dissociating from CamR_Ca3_ABC_CaMKIIp site C";
  reaction_548: CamR_Ca3_ABC_CaMKIIp => CamR_Ca2_AC_CaMKIIp + Ca; Spine*K_CamR_Ca_B_off*CamR_Ca3_ABC_CaMKIIp; reaction_548 is "Ca dissociating from CamR_Ca3_ABC_CaMKIIp site B";
  reaction_549: CamR_Ca3_ABC_CaMKIIp => CamR_Ca2_BC_CaMKIIp + Ca; Spine*K_CamR_Ca_A_off*CamR_Ca3_ABC_CaMKIIp; reaction_549 is "Ca dissociating from CamR_Ca3_ABC_CaMKIIp site A";
  reaction_550: CamR_Ca3_ABD_CaMKIIp => CamR_Ca2_AB_CaMKIIp + Ca; Spine*K_CamR_Ca_D_off*CamR_Ca3_ABD_CaMKIIp; reaction_550 is "Ca dissociating from CamR_Ca3_ABD_CaMKIIp site D";
  reaction_551: CamR_Ca3_ABD_CaMKIIp => CamR_Ca2_AD_CaMKIIp + Ca; Spine*K_CamR_Ca_B_off*CamR_Ca3_ABD_CaMKIIp; reaction_551 is "Ca dissociating from CamR_Ca3_ABD_CaMKIIp site B";
  reaction_552: CamR_Ca3_ABD_CaMKIIp => CamR_Ca2_BD_CaMKIIp + Ca; Spine*K_CamR_Ca_A_off*CamR_Ca3_ABD_CaMKIIp; reaction_552 is "Ca dissociating from CamR_Ca3_ABD_CaMKIIp site A";
  reaction_553: CamR_Ca3_ACD_CaMKIIp => CamR_Ca2_AC_CaMKIIp + Ca; Spine*K_CamR_Ca_D_off*CamR_Ca3_ACD_CaMKIIp; reaction_553 is "Ca dissociating from CamR_Ca3_ACD_CaMKIIp site D";
  reaction_554: CamR_Ca3_ACD_CaMKIIp => CamR_Ca2_AD_CaMKIIp + Ca; Spine*K_CamR_Ca_C_off*CamR_Ca3_ACD_CaMKIIp; reaction_554 is "Ca dissociating from CamR_Ca3_ACD_CaMKIIp site C";
  reaction_555: CamR_Ca3_ACD_CaMKIIp => CamR_Ca2_CD_CaMKIIp + Ca; Spine*K_CamR_Ca_A_off*CamR_Ca3_ACD_CaMKIIp; reaction_555 is "Ca dissociating from CamR_Ca3_ACD_CaMKIIp site A";
  reaction_556: CamR_Ca3_BCD_CaMKIIp => CamR_Ca2_BC_CaMKIIp + Ca; Spine*K_CamR_Ca_D_off*CamR_Ca3_BCD_CaMKIIp; reaction_556 is "Ca dissociating from CamR_Ca3_BCD_CaMKIIp site D";
  reaction_557: CamR_Ca3_BCD_CaMKIIp => CamR_Ca2_BD_CaMKIIp + Ca; Spine*K_CamR_Ca_C_off*CamR_Ca3_BCD_CaMKIIp; reaction_557 is "Ca dissociating from CamR_Ca3_BCD_CaMKIIp site C";
  reaction_558: CamR_Ca3_BCD_CaMKIIp => CamR_Ca2_CD_CaMKIIp + Ca; Spine*K_CamR_Ca_B_off*CamR_Ca3_BCD_CaMKIIp; reaction_558 is "Ca dissociating from CamR_Ca3_BCD_CaMKIIp site B";
  reaction_559: CamR_Ca3_BCD_CaMKIIp + Ca => CamR_Ca4_ABCD_CaMKIIp; Spine*K_Cam_Ca_on*CamR_Ca3_BCD_CaMKIIp*Ca; reaction_559 is "Ca binding to CamR_Ca3_BCD_CaMKIIp site A";
  reaction_560: CamR_Ca3_ACD_CaMKIIp + Ca => CamR_Ca4_ABCD_CaMKIIp; Spine*K_Cam_Ca_on*CamR_Ca3_ACD_CaMKIIp*Ca; reaction_560 is "Ca binding to CamR_Ca3_ACD_CaMKIIp site B";
  reaction_561: CamR_Ca3_ABD_CaMKIIp + Ca => CamR_Ca4_ABCD_CaMKIIp; Spine*K_Cam_Ca_on*CamR_Ca3_ABD_CaMKIIp*Ca; reaction_561 is "Ca binding to CamR_Ca3_ABD_CaMKIIp site C";
  reaction_562: CamR_Ca3_ABC_CaMKIIp + Ca => CamR_Ca4_ABCD_CaMKIIp; Spine*K_Cam_Ca_on*CamR_Ca3_ABC_CaMKIIp*Ca; reaction_562 is "Ca binding to CamR_Ca3_ABC_CaMKIIp site D";
  reaction_563: CamR_Ca4_ABCD_CaMKIIp => CamR_Ca3_BCD_CaMKIIp + Ca; Spine*K_CamR_Ca_A_off*CamR_Ca4_ABCD_CaMKIIp; reaction_563 is "Ca dissociating from CamR_Ca4_ABCD_CaMKIIp site A";
  reaction_564: CamR_Ca4_ABCD_CaMKIIp => CamR_Ca3_ACD_CaMKIIp + Ca; Spine*K_CamR_Ca_B_off*CamR_Ca4_ABCD_CaMKIIp; reaction_564 is "Ca dissociating from CamR_Ca4_ABCD_CaMKIIp site B";
  reaction_565: CamR_Ca4_ABCD_CaMKIIp => CamR_Ca3_ABD_CaMKIIp + Ca; Spine*K_CamR_Ca_C_off*CamR_Ca4_ABCD_CaMKIIp; reaction_565 is "Ca dissociating from CamR_Ca4_ABCD_CaMKIIp site C";
  reaction_566: CamR_Ca4_ABCD_CaMKIIp => CamR_Ca3_ABC_CaMKIIp + Ca; Spine*K_CamR_Ca_D_off*CamR_Ca4_ABCD_CaMKIIp; reaction_566 is "Ca dissociating from CamR_Ca4_ABCD_CaMKIIp site D";
  D_binding_to_PKA: D + PKA => D_PKA; Spine*K_D_PKA_on*D*PKA;
  D_dissociating_from_D_PKA: D_PKA => D + PKA; Spine*K_D_PKA_off*D_PKA;
  Dp_dissociating_from_D_PKA: D_PKA => Dp + PKA; Spine*K_D_PKA_off_p*D_PKA;
  Dp_binding_to_CamR_PP2B: Dp + CamR_PP2B => Dp_CamR_PP2B; Spine*K_CamR_PP2B_Dp_on*Dp*CamR_PP2B;
  reaction_404: Dp_CamR_PP2B => Dp + CamR_PP2B; Spine*K_CamR_PP2B_Dp_off*Dp_CamR_PP2B; reaction_404 is "Dp dissociating from Dp_CamR_PP2B";
  D_dissociating_from_Dp_CamR_PP2B: Dp_CamR_PP2B => D + CamR_PP2B; Spine*K_CamR_PP2B_D_off*Dp_CamR_PP2B;
  Dp_binding_to_CamR_Ca1_A_PP2B: Dp + CamR_Ca1_A_PP2B => Dp_CamR_Ca1_A_PP2B; Spine*K_CamR_PP2B_Dp_on*Dp*CamR_Ca1_A_PP2B;
  reaction_407: Dp_CamR_Ca1_A_PP2B => Dp + CamR_Ca1_A_PP2B; Spine*K_CamR_PP2B_Dp_off*Dp_CamR_Ca1_A_PP2B; reaction_407 is "Dp dissociating from Dp_CamR_Ca1_A_PP2B";
  reaction_408: Dp_CamR_Ca1_A_PP2B => D + CamR_Ca1_A_PP2B; Spine*K_CamR_PP2B_D_off*Dp_CamR_Ca1_A_PP2B; reaction_408 is "D dissociating from Dp_CamR_Ca1_A_PP2B";
  Dp_binding_to_CamR_Ca1_B_PP2B: Dp + CamR_Ca1_B_PP2B => Dp_CamR_Ca1_B_PP2B; Spine*K_CamR_PP2B_Dp_on*Dp*CamR_Ca1_B_PP2B;
  reaction_410: Dp_CamR_Ca1_B_PP2B => Dp + CamR_Ca1_B_PP2B; Spine*K_CamR_PP2B_Dp_off*Dp_CamR_Ca1_B_PP2B; reaction_410 is "Dp dissociating from Dp_CamR_Ca1_B_PP2B";
  reaction_411: Dp_CamR_Ca1_B_PP2B => D + CamR_Ca1_B_PP2B; Spine*K_CamR_PP2B_D_off*Dp_CamR_Ca1_B_PP2B; reaction_411 is "D dissociating from Dp_CamR_Ca1_B_PP2B";
  Dp_binding_to_CamR_Ca1_C_PP2B: Dp + CamR_Ca1_C_PP2B => Dp_CamR_Ca1_C_PP2B; Spine*K_CamR_PP2B_Dp_on*Dp*CamR_Ca1_C_PP2B;
  reaction_413: Dp_CamR_Ca1_C_PP2B => Dp + CamR_Ca1_C_PP2B; Spine*K_CamR_PP2B_Dp_off*Dp_CamR_Ca1_C_PP2B; reaction_413 is "Dp dissociating from Dp_CamR_Ca1_C_PP2B";
  reaction_414: Dp_CamR_Ca1_C_PP2B => D + CamR_Ca1_C_PP2B; Spine*K_CamR_PP2B_D_off*Dp_CamR_Ca1_C_PP2B; reaction_414 is "D dissociating from Dp_CamR_Ca1_C_PP2B";
  Dp_binding_to_CamR_Ca1_D_PP2B: Dp + CamR_Ca1_D_PP2B => Dp_CamR_Ca1_D_PP2B; Spine*K_CamR_PP2B_Dp_on*Dp*CamR_Ca1_D_PP2B;
  reaction_416: Dp_CamR_Ca1_D_PP2B => Dp + CamR_Ca1_D_PP2B; Spine*K_CamR_PP2B_Dp_off*Dp_CamR_Ca1_D_PP2B; reaction_416 is "Dp dissociating from Dp_CamR_Ca1_D_PP2B";
  reaction_417: Dp_CamR_Ca1_D_PP2B => D + CamR_Ca1_D_PP2B; Spine*K_CamR_PP2B_D_off*Dp_CamR_Ca1_D_PP2B; reaction_417 is "D dissociating from Dp_CamR_Ca1_D_PP2B";
  Dp_binding_to_CamR_Ca2_AB_PP2B: Dp + CamR_Ca2_AB_PP2B => Dp_CamR_Ca2_AB_PP2B; Spine*K_CamR_PP2B_Dp_on*Dp*CamR_Ca2_AB_PP2B;
  reaction_419: Dp_CamR_Ca2_AB_PP2B => Dp + CamR_Ca2_AB_PP2B; Spine*K_CamR_PP2B_Dp_off*Dp_CamR_Ca2_AB_PP2B; reaction_419 is "Dp dissociating from Dp_CamR_Ca2_AB_PP2B";
  reaction_420: Dp_CamR_Ca2_AB_PP2B => D + CamR_Ca2_AB_PP2B; Spine*K_CamR_PP2B_D_off*Dp_CamR_Ca2_AB_PP2B; reaction_420 is "D dissociating from Dp_CamR_Ca2_AB_PP2B";
  Dp_binding_to_CamR_Ca2_AC_PP2B: Dp + CamR_Ca2_AC_PP2B => Dp_CamR_Ca2_AC_PP2B; Spine*K_CamR_PP2B_Dp_on*Dp*CamR_Ca2_AC_PP2B;
  reaction_422: Dp_CamR_Ca2_AC_PP2B => Dp + CamR_Ca2_AC_PP2B; Spine*K_CamR_PP2B_Dp_off*Dp_CamR_Ca2_AC_PP2B; reaction_422 is "Dp dissociating from Dp_CamR_Ca2_AC_PP2B";
  reaction_423: Dp_CamR_Ca2_AC_PP2B => D + CamR_Ca2_AC_PP2B; Spine*K_CamR_PP2B_D_off*Dp_CamR_Ca2_AC_PP2B; reaction_423 is "D dissociating from Dp_CamR_Ca2_AC_PP2B";
  Dp_binding_to_CamR_Ca2_AD_PP2B: Dp + CamR_Ca2_AD_PP2B => Dp_CamR_Ca2_AD_PP2B; Spine*K_CamR_PP2B_Dp_on*Dp*CamR_Ca2_AD_PP2B;
  reaction_425: Dp_CamR_Ca2_AD_PP2B => Dp + CamR_Ca2_AD_PP2B; Spine*K_CamR_PP2B_Dp_off*Dp_CamR_Ca2_AD_PP2B; reaction_425 is "Dp dissociating from Dp_CamR_Ca2_AD_PP2B";
  reaction_426: Dp_CamR_Ca2_AD_PP2B => D + CamR_Ca2_AD_PP2B; Spine*K_CamR_PP2B_D_off*Dp_CamR_Ca2_AD_PP2B; reaction_426 is "D dissociating from Dp_CamR_Ca2_AD_PP2B";
  Dp_binding_to_CamR_Ca2_BC_PP2B: Dp + CamR_Ca2_BC_PP2B => Dp_CamR_Ca2_BC_PP2B; Spine*K_CamR_PP2B_Dp_on*Dp*CamR_Ca2_BC_PP2B;
  reaction_428: Dp_CamR_Ca2_BC_PP2B => Dp + CamR_Ca2_BC_PP2B; Spine*K_CamR_PP2B_Dp_off*Dp_CamR_Ca2_BC_PP2B; reaction_428 is "Dp dissociating from Dp_CamR_Ca2_BC_PP2B";
  reaction_429: Dp_CamR_Ca2_BC_PP2B => D + CamR_Ca2_BC_PP2B; Spine*K_CamR_PP2B_D_off*Dp_CamR_Ca2_BC_PP2B; reaction_429 is "D dissociating from Dp_CamR_Ca2_BC_PP2B";
  Dp_binding_to_CamR_Ca2_BD_PP2B: Dp + CamR_Ca2_BD_PP2B => Dp_CamR_Ca2_BD_PP2B; Spine*K_CamR_PP2B_Dp_on*Dp*CamR_Ca2_BD_PP2B;
  reaction_431: Dp_CamR_Ca2_BD_PP2B => Dp + CamR_Ca2_BD_PP2B; Spine*K_CamR_PP2B_Dp_off*Dp_CamR_Ca2_BD_PP2B; reaction_431 is "Dp dissociating from Dp_CamR_Ca2_BD_PP2B";
  reaction_432: Dp_CamR_Ca2_BD_PP2B => D + CamR_Ca2_BD_PP2B; Spine*K_CamR_PP2B_D_off*Dp_CamR_Ca2_BD_PP2B; reaction_432 is "D dissociating from Dp_CamR_Ca2_BD_PP2B";
  Dp_binding_to_CamR_Ca2_CD_PP2B: Dp + CamR_Ca2_CD_PP2B => Dp_CamR_Ca2_CD_PP2B; Spine*K_CamR_PP2B_Dp_on*Dp*CamR_Ca2_CD_PP2B;
  reaction_434: Dp_CamR_Ca2_CD_PP2B => Dp + CamR_Ca2_CD_PP2B; Spine*K_CamR_PP2B_Dp_off*Dp_CamR_Ca2_CD_PP2B; reaction_434 is "Dp dissociating from Dp_CamR_Ca2_CD_PP2B";
  reaction_435: Dp_CamR_Ca2_CD_PP2B => D + CamR_Ca2_CD_PP2B; Spine*K_CamR_PP2B_D_off*Dp_CamR_Ca2_CD_PP2B; reaction_435 is "D dissociating from Dp_CamR_Ca2_CD_PP2B";
  Dp_binding_to_CamR_Ca3_ABC_PP2B: Dp + CamR_Ca3_ABC_PP2B => Dp_CamR_Ca3_ABC_PP2B; Spine*K_CamR_PP2B_Dp_on*Dp*CamR_Ca3_ABC_PP2B;
  reaction_437: Dp_CamR_Ca3_ABC_PP2B => Dp + CamR_Ca3_ABC_PP2B; Spine*K_CamR_PP2B_Dp_off*Dp_CamR_Ca3_ABC_PP2B; reaction_437 is "Dp dissociating from Dp_CamR_Ca3_ABC_PP2B";
  reaction_438: Dp_CamR_Ca3_ABC_PP2B => D + CamR_Ca3_ABC_PP2B; Spine*K_CamR_PP2B_D_off*Dp_CamR_Ca3_ABC_PP2B; reaction_438 is "D dissociating from Dp_CamR_Ca3_ABC_PP2B";
  Dp_binding_to_CamR_Ca3_ABD_PP2B: Dp + CamR_Ca3_ABD_PP2B => Dp_CamR_Ca3_ABD_PP2B; Spine*K_CamR_PP2B_Dp_on*Dp*CamR_Ca3_ABD_PP2B;
  reaction_440: Dp_CamR_Ca3_ABD_PP2B => Dp + CamR_Ca3_ABD_PP2B; Spine*K_CamR_PP2B_Dp_off*Dp_CamR_Ca3_ABD_PP2B; reaction_440 is "Dp dissociating from Dp_CamR_Ca3_ABD_PP2B";
  reaction_441: Dp_CamR_Ca3_ABD_PP2B => D + CamR_Ca3_ABD_PP2B; Spine*K_CamR_PP2B_D_off*Dp_CamR_Ca3_ABD_PP2B; reaction_441 is "D dissociating from Dp_CamR_Ca3_ABD_PP2B";
  Dp_binding_to_CamR_Ca3_ACD_PP2B: Dp + CamR_Ca3_ACD_PP2B => Dp_CamR_Ca3_ACD_PP2B; Spine*K_CamR_PP2B_Dp_on*Dp*CamR_Ca3_ACD_PP2B;
  reaction_443: Dp_CamR_Ca3_ACD_PP2B => Dp + CamR_Ca3_ACD_PP2B; Spine*K_CamR_PP2B_Dp_off*Dp_CamR_Ca3_ACD_PP2B; reaction_443 is "Dp dissociating from Dp_CamR_Ca3_ACD_PP2B";
  reaction_444: Dp_CamR_Ca3_ACD_PP2B => D + CamR_Ca3_ACD_PP2B; Spine*K_CamR_PP2B_D_off*Dp_CamR_Ca3_ACD_PP2B; reaction_444 is "D dissociating from Dp_CamR_Ca3_ACD_PP2B";
  Dp_binding_to_CamR_Ca3_BCD_PP2B: Dp + CamR_Ca3_BCD_PP2B => Dp_CamR_Ca3_BCD_PP2B; Spine*K_CamR_PP2B_Dp_on*Dp*CamR_Ca3_BCD_PP2B;
  reaction_446: Dp_CamR_Ca3_BCD_PP2B => Dp + CamR_Ca3_BCD_PP2B; Spine*K_CamR_PP2B_Dp_off*Dp_CamR_Ca3_BCD_PP2B; reaction_446 is "Dp dissociating from Dp_CamR_Ca3_BCD_PP2B";
  reaction_447: Dp_CamR_Ca3_BCD_PP2B => D + CamR_Ca3_BCD_PP2B; Spine*K_CamR_PP2B_D_off*Dp_CamR_Ca3_BCD_PP2B; reaction_447 is "D dissociating from Dp_CamR_Ca3_BCD_PP2B";
  Dp_binding_to_CamR_Ca4_ABCD_PP2B: Dp + CamR_Ca4_ABCD_PP2B => Dp_CamR_Ca4_ABCD_PP2B; Spine*K_CamR_PP2B_Dp_on*Dp*CamR_Ca4_ABCD_PP2B;
  reaction_449: Dp_CamR_Ca4_ABCD_PP2B => Dp + CamR_Ca4_ABCD_PP2B; Spine*K_CamR_PP2B_Dp_off*Dp_CamR_Ca4_ABCD_PP2B; reaction_449 is "Dp dissociating from Dp_CamR_Ca4_ABCD_PP2B";
  reaction_450: Dp_CamR_Ca4_ABCD_PP2B => D + CamR_Ca4_ABCD_PP2B; Spine*K_CamR_PP2B_D_off*Dp_CamR_Ca4_ABCD_PP2B; reaction_450 is "D dissociating from Dp_CamR_Ca4_ABCD_PP2B";
  Dp_binding_to_PP1a: PP1a + Dp => PP1a_Dp; Spine*K_PP1a_Dp_on*PP1a*Dp;
  Dp_dissociating_from_PP1a: PP1a_Dp => PP1a + Dp; Spine*K_PP1a_Dp_off*PP1a_Dp;
  CaMKIIp_binding_to_PP1a: CaMKIIp + PP1a => CaMKIIp_PP1a; Spine*K_CamMKIIp_PP1a_on*CaMKIIp*PP1a;
  reaction_454: CaMKIIp_PP1a => CaMKIIp + PP1a; Spine*K_CamMKIIp_PP1a_off*CaMKIIp_PP1a; reaction_454 is "CaMKIIp dissociating from CaMKIIp_PP1a";
  reaction_455: CaMKIIp_PP1a => CaMKII + PP1a; Spine*K_CamMKIIp_PP1a_p_off*CaMKIIp_PP1a; reaction_455 is "CaMKII dissociating from CaMKIIp_PP1a";
  CamR_CaMKIIp_binding_to_PP1a: CamR_CaMKIIp + PP1a => CamR_CaMKIIp_PP1a; Spine*K_CamMKIIp_PP1a_on*CamR_CaMKIIp*PP1a;
  reaction_457: CamR_CaMKIIp_PP1a => CamR_CaMKIIp + PP1a; Spine*K_CamMKIIp_PP1a_off*CamR_CaMKIIp_PP1a; reaction_457 is "CamR_CaMKIIp dissociating from CamR_CaMKIIp_PP1a";
  reaction_458: CamR_CaMKIIp_PP1a => CamR_CaMKII + PP1a; Spine*K_CamMKIIp_PP1a_p_off*CamR_CaMKIIp_PP1a; reaction_458 is "CamR_CaMKIIp_PP1a dephosphorylation";
  reaction_459: CamR_Ca1_A_CaMKIIp + PP1a => CamR_Ca1_A_CaMKIIp_PP1a; Spine*K_CamMKIIp_PP1a_on*CamR_Ca1_A_CaMKIIp*PP1a; reaction_459 is "CamR_Ca1_A_CaMKIIp binding to PP1a";
  reaction_460: CamR_Ca1_A_CaMKIIp_PP1a => CamR_Ca1_A_CaMKIIp + PP1a; Spine*K_CamMKIIp_PP1a_off*CamR_Ca1_A_CaMKIIp_PP1a; reaction_460 is "CamR_Ca1_A_CaMKIIp dissociating from CamR_Ca1_A_CaMKIIp_PP1a";
  reaction_461: CamR_Ca1_A_CaMKIIp_PP1a => CamR_Ca1_A_CaMKII + PP1a; Spine*K_CamMKIIp_PP1a_p_off*CamR_Ca1_A_CaMKIIp_PP1a; reaction_461 is "CamR_Ca1_A_CaMKIIp_PP1a dephosphorylation";
  reaction_462: CamR_Ca1_B_CaMKIIp + PP1a => CamR_Ca1_B_CaMKIIp_PP1a; Spine*K_CamMKIIp_PP1a_on*CamR_Ca1_B_CaMKIIp*PP1a; reaction_462 is "CamR_Ca1_B_CaMKIIp binding to PP1a";
  reaction_463: CamR_Ca1_B_CaMKIIp_PP1a => CamR_Ca1_B_CaMKIIp + PP1a; Spine*K_CamMKIIp_PP1a_off*CamR_Ca1_B_CaMKIIp_PP1a; reaction_463 is "CamR_Ca1_B_CaMKIIp dissociating from CamR_Ca1_B_CaMKIIp_PP1a";
  reaction_464: CamR_Ca1_B_CaMKIIp_PP1a => CamR_Ca1_B_CaMKII + PP1a; Spine*K_CamMKIIp_PP1a_p_off*CamR_Ca1_B_CaMKIIp_PP1a; reaction_464 is "CamR_Ca1_B_CaMKIIp_PP1a dephosphorylation";
  reaction_465: CamR_Ca1_C_CaMKIIp + PP1a => CamR_Ca1_C_CaMKIIp_PP1a; Spine*K_CamMKIIp_PP1a_on*CamR_Ca1_C_CaMKIIp*PP1a; reaction_465 is "CamR_Ca1_C_CaMKIIp binding to PP1a";
  reaction_466: CamR_Ca1_C_CaMKIIp_PP1a => CamR_Ca1_C_CaMKIIp + PP1a; Spine*K_CamMKIIp_PP1a_off*CamR_Ca1_C_CaMKIIp_PP1a; reaction_466 is "CamR_Ca1_C_CaMKIIp dissociating from CamR_Ca1_C_CaMKIIp_PP1a";
  reaction_467: CamR_Ca1_C_CaMKIIp_PP1a => CamR_Ca1_C_CaMKII + PP1a; Spine*K_CamMKIIp_PP1a_p_off*CamR_Ca1_C_CaMKIIp_PP1a; reaction_467 is "CamR_Ca1_C_CaMKIIp_PP1a dephosphorylation";
  reaction_468: CamR_Ca1_D_CaMKIIp + PP1a => CamR_Ca1_D_CaMKIIp_PP1a; Spine*K_CamMKIIp_PP1a_on*CamR_Ca1_D_CaMKIIp*PP1a; reaction_468 is "CamR_Ca1_D_CaMKIIp binding to PP1a";
  reaction_469: CamR_Ca1_D_CaMKIIp_PP1a => CamR_Ca1_D_CaMKIIp + PP1a; Spine*K_CamMKIIp_PP1a_off*CamR_Ca1_D_CaMKIIp_PP1a; reaction_469 is "CamR_Ca1_D_CaMKIIp dissociating from CamR_Ca1_D_CaMKIIp_PP1a";
  reaction_470: CamR_Ca1_D_CaMKIIp_PP1a => CamR_Ca1_D_CaMKII + PP1a; Spine*K_CamMKIIp_PP1a_p_off*CamR_Ca1_D_CaMKIIp_PP1a; reaction_470 is "CamR_Ca1_D_CaMKIIp_PP1a dephosphorylation";
  reaction_471: CamR_Ca2_AB_CaMKIIp + PP1a => CamR_Ca2_AB_CaMKIIp_PP1a; Spine*K_CamMKIIp_PP1a_on*CamR_Ca2_AB_CaMKIIp*PP1a; reaction_471 is "CamR_Ca2_AB_CaMKIIp binding to PP1a";
  reaction_472: CamR_Ca2_AB_CaMKIIp_PP1a => CamR_Ca2_AB_CaMKIIp + PP1a; Spine*K_CamMKIIp_PP1a_off*CamR_Ca2_AB_CaMKIIp_PP1a; reaction_472 is "CamR_Ca2_AB_CaMKIIp dissociating from CamR_Ca2_AB_CaMKIIp_PP1a";
  reaction_473: CamR_Ca2_AB_CaMKIIp_PP1a => CamR_Ca2_AB_CaMKII + PP1a; Spine*K_CamMKIIp_PP1a_p_off*CamR_Ca2_AB_CaMKIIp_PP1a; reaction_473 is "CamR_Ca2_AB_CaMKIIp_PP1a dephosphorylation";
  reaction_474: CamR_Ca2_AC_CaMKIIp + PP1a => CamR_Ca2_AC_CaMKIIp_PP1a; Spine*K_CamMKIIp_PP1a_on*CamR_Ca2_AC_CaMKIIp*PP1a; reaction_474 is "CamR_Ca2_AC_CaMKIIp binding to PP1a";
  reaction_475: CamR_Ca2_AC_CaMKIIp_PP1a => CamR_Ca2_AC_CaMKIIp + PP1a; Spine*K_CamMKIIp_PP1a_off*CamR_Ca2_AC_CaMKIIp_PP1a; reaction_475 is "CamR_Ca2_AC_CaMKIIp dissociating from CamR_Ca2_AC_CaMKIIp_PP1a";
  reaction_476: CamR_Ca2_AC_CaMKIIp_PP1a => CamR_Ca2_AC_CaMKII + PP1a; Spine*K_CamMKIIp_PP1a_p_off*CamR_Ca2_AC_CaMKIIp_PP1a; reaction_476 is "CamR_Ca2_AC_CaMKIIp_PP1a dephosphorylation";
  reaction_477: CamR_Ca2_AD_CaMKIIp + PP1a => CamR_Ca2_AD_CaMKIIp_PP1a; Spine*K_CamMKIIp_PP1a_on*CamR_Ca2_AD_CaMKIIp*PP1a; reaction_477 is "CamR_Ca2_AD_CaMKIIp binding to PP1a";
  reaction_478: CamR_Ca2_AD_CaMKIIp_PP1a => CamR_Ca2_AD_CaMKIIp + PP1a; Spine*K_CamMKIIp_PP1a_off*CamR_Ca2_AD_CaMKIIp_PP1a; reaction_478 is "CamR_Ca2_AD_CaMKIIp dissociating from CamR_Ca2_AD_CaMKIIp_PP1a";
  reaction_479: CamR_Ca2_AD_CaMKIIp_PP1a => CamR_Ca2_AD_CaMKII + PP1a; Spine*K_CamMKIIp_PP1a_p_off*CamR_Ca2_AD_CaMKIIp_PP1a; reaction_479 is "CamR_Ca2_AD_CaMKIIp_PP1a dephosphorylation";
  reaction_480: CamR_Ca2_BC_CaMKIIp + PP1a => CamR_Ca2_BC_CaMKIIp_PP1a; Spine*K_CamMKIIp_PP1a_on*CamR_Ca2_BC_CaMKIIp*PP1a; reaction_480 is "CamR_Ca2_BC_CaMKIIp binding to PP1a";
  reaction_481: CamR_Ca2_BC_CaMKIIp_PP1a => CamR_Ca2_BC_CaMKIIp + PP1a; Spine*K_CamMKIIp_PP1a_off*CamR_Ca2_BC_CaMKIIp_PP1a; reaction_481 is "CamR_Ca2_BC_CaMKIIp dissociating from CamR_Ca2_BC_CaMKIIp_PP1a";
  reaction_482: CamR_Ca2_BC_CaMKIIp_PP1a => CamR_Ca2_BC_CaMKII + PP1a; Spine*K_CamMKIIp_PP1a_p_off*CamR_Ca2_BC_CaMKIIp_PP1a; reaction_482 is "CamR_Ca2_BC_CaMKIIp_PP1a dephosphorylation";
  reaction_483: CamR_Ca2_BD_CaMKIIp + PP1a => CamR_Ca2_BD_CaMKIIp_PP1a; Spine*K_CamMKIIp_PP1a_on*CamR_Ca2_BD_CaMKIIp*PP1a; reaction_483 is "CamR_Ca2_BD_CaMKIIp binding to PP1a";
  reaction_484: CamR_Ca2_BD_CaMKIIp_PP1a => CamR_Ca2_BD_CaMKIIp + PP1a; Spine*K_CamMKIIp_PP1a_off*CamR_Ca2_BD_CaMKIIp_PP1a; reaction_484 is "CamR_Ca2_BD_CaMKIIp dissociating from CamR_Ca2_BD_CaMKIIp_PP1a";
  reaction_485: CamR_Ca2_BD_CaMKIIp_PP1a => CamR_Ca2_BD_CaMKII + PP1a; Spine*K_CamMKIIp_PP1a_p_off*CamR_Ca2_BD_CaMKIIp_PP1a; reaction_485 is "CamR_Ca2_BD_CaMKIIp_PP1a dephosphorylation";
  reaction_486: CamR_Ca2_CD_CaMKIIp + PP1a => CamR_Ca2_CD_CaMKIIp_PP1a; Spine*K_CamMKIIp_PP1a_on*CamR_Ca2_CD_CaMKIIp*PP1a; reaction_486 is "CamR_Ca2_CD_CaMKIIp binding to PP1a";
  reaction_487: CamR_Ca2_CD_CaMKIIp_PP1a => CamR_Ca2_CD_CaMKIIp + PP1a; Spine*K_CamMKIIp_PP1a_off*CamR_Ca2_CD_CaMKIIp_PP1a; reaction_487 is "CamR_Ca2_CD_CaMKIIp dissociating from CamR_Ca2_CD_CaMKIIp_PP1a";
  reaction_488: CamR_Ca2_CD_CaMKIIp_PP1a => CamR_Ca2_CD_CaMKII + PP1a; Spine*K_CamMKIIp_PP1a_p_off*CamR_Ca2_CD_CaMKIIp_PP1a; reaction_488 is "CamR_Ca2_CD_CaMKIIp_PP1a dephosphorylation";
  reaction_489: CamR_Ca3_ABC_CaMKIIp + PP1a => CamR_Ca3_ABC_CaMKIIp_PP1a; Spine*K_CamMKIIp_PP1a_on*CamR_Ca3_ABC_CaMKIIp*PP1a; reaction_489 is "CamR_Ca3_ABC_CaMKIIp binding to PP1a";
  reaction_490: CamR_Ca3_ABC_CaMKIIp_PP1a => CamR_Ca3_ABC_CaMKIIp + PP1a; Spine*K_CamMKIIp_PP1a_off*CamR_Ca3_ABC_CaMKIIp_PP1a; reaction_490 is "CamR_Ca3_ABC_CaMKIIp dissociating from CamR_Ca3_ABC_CaMKIIp_PP1a";
  reaction_491: CamR_Ca3_ABC_CaMKIIp_PP1a => CamR_Ca3_ABC_CaMKII + PP1a; Spine*K_CamMKIIp_PP1a_p_off*CamR_Ca3_ABC_CaMKIIp_PP1a; reaction_491 is "CamR_Ca3_ABC_CaMKIIp_PP1a dephosphorylation";
  reaction_492: CamR_Ca3_ABD_CaMKIIp + PP1a => CamR_Ca3_ABD_CaMKIIp_PP1a; Spine*K_CamMKIIp_PP1a_on*CamR_Ca3_ABD_CaMKIIp*PP1a; reaction_492 is "CamR_Ca3_ABD_CaMKIIp binding to PP1a";
  reaction_493: CamR_Ca3_ABD_CaMKIIp_PP1a => CamR_Ca3_ABD_CaMKIIp + PP1a; Spine*K_CamMKIIp_PP1a_off*CamR_Ca3_ABD_CaMKIIp_PP1a; reaction_493 is "CamR_Ca3_ABD_CaMKIIp dissociating from CamR_Ca3_ABD_CaMKIIp_PP1a";
  reaction_494: CamR_Ca3_ABD_CaMKIIp_PP1a => CamR_Ca3_ABD_CaMKII + PP1a; Spine*K_CamMKIIp_PP1a_p_off*CamR_Ca3_ABD_CaMKIIp_PP1a; reaction_494 is "CamR_Ca3_ABD_CaMKIIp_PP1a dephosphorylation";
  reaction_495: CamR_Ca3_ACD_CaMKIIp + PP1a => CamR_Ca3_ACD_CaMKIIp_PP1a; Spine*K_CamMKIIp_PP1a_on*CamR_Ca3_ACD_CaMKIIp*PP1a; reaction_495 is "CamR_Ca3_ACD_CaMKIIp binding to PP1a";
  reaction_496: CamR_Ca3_ACD_CaMKIIp_PP1a => CamR_Ca3_ACD_CaMKIIp + PP1a; Spine*K_CamMKIIp_PP1a_off*CamR_Ca3_ACD_CaMKIIp_PP1a; reaction_496 is "CamR_Ca3_ACD_CaMKIIp dissociating from CamR_Ca3_ACD_CaMKIIp_PP1a";
  reaction_497: CamR_Ca3_ACD_CaMKIIp_PP1a => CamR_Ca3_ACD_CaMKII + PP1a; Spine*K_CamMKIIp_PP1a_p_off*CamR_Ca3_ACD_CaMKIIp_PP1a; reaction_497 is "CamR_Ca3_ACD_CaMKIIp_PP1a dephosphorylation";
  reaction_498: CamR_Ca3_BCD_CaMKIIp + PP1a => CamR_Ca3_BCD_CaMKIIp_PP1a; Spine*K_CamMKIIp_PP1a_on*CamR_Ca3_BCD_CaMKIIp*PP1a; reaction_498 is "CamR_Ca3_BCD_CaMKIIp binding to PP1a";
  reaction_499: CamR_Ca3_BCD_CaMKIIp_PP1a => CamR_Ca3_BCD_CaMKIIp + PP1a; Spine*K_CamMKIIp_PP1a_off*CamR_Ca3_BCD_CaMKIIp_PP1a; reaction_499 is "CamR_Ca3_BCD_CaMKIIp dissociating from CamR_Ca3_BCD_CaMKIIp_PP1a";
  reaction_500: CamR_Ca3_BCD_CaMKIIp_PP1a => CamR_Ca3_BCD_CaMKII + PP1a; Spine*K_CamMKIIp_PP1a_p_off*CamR_Ca3_BCD_CaMKIIp_PP1a; reaction_500 is "CamR_Ca3_BCD_CaMKIIp_PP1a dephosphorylation";
  reaction_501: CamR_Ca4_ABCD_CaMKIIp + PP1a => CamR_Ca4_ABCD_CaMKIIp_PP1a; Spine*K_CamMKIIp_PP1a_on*CamR_Ca4_ABCD_CaMKIIp*PP1a; reaction_501 is "CamR_Ca4_ABCD_CaMKIIp binding to PP1a";
  reaction_502: CamR_Ca4_ABCD_CaMKIIp_PP1a => CamR_Ca4_ABCD_CaMKIIp + PP1a; Spine*K_CamMKIIp_PP1a_off*CamR_Ca4_ABCD_CaMKIIp_PP1a; reaction_502 is "CamR_Ca4_ABCD_CaMKIIp dissociating from CamR_Ca4_ABCD_CaMKIIp_PP1a";
  reaction_503: CamR_Ca4_ABCD_CaMKIIp_PP1a => CamR_Ca4_ABCD_CaMKII + PP1a; Spine*K_CamMKIIp_PP1a_p_off*CamR_Ca4_ABCD_CaMKIIp_PP1a; reaction_503 is "CamR_Ca4_ABCD_CaMKIIp_PP1a dephosphorylation";
  PP2B_binding_to_CamR_Ca2_AC: CamR_Ca2_AC + PP2B => CamR_Ca2_AC_PP2B; Spine*K_CamR_PP2B_on*CamR_Ca2_AC*PP2B;
  Ca_binding_to_CBP_fast: CBPfast + Ca => CBPfastCa; Spine*K_CBP_fast_on*CBPfast*Ca;
  Ca_dissociating_from_CBP_fast_Ca: CBPfastCa => CBPfast + Ca; Spine*K_CBP_fast_off*CBPfastCa;
  Ca_binding_to_CBP_media: CBPmedia + Ca => CBPmediaCa; Spine*K_CBP_media_on*CBPmedia*Ca;
  Ca_dissociating_from_CBP_media_Ca: CBPmediaCa => CBPmedia + Ca; Spine*K_CBP_media_off*CBPmediaCa;
  Ca_binding_to_PP2Bi: PP2Bi + Ca => PP2Bi_Ca1; Spine*K_PP2Bi_Ca_on*PP2Bi*Ca;
  Ca_binding_to_PP2Bi_Ca1: PP2Bi_Ca1 + Ca => PP2Bi_Ca2; Spine*K_PP2Bi_Ca_on*PP2Bi_Ca1*Ca;
  Ca_binding_to_PP2Bi_Ca2: PP2Bi_Ca2 + Ca => PP2Bi_Ca3; Spine*K_PP2Bi_Ca_on*PP2Bi_Ca2*Ca;
  Ca_binding_to_PP2Bi_Ca3: PP2Bi_Ca3 + Ca => PP2B; Spine*K_PP2Bi_Ca_on*PP2Bi_Ca3*Ca;
  Ca_dissociating_from_PP2Bi_Ca2: PP2Bi_Ca2 => PP2Bi_Ca1 + Ca; Spine*K_PP2Bi_Ca2_Ca_off*PP2Bi_Ca2;
  Ca_dissociating_from_PP2Bi_Ca3: PP2Bi_Ca3 => PP2Bi_Ca2 + Ca; Spine*K_PP2Bi_Ca3_Ca_off*PP2Bi_Ca3;
  Ca_dissociating_from_PP2B: PP2B => PP2Bi_Ca3 + Ca; Spine*K_PP2B_Ca_off*PP2B;
  Ca_dissociating_from_PP2Bi_Ca1: PP2Bi_Ca1 => PP2Bi + Ca; Spine*K_PP2Bi_Ca1_Ca_off*PP2Bi_Ca1;
  Ca_in: => Ca; Spine*Constant_flux_irreversible(k_Ca_in);

  // Events:
  Ca_spike_on: at (spikeOn == 1): k_Ca_in = spikeInput, startTime = time;
  Ca_spike_off: at ((spikeOn == 1) && (time == startTime + spikeInputDuration)): k_Ca_in = 0, spikeOn = 0, startTime = 0;
  Ca_spikes: at ((time == Initial_for_equilibriumTime) || ((time == Initial_for_equilibriumTime + spikeCounter/Initial_for_spikeFrequency) && (time < Initial_for_equilibriumTime + Initial_for_spikeNumber/Initial_for_spikeFrequency))): spikeOn = 1, spikeCounter = spikeCounter + 1;
end
