// SBML level 2 version 4
// dcterms:bibliographicCitation: urn:miriam:pubmed:9661282

model MODEL1708250002()
  // Owen1998 - Tumour treatment model
  // Owen1998 - tumour treatment model
  // This model is described in the article:
  // Modelling the macrophage invasion of tumours: effects on growth and composition.
  // Owen MR, Sherratt JA.
  // IMA J Math Appl Med Biol 1998 Jun; 15(2): 165-185
  // Abstract:
  // Even in the early stages of their development, tumours are not simply a homogeneous grouping of mutant cells; rather, they develop in tandem with normal tissue cells, and also recruit other cell types including lymphatic cells and the endothelial cells required for the development of a blood supply. It has been repeatedly seen that macrophages form a significant proportion of the tumour mass, and that they can have a variety of effects upon the tumour, leading to a delicate balance between growth promotion and inhibition. This paper develops a model for the early, avascular growth of a tumour, concentrating on the inhibitory effect of macrophages due to their cytolytic activity. It is shown that such an immune response is not sufficient to prevent growth, due to it being a second-order process with respect to the density of the tumour cells present. However, the presence of macrophages does have important effects on the tumour composition, and the authors perform a detailed bifurcation analysis of their model to clarify this. An extended model is also considered which incorporates addition of exogenous chemical regulators. In this case, the model admits the possibility of tumour regression, and the therapeutic implications of this are discussed.
  // This model is hosted on BioModels Database and identified by: MODEL1708250002.
  // To cite BioModels Database, please use: BioModels Database: An enhanced, curated and annotated resource for published quantitative kinetic models.
  // To the extent possible under law, all copyright and related or neighbouring rights to this encoded model have been dedicated to the public domain worldwide. Please refer to CC0 Public Domain Dedication for more information.
  // biomodels.db:MODEL1708250002
  // biomodels.db:BIOMD0000000650
  // isDescribedBy pubmed:9661282
  // hasProperty GO:0002837
  // isDescribedBy pubmed:9661282
  // hasProperty MAMO:0000046

  // Compartments:
  compartment cell = 1; cell is "compartment";  // isVersionOf OMIT:0027497

  // Species:
  species $l in cell = 0.1; l is "macrophage";  // isVersionOf BTO:0000801
  species $m in cell = 0.9; m is "mutated cell";  // isVersionOf CL:0001063
  species $n in cell = 0.9; n is "normal cell";  // isVersionOf G0:0005623

  // Parameters:
  A = 0.025;
  N = 1;
  I = 0.01;
  K_l = 17.857;
  delta_l = 0.1;
  K_m = 25;
  sigma = 0.7823;
  xi = 2;
  S = 62.5;
  F = 0;
  treatment_start = 10;
  treatment_end = 400;
  sink = 0;

  // Rate rules:
  l' = A*l*(m + F)*(N + 1)/(N + l + m + n) + I*(1 + S*(m + F)) - K_l*l*m*(m + F) - delta_l*l;
  m' = xi*m*(N + 1)/(N + l + m + n) - m - K_m*l*m*(m + F);
  n' = n*(N + 1)/(N + l + m + n) - n;

  // Events:
  treatment_start_0: at (time >= treatment_start): F = 0.072;
  treatment_end_0: at (time >= treatment_end): F = 0;
end
