// SBML level 2 version 4
// dcterms:bibliographicCitation: urn:miriam:pubmed:27768873

function func1_Cdk1_activation(Ks, Adeg, Cdk1CycB, Bdeg, APC, napc, EC50apc, Acdc, Bcdc, ncdc, EC50cdc, CycB, Awee, Bwee, EC50wee, nwee)
  Ks - Adeg*Cdk1CycB - Bdeg*APC^napc*Cdk1CycB/(EC50apc^napc + APC^napc) + (Acdc + Bcdc*Cdk1CycB^ncdc/(EC50cdc^ncdc + Cdk1CycB^ncdc))*(CycB - Cdk1CycB) - (Awee + Bwee*EC50wee^nwee/(EC50wee^nwee + Cdk1CycB^nwee))*Cdk1CycB;
end

function func2_CycB_regulation(Ks, Adeg, CycB, Bdeg, APC, napc, EC50apc)
  Ks - Adeg*CycB - Bdeg*APC^napc*CycB/(EC50apc^napc + APC^napc);
end

function func3_APC_regulation(AK, BK, Cdk1CycB, nK, EC50K, APC, AP, BP, EC50P, nP)
  (AK + BK*(Cdk1CycB/200)^nK/((Cdk1CycB/200)^nK + EC50K^nK))*(1 - APC) - (AP + BP*EC50P^nP/(APC^nP + EC50P^nP))*APC;
end

model MODEL1710040001()
  // Araujo2016 - Positive feedback in Cdk1 signalling keeps mitotic duration short and constant
  // This model is described in the article:
  // Positive Feedback Keeps Duration of Mitosis Temporally Insulated from Upstream Cell-Cycle Events.
  // Araujo AR, Gelens L, Sheriff RS, Santos SD.
  // Mol. Cell 2016 Oct; 64(2): 362-375
  // Abstract:
  // Cell division is characterized by a sequence of events by which a cell gives rise to two daughter cells. Quantitative measurements of cell-cycle dynamics in single cells showed that despite variability in G1-, S-, and G2 phases, duration of mitosis is short and remarkably constant. Surprisingly, there is no correlation between cell-cycle length and mitotic duration, suggesting that mitosis is temporally insulated from variability in earlier cell-cycle phases. By combining live cell imaging and computational modeling, we showed that positive feedback is the molecular mechanism underlying the temporal insulation of mitosis. Perturbing positive feedback gave rise to a sluggish, variable entry and progression through mitosis and uncoupled duration of mitosis from variability in cell cycle length. We show that positive feedback is important to keep mitosis short, constant, and temporally insulated and anticipate it might be a commonly used regulatory strategy to create modularity in other biological systems.
  // This model is hosted on BioModels Database and identified by: BIOMD0000000657.
  // To cite BioModels Database, please use: Chelliah V et al. BioModels: ten-year anniversary. Nucl. Acids Res. 2015, 43(Database issue):D542-8.
  // To the extent possible under law, all copyright and related or neighbouring rights to this encoded model have been dedicated to the public domain worldwide. Please refer to CC0 Public Domain Dedication for more information.
  // biomodels.db:MODEL1710040001
  // biomodels.db:BIOMD0000000657
  // isDescribedBy pubmed:27768873
  // hasPart PW:0000092
  // hasProperty biomodels.teddy:TEDDY_0000035 mamo:MAMO_0000046
  // hasTaxon taxonomy:9606

  // Compartments:
  compartment Cell = 1;

  // Species:
  species Cdk1CycB in Cell = 20;  // hasPart uniprot:P06493; isVersionOf GO:0097125; hasPart uniprot:P14635
  species APC in Cell = 0;  // isVersionOf uniprot:P25054
  species CycB in Cell = 60;  // isVersionOf uniprot:P14635

  // Parameters:
  Ks = 0.1;
  Adeg = 0.001;
  Bdeg = 0.02;
  Acdc = 0.5;
  Bcdc = 1.5;
  EC50cdc = 30;
  n_cdc = 10;
  Awee = 0.5;
  Bwee = 1;
  EC50wee = 30;
  n_wee = 10;
  EC50apc = 0.5;
  n_apc = 10;
  AK = 0;
  BK = 0.25;
  EC50K = 0.18;
  n_K = 5;
  AP = 0.025;
  BP = 0.5;
  EC50P = 0.18;
  n_P = 5;

  // Reactions:
  R1: -> Cdk1CycB; Cell*func1_Cdk1_activation(Ks, Adeg, Cdk1CycB, Bdeg, APC, n_apc, EC50apc, Acdc, Bcdc, n_cdc, EC50cdc, CycB, Awee, Bwee, EC50wee, n_wee);  // modifiers: APC, CycB
  R2: -> CycB; Cell*func2_CycB_regulation(Ks, Adeg, CycB, Bdeg, APC, n_apc, EC50apc);  // modifiers: APC
  R3: -> APC; Cell*func3_APC_regulation(AK, BK, Cdk1CycB, n_K, EC50K, APC, AP, BP, EC50P, n_P);  // modifiers: Cdk1CycB

  // Unit definitions:
  unit volume = 1e-3 litre;
  unit time = 60 second;
  unit substance = 1e-9 mole;
end
