// SBML level 2 version 4
// dcterms:bibliographicCitation: Regulation of ERK-MAPK signaling in human epidermis urn:miriam:pubmed:26209520

model Cursons2015___Regulation_of_ERK_MAPK_signaling_in_human_epidermis()
  // Cursons2015 - Regulation of ERK-MAPK signaling in human epidermis
  // Model comparing the abundance of phosphorylated MAPK signalling proteins and calcium signalling in the epidermis.
  // This model is described in the article:
  // Regulation of ERK-MAPK signaling in human epidermis.
  // Cursons J, Gao J, Hurley DG, Print CG, Dunbar PR, Jacobs MD, Crampin EJ.
  // BMC Syst Biol 2015; 9: 41
  // Abstract:
  // The skin is largely comprised of keratinocytes within the interfollicular epidermis. Over approximately two weeks these cells differentiate and traverse the thickness of the skin. The stage of differentiation is therefore reflected in the positions of cells within the tissue, providing a convenient axis along which to study the signaling events that occur in situ during keratinocyte terminal differentiation, over this extended two-week timescale. The canonical ERK-MAPK signaling cascade (Raf-1, MEK-1/2 and ERK-1/2) has been implicated in controlling diverse cellular behaviors, including proliferation and differentiation. While the molecular interactions involved in signal transduction through this cascade have been well characterized in cell culture experiments, our understanding of how this sequence of events unfolds to determine cell fate within a homeostatic tissue environment has not been fully characterized.We measured the abundance of total and phosphorylated ERK-MAPK signaling proteins within interfollicular keratinocytes in transverse cross-sections of human epidermis using immunofluorescence microscopy. To investigate these data we developed a mathematical model of the signaling cascade using a normalized-Hill differential equation formalism.These data show coordinated variation in the abundance of phosphorylated ERK-MAPK components across the epidermis. Statistical analysis of these data shows that associations between phosphorylated ERK-MAPK components which correspond to canonical molecular interactions are dependent upon spatial position within the epidermis. The model demonstrates that the spatial profile of activation for ERK-MAPK signaling components across the epidermis may be maintained in a cell-autonomous fashion by an underlying spatial gradient in calcium signaling.Our data demonstrate an extended phospho-protein profile of ERK-MAPK signaling cascade components across the epidermis in situ, and statistical associations in these data indicate canonical ERK-MAPK interactions underlie this spatial profile of ERK-MAPK activation. Using mathematical modelling we have demonstrated that spatially varying calcium signaling components across the epidermis may be sufficient to maintain the spatial profile of ERK-MAPK signaling cascade components in a cell-autonomous manner. These findings may have significant implications for the wide range of cancer drugs which therapeutically target ERK-MAPK signaling components.
  // This model is hosted on BioModels Database and identified by: BIOMD0000000659.
  // To cite BioModels Database, please use: Chelliah V et al. BioModels: ten-year anniversary. Nucl. Acids Res. 2015, 43(Database issue):D542-8.
  // To the extent possible under law, all copyright and related or neighbouring rights to this encoded model have been dedicated to the public domain worldwide. Please refer to CC0 Public Domain Dedication for more information.
  // biomodels.db:MODEL1503270000
  // biomodels.db:BIOMD0000000659
  // isDescribedBy pubmed:26209520
  // hasProperty GO:0019722
  // isVersionOf GO:0000165
  // occursIn BTO:0000404

  // Compartments:
  compartment c = 1; c is "cytoplasm";  // GO:0005737
  compartment n = 0.5; n is "nucleus";  // GO:0005634

  // Species:
  species $pRaf_cyto in c = 0.5; pRaf_cyto is "Rafc";  // isVersionOf uniprot:P04049; hasProperty pato:PATO_0002220
  species $pMEK_cyto in c = 0.8; pMEK_cyto is "MEKc";  // hasProperty pato:PATO_0002220; isVersionOf uniprot:Q02750
  species $pERK_cyto in c = 0.7; pERK_cyto is "ERKc";  // hasProperty pato:PATO_0002220; isVersionOf uniprot:P28482
  species $pMEK_nuc in n = 0.4; pMEK_nuc is "MEKn";  // isVersionOf uniprot:Q02750; hasProperty pato:PATO_0002220
  species $pERK_nuc in n = 0.2; pERK_nuc is "ERKn";  // hasProperty pato:PATO_0002220; isVersionOf uniprot:P28482
  species $Ca in c = 0.7632;  // isVersionOf CHEBI:39124
  species $CaM_memb in c = 0.72675;  // isVersionOf uniprot:P0DP23

  // Parameters:
  numTissuePos = 0.5 unit_0; numTissuePos is "Tissue_Pos";
  numCytoToNucVolRatio has unit_0; numCytoToNucVolRatio is "CtoN_VolRatio";
  numCaInputBaseline = 0.754 unit_0; numCaInputBaseline is "Ca_Baseline";
  numCaInputAmp = 0.092 unit_0; numCaInputAmp is "Ca_Amp";
  numCaMInputBaseline = 0.363 unit_0; numCaMInputBaseline is "CaM_Baseline";
  numCaMInputAmp = 0.485 unit_0; numCaMInputAmp is "CaM_Amp";
  numHillCoeff = 1.4 unit_0; numHillCoeff is "Hill_Coeff";
  numHillWeight = 1 unit_0; numHillWeight is "Hill_Weight";
  numHillMax = 1 unit_0; numHillMax is "Hill_Max";
  numHillTau = 1 unit_0; numHillTau is "Hill_Tau";
  numHillEC50 = 0.5 unit_0; numHillEC50 is "Hill_EC50";
  numMEKCytoToNucParam = 0.05 unit_0; numMEKCytoToNucParam is "MEK_CtoN";
  numMEKNucToCytoParam = 0.5 unit_0; numMEKNucToCytoParam is "MEK_NtoC";
  numERKCytoToNucParam = 0.01 unit_0; numERKCytoToNucParam is "ERK_CtoN";
  numERKNucToCytoParam = 0.01 unit_0; numERKNucToCytoParam is "ERK_NtoC";
  numHillBeta = 2.56 unit_0; numHillBeta is "Hill_Beta";
  numHillK = 1.37 unit_0; numHillK is "Hill_K";
  funcHillCaToRaf has unit_0; funcHillCaToRaf is "Hill_CaToRaf";
  funcHillCaMToRaf has unit_0; funcHillCaMToRaf is "Hill_CaMToRaf";
  funcHillERKToRaf has unit_0; funcHillERKToRaf is "Hill_ERKToRaf";
  funcHillRafToMEK has unit_0; funcHillRafToMEK is "Hill_RafToMEK";
  funcHillMEKToERKCyto has unit_0; funcHillMEKToERKCyto is "Hill_MEKToERKCyto";
  funcHillMEKToERKNuc has unit_0; funcHillMEKToERKNuc is "Hill_MEKToERKNuc";
  funcHillERKToERKNuc has unit_0; funcHillERKToERKNuc is "Hill_ERKToERKn";
  numTotalRafInputs = 0 unit_0;

  // Assignment rules:
  numCytoToNucVolRatio := 2 + 5*(numTissuePos/7);
  funcHillCaToRaf := numHillWeight*numHillBeta*Ca^numHillCoeff/(numHillK^numHillCoeff + Ca^numHillCoeff);
  funcHillCaMToRaf := numHillWeight*numHillBeta*CaM_memb^numHillCoeff/(numHillK^numHillCoeff + CaM_memb^numHillCoeff);
  funcHillERKToRaf := numHillWeight*numHillBeta*pERK_nuc^numHillCoeff/(numHillK^numHillCoeff + pERK_nuc^numHillCoeff);
  funcHillRafToMEK := numHillWeight*numHillBeta*pRaf_cyto^numHillCoeff/(numHillK^numHillCoeff + pRaf_cyto^numHillCoeff);
  funcHillMEKToERKCyto := numHillWeight*numHillBeta*pMEK_cyto^numHillCoeff/(numHillK^numHillCoeff + pMEK_cyto^numHillCoeff);
  funcHillMEKToERKNuc := numHillWeight*numHillBeta*pMEK_nuc^numHillCoeff/(numHillK^numHillCoeff + pMEK_nuc^numHillCoeff);
  funcHillERKToERKNuc := numHillWeight*numHillBeta*pERK_nuc^numHillCoeff/(numHillK^numHillCoeff + pERK_nuc^numHillCoeff);

  // Rate rules:
  pRaf_cyto' = 1/numHillTau*(numTotalRafInputs*numHillMax - pRaf_cyto);
  pMEK_cyto' = 1/numHillTau*(funcHillRafToMEK*numHillMax - pMEK_cyto - numMEKCytoToNucParam*pMEK_cyto + 1/numCytoToNucVolRatio*numMEKNucToCytoParam*pMEK_nuc);
  pERK_cyto' = 1/numHillTau*(funcHillMEKToERKCyto*numHillMax - pERK_cyto - numERKCytoToNucParam*pERK_cyto + 1/numCytoToNucVolRatio*numERKNucToCytoParam*pERK_nuc);
  pMEK_nuc' = 1/numHillTau*(-pMEK_nuc - numMEKNucToCytoParam*pMEK_nuc + numCytoToNucVolRatio*numMEKCytoToNucParam*pMEK_cyto);
  pERK_nuc' = 1/numHillTau*((funcHillMEKToERKNuc - funcHillERKToERKNuc)*numHillMax - pERK_nuc - numERKCytoToNucParam*pERK_nuc + numCytoToNucVolRatio*numERKNucToCytoParam*pERK_cyto);

  // Events:
  Position_0: at (numTissuePos >= 0): Ca = numCaInputBaseline + numCaInputAmp*(numTissuePos/5), CaM_memb = numCaMInputBaseline + numCaMInputAmp*((numTissuePos + 1)/2);
  Position_1: at (numTissuePos >= 1): CaM_memb = numCaMInputBaseline + numCaMInputAmp*exp(1 - numTissuePos);
  Position_5: at (numTissuePos >= 5): Ca = numCaInputBaseline + numCaInputAmp*((7 - numTissuePos)/2), CaM_memb = 0;
  Total_Rafc_input_less_than_0: at (funcHillCaToRaf - funcHillCaMToRaf - funcHillERKToRaf <= 0): numTotalRafInputs = 0;
  Total_Raf_input_greater_than_0: at (funcHillCaToRaf - funcHillCaMToRaf - funcHillERKToRaf > 0): numTotalRafInputs = funcHillCaToRaf - funcHillCaMToRaf - funcHillERKToRaf;

  // Unit definitions:
  unit substance = 1e-3 mole;
  unit unit_0 = dimensionless^0; unit_0 is "1";
end
