// SBML level 2 version 4
// dcterms:bibliographicCitation: http://identifiers.org/pubmed/13678598

model Wodarz2003_ImmunologicalMemory()
  // Wodarz2003 Immunological Memory
  // This a model from the article:
  // Evolution of immunological memory and the regulation of competition between pathogens.
  // Wodarz D. Curr Biol 2003 Sep 16;13(18):1648-52 13678598 ,
  // Abstract:
  // Memory is a central characteristic of immune responses. It is defined as an elevated number of specific immune cells that remain after resolution of infection and can protect the host against reinfection. The evolution of immunological memory is subject to debate. The advantages of memory discussed so far include protection from reinfection, control of chronic infection, and the transfer of immune function to the next generation. Mathematical models are used to identify a new force that can drive the evolution of immunological memory: the duration of memory can regulate the degree of competition between different pathogens. While a long duration of memory provides lasting protection against reinfection, it may also allow an inferior pathogen species to persist. This can be detrimental for the host if the inferior pathogen is more virulent. On the other hand, a shorter duration of memory ensures that an inferior pathogen species is excluded. This can be beneficial for the host if the inferior pathogen is more virulent. Thus, while in the absence of pathogen diversity memory is always expected to evolve to a long duration, under specific circumstances, memory can evolve toward shorter durations in the presence of pathogen diversity.
  // This model was taken from the CellML repository and automatically converted to SBML.
  // The original model was: Wodarz D. (2003) - version=1.0
  // The original CellML model was created by:
  // Catherine Lloyd
  // c.lloyd@auckland.ac.nz
  // The University of Auckland
  // This model originates from BioModels Database: A Database of Annotated Published Models (http://www.ebi.ac.uk/biomodels/). It is copyright (c) 2005-2011 The BioModels.net Team.
  // To the extent possible under law, all copyright and related or neighbouring rights to this encoded model have been dedicated to the public domain worldwide. Please refer to CC0 Public Domain Dedication for more information.
  // In summary, you are entitled to use this encoded model in absolutely any manner you deem suitable, verbatim, or with modification, alone or embedded it in a larger context, redistribute it, commercially or not, in a restricted way or not..
  // To cite BioModels Database, please use: Li C, Donizelli M, Rodriguez N, Dharuri H, Endler L, Chelliah V, Li L, He E, Henry A, Stefan MI, Snoep JL, Hucka M, Le Novère N, Laibe C (2010) BioModels Database: An enhanced, curated and annotated resource for published quantitative kinetic models. BMC Syst Biol., 4:92.
  // biomodels.db:MODEL1006230061
  // isDescribedBy pubmed:13678598
  // isVersionOf GO:0002250
  // hasTaxon taxonomy:9606
  // isDescribedBy pubmed:13678598
  // biomodels.db:BIOMD0000000684

  // Compartments:
  compartment COMpartment = 1 litre; COMpartment is "population";  // isVersionOf OBI:0000181

  // Parameters:
  S = 100;  // hasProperty ncit:C16505
  r = 0.5;  // encodes GO:0000003
  // Value = 0.1 from CellML
  epsilon = 0.1;  // encodes GO:0000003
  I_1 = 0;  // hasProperty efo:0000544
  I_2 = 0;  // hasProperty efo:0000544
  I_12 = 0;  // hasProperty efo:0000544; hasProperty ncit:C17997
  I_21 = 0;  // hasProperty ncit:C17997; hasProperty efo:0000544
  R_1 = 0;  // hasProperty ncit:C17997
  R_2 = 0;  // hasProperty ncit:C17997
  R_12 = 0;  // hasProperty ncit:C17997
  P_1 = 0.1;  // isVersionOf EFO:0000643
  k_1 = 0.1;  // encodes ncit:C61404
  P_2 = 0.1;  // isVersionOf EFO:0000643
  k_2 = 0.1;  // encodes ncit:C61404
  g = 0.01;  // encodes GO:0090716
  beta_1 = 1;  // encodes efo:0000544
  alpha_1 = 0.1;  // encodes ncit:C25746
  beta_2 = 1;  // encodes efo:0000544
  alpha_2 = 0.1;  // encodes ncit:C25746
  a_1 = 0.03;  // encodes GO:0016265
  a_2 = 1;  // encodes GO:0016265
  d = 0.01;  // encodes GO:0016265
  u = 0.5;

  // Assignment rules:
  H := S + I_1 + R_1 + I_2 + R_2 + I_12 + I_21 + R_12;
  P := P_1 + P_2;
  log_P2 := log10(P_2)/log10(10);
  G := 1/g;
  log_P1 := log10(P_1)/log10(10);

  // Rate rules:
  S' = r*H/(epsilon*H + 1) - d*S - beta_1*S*P_1 - beta_2*S*P_2 + g*(R_1 + R_2 + R_12);
  I_1' = beta_1*S*P_1 - a_1*I_1 - alpha_1*I_1;
  I_2' = beta_2*S*P_2 - a_2*I_2 - alpha_2*I_2;
  I_12' = beta_2*R_1*P_2 - a_2*I_12 - alpha_2*I_12;
  I_21' = beta_1*R_2*P_1 - a_1*I_21 - alpha_1*I_21;
  R_1' = alpha_1*I_1 - d*R_1 - g*R_1 - beta_2*R_1*P_2;
  R_2' = alpha_2*I_2 - d*R_2 - g*R_2 - beta_1*R_2*P_1;
  R_12' = alpha_2*I_12 + alpha_1*I_21 - d*R_12 - g*R_12;
  P_1' = k_1*(I_1 + I_21) - u*P_1;
  P_2' = k_2*(I_2 + I_12) - u*P_2;

  // Unit definitions:
  unit day = 86400 second;
  unit first_order_rate_constant = 1 / (86400 second);
  unit time = 86400 second;
end
