// SBML level 2 version 4
// dcterms:bibliographicCitation: urn:miriam:doi:10.1093/intimm/dxh303
// dcterms:bibliographicCitation: http://identifiers.org/pubmed/17251133

function Constant_flux__irreversible(v)
  v;
end
Constant_flux__irreversible is "Constant flux (irreversible)";

function function(parameter, modifier, substrate)
  parameter*modifier*substrate;
end

function function_1(param, mod)
  param*mod;
end

function function_2(parameter, modifier)
  parameter*modifier;
end

function function_3(c_a, y0, y1, za)
  c_a*(y0 + y1)*za;
end

function function_4(c_i, y0, y1, zi)
  c_i*(y0 + y1)*zi;
end

model Wodarz2007_CTL_inflation_Model_C()
  // Wodarz2007 - Cytomegalovirus infection model with cytotoxic T lymphocyte and natural killer cell response
  // This a model from the article:
  // Dynamics of killer T cell inflation in viral infections.
  // Wodarz D, Sierro S, Klenerman P. J R Soc Interface 2007 Jun 22;4(14):533-43 17251133 ,
  // Abstract:
  // Upon acute viral infection, a typical cytotoxic T lymphocyte (CTL) response is characterized by a phase of expansion and contraction after which it settles at a relatively stable memory level. Recently, experimental data from mice infected with murine cytomegalovirus (MCMV) showed different and unusual dynamics. After acute infection had resolved, some antigen specific CTL started to expand over time despite the fact that no replicative virus was detectable. This phenomenon has been termed as "CTL memory inflation". In order to examine the dynamics of this system further, we developed a mathematical model analysing the impact of innate and adaptive immune responses. According to this model, a potentially important contributor to CTL inflation is competition between the specific CTL response and an innate natural killer (NK) cell response. Inflation occurs most readily if the NK cell response is more efficient than the CTL at reducing virus load during acute infection, but thereafter maintains a chronic virus load which is sufficient to induce CTL proliferation. The model further suggests that weaker NK cell mediated protection can correlate with more pronounced CTL inflation dynamics over time. We present experimental data from mice infected with MCMV which are consistent with the theoretical predictions. This model provides valuable information and may help to explain the inflation of CMV specific CD8+T cells seen in humans as they age.
  // This model was taken from the CellML repository and automatically converted to SBML.
  // The original model was: Wodarz D, Sierro S, Klenerman P. (2007) - version=1.0
  // The original CellML model was created by:
  // Catherine Lloyd
  // c.lloyd@auckland.ac.nz
  // The University of Auckland
  // This model originates from BioModels Database: A Database of Annotated Published Models (http://www.ebi.ac.uk/biomodels/). It is copyright (c) 2005-2011 The BioModels.net Team.
  // To the extent possible under law, all copyright and related or neighbouring rights to this encoded model have been dedicated to the public domain worldwide. Please refer to CC0 Public Domain Dedication for more information.
  // In summary, you are entitled to use this encoded model in absolutely any manner you deem suitable, verbatim, or with modification, alone or embedded it in a larger context, redistribute it, commercially or not, in a restricted way or not..
  // To cite BioModels Database, please use: Li C, Donizelli M, Rodriguez N, Dharuri H, Endler L, Chelliah V, Li L, He E, Henry A, Stefan MI, Snoep JL, Hucka M, Le Novère N, Laibe C (2010) BioModels Database: An enhanced, curated and annotated resource for published quantitative kinetic models. BMC Syst Biol., 4:92.
  // biomodels.db:MODEL1006230097
  // biomodels.db:BIOMD0000000688
  // isDescribedBy pubmed:17251133
  // isDerivedFrom doi:10.1093/intimm/dxh303
  // biomodels.db:MODEL1006230097
  // hasPart BTO:0000914

  // Compartments:
  compartment COMpartment = 1; COMpartment is "Mouse";

  // Species:
  species x in COMpartment = 1;  // isVersionOf CL:0000000; hasProperty ncit:C16505; isVersionOf GO:0005623
  species y_0 in COMpartment = 0;  // hasPart efo:0001062; isVersionOf BTO:0000152
  species y_1 in COMpartment = 0;  // hasPart efo:0001062; isVersionOf BTO:0000152
  species L in COMpartment = 0;  // hasPart efo:0001062; isVersionOf BTO:0000152
  species v in COMpartment = 1;  // isVersionOf efo:0001062; isVersionOf GO:0019012
  species z_a in COMpartment = 1;  // isVersionOf BTO:0000289; isVersionOf CL:0000910
  species m_0 in COMpartment = 0;  // isVersionOf CL:0000898
  species m_1 in COMpartment = 0;  // isVersionOf CL:0000898
  species m_2 in COMpartment = 0;  // isVersionOf CL:0000898
  species m_3 in COMpartment = 0;  // isVersionOf CL:0000898
  species m_4 in COMpartment = 0;  // isVersionOf CL:0000898
  species m_5 in COMpartment = 0;  // isVersionOf CL:0000898
  species m_6 in COMpartment = 0;  // isVersionOf CL:0000898
  species m_7 in COMpartment = 0;  // isVersionOf CL:0000898
  species m_8 in COMpartment = 0;  // isVersionOf CL:0000898
  species z_i in COMpartment = 0.1;  // isVersionOf CL:0000623; isVersionOf BTO:0000914

  // Parameters:
  a0 = 0.1;
  a1 = 0.2;
  k = 1;
  u = 1;
  lambda = 10;
  d = 0.1;
  beta = 0.1;
  gamma = 0.5;
  alpha = 0.2;
  phi = 0.1;
  eta = 0.01;
  pa = 1e-6;
  ca = 15.5;
  r = 1;
  ba = 0.1;
  p_i = 1;
  ci = 12;
  bi = 0.1;
  xi = 0.01;

  // Assignment rules:
  R0 := lambda*eta/(d*a1*(a0 + eta))*(beta + gamma*phi/(phi + d));

  // Reactions:
  Host_cell_proliferation: => x; COMpartment*Constant_flux__irreversible(lambda);  // isVersionOf GO:0008283
  Host_cell_death: x => ; COMpartment*d*x;  // isVersionOf GO:0008219
  Infection_1: x => y_0; COMpartment*function(beta, v, x);  // modifiers: v; isVersionOf OBI:1110021
  Infection_2: x => L; COMpartment*function(gamma, v, x);  // modifiers: v; isVersionOf OBI:1110021
  Infected_cell_death_1: y_0 => ; COMpartment*a0*y_0;  // isVersionOf GO:0008219
  Infected_cell_infection_progression_1: y_0 => y_1; COMpartment*eta*y_0;
  Infected_cell_infection_progression_2: L => y_0; COMpartment*phi*L;
  CTL_induced_infected_cell_death_1: y_0 => ; COMpartment*function(pa, z_a, y_0); CTL_induced_infected_cell_death_1 is "CTL-induced infected cell death 1";  // modifiers: z_a; isVersionOf GO:0012501
  Infected_cell_death_2: y_1 => ; COMpartment*a1*y_1;  // isVersionOf GO:0008219
  CTL_induced_infected_cell_death_2: y_1 => ; COMpartment*function(pa, z_a, y_1); CTL_induced_infected_cell_death_2 is "CTL-induced infected cell death 2";  // modifiers: z_a; isVersionOf GO:0012501
  Infected_cell_death_3: L => ; COMpartment*d*L;  // isVersionOf GO:0008219
  Virus_particle_production: => v; COMpartment*function_1(k, y_1);  // modifiers: y_1
  Viral_particle_degradation: v => ; COMpartment*u*v;
  Precursor_T_cell_differentiation_2: => z_a; COMpartment*function_2(alpha, m_8); Precursor_T_cell_differentiation_2 is "Precursor T-cell differentiation 2";  // modifiers: m_8; isVersionOf GO:0030217
  Infection_induced_CTL_proliferation_stimulation: => z_a; COMpartment*function_3(ca, y_0, y_1, z_a); Infection_induced_CTL_proliferation_stimulation is "Infection-induced CTL proliferation stimulation";  // modifiers: y_0, y_1; isVersionOf ncit:C20863
  CTL_cell_death: z_a => ; COMpartment*ba*z_a;  // isVersionOf GO:0008219
  Naive_CTL_division_1: m_0 => 2 m_1; COMpartment*r*m_0;  // isVersionOf GO:0051301
  Naive_CTL_division_2: m_1 => 2 m_2; COMpartment*r*m_1;  // isVersionOf GO:0051301
  Naive_CTL_division_3: m_2 => 2 m_3; COMpartment*r*m_2;  // isVersionOf GO:0051301
  Naive_CTL_division_4: m_3 => 2 m_4; COMpartment*r*m_3;  // isVersionOf GO:0051301
  Naive_CTL_division_5: m_4 => 2 m_5; COMpartment*r*m_4;  // isVersionOf GO:0051301
  Naive_CTL_division_6: m_5 => 2 m_6; COMpartment*r*m_5;  // isVersionOf GO:0051301
  Naive_CTL_division_7: m_6 => 2 m_7; COMpartment*r*m_6;  // isVersionOf GO:0051301
  Naive_CTL_division_8: m_7 => 2 m_8; COMpartment*r*m_7;  // isVersionOf GO:0051301
  Precursor_T_cell_differentiation_1: m_8 => ; COMpartment*r*m_8; Precursor_T_cell_differentiation_1 is "Precursor T-cell differentiation 1";  // isVersionOf GO:0030217
  NK_cell_production: => z_i; COMpartment*Constant_flux__irreversible(xi);  // isVersionOf GO:0001866
  NK_infection_induced_production: => z_i; COMpartment*function_4(ci, y_0, y_1, z_i); NK_infection_induced_production is "NK infection-induced production";  // modifiers: y_0, y_1
  NK_cell_death: z_i => ; COMpartment*bi*z_i;  // isVersionOf GO:0008219
  NK_induced_infected_cell_death_1: y_0 => ; COMpartment*function(p_i, z_i, y_0); NK_induced_infected_cell_death_1 is "NK-induced infected cell death 1";  // modifiers: z_i
  NK_induced_infected_cell_death_2: y_1 => ; COMpartment*function(p_i, z_i, y_1); NK_induced_infected_cell_death_2 is "NK-induced infected cell death 2";  // modifiers: z_i

  // Unit definitions:
  unit time = 3600 second;
end
