// SBML level 2 version 4
// dcterms:bibliographicCitation: urn:miriam:pubmed:10702114

function Constant_flux__irreversible(v)
  v;
end
Constant_flux__irreversible is "Constant flux (irreversible)";

function function_for_v2(k2, S2, N1)
  k2*S2*N1;
end

function function_for_d_dt_S4_ex(phi, J1, J2)
  phi/2*(J1 + J2);
end
function_for_d_dt_S4_ex is "function for d/dt(S4_ex)";

function function_for_v1(k1, S1, A3, K_I, q)
  k1*S1*A3*(1 + (A3/K_I)^q)^(-1);
end

function function_for_v3(k3, S3, A2)
  k3*S3*A2;
end

model Wolf2000___Cellular_interaction_on_glycolytic_oscillations_in_yeast()
  // Wolf2000 - Cellular interaction on glycolytic oscillations in yeast
  // A two-cell model of glycolysis.
  // This model is described in the article:
  // Effect of cellular interaction on glycolytic oscillations in yeast: a theoretical investigation.
  // Wolf J, Heinrich R.
  // Biochem. J. 2000 Jan; 345 Pt 2: 321-334
  // Abstract:
  // On the basis of a detailed model of yeast glycolysis, the effect of intercellular dynamics is analysed theoretically. The model includes the main steps of anaerobic glycolysis, and the production of ethanol and glycerol. Transmembrane diffusion of acetaldehyde is included, since it has been hypothesized that this substance mediates the interaction. Depending on the kinetic parameter, the single-cell model shows both stationary and oscillatory behaviour. This agrees with experimental data with respect to metabolite concentrations and phase shifts. The inclusion of intercellular coupling leads to a variety of dynamical modes, such as synchronous oscillations, and different kinds of asynchronous behavior. These oscillations can co-exist, leading to bi- and tri-rhythmicity. The corresponding parameter regions have been identified by a bifurcation analysis. The oscillatory dynamics of synchronized cell populations are investigated by calculating the phase responses to acetaldehyde pulses. Simulations are performed with respect to the synchronization of two subpopulations that are oscillating out of phase before mixing. The effect of the various process on synchronization is characterized quantitatively. While continuous exchange of acetaldehyde might synchronize the oscillations for appropriate sets of parameter values, the calculated synchronization time is longer than that observed experimentally. It is concluded either that addition to the transmembrane exchange of acetaldehyde, other processes may contribute to intercellular coupling, or that intracellular regulator feedback plays a role in the acceleration of the synchronization. for appropriate sets of parameter values, the calculated synchronization time is longer than that observed experimentally. It is concluded either that addition to the transmembrane exchange of acetaldehyde, other processes may contribute to intercellular coupling, or that intracellular regulator feedback plays a role in the acceleration of the synchronization.
  // This model is hosted on BioModels Database and identified by: BIOMD0000000691.
  // To cite BioModels Database, please use: Chelliah V et al. BioModels: ten-year anniversary. Nucl. Acids Res. 2015, 43(Database issue):D542-8.
  // To the extent possible under law, all copyright and related or neighbouring rights to this encoded model have been dedicated to the public domain worldwide. Please refer to CC0 Public Domain Dedication for more information.
  // biomodels.db:MODEL1006230022
  // isDescribedBy pubmed:10702114
  // biomodels.db:BIOMD0000000691
  // isVersionOf reactome:R-HSA-70171
  // isVersionOf GO:0006096
  // isVersionOf kegg.pathway:map00010

  // Compartments:
  compartment Cell_1 = 1;  // isVersionOf taxonomy:4930
  compartment Cell_2 = 1;  // isVersionOf taxonomy:4930
  compartment Compartment = 1;

  // Species:
  species S1__Cell_1_ in Cell_1 = 5.8;  // isVersionOf CHEBI:17234; isVersionOf kegg.compound:C00031
  species S1__Cell_2_ in Cell_2 = 2.9;  // isVersionOf CHEBI:17234; isVersionOf kegg.compound:C00031
  species S2__Cell_1_ in Cell_1 = 0.9;  // hasPart kegg.compound:C00661; hasPart kegg.compound:C00111
  species S2__Cell_2_ in Cell_2 = 0.45;  // hasPart kegg.compound:C00661; hasPart kegg.compound:C00111
  species S3__Cell_1_ in Cell_1 = 0.2;  // isVersionOf CHEBI:89363; isVersionOf kegg.compound:C00236
  species S3__Cell_2_ in Cell_2 = 0.1;  // isVersionOf CHEBI:89363; isVersionOf kegg.compound:C00236
  species S4__Cell_1_ in Cell_1 = 0.2;  // hasPart kegg.compound:C00022; hasPart kegg.compound:C00084
  species S4__Cell_2_ in Cell_2 = 0.1;  // hasPart kegg.compound:C00084; hasPart kegg.compound:C00022
  species N2__Cell_1_ in Cell_1 = 0.1;  // isVersionOf kegg.compound:C00004; isVersionOf CHEBI:16908
  species N2__Cell_2_ in Cell_2 = 0.05;  // isVersionOf CHEBI:16908; isVersionOf kegg.compound:C00004
  species A3__Cell_1_ in Cell_1 = 3.2;  // isVersionOf CHEBI:15422; isVersionOf kegg.compound:C00002
  species A3__Cell_2_ in Cell_2 = 0.2;  // isVersionOf CHEBI:15422; isVersionOf kegg.compound:C00002
  species S4_ex in Compartment = 0.1;
  species $A in Compartment = 4;  // hasPart kegg.compound:C00002; hasPart kegg.compound:C00008
  species $N in Compartment = 1;  // hasPart kegg.compound:C00004; hasPart kegg.compound:C00003
  species $N1__Cell_1_ in Cell_1;  // isVersionOf CHEBI:15846; isVersionOf kegg.compound:C00003
  species $N1__Cell_2_ in Cell_2;  // isVersionOf kegg.compound:C00003; isVersionOf CHEBI:15846
  species $A2__Cell_1_ in Cell_1;  // isVersionOf CHEBI:16761; isVersionOf kegg.compound:C00008
  species $A2__Cell_2_ in Cell_2;  // isVersionOf CHEBI:16761; isVersionOf kegg.compound:C00008

  // Parameters:
  k1 = 100;
  K_I = 0.52;
  q = 4;
  k2 = 6;
  k3 = 16;
  k4 = 100;
  k5 = 1.28;
  k6 = 12;
  k = 1.5;
  J0 = 3;
  kappa = 13;  // encodes GO:0090559
  phi = 0.1;

  // Assignment rules:
  j_cell_2 := kappa*(S4__Cell_2_ - S4_ex);
  J_cell_1 := kappa*(S4__Cell_1_ - S4_ex);
  N1__Cell_2_ := N - N2__Cell_2_;
  N1__Cell_1_ := N - N2__Cell_1_;
  A2__Cell_1_ := A - A3__Cell_1_;
  A2__Cell_2_ := A - A3__Cell_2_;

  // Reactions:
  v1_cell_1: S1__Cell_1_ + 2 A3__Cell_1_ => 2 S2__Cell_1_; Cell_1*function_for_v1(k1, S1__Cell_1_, A3__Cell_1_, K_I, q);  // hasPart kegg.reaction:R01015; hasPart kegg.reaction:R01070; hasPart kegg.reaction:R02740; hasPart kegg.reaction:R04779
  v1_cell_2: S1__Cell_2_ + 2 A3__Cell_2_ => 2 S2__Cell_2_; Cell_2*function_for_v1(k1, S1__Cell_2_, A3__Cell_2_, K_I, q);  // hasPart kegg.reaction:R01070; hasPart kegg.reaction:R01015; hasPart kegg.reaction:R02740; hasPart kegg.reaction:R04779
  v2_cell_1: S2__Cell_1_ + $N1__Cell_1_ => S3__Cell_1_ + N2__Cell_1_; Cell_1*function_for_v2(k2, S2__Cell_1_, N1__Cell_1_);  // isVersionOf kegg.reaction:R01061
  v2_cell_2: S2__Cell_2_ + $N1__Cell_2_ => S3__Cell_2_ + N2__Cell_2_; Cell_2*function_for_v2(k2, S2__Cell_2_, N1__Cell_2_);  // isVersionOf kegg.reaction:R01061
  v3_cell_1: S3__Cell_1_ + $A2__Cell_1_ => S4__Cell_1_ + 2 A3__Cell_1_; Cell_1*function_for_v3(k3, S3__Cell_1_, A2__Cell_1_);  // hasPart kegg.reaction:R00200; hasPart kegg.reaction:R00658; hasPart kegg.reaction:R01512; hasPart kegg.reaction:R01518
  v3_cell_2: S3__Cell_2_ + $A2__Cell_2_ => S4__Cell_2_ + 2 A3__Cell_2_; Cell_2*function_for_v3(k3, S3__Cell_2_, A2__Cell_2_);  // hasPart kegg.reaction:R01512; hasPart kegg.reaction:R00658; hasPart kegg.reaction:R00200; hasPart kegg.reaction:R01518
  v4_cell_1: S4__Cell_1_ + N2__Cell_1_ => ; Cell_1*k4*S4__Cell_1_*N2__Cell_1_;  // isVersionOf kegg.reaction:R00754
  v4_cell_2: S4__Cell_2_ + N2__Cell_2_ => ; Cell_2*k4*S4__Cell_2_*N2__Cell_2_;  // isVersionOf kegg.reaction:R00754
  v5_cell_1: A3__Cell_1_ => ; Cell_1*k5*A3__Cell_1_;
  v5_cell_2: A3__Cell_2_ => ; Cell_2*k5*A3__Cell_2_;
  v6_cell_1: S2__Cell_1_ + N2__Cell_1_ => ; Cell_1*k6*S2__Cell_1_*N2__Cell_1_;  // isVersionOf kegg.reaction:R01036
  v6_cell_2: S2__Cell_2_ + N2__Cell_2_ => ; Cell_2*k6*S2__Cell_2_*N2__Cell_2_;  // isVersionOf kegg.reaction:R01036
  v7: S4_ex => ; Compartment*k*S4_ex;
  S1_cell_1_glucose_influx: => S1__Cell_1_; Cell_1*Constant_flux__irreversible(J0);  // isVersionOf GO:1904659
  S1_cell_2_glucose_influx: => S1__Cell_2_; Cell_2*Constant_flux__irreversible(J0);  // isVersionOf GO:1904659
  S4_cell_1_export: S4__Cell_1_ => ; Cell_1*Constant_flux__irreversible(J_cell_1);  // isVersionOf GO:1901475
  S4_cell_2_export: S4__Cell_2_ => ; Cell_2*Constant_flux__irreversible(j_cell_2);  // isVersionOf GO:1901475
  S4_ex_import: => S4_ex; Compartment*function_for_d_dt_S4_ex(phi, J_cell_1, j_cell_2);  // isVersionOf GO:1901475

  // Unit definitions:
  unit volume = 1e-3 litre;
  unit substance = 1e-3 mole;
end
