// SBML level 2 version 4
// dcterms:bibliographicCitation: http://identifiers.org/pubmed/12667087

function Function_for_GTP_hydrolysis_sbo_2_sbc(Pi, RasGDP_NF1, RasGDP_minus_NF1_Pi, geometry, kb, kf)
  (kf*RasGDP_minus_NF1_Pi - kb*Pi*RasGDP_NF1)/geometry;
end
Function_for_GTP_hydrolysis_sbo_2_sbc is "Function for GTP_hydrolysis_sbo_2_sbc_";

function Function_for_NF1_binding(NF1, RasGTP, RasGTP_minus_NF1, geometry, kb, kf)
  (kf*RasGTP*NF1 - kb*RasGTP_minus_NF1)/geometry;
end

function Function_for_Ras_activation(RasGTP_minus_NF1, RasGTP_minus_NF1_star_, geometry, kb, kf)
  (kf*RasGTP_minus_NF1 - kb*RasGTP_minus_NF1_star_)/geometry;
end

function Function_for_GAP_dissociation(NF1, RasGDP, RasGDP_NF1, geometry, kb, kf)
  (kf*RasGDP_NF1 - kb*RasGDP*NF1)/geometry;
end

function Function_for_GTP_hydrolysis_sbo_1_sbc(RasGDP_minus_NF1_Pi, RasGTP_minus_NF1_star_, geometry, kb, kf)
  (kf*RasGTP_minus_NF1_star_ - kb*RasGDP_minus_NF1_Pi)/geometry;
end
Function_for_GTP_hydrolysis_sbo_1_sbc is "Function for GTP_hydrolysis_sbo_1_sbc_";

model Phillips2003___The_Mechanism_of_Ras_GTPase_Activation_by_Neurofibromin()
  // Phillips2003 - The Mechanism of Ras GTPase Activation by Neurofibromin
  // A mathematical model for Ras-GTP activation by neurofibromin and the kinetic rates of the relevant reactions.
  // This model is described in the article:
  // The mechanism of Ras GTPase activation by neurofibromin.
  // Phillips RA, Hunter JL, Eccleston JF, Webb MR.
  // Biochemistry 2003 Apr; 42(13): 3956-3965
  // Abstract:
  // Individual rate constants have been determined for each step of the Ras.GTP hydrolysis mechanism, activated by neurofibromin. Fluorescence intensity and anisotropy stopped-flow measurements used the fluorescent GTP analogue, mantGTP (2'(3')-O-(N-methylanthraniloyl)GTP), to determine rate constants for binding and release of neurofibromin. Quenched flow measurements provided the kinetics of the hydrolytic cleavage step. The fluorescent phosphate sensor, MDCC-PBP was used to measure phosphate release kinetics. Phosphate-water oxygen exchange, using (18)O-substituted GTP and inorganic phosphate (P(i)), was used to determine the extent of reversal of the hydrolysis step and of P(i) binding. The data show that neurofibromin and P(i) dissociate from the NF1.Ras.GDP.P(i) complex with identical kinetics, which are 3-fold slower than the preceding cleavage step. A model is presented in which the P(i) release is associated with the change of Ras from "GTP" to "GDP" conformation. In this model, the conformation change on P(i) release causes the large change in affinity of neurofibromin, which then dissociates rapidly.
  // This model is hosted on BioModels Database and identified by: BIOMD0000000692.
  // To cite BioModels Database, please use: Chelliah V et al. BioModels: ten-year anniversary. Nucl. Acids Res. 2015, 43(Database issue):D542-8.
  // To the extent possible under law, all copyright and related or neighbouring rights to this encoded model have been dedicated to the public domain worldwide. Please refer to CC0 Public Domain Dedication for more information.
  // biomodels.db:MODEL4968912141
  // isDescribedBy pubmed:12667087
  // biomodels.db:BIOMD0000000692
  // hasPart kegg.orthology:K08052
  // isPartOf kegg.pathway:ko04014
  // isVersionOf GO:1904475

  // Compartments:
  compartment geometry = 5.236e-13; geometry is "E. coli";

  // Species:
  species Pi in geometry = 1;  // isVersionOf CHEBI:24838
  species RasGTP in geometry = 1;  // hasPart kegg.compound:C00044; isVersionOf ncbigene:43873
  species RasGTP_minus_NF1 in geometry = 0;  // hasPart kegg.orthology:K08052; hasPart kegg.compound:C00044; isVersionOf ncbigene:43873
  species RasGTP_minus_NF1_star_ in geometry = 0;  // hasPart kegg.orthology:K08052; hasPart kegg.compound:C00044; isVersionOf ncbigene:43873
  species RasGDP_minus_NF1_Pi in geometry = 0;  // hasPart kegg.compound:C00035; hasPart CHEBI:24838; hasPart kegg.orthology:K08052; isVersionOf ncbigene:43873
  species RasGDP_NF1 in geometry = 0;  // hasPart kegg.orthology:K08052; hasPart kegg.compound:C00035; isVersionOf ncbigene:43873
  species RasGDP in geometry = 0;  // hasPart kegg.compound:C00035; isVersionOf ncbigene:43873
  species NF1 in geometry = 9.999363;  // isVersionOf kegg.orthology:K08052

  // Assignment rules:
  Pi_curve := 100*(Pi - 1)/1;
  hplc_curve := RasGTP*100/1;

  // Reactions:
  // First step in hydrolysis of GTP bound to Ras complexed with NF1 - a mammalian GAP Kf = 19.5 /sec Kb = 0.22 /sec Table 3, Phillips RA et al 2003 Biochemistry 3956-3965
  GTP_hydrolysis_sbo_1_sbc_: RasGTP_minus_NF1_star_ -> RasGDP_minus_NF1_Pi; geometry*Function_for_GTP_hydrolysis_sbo_1_sbc(RasGDP_minus_NF1_Pi, RasGTP_minus_NF1_star_, geometry, GTP_hydrolysis_sbo_1_sbc__kb, GTP_hydrolysis_sbo_1_sbc__kf);
    GTP_hydrolysis_sbo_1_sbc__kb = 1.15192e-13; GTP_hydrolysis_sbo_1_sbc__kf = 1.02102e-11;
  // Second step in hydrolysis of GTP bound to Ras is complexed with NF1 - a mammalian GAP Kf = 40 /sec Kb = 108 /M/sec = 1.08e-04 /uM/sec Phillips RA et al 2003 Biochemistry 3956-3965
  GTP_hydrolysis_sbo_2_sbc_: RasGDP_minus_NF1_Pi -> Pi + RasGDP_NF1; geometry*Function_for_GTP_hydrolysis_sbo_2_sbc(Pi, RasGDP_NF1, RasGDP_minus_NF1_Pi, geometry, GTP_hydrolysis_sbo_2_sbc__kb, GTP_hydrolysis_sbo_2_sbc__kf);
    GTP_hydrolysis_sbo_2_sbc__kb = 5.65482e-17; GTP_hydrolysis_sbo_2_sbc__kf = 2.0944e-11;
  // Activation of Ras by GAP (i.e NF1) Kf = 418 /sec Kb = 5.5 /sec Table 3, Phillips RA et al 2003 Biochemistry 3956-3965
  Ras_activation: RasGTP_minus_NF1 -> RasGTP_minus_NF1_star_; geometry*Function_for_Ras_activation(RasGTP_minus_NF1, RasGTP_minus_NF1_star_, geometry, Ras_activation_kb, Ras_activation_kf);
    Ras_activation_kb = 2.8798e-12; Ras_activation_kf = 2.18865e-10;
  // Dissociation of NF1 from Ras.GDP NF1 is a mammalian GAP Kf = 46.5 /sec Kb = 1.2 /sec/uM Table 3, Phillips RA et al 2003 Biochemistry 3956-3965
  GAP_dissociation: RasGDP_NF1 -> RasGDP + NF1; geometry*Function_for_GAP_dissociation(NF1, RasGDP, RasGDP_NF1, geometry, GAP_dissociation_kb, GAP_dissociation_kf);
    GAP_dissociation_kb = 6.28318e-13; GAP_dissociation_kf = 2.43474e-11;
  // Binding of NF1 to Ras.GTP NF1 is a mammalian GAP Kd = 5.3 uM Table 3, Phillips RA et al 2003 Biochemistry 3956-3965
  NF1_binding: RasGTP + NF1 -> RasGTP_minus_NF1; geometry*Function_for_NF1_binding(NF1, RasGTP, RasGTP_minus_NF1, geometry, NF1_binding_kb, NF1_binding_kf);
    NF1_binding_kb = 3.3301e-12; NF1_binding_kf = 6.28318e-13;

  // Unit definitions:
  unit substance = 1e-6 mole;
end
