// SBML level 2 version 4
// dcterms:bibliographicCitation: urn:miriam:pubmed:14637052

function function_for_V_MATI(V_max_mati, K_m_mati, MET, AdoMet, K_i_meti)
  V_max_mati/(1 + K_m_mati/MET*(1 + AdoMet/K_i_meti));
end

function function_for_V_MATIII(V_max_matiii, Met, K_m1_MATIII, K_m2_MATIII)
  V_max_matiii/(1 + K_m1_MATIII*K_m2_MATIII/(Met^2 + Met*K_m2_MATIII));
end

function function_for_V_GMNT(V_max_GMNT, K_m_GMNT, AdoMet, AdoHcy, K_i_GMNT)
  V_max_GMNT/(1 + (K_m_GMNT/AdoMet)^2.3)*(1/(1 + AdoHcy/K_i_GMNT));
end

function function_for_V_METH(V_max_METH, AdoMet, K_m2_METH_A, K_m1_METH)
  V_max_METH/(1 + K_m1_METH/AdoMet + K_m2_METH_A + K_m2_METH_A*K_m1_METH/AdoMet);
end

function function_for_V_MS(V_max_MS, mTHF, Hcy, K_d_MS, K_m_Hcy_MS, K_m_mTHF_MS)
  V_max_MS*mTHF*Hcy/(K_d_MS*K_m_Hcy_MS + K_m_Hcy_MS*mTHF + K_m_mTHF_MS*Hcy + mTHF*Hcy);
end

function function_for_V_CBS(beta1, AdoMet, AdoHcy, beta2, Hcy)
  (beta1*(AdoMet + AdoHcy) - beta2)*Hcy;
end

function function_for_V_BHMT(AdoMet, AdoHcy, V_max_bhmt, Hcy, K_m_BHMT)
  (0.7 - 0.025*(AdoMet + AdoHcy - 150))*(V_max_bhmt*Hcy/(K_m_BHMT + Hcy));
end

function function_for_V_AH(alpha1, AdoHcy, alpha2, Hcy)
  alpha1*(AdoHcy - alpha2*Hcy);
end

model Reed2004___Methionine_Cycle()
  // Reed2004 - Methionine Cycle
  // This model is described in the article:
  // A mathematical model of the methionine cycle.
  // Reed MC, Nijhout HF, Sparks R, Ulrich CM.
  // J. Theor. Biol. 2004 Jan; 226(1): 33-43
  // Abstract:
  // Building on the work of Martinov et al. (2000), a mathematical model is developed for the methionine cycle. A large amount of information is available about the enzymes that catalyse individual reaction steps in the cycle, from methionine to S-adenosylmethionine to S-adenosylhomocysteine to homocysteine, and the removal of mass from the cycle by the conversion of homocysteine to cystathionine. Nevertheless, the behavior of the cycle is very complicated since many substrates alter the activities of the enzymes in the reactions that produce them, and some can also alter the activities of other enzymes in the cycle. The model consists of four differential equations, based on known reaction kinetics, that can be solved to give the time course of the concentrations of the four main substrates in the cycle under various circumstances. We show that the behavior of the model in response to genetic abnormalities and dietary deficiencies is similar to the changes seen in a wide variety of experimental studies. We conduct computational "experiments" that give understanding of the regulatory behavior of the methionine cycle under normal conditions and the behavior in the presence of genetic variation and dietary deficiencies.
  // This model is hosted on BioModels Database and identified by: BIOMD0000000698.
  // To cite BioModels Database, please use: Chelliah V et al. BioModels: ten-year anniversary. Nucl. Acids Res. 2015, 43(Database issue):D542-8.
  // To the extent possible under law, all copyright and related or neighbouring rights to this encoded model have been dedicated to the public domain worldwide. Please refer to CC0 Public Domain Dedication for more information.
  // biomodels.db:MODEL1006230091
  // isDescribedBy pubmed:14637052
  // biomodels.db:BIOMD0000000698
  // isVersionOf GO:0033528
  // hasTaxon taxonomy:9606
  // isDescribedBy pubmed:14637052

  // Compartments:
  compartment Compartment = 1;

  // Species:
  species $Metin in Compartment;
  species Methionine in Compartment = 53.5;  // isVersionOf kegg.compound:C00073; isVersionOf CHEBI:16811
  species AdoMet in Compartment = 137.6;  // isVersionOf kegg.compound:C00019; isVersionOf CHEBI:33442
  species AdoHcy in Compartment = 13.2;  // isVersionOf ncit:C103149; isVersionOf kegg.compound:C00021
  species Homocysteine in Compartment = 0.88;  // isVersionOf kegg.compound:C00155; isVersionOf CHEBI:17230
  species $_5mTHF in Compartment = 5.2;  // isVersionOf CHEBI:67016
  species Cystathionine in Compartment = 0;  // isVersionOf kegg.compound:Cystathionine; isVersionOf CHEBI:17755

  // Parameters:
  V_max_MATI = 561;
  K_m_MATI = 41;
  K_i_MATI = 50;
  V_max_MATIII = 22870;
  K_m2_MATIII = 21.1;
  V_max_GNMT = 10600;
  K_m_GNMT = 4500;
  K_i_GNMT = 20;
  V_max_METH = 4521;
  K_m2_METH_A = 10;
  alpha_1 = 100;
  alpha_2 = 10;
  beta_1 = 1.7;
  beta_2 = 30;
  V_max_MS = 500;
  K_m_Hcy_MS = 0.1;
  K_m_5mTHF_MS = 25;
  K_d_MS = 1;
  V_max_BHMT = 2500;
  K_m_BHMT = 12;

  // Assignment rules:
  Metin := piecewise(200, (time < 2) || (time >= 8), piecewise(300, (time >= 2) && (time < 5), piecewise(100, (time >= 5) && (time < 8), 200)));
  K_m1_MATIII := 20000/(1 + 5.7*(AdoMet/(AdoMet + 600))^2);
  K_m1_METH := 1*(1 + AdoHcy/4);

  // Reactions:
  V_MAT_I: Methionine => AdoMet; Compartment*function_for_V_MATI(V_max_MATI, K_m_MATI, Methionine, AdoMet, K_i_MATI); V_MAT_I is "V_MAT-I";  // isEncodedBy ec-code:2.5.1.6
  V_MAT_III: Methionine => AdoMet; Compartment*function_for_V_MATIII(V_max_MATIII, Methionine, K_m1_MATIII, K_m2_MATIII); V_MAT_III is "V_MAT-III";  // isEncodedBy ec-code:2.5.1.6
  V_METH: AdoMet => AdoHcy; Compartment*function_for_V_METH(V_max_METH, AdoMet, K_m2_METH_A, K_m1_METH);  // isEncodedBy kegg.orthology:K06219
  V_GNMT: AdoMet => AdoHcy; Compartment*function_for_V_GMNT(V_max_GNMT, K_m_GNMT, AdoMet, AdoHcy, K_i_GNMT);  // isEncodedBy kegg.orthology:K00552; isEncodedBy ec-code:2.1.1.20
  V_AH: AdoHcy -> Homocysteine; Compartment*function_for_V_AH(alpha_1, AdoHcy, alpha_2, Homocysteine);  // isEncodedBy ec-code:3.3.1.1
  V_MS: Homocysteine + $_5mTHF => Methionine; Compartment*function_for_V_MS(V_max_MS, _5mTHF, Homocysteine, K_d_MS, K_m_Hcy_MS, K_m_5mTHF_MS);  // isEncodedBy ec-code:2.1.1.13
  V_BHMT: Homocysteine => Methionine; Compartment*function_for_V_BHMT(AdoMet, AdoHcy, V_max_BHMT, Homocysteine, K_m_BHMT);  // modifiers: AdoMet, AdoHcy; isEncodedBy ec-code:2.1.1.5; isEncodedBy kegg.orthology:K00544
  V_CBS: Homocysteine => Cystathionine; Compartment*function_for_V_CBS(beta_1, AdoMet, AdoHcy, beta_2, Homocysteine);  // modifiers: AdoMet, AdoHcy; isEncodedBy kegg.orthology:K01697; isEncodedBy ec-code:4.2.1.22
  METIN: $Metin => Methionine; Compartment*k1*Metin;
    k1 = 1;

  // Unit definitions:
  unit volume = 1e-3 litre;
  unit time = 3600 second;
  unit substance = 1e-6 mole;
end
