// SBML level 2 version 4

model hotspotassociation()
  // Caydasi2012 - Regulation of Tem1 by the GAP complex in Spindle Position Checkpoint - Hotspot association
  // This model is described in the article:
  // A dynamical model of the spindle position checkpoint.
  // Caydasi AK, Lohel M, Grünert G, Dittrich P, Pereira G, Ibrahim B.
  // Mol. Syst. Biol. 2012; 8: 582
  // Abstract:
  // The orientation of the mitotic spindle with respect to the polarity axis is crucial for the accuracy of asymmetric cell division. In budding yeast, a surveillance mechanism called the spindle position checkpoint (SPOC) prevents exit from mitosis when the mitotic spindle fails to align along the mother-to-daughter polarity axis. SPOC arrest relies upon inhibition of the GTPase Tem1 by the GTPase-activating protein (GAP) complex Bfa1-Bub2. Importantly, reactions signaling mitotic exit take place at yeast centrosomes (named spindle pole bodies, SPBs) and the GAP complex also promotes SPB localization of Tem1. Yet, whether the regulation of Tem1 by Bfa1-Bub2 takes place only at the SPBs remains elusive. Here, we present a quantitative analysis of Bfa1-Bub2 and Tem1 localization at the SPBs. Based on the measured SPB-bound protein levels, we introduce a dynamical model of the SPOC that describes the regulation of Bfa1 and Tem1. Our model suggests that Bfa1 interacts with Tem1 in the cytoplasm as well as at the SPBs to provide efficient Tem1 inhibition.
  // This model is hosted on BioModels Database and identified by: BIOMD0000000701.
  // To cite BioModels Database, please use: Chelliah V et al. BioModels: ten-year anniversary. Nucl. Acids Res. 2015, 43(Database issue):D542-8.
  // To the extent possible under law, all copyright and related or neighbouring rights to this encoded model have been dedicated to the public domain worldwide. Please refer to CC0 Public Domain Dedication for more information.
  // biomodels.db:BIOMD0000000701
  // isDescribedBy pubmed:22580890
  // isDescribedBy pubmed:22580890 http:%2F%2Fmsb.embopress.org%2Fcontent%2F8%2F1%2F582
  // hasProperty GO:0051726 GO:0031578 GO:0007052 mamo:MAMO_0000046
  // hasTaxon taxonomy:4932

  // Compartments:
  compartment default = 1 litre;
  compartment Cytosol in default = 1e-13 litre;
  compartment SPB in Cytosol = 3e-18 litre;

  // Species:
  species SPB_B in SPB = 8.33e-5;
  species SPB_T in SPB = 0.000166;
  species Bfa1 in Cytosol = 2.03e-8;
  species Bfa1P4 in Cytosol = 0;
  species Bfa1P5 in Cytosol = 0;
  species Tem1GTP in Cytosol = 4.91e-8;
  species Tem1GDP in Cytosol = 7.99e-9;
  species B_Bfa1 in SPB = 8.33e-5; B_Bfa1 is "B-Bfa1";
  species B_Bfa1P4 in SPB = 0; B_Bfa1P4 is "B-Bfa1P4";
  species B_Bfa1P5 in SPB = 0; B_Bfa1P5 is "B-Bfa1P5";
  species T_Tem1GTP in SPB = 0; T_Tem1GTP is "T-Tem1GTP";
  species T_Tem1GDP in SPB = 0; T_Tem1GDP is "T-Tem1GDP";
  species B_Bfa1_Tem1GTP in SPB = 0; B_Bfa1_Tem1GTP is "B-Bfa1-Tem1GTP";
  species B_Bfa1P4_Tem1GTP in SPB = 0; B_Bfa1P4_Tem1GTP is "B-Bfa1P4-Tem1GTP";
  species B_Bfa1P5_Tem1GTP in SPB = 0; B_Bfa1P5_Tem1GTP is "B-Bfa1P5-Tem1GTP";
  species B_Bfa1_Tem1GDP in SPB = 0; B_Bfa1_Tem1GDP is "B-Bfa1-Tem1GDP";
  species B_Bfa1P4_Tem1GDP in SPB = 0; B_Bfa1P4_Tem1GDP is "B-Bfa1P4-Tem1GDP";
  species B_Bfa1P5_Tem1GDP in SPB = 0; B_Bfa1P5_Tem1GDP is "B-Bfa1P5-Tem1GDP";
  species Bfa1_Tem1GTP in Cytosol = 0; Bfa1_Tem1GTP is "Bfa1-Tem1GTP";
  species Bfa1P4_Tem1GTP in Cytosol = 0; Bfa1P4_Tem1GTP is "Bfa1P4-Tem1GTP";
  species Bfa1P5_Tem1GTP in Cytosol = 0; Bfa1P5_Tem1GTP is "Bfa1P5-Tem1GTP";
  species Bfa1_Tem1GDP in Cytosol = 0; Bfa1_Tem1GDP is "Bfa1-Tem1GDP";
  species Bfa1P4_Tem1GDP in Cytosol = 0; Bfa1P4_Tem1GDP is "Bfa1P4-Tem1GDP";
  species Bfa1P5_Tem1GDP in Cytosol = 0; Bfa1P5_Tem1GDP is "Bfa1P5-Tem1GDP";

  // Parameters:
  konB = 1250000 pmps;
  koffB = 0.0012 ps;
  konB4 = 20000 pmps;
  koffB4 = 0.0365 ps;
  konBT = 36500000 pmps;
  konB4T = 36500000 pmps;
  konB5T = 5500000 pmps;
  koffBT = 0.183 ps;
  konT = 1250000 pmps;
  koffT = 0.183 ps;
  kfKin4 = 1000 ps;
  kfKin4Cyto = 0.09 ps;
  krKin4 = 0.0251 ps;
  kfCdc5 = 1 ps;
  krCdc5 = 0.01 ps;
  khyd = 0.00224 ps;
  knex = 0.0136 ps;
  khydBT = 2 ps;
  khydB4T = 2 ps;
  u = 1 dimensionless;
  alpha = 0 dimensionless;
  active_Tem1_SPB has molecules; active_Tem1_SPB is "Active Tem1 at the SPB";
  active_Tem1_Cytosol has molecules; active_Tem1_Cytosol is "Active Tem1 in the cytosol";
  inactive_Tem1_SPB has molecules; inactive_Tem1_SPB is "Inactive Tem1 at the SPB";
  inactive_Tem1_Cytosol has molecules; inactive_Tem1_Cytosol is "Inactive Tem1 in the cytosol";
  active_Bfa1_SPB has molecules; active_Bfa1_SPB is "Active Bfa1 at the SPB";
  active_Bfa1_Cytosol has molecules; active_Bfa1_Cytosol is "Active Bfa1 in the cytosol";
  inactive_Bfa1_SPB has molecules; inactive_Bfa1_SPB is "Inactive Bfa1 at the SPB";
  inactive_Bfa1_Cytosol has molecules; inactive_Bfa1_Cytosol is "Inactive Bfa1 in the cytosol";
  total_Tem1_SPB has molecules; total_Tem1_SPB is "Total Tem1 at the SPB";
  total_Tem1_Cytosol has molecules; total_Tem1_Cytosol is "Total Tem1 in the Cytosol";
  total_Bfa1_SPB has molecules; total_Bfa1_SPB is "Total Bfa1 at the SPB";
  total_Bfa1_Cytosol has molecules; total_Bfa1_Cytosol is "Total Bfa1 in the Cytosol";
  NA = 6.022e23 pmole; NA is "Avogadro's number";

  // Assignment rules:
  active_Tem1_SPB := (T_Tem1GTP + B_Bfa1_Tem1GTP + B_Bfa1P4_Tem1GTP + B_Bfa1P5_Tem1GTP)*NA*SPB;
  active_Tem1_Cytosol := (Tem1GTP + Bfa1_Tem1GTP + Bfa1P4_Tem1GTP + Bfa1P5_Tem1GTP)*NA*Cytosol;
  inactive_Tem1_SPB := (T_Tem1GDP + B_Bfa1_Tem1GDP + B_Bfa1P4_Tem1GDP + B_Bfa1P5_Tem1GDP)*NA*SPB;
  inactive_Tem1_Cytosol := (Tem1GDP + Bfa1_Tem1GDP + Bfa1P4_Tem1GDP + Bfa1P5_Tem1GDP)*NA*Cytosol;
  active_Bfa1_SPB := (B_Bfa1 + B_Bfa1_Tem1GTP + B_Bfa1_Tem1GDP + B_Bfa1P4 + B_Bfa1P4_Tem1GTP + B_Bfa1P4_Tem1GDP)*NA*SPB;
  active_Bfa1_Cytosol := (Bfa1 + Bfa1_Tem1GTP + Bfa1_Tem1GDP + Bfa1P4 + Bfa1P4_Tem1GTP + Bfa1P4_Tem1GDP)*NA*Cytosol;
  inactive_Bfa1_SPB := (B_Bfa1P5 + B_Bfa1P5_Tem1GTP + B_Bfa1P5_Tem1GDP)*NA*SPB;
  inactive_Bfa1_Cytosol := (Bfa1P5 + Bfa1P5_Tem1GTP + Bfa1P5_Tem1GDP)*NA*Cytosol;
  total_Tem1_SPB := active_Tem1_SPB + inactive_Tem1_SPB;
  total_Tem1_Cytosol := active_Tem1_Cytosol + inactive_Tem1_Cytosol;
  total_Bfa1_SPB := active_Bfa1_SPB + inactive_Bfa1_SPB;
  total_Bfa1_Cytosol := active_Bfa1_Cytosol + inactive_Bfa1_Cytosol;

  // Reactions:
  R1_Rev_SPB_association_of_Bfa1: SPB_B + Bfa1 -> B_Bfa1; SPB*(konB*SPB_B*Bfa1 - koffB*B_Bfa1); R1_Rev_SPB_association_of_Bfa1 is "R1: Rev. SPB-association of Bfa1";
  R2: Bfa1P4 + SPB_B -> B_Bfa1P4; SPB*(konB4*SPB_B*Bfa1P4 - koffB4*B_Bfa1P4); R2 is "R2: Rev. SPB-association of Kin4-phosphorylated Bfa1";
  R3: Bfa1P5 + SPB_B -> B_Bfa1P5; SPB*(konB*SPB_B*Bfa1P5 - koffB*B_Bfa1P5); R3 is "R3: Rev. SPB-association of Cdc5-phosphorylated Bfa1";
  R4: Bfa1_Tem1GTP + SPB_B -> B_Bfa1_Tem1GTP; SPB*(konB*SPB_B*Bfa1_Tem1GTP - koffB*B_Bfa1_Tem1GTP); R4 is "R4: Rev. SPB-association of Bfa1-Tem1GTP complex";
  R5: Bfa1P4_Tem1GTP + SPB_B -> B_Bfa1P4_Tem1GTP; SPB*(konB4*Bfa1P4_Tem1GTP*SPB_B - koffB4*B_Bfa1P4_Tem1GTP); R5 is "R5: Rev. SPB-association of Kin4-phosphorylated Bfa1-Tem1GTP complex";
  R6: Bfa1P5_Tem1GTP + SPB_B -> B_Bfa1P5_Tem1GTP; SPB*(konB*SPB_B*Bfa1P5_Tem1GTP - koffB*B_Bfa1P5_Tem1GTP); R6 is "R6: Rev. SPB-association of Cdc5-phosphorylated Bfa1-Tem1GTP complex";
  R7: Bfa1_Tem1GDP + SPB_B -> B_Bfa1_Tem1GDP; SPB*(konB*SPB_B*Bfa1_Tem1GDP - koffB*B_Bfa1_Tem1GDP); R7 is "R7: Rev. SPB-association of Bfa1-Tem1GDP complex";
  R8: Bfa1P4_Tem1GDP + SPB_B -> B_Bfa1P4_Tem1GDP; SPB*(konB4*SPB_B*Bfa1P4_Tem1GDP - koffB4*B_Bfa1P4_Tem1GDP); R8 is "R8: Rev. SPB-association of Kin4 phosphorylated Bfa1-Tem1GDP complex";
  R9: Bfa1P5_Tem1GDP + SPB_B -> B_Bfa1P5_Tem1GDP; SPB*(konB*SPB_B*Bfa1P5_Tem1GDP - koffB*B_Bfa1P5_Tem1GDP); R9 is "R9: Rev. SPB-association of Cdc5-phosphorylated Bfa1-Tem1GDP complex";
  R10: Tem1GTP + B_Bfa1 -> B_Bfa1_Tem1GTP; SPB*(konBT*B_Bfa1*Tem1GTP - koffBT*B_Bfa1_Tem1GTP); R10 is "R10: Rev. association of Tem1GTP with SPB-bound Bfa1";
  R11: Tem1GTP + B_Bfa1P4 -> B_Bfa1P4_Tem1GTP; SPB*(konB4T*B_Bfa1P4*Tem1GTP - koffBT*B_Bfa1P4_Tem1GTP); R11 is "R11: Rev. association of Tem1GTP with SPB-bound Kin4-phosphorylated Bfa1";
  R12: Tem1GTP + B_Bfa1P5 -> B_Bfa1P5_Tem1GTP; SPB*(konB5T*B_Bfa1P5*Tem1GTP - koffBT*B_Bfa1P5_Tem1GTP); R12 is "R12: Rev. association of Tem1GTP with SPB-bound Cdc5-phosphorylated Bfa1";
  R13: Tem1GDP + B_Bfa1 -> B_Bfa1_Tem1GDP; SPB*(konBT*B_Bfa1*Tem1GDP - koffBT*B_Bfa1_Tem1GDP); R13 is "R13: Rev. association of Tem1GDP with SPB-bound Bfa1";
  R14: Tem1GDP + B_Bfa1P4 -> B_Bfa1P4_Tem1GDP; SPB*(konB4T*B_Bfa1P4*Tem1GDP - koffBT*B_Bfa1P4_Tem1GDP); R14 is "R14: Rev. association of Tem1GDP with SPB-bound Kin4-phosphorylated Bfa1";
  R15: Tem1GDP + B_Bfa1P5 -> B_Bfa1P5_Tem1GDP; SPB*(konB5T*B_Bfa1P5*Tem1GDP - koffBT*B_Bfa1P5_Tem1GDP); R15 is "R15: Rev. association of Tem1GDP with SPB-bound Cdc5-phosphorylated Bfa1";
  R16: Bfa1 + Tem1GTP -> Bfa1_Tem1GTP; Cytosol*(alpha*konBT*Bfa1*Tem1GTP - koffBT*Bfa1_Tem1GTP); R16 is "R16: Rev. association of Tem1GTP with Bfa1";
  R17: Bfa1P4 + Tem1GTP -> Bfa1P4_Tem1GTP; Cytosol*(alpha*konB4T*Bfa1P4*Tem1GTP - koffBT*Bfa1P4_Tem1GTP); R17 is "R17: Rev. association of Tem1GTP with Kin4-phosphorylated Bfa1";
  R18: Bfa1P5 + Tem1GTP -> Bfa1P5_Tem1GTP; Cytosol*(alpha*konB5T*Bfa1P5*Tem1GTP - koffBT*Bfa1P5_Tem1GTP); R18 is "R18: Rev. association of Tem1GTP with Cdc5-phosphorylated Bfa1";
  R19: Bfa1 + Tem1GDP -> Bfa1_Tem1GDP; Cytosol*(alpha*konBT*Bfa1*Tem1GDP - koffBT*Bfa1_Tem1GDP); R19 is "R19: Rev. association of Tem1GDP with Bfa1";
  R20: Bfa1P4 + Tem1GDP -> Bfa1P4_Tem1GDP; Cytosol*(alpha*konB4T*Bfa1P4*Tem1GDP - koffBT*Bfa1P4_Tem1GDP); R20 is "R20: Rev. association of Tem1GDP with Kin4-phosphorylated Bfa1";
  R21: Bfa1P5 + Tem1GDP -> Bfa1P5_Tem1GDP; Cytosol*(alpha*konB5T*Bfa1P5*Tem1GDP - koffBT*Bfa1P5_Tem1GDP); R21 is "R21: Rev. association of Tem1GDP with Cdc5-phosphorylated Bfa1";
  R22: Tem1GTP + SPB_T -> T_Tem1GTP; SPB*(konT*SPB_T*Tem1GTP - koffT*T_Tem1GTP); R22 is "R22: Rev. SPB-association of Tem1GTP";
  R23: Tem1GDP + SPB_T -> T_Tem1GDP; SPB*(konT*SPB_T*Tem1GDP - koffT*T_Tem1GDP); R23 is "R23: Rev. SPB-association of Tem1GDP";
  R24: B_Bfa1 => B_Bfa1P4; SPB*u*kfKin4*B_Bfa1; R24 is "R24: Phosphorylation of SPB-bound Bfa1 by Kin4";
  R25: B_Bfa1_Tem1GTP => B_Bfa1P4_Tem1GTP; SPB*u*kfKin4*B_Bfa1_Tem1GTP; R25 is "R25: Phosphorylation of SPB-bound Bfa1:Tem1GTP by Kin4";
  R26: B_Bfa1_Tem1GDP => B_Bfa1P4_Tem1GDP; SPB*u*kfKin4*B_Bfa1_Tem1GDP; R26 is "R26: Phosphorylation of SPB-bound Bfa1:Tem1GDP by Kin4";
  R27: B_Bfa1 => B_Bfa1P5; SPB*kfCdc5*B_Bfa1; R27 is "R27: Phosphorylation of SPB-bound Bfa1 by Cdc5";
  R28: B_Bfa1_Tem1GTP => B_Bfa1P5_Tem1GTP; SPB*kfCdc5*B_Bfa1_Tem1GTP; R28 is "R28: Phosphorylation of SPB-bound Bfa1:Tem1GTP by Cdc5";
  R29: B_Bfa1_Tem1GDP => B_Bfa1P5_Tem1GDP; SPB*kfCdc5*B_Bfa1_Tem1GDP; R29 is "R29: Phosphorylation of SPB-bound Bfa1:Tem1GDP by Cdc5";
  R47: B_Bfa1P4_Tem1GTP => B_Bfa1P4_Tem1GDP; SPB*khydB4T*B_Bfa1P4_Tem1GTP; R47 is "R47: GAP-accelerated GTP-hydrolysis";
  R46: B_Bfa1_Tem1GTP => B_Bfa1_Tem1GDP; SPB*khydBT*B_Bfa1_Tem1GTP; R46 is "R46: GAP-accelerated GTP-hydrolysis";
  R48: B_Bfa1P5_Tem1GTP => B_Bfa1P5_Tem1GDP; SPB*khyd*B_Bfa1P5_Tem1GTP; R48 is "R48: GTP-hydrolysis with intrinisc GTPase activity";
  R30: Bfa1 => Bfa1P4; Cytosol*u*kfKin4Cyto*Bfa1; R30 is "R30: Phosphorylation of Bfa1 by cytosolic Kin4";
  R33: Bfa1P4 => Bfa1; Cytosol*krKin4*Bfa1P4; R33 is "R33: Dephosphorylation of Bfa1 by a yet unidentified phosphatase counteracting Kin4";
  R36: Bfa1P5 => Bfa1; Cytosol*u*krCdc5*Bfa1P5; R36 is "R36: Dephosphorylation of Cdc5-phosphorylated Bfa1 presumably by PP2A";
  R40: Tem1GDP => Tem1GTP; Cytosol*knex*Tem1GDP; R40 is "R40: GDP- for GTP nucleotide exchange";
  R39: Tem1GTP => Tem1GDP; Cytosol*khyd*Tem1GTP; R39 is "R39: GTP-hydrolysis with intrinisc GTPase activity";
  R42: T_Tem1GDP => T_Tem1GTP; SPB*knex*T_Tem1GDP; R42 is "R42: GDP- for GTP nucleotide exchange";
  R41: T_Tem1GTP => T_Tem1GDP; SPB*khyd*T_Tem1GTP; R41 is "R41: GTP-hydrolysis with intrinisc GTPase activity";
  R44: Bfa1P4_Tem1GTP => Bfa1P4_Tem1GDP; Cytosol*khydB4T*Bfa1P4_Tem1GTP; R44 is "R44: GAP-accelerated GTP-hydrolysis";
  R43: Bfa1_Tem1GTP => Bfa1_Tem1GDP; Cytosol*khydBT*Bfa1_Tem1GTP; R43 is "R43: GAP-accelerated GTP-hydrolysis";
  R45: Bfa1P5_Tem1GTP => Bfa1P5_Tem1GDP; Cytosol*khyd*Bfa1P5_Tem1GTP; R45 is "R45: GTP-hydrolysis with intrinisc GTPase activity";
  R34: Bfa1P4_Tem1GTP => Bfa1_Tem1GTP; Cytosol*krKin4*Bfa1P4_Tem1GTP; R34 is "R34: Dephosphorylation of Bfa1 by a yet unidentified phosphatase counteracting Kin4";
  R37: Bfa1P5_Tem1GTP => Bfa1_Tem1GTP; Cytosol*u*krCdc5*Bfa1P5_Tem1GTP; R37 is "R37: Dephosphorylation of Cdc5-phosphorylated Bfa1 presumably by PP2A";
  R31: Bfa1_Tem1GTP => Bfa1P4_Tem1GTP; Cytosol*u*kfKin4Cyto*Bfa1_Tem1GTP; R31 is "R31: Phosphorylation of Bfa1:Tem1GTP by cytosolic Kin4";
  R35: Bfa1P4_Tem1GDP => Bfa1_Tem1GDP; Cytosol*krKin4*Bfa1P4_Tem1GDP; R35 is "R35: Dephosphorylation of Bfa1 by a yet unidentified phosphatase counteracting Kin4";
  R38: Bfa1P5_Tem1GDP => Bfa1_Tem1GDP; Cytosol*u*krCdc5*Bfa1P5_Tem1GDP; R38 is "R38: Dephosphorylation of Cdc5-phosphorylated Bfa1 presumably by PP2A";
  R32: Bfa1_Tem1GDP => Bfa1P4_Tem1GDP; Cytosol*u*kfKin4Cyto*Bfa1_Tem1GDP; R32 is "R32: Phosphorylation of Bfa1:Tem1GDP by cytosolic Kin4";

  // Events:
  spindle_alignment: at (time >= 1800): u = 0; spindle_alignment is "SPOC deactivation upon correct spindle alignment";

  // Unit definitions:
  unit substance = mole;
  unit volume = litre;
  unit area = metre^2;
  unit length = metre;
  unit time = second;
  unit molar = mole / litre;
  unit pmps = litre / (mole * second); pmps is "per molar per second";
  unit ps = 1 / second; ps is "per second";
  unit molecules = dimensionless;
  unit pmole = 1 / mole; pmole is "per mole";
end
